#include "../libdef.any"

// ----------------------------------------------------------
// Model configuration:
// For more info on body model configuration options please load the model and double click on:
// #path HTML_DOC "<AMMR_PATH_DOC>/bm_config/index.html"
// ----------------------------------------------------------

//These statements enable detailed arms and kinematic shoulder rhythm
#define BM_HAND_MODEL _HAND_MODEL_ANYBODY_
#define BM_ARM_SHOULDER_RHYTHM ON

// Use interpolation drivers to define motion
#define DriverSelection "FreePostureMove"

// actual model
#include "FreePostureFullBodyStatic.Main.any"
