  // ************************************
  // Drivers for the right arm
  // ************************************


  #if BM_ARM_RIGHT & (BM_ARM_SHOULDER_RHYTHM == OFF)
  //Sterno clavicular joint driver
  AnyKinEqSimpleDriver SCDriverRight ={
    AnyKinMeasure& ref1 =...HumanModel.Interface.Right.SternoClavicularProtraction;
    AnyKinMeasure& ref2 =...HumanModel.Interface.Right.SternoClavicularElevation;
    AnyKinMeasure& ref3 =...HumanModel.Interface.Right.SternoClavicularAxialRotation;
    DriverPos = pi/180*{
      .JntPos.Right.SternoClavicularProtraction,
      .JntPos.Right.SternoClavicularElevation,
      .JntPos.Right.SternoClavicularAxialRotation
    };
    DriverVel = pi/180*{
      .JntVel.Right.SternoClavicularProtraction,
      .JntVel.Right.SternoClavicularElevation,
      .JntVel.Right.SternoClavicularAxialRotation
    };
    Reaction.Type={Off,Off,Off};
  };
  #endif

  //Glenohumeral joint
  AnyKinEqSimpleDriver GHDriverRight={
    AnyKinMeasure& ref1 =...HumanModel.Interface.Right.GlenohumeralAbduction;
    AnyKinMeasure& ref2 =...HumanModel.Interface.Right.GlenohumeralFlexion;
    AnyKinMeasure& ref3 =...HumanModel.Interface.Right.GlenohumeralExternalRotation;

     DriverPos=pi/180*{
      .JntPos.Right.GlenohumeralAbduction,  //GH joint
      .JntPos.Right.GlenohumeralFlexion,  //GH joint
      .JntPos.Right.GlenohumeralExternalRotation  //GH joint
     };
     DriverVel = pi/180*{
      .JntVel.Right.GlenohumeralAbduction,  //GH joint
      .JntVel.Right.GlenohumeralFlexion,  //GH joint
      .JntVel.Right.GlenohumeralExternalRotation  //GH joint
     };
     Reaction.Type={Off,Off,Off};
  };

  //Elbow flexion driver
  AnyKinEqSimpleDriver ElbowFlexionDriverRight={
    AnyKinMeasureOrg  &Elbow =...HumanModel.Interface.Right.ElbowFlexion;
    DriverPos=pi/180*{.JntPos.Right.ElbowFlexion};
    DriverVel = pi/180*{.JntVel.Right.ElbowFlexion};
    Reaction.Type={Off};
  };

  //Elbow pronation driver
  AnyKinEqSimpleDriver ElbowPronationDriverRight={
    AnyKinMeasure& Elbow =...HumanModel.Interface.Right.ElbowPronation;
    DriverPos = pi/180*{.JntPos.Right.ElbowPronation };
    DriverVel=pi/180*{.JntVel.Right.ElbowPronation };
    Reaction.Type={Off};
  };

  //Wrist driver
  AnyKinEqSimpleDriver WristDriverRight ={
    AnyKinMeasure& ref1 =...HumanModel.Interface.Right.WristFlexion;
    AnyKinMeasure& ref2 =...HumanModel.Interface.Right.WristAbduction;
    DriverPos = pi/180*{
         .JntPos.Right.WristFlexion,
         .JntPos.Right.WristAbduction
       };

    DriverVel = pi/180*{
         .JntVel.Right.WristFlexion,
         .JntVel.Right.WristAbduction};
    Reaction.Type={Off,Off};
  };
