  // ************************************
  // Drivers for the left arm
  // ************************************


  #if BM_ARM_SHOULDER_RHYTHM_LEFT == 0
  //Sterno clavicular joint driver
  AnyKinEqInterPolDriver SCDriverLeft ={
    AnyKinMeasureOrg &ref1 =...HumanModel.Interface.Left.SternoClavicularProtraction;
    AnyKinMeasureOrg &ref2 =...HumanModel.Interface.Left.SternoClavicularElevation;
    AnyKinMeasureOrg &ref3 =...HumanModel.Interface.Left.SternoClavicularAxialRotation;

    Data = pi/180*{
      .JntPos.Right.SternoClavicularProtraction,
      .JntPos.Right.SternoClavicularElevation,
      .JntPos.Right.SternoClavicularAxialRotation
    };
    T=.JntPos.Right.SternoClavicularTime;

   Type=PiecewiseLinear;
   Reaction.Type={Off,Off,Off};
  };
  #endif


  //Glenohumeral joint driver
  AnyKinEqInterPolDriver GHDriverLeft={
    AnyKinMeasureOrg &ref1 =...HumanModel.Interface.Left.GlenohumeralAbduction;
    AnyKinMeasureOrg &ref2 =...HumanModel.Interface.Left.GlenohumeralFlexion;
    AnyKinMeasureOrg &ref3 =...HumanModel.Interface.Left.GlenohumeralExternalRotation;
    Data=pi/180*{
      .JntPos.Right.GlenohumeralAbductionVec,  //GH joint
      .JntPos.Right.GlenohumeralFlexionVec,  //GH joint
      .JntPos.Right.GlenohumeralExternalRotationVec  //GH joint
     };
 T=.JntPos.Right.GlenohumeralTime;
    Type=PiecewiseLinear;

    Reaction.Type={Off,Off,Off};
  };

  //Elbow flexion driver
  AnyKinEqInterPolDriver ElbowFEDriverLeft={
  AnyKinMeasureOrg  &Elbow =...HumanModel.Interface.Left.ElbowFlexion;
    Data=pi/180*{.JntPos.Right.ElbowFlexionVec};
 T=.JntPos.Right.ElbowFlexionTime;
    Type=PiecewiseLinear;

    Reaction.Type={Off};
  };

  //Elbow pronation driver
  AnyKinEqInterPolDriver ElbowPSDriverLeft={
    AnyKinMeasureOrg &Elbow =...HumanModel.Interface.Left.ElbowPronation;
    Data = pi/180*{.JntPos.Right.ElbowPronationVec };
  Type=PiecewiseLinear;

 T=.JntPos.Right.ElbowPronationTime;
    Reaction.Type={Off};
  };


  //Wrist driver
  AnyKinEqInterPolDriver WristDriverLeft ={
    AnyKinMeasureOrg &ref1 =...HumanModel.Interface.Left.WristFlexion;
    AnyKinMeasureOrg &ref2 =...HumanModel.Interface.Left.WristAbduction;
     T=.JntPos.Left.WristTime;

    Data = pi/180*{
         .JntPos.Left.WristFlexionVec,
         .JntPos.Left.WristAbductionVec};
    Reaction.Type={Off,Off};
    Type=PiecewiseLinear;

  };
