// ************************************
// Drivers for the right arm
// ************************************


#if BM_ARM_SHOULDER_RHYTHM_RIGHT == 0
//Sterno clavicular joint driver
AnyKinEqInterPolDriver SCDriverRight ={
  AnyKinMeasureOrg &ref1 =...HumanModel.Interface.Right.SternoClavicularProtraction;
  AnyKinMeasureOrg &ref2 =...HumanModel.Interface.Right.SternoClavicularElevation;
  AnyKinMeasureOrg &ref3 =...HumanModel.Interface.Right.SternoClavicularAxialRotation;
  Data = pi/180*{
    .JntPos.Left.SternoClavicularProtraction,
    .JntPos.Left.SternoClavicularElevation,
    .JntPos.Left.SternoClavicularAxialRotation
  };

  T=.JntPos.Left.SternoClavicularTime;
  Type=PiecewiseLinear   ;
  Reaction.Type={Off,Off,Off};
};
#endif

//Glenohumeral joint
AnyKinEqInterPolDriver GHDriverRight={
  AnyKinMeasureOrg &ref1 =...HumanModel.Interface.Right.GlenohumeralAbduction;
  AnyKinMeasureOrg &ref2 =...HumanModel.Interface.Right.GlenohumeralFlexion;
  AnyKinMeasureOrg &ref3 =...HumanModel.Interface.Right.GlenohumeralExternalRotation;

  Data=pi/180*{
    .JntPos.Left.GlenohumeralAbductionVec,  //GH joint
    .JntPos.Left.GlenohumeralFlexionVec,  //GH joint
    .JntPos.Left.GlenohumeralExternalRotationVec  //GH joint
  };
  T=.JntPos.Left.GlenohumeralTime;
  Type=PiecewiseLinear;

  Reaction.Type={Off,Off,Off};
};


//Elbow flexion driver
AnyKinEqInterPolDriver ElbowFlexionDriverRight={
  AnyKinMeasureOrg  &Elbow =...HumanModel.Interface.Right.ElbowFlexion;
  Data=pi/180*{.JntPos.Left.ElbowFlexionVec};
  T=.JntPos.Left.ElbowFlexionTime;
  Type=PiecewiseLinear;
  Reaction.Type={Off};
};

//Elbow pronation driver
AnyKinEqInterPolDriver ElbowPronationDriverRight={
  AnyKinMeasureOrg &Elbow =...HumanModel.Interface.Right.ElbowPronation;

  Data= pi/180*{.JntPos.Left.ElbowPronationVec };
  T=.JntPos.Left.ElbowPronationTime;
  Type=PiecewiseLinear;    Reaction.Type={Off};
};

//Wrist driver
AnyKinEqInterPolDriver WristDriverRight ={
  AnyKinMeasureOrg &ref1 =...HumanModel.Interface.Right.WristFlexion;
  AnyKinMeasureOrg &ref2 =...HumanModel.Interface.Right.WristAbduction;
  Data = pi/180*{
    .JntPos.Left.WristFlexionVec,
    .JntPos.Left.WristAbductionVec};
    Type=PiecewiseLinear;

  T=.JntPos.Left.WristTime;
  Reaction.Type={Off,Off};
};
