AnyFolder InterpolationFunctions = {

  // Aliases for convenient referencing
  AnyFolder &JntPos=.Posture;
  AnyFolder &Thorax = ...HumanModel.BodyModel.Trunk.SegmentsThorax.ThoraxSeg;

  // ************************************
  // Functions for attaching the pelvis to the global reference system
  // ************************************

  AnyFunInterpol PelvisGroundFunction ={

    Data={
      .JntPos.PelvisPosXVec,
      .JntPos.PelvisPosYVec,
      .JntPos.PelvisPosZVec,
      pi/180*.JntPos.PelvisRotZVec,
      pi/180*.JntPos.PelvisRotYVec,
      pi/180*.JntPos.PelvisRotXVec
    };
    T=.JntPos.PelvisPosTime;
    Type=PiecewiseLinear;
  };


  // ************************************
  // Functions for the spine
  // ************************************

  //Neck Function
  AnyFunInterpol NeckFunction = {
    Data = pi/180*{.JntPos.NeckExtensionVec};
    T=.JntPos.NeckTime;
    Type=PiecewiseLinear;
  };

  //Thorax pelvis rotation Function
  AnyFunInterpol PostureFunction = {
    Data = pi/180*{
      .JntPos.PelvisThoraxLateralBendingVec,
      .JntPos.PelvisThoraxRotationVec,
      .JntPos.PelvisThoraxExtensionVec
    };
    T=.JntPos.PelvisThoraxTime;
    Type=PiecewiseLinear;
  };

  // ************************************
  // Functions for the right arm
  // ************************************

  //Sterno clavicular joint Function
  AnyFunInterpol SCFunctionRight ={
    Data = pi/180*{
      .JntPos.Right.SternoClavicularProtraction,
      .JntPos.Right.SternoClavicularElevation,
      .JntPos.Right.SternoClavicularAxialRotation
    };
    T=.JntPos.Right.SternoClavicularTime;
    Type=PiecewiseLinear;
  };

  //Glenohumeral joint
  AnyFunInterpol GHFunctionRight={
    Data=pi/180*{
      .JntPos.Right.GlenohumeralAbductionVec,  //GH joint
      .JntPos.Right.GlenohumeralFlexionVec,  //GH joint
      .JntPos.Right.GlenohumeralExternalRotationVec //GH joint
    };
    T=.JntPos.Right.GlenohumeralTime;
    Type=PiecewiseLinear;
  };

  //Elbow flexion Function
  AnyFunInterpol ElbowFlexionFunctionRight={
    Data=pi/180*{.JntPos.Right.ElbowFlexionVec};
    T=.JntPos.Right.ElbowFlexionTime;
    Type=PiecewiseLinear;
  };

  //Elbow pronation Function
  AnyFunInterpol ElbowPronationFunctionRight={
    Data = pi/180*{.JntPos.Right.ElbowPronationVec };
    T=.JntPos.Right.ElbowPronationTime;
    Type=PiecewiseLinear;
  };

  //Wrist Function
  AnyFunInterpol WristFunctionRight ={
    Data = pi/180*{
      .JntPos.Right.WristFlexionVec,
      .JntPos.Right.WristAbductionVec
    };
    T=.JntPos.Right.WristTime;
    Type=PiecewiseLinear;
  };

  // ************************************
  // Functions for the left arm
  // ************************************

  //Sterno clavicular joint Function
  AnyFunInterpol SCFunctionLeft ={
    Data = pi/180*{
      .JntPos.Left.SternoClavicularProtraction,
      .JntPos.Left.SternoClavicularElevation,
      .JntPos.Left.SternoClavicularAxialRotation
    };
    T=.JntPos.Left.SternoClavicularTime;
    Type=PiecewiseLinear;
  };

  //Glenohumeral joint Function
  AnyFunInterpol GHFunctionLeft={
    Data=pi/180*{
      .JntPos.Left.GlenohumeralAbductionVec,  //GH joint
      .JntPos.Left.GlenohumeralFlexionVec,  //GH joint
      .JntPos.Left.GlenohumeralExternalRotationVec  //GH joint
    };
    T=.JntPos.Left.GlenohumeralTime;
    Type=PiecewiseLinear;
  };

  //Elbow flexion Function
  AnyFunInterpol ElbowFEFunctionLeft={
    Data=pi/180*{.JntPos.Left.ElbowFlexionVec};
    T=.JntPos.Left.ElbowFlexionTime;
    Type=PiecewiseLinear;
  };

  //Elbow pronation Function
  AnyFunInterpol ElbowPSFunctionLeft={
    Data= pi/180*{.JntPos.Left.ElbowPronationVec };
    T=.JntPos.Left.ElbowPronationTime;
    Type=PiecewiseLinear;
  };

  //Wrist Function
  AnyFunInterpol WristFunctionLeft = {
    Data = pi/180*{
      .JntPos.Left.WristFlexionVec,
      .JntPos.Left.WristAbductionVec};
    T=.JntPos.Left.WristTime;
    Type=PiecewiseLinear;
  };

  // ************************************
  // Functions for the right leg
  // ************************************

  //Hip Function
  AnyFunInterpol HipFunctionRight={
    Data= pi/180*{
      .JntPos.Right.HipFlexionVec,
      .JntPos.Right.HipExternalRotationVec,
      .JntPos.Right.HipAbductionVec
    };
    T=.JntPos.Left.HipTime;
    Type=PiecewiseLinear;
  };

  //Knee Function
  AnyFunInterpol KneeFunctionRight={
    Data=pi/180*{.JntPos.Right.KneeFlexionVec};
    T=.JntPos.Left.KneeTime;
    Type=PiecewiseLinear;
  };

  //Ankle Function
  AnyFunInterpol AnkleFunctionRight={
    Data = pi/180*{.JntPos.Right.AnklePlantarFlexionVec,.JntPos.Right.SubTalarEversionVec};
    T=.JntPos.Left.AnkleTime;
    Type=PiecewiseLinear;
  };

  // ************************************
  // Functions for the Left leg
  // ************************************

  //Left hip Function
  AnyFunInterpol HipFunctionLeft={
    Data=pi/180*{
      .JntPos.Left.HipFlexionVec,
      .JntPos.Left.HipExternalRotationVec,
      .JntPos.Left.HipAbductionVec
    };
    T=.JntPos.Left.HipTime;
    Type=PiecewiseLinear;
  };

  //Knee Function
  AnyFunInterpol KneeFunctionLeft={
    Data=pi/180*{.JntPos.Left.KneeFlexionVec};
    T=.JntPos.Left.KneeTime;
    Type=PiecewiseLinear;
  };

  //Ankle Function
  AnyFunInterpol AnkleFunctionLeft={
    Data = pi/180*{.JntPos.Left.AnklePlantarFlexionVec,.JntPos.Left.SubTalarEversionVec};
    T=.JntPos.Left.AnkleTime;
    Type=PiecewiseLinear;
  };

// ************************************
// Drivers for the right fingers
// ************************************
AnyFolder Right ={

//finger1
AnyFunInterpol CMC1Flexion={
  Data= {..JntPos.Right.Finger1.CMCFlexionVec}*pi/180;
  T=..JntPos.Right.Finger1.FingerTime;
  Type=PiecewiseLinear;
};

AnyFunInterpol  CMC1Abduction={
  Data={..JntPos.Right.Finger1.CMCDeviationVec}*pi/180;
  T=..JntPos.Right.Finger1.FingerTime;
  Type=PiecewiseLinear;
};


AnyFunInterpol  MCP1Flexion={
  Data={..JntPos.Right.Finger1.MCPFlexionVec}*pi/180;
  T=..JntPos.Right.Finger1.FingerTime;
  Type=PiecewiseLinear;
};
AnyFunInterpol  MCP1Abduction={
  Data={..JntPos.Right.Finger1.MCPDeviationVec}*pi/180;
  T=..JntPos.Right.Finger1.FingerTime;
  Type=PiecewiseLinear;
};

AnyFunInterpol  DIP1={
  Data={..JntPos.Right.Finger1.DIPFlexionVec}*pi/180;
   T=..JntPos.Right.Finger1.FingerTime;
  Type=PiecewiseLinear;
};

AnyFunInterpol  MCP2={
  Data={..JntPos.Right.Finger2.MCPFlexionVec}*pi/180;
  T=..JntPos.Right.Finger2.FingerTime;
  Type=PiecewiseLinear;
};
AnyFunInterpol  PIP2={
  Data={..JntPos.Right.Finger2.PIPFlexionVec}*pi/180;
  T=..JntPos.Right.Finger2.FingerTime;
  Type=PiecewiseLinear;
};
AnyFunInterpol  DIP2={
  Data={..JntPos.Right.Finger2.DIPFlexionVec}*pi/180;
  T=..JntPos.Right.Finger2.FingerTime;
  Type=PiecewiseLinear;
};


AnyFunInterpol  MCP3={
  Data={..JntPos.Right.Finger3.MCPFlexionVec}*pi/180;
  T=..JntPos.Right.Finger3.FingerTime;
  Type=PiecewiseLinear;
};
AnyFunInterpol  PIP3={
  Data={..JntPos.Right.Finger3.PIPFlexionVec}*pi/180;
  T=..JntPos.Right.Finger3.FingerTime;
  Type=PiecewiseLinear;
};
AnyFunInterpol  DIP3={
  Data={..JntPos.Right.Finger3.DIPFlexionVec}*pi/180;
  T=..JntPos.Right.Finger3.FingerTime;
  Type=PiecewiseLinear;
};


AnyFunInterpol  MCP4={
  Data={..JntPos.Right.Finger4.MCPFlexionVec}*pi/180;
  T=..JntPos.Right.Finger4.FingerTime;
  Type=PiecewiseLinear;
};
AnyFunInterpol  PIP4={
  Data={..JntPos.Right.Finger4.PIPFlexionVec}*pi/180;
  T=..JntPos.Right.Finger4.FingerTime;
  Type=PiecewiseLinear;
};
AnyFunInterpol  DIP4={
  Data={..JntPos.Right.Finger4.DIPFlexionVec}*pi/180;
  T=..JntPos.Right.Finger4.FingerTime;
  Type=PiecewiseLinear;
};

AnyFunInterpol  MCP5={
  Data={..JntPos.Right.Finger5.MCPFlexionVec}*pi/180;
  T=..JntPos.Right.Finger5.FingerTime;
  Type=PiecewiseLinear;
};
AnyFunInterpol  PIP5={
  Data={..JntPos.Right.Finger5.PIPFlexionVec}*pi/180;
  T=..JntPos.Right.Finger5.FingerTime;
  Type=PiecewiseLinear;
};
AnyFunInterpol  DIP5={
  Data={..JntPos.Right.Finger5.DIPFlexionVec}*pi/180;
  T=..JntPos.Right.Finger5.FingerTime;
  Type=PiecewiseLinear;
};
};

// ************************************
// Drivers for the Left fingers
// ************************************
AnyFolder Left ={
//finger1
AnyFunInterpol CMC1Flexion={
  Data= {..JntPos.Left.Finger1.CMCFlexionVec}*pi/180;
  T=..JntPos.Left.Finger1.FingerTime;
  Type=PiecewiseLinear;
};

AnyFunInterpol  CMC1Abduction={
  Data={..JntPos.Left.Finger1.CMCDeviationVec}*pi/180;
  T=..JntPos.Left.Finger1.FingerTime;
  Type=PiecewiseLinear;
};


AnyFunInterpol  MCP1Flexion={
  Data={..JntPos.Left.Finger1.MCPFlexionVec}*pi/180;
  T=..JntPos.Left.Finger1.FingerTime;
  Type=PiecewiseLinear;
};

AnyFunInterpol  MCP1Abduction={
  Data={..JntPos.Left.Finger1.MCPDeviationVec}*pi/180;
  T=..JntPos.Right.Finger1.FingerTime;
  Type=PiecewiseLinear;
};

AnyFunInterpol  DIP1={
  Data={..JntPos.Left.Finger1.DIPFlexionVec}*pi/180;
   T=..JntPos.Left.Finger1.FingerTime;
  Type=PiecewiseLinear;
};

AnyFunInterpol  MCP2={
  Data={..JntPos.Left.Finger2.MCPFlexionVec}*pi/180;
  T=..JntPos.Left.Finger2.FingerTime;
  Type=PiecewiseLinear;
};
AnyFunInterpol  PIP2={
  Data={..JntPos.Left.Finger2.PIPFlexionVec}*pi/180;
  T=..JntPos.Left.Finger2.FingerTime;
  Type=PiecewiseLinear;
};
AnyFunInterpol  DIP2={
  Data={..JntPos.Left.Finger2.DIPFlexionVec}*pi/180;
  T=..JntPos.Left.Finger2.FingerTime;
  Type=PiecewiseLinear;
};


AnyFunInterpol  MCP3={
  Data={..JntPos.Left.Finger3.MCPFlexionVec}*pi/180;
  T=..JntPos.Left.Finger3.FingerTime;
  Type=PiecewiseLinear;
};
AnyFunInterpol  PIP3={
  Data={..JntPos.Left.Finger3.PIPFlexionVec}*pi/180;
  T=..JntPos.Left.Finger3.FingerTime;
  Type=PiecewiseLinear;
};
AnyFunInterpol  DIP3={
  Data={..JntPos.Left.Finger3.DIPFlexionVec}*pi/180;
  T=..JntPos.Left.Finger3.FingerTime;
  Type=PiecewiseLinear;
};


AnyFunInterpol  MCP4={
  Data={..JntPos.Left.Finger4.MCPFlexionVec}*pi/180;
  T=..JntPos.Left.Finger4.FingerTime;
  Type=PiecewiseLinear;
};
AnyFunInterpol  PIP4={
  Data={..JntPos.Left.Finger4.PIPFlexionVec}*pi/180;
  T=..JntPos.Left.Finger4.FingerTime;
  Type=PiecewiseLinear;
};
AnyFunInterpol  DIP4={
 Data={..JntPos.Left.Finger4.DIPFlexionVec}*pi/180;
  T=..JntPos.Left.Finger4.FingerTime;
  Type=PiecewiseLinear;
};

AnyFunInterpol  MCP5={
  Data={..JntPos.Left.Finger5.MCPFlexionVec}*pi/180;
  T=..JntPos.Left.Finger5.FingerTime;
  Type=PiecewiseLinear;
};
AnyFunInterpol  PIP5={
  Data={..JntPos.Left.Finger5.PIPFlexionVec}*pi/180;
  T=..JntPos.Left.Finger5.FingerTime;
  Type=PiecewiseLinear;
};
AnyFunInterpol  DIP5={
  Data={..JntPos.Left.Finger5.DIPFlexionVec}*pi/180;
  T=..JntPos.Left.Finger5.FingerTime;
  Type=PiecewiseLinear;
};


};

};//Functions
