//This file creates the environment around the human
//It creates the force plates and add the measure load to them

AnyFixedRefFrame GlobalRef ={
  Origin={0,0,0};
  AnyDrawRefFrame drw={ScaleXYZ=0.4*{1,1,1};};
};


ForcePlateType3 PlateB (
PlateName = PlateB,
Folder =Main.ModelSetup.C3DFileData,
Limb = .HumanModelRef.Right.Leg.Seg.Foot,
No=0,
Fx_12=Main.ModelSetup.C3DFileData.Analog.DataFiltered.FPBFx1_43_2,
Fx_34=Main.ModelSetup.C3DFileData.Analog.DataFiltered.FPBFx3_43_4,
Fy_14=Main.ModelSetup.C3DFileData.Analog.DataFiltered.FPBFy1_43_4,
Fy_23=Main.ModelSetup.C3DFileData.Analog.DataFiltered.FPBFy2_43_3,
Fz_1=Main.ModelSetup.C3DFileData.Analog.DataFiltered.FPBFz1,
Fz_2=Main.ModelSetup.C3DFileData.Analog.DataFiltered.FPBFz2,
Fz_3=Main.ModelSetup.C3DFileData.Analog.DataFiltered.FPBFz3,
Fz_4=Main.ModelSetup.C3DFileData.Analog.DataFiltered.FPBFz4)
={};


ForcePlateType3 PlateA (
PlateName = PlateA,
Folder =Main.ModelSetup.C3DFileData,
Limb = .HumanModelRef.Left.Leg.Seg.Foot,
No=1,
Fx_12=Main.ModelSetup.C3DFileData.Analog.DataFiltered.FPAFx1_43_2,
Fx_34=Main.ModelSetup.C3DFileData.Analog.DataFiltered.FPAFx3_43_4,
Fy_14=Main.ModelSetup.C3DFileData.Analog.DataFiltered.FPAY1_43_4,
Fy_23=Main.ModelSetup.C3DFileData.Analog.DataFiltered.FPAY2_43_3,
Fz_1=Main.ModelSetup.C3DFileData.Analog.DataFiltered.FPAZ1,
Fz_2=Main.ModelSetup.C3DFileData.Analog.DataFiltered.FPAZ2,
Fz_3=Main.ModelSetup.C3DFileData.Analog.DataFiltered.FPAZ3,
Fz_4=Main.ModelSetup.C3DFileData.Analog.DataFiltered.FPAZ4)
={};


ForcePlateType3 PlateC (
PlateName = PlateC,
Folder =Main.ModelSetup.C3DFileData,
Limb = .HumanModelRef.Left.Leg.Seg.Foot,
No=2,
Fx_12=Main.ModelSetup.C3DFileData.Analog.DataFiltered.FPCFx1_43_2,
Fx_34=Main.ModelSetup.C3DFileData.Analog.DataFiltered.FPCFx3_43_4,
Fy_14=Main.ModelSetup.C3DFileData.Analog.DataFiltered.FPCY1_43_4,
Fy_23=Main.ModelSetup.C3DFileData.Analog.DataFiltered.FPCY2_43_3,
Fz_1=Main.ModelSetup.C3DFileData.Analog.DataFiltered.FPCZ1,
Fz_2=Main.ModelSetup.C3DFileData.Analog.DataFiltered.FPCZ2,
Fz_3=Main.ModelSetup.C3DFileData.Analog.DataFiltered.FPCZ3,
Fz_4=Main.ModelSetup.C3DFileData.Analog.DataFiltered.FPCZ4)
={};


ForcePlateType3 PlateD (
PlateName = PlateD,
Folder =Main.ModelSetup.C3DFileData,
Limb = .HumanModelRef.Right.Leg.Seg.Foot,
No=3,
Fx_12=Main.ModelSetup.C3DFileData.Analog.DataFiltered.FPDFx1_43_2,
Fx_34=Main.ModelSetup.C3DFileData.Analog.DataFiltered.FPDFx3_43_4,
Fy_14=Main.ModelSetup.C3DFileData.Analog.DataFiltered.FPDY1_43_4,
Fy_23=Main.ModelSetup.C3DFileData.Analog.DataFiltered.FPDY2_43_3,
Fz_1=Main.ModelSetup.C3DFileData.Analog.DataFiltered.FPDZ1,
Fz_2=Main.ModelSetup.C3DFileData.Analog.DataFiltered.FPDZ2,
Fz_3=Main.ModelSetup.C3DFileData.Analog.DataFiltered.FPDZ3,
Fz_4=Main.ModelSetup.C3DFileData.Analog.DataFiltered.FPDZ4)
={};
