AnyFolder HumanModel={

      AnyFolder &Mannequin=.OptStudy.OptModel.Mannequin;

//      #include  "..\..\..\Body\AAUHuman\BodyModels\TwoLegs\BodyModel_Mus3e.any"
            #include  "..\..\..\Body\AAUHuman\BodyModels\TrunkNoMusclesTwoLegs\BodyModel.any"

      AnyFolder StrengthParameters={
        AnyVar SpecificMuscleTensionSpine= 150; //N/cm^2
        AnyVar StrengthIndexLeg= 3;
        AnyVar SpecificMuscleTensionShoulderArm= 150; //N/cm^2
      };

      //Choose between scaling laws
     // #include "..\..\..\Body\AAUHuman\Scaling\ScalingUniform.any"
     // #include "..\..\..\Body\AAUHuman\Scaling\ScalingLengthMass.any"
      #include "..\..\..\Body\AAUHuman\Scaling\ScalingLengthMassFat.any"


      Scaling = {
        //This is the file which set the segments lenghts
        #include "output-par.any"
        #include "AnyMan.any"
      };

    };
