#include "../libdef.any"

/**
This application is an example of how to use force-dependent kinematics solver applied
to a model with muscles and ligaments being switched on. This model also demonstrates
how to model the following objects/anatomical features:
1. Facet joints
2. Spine fixation device using clamps, screws and titanium rods.
*/
Main = {

  // All relevant input parameters, motion/time/etc.
  #include "Model/InputParameters.any"

  // this file controls default view and project (Projects Tab) settings
  // and switches off visualization of the muscles in the model
  #include "Model/SpineDeviceProject.any"

  // ----------------------------------------------------------
  // Path to draw settings
  // ----------------------------------------------------------
  #path BM_DRAWSETTINGS_FILE "Model/DrawSettings.any"

  // ----------------------------------------------------------
  // Model configuration:
  // For more info on body model configuration options please load the model and double click on:
  // #include "<ANYBODY_PATH_BODY>\Documentation\BodyModel.parameters.any"
  // ----------------------------------------------------------

  // Switch off arms and legs
  #define BM_LEG_RIGHT CONST_LEG_MODEL_OFF
  #define BM_LEG_LEFT CONST_LEG_MODEL_OFF
  #define BM_ARM_RIGHT OFF
  #define BM_ARM_LEFT OFF

  // Configure spine
  #define BM_TRUNK_LUMBAR_LIGAMENTS ON
  #define BM_TRUNK_LUMBAR_RHYTHM OFF

  // Define scaling law as ScalingLengthMassFat and provide anthropometric measurements
  #define BM_SCALING CONST_SCALING_LENGTHMASSFAT
  #path BM_SCALING_ANTHRO_FILE "Model/AnyManUniform.any"

  // The Mannequin file specifies load-time positions for all the segments
  // in the HumanModel. This is important for the model's ablity to resolve
  // all the kinematic constraints when the model is analyzed.
  // The mannequin file also drives those degrees of freedom of the human
  // model that are not governed by problem-specific drivers at run time.
  #path BM_MANNEQUIN_FILE "Model/Mannequin.any"

  // Model of the human body to be used for the analysis
  #include "<ANYBODY_PATH_BODY>/HumanModel.any"

  /// The actual model where all components are assembled
  AnyFolder Model ={
    /// Body model without default drivers
    AnyFolder &HumanModel=.HumanModel.BodyModel;
    /// Reference to the mannequin folder (used by drivers)
    AnyFolder &Mannequin =.HumanModel.Mannequin;

    //----------------------------------------
    // ADD FACET JOINTS
    //----------------------------------------
    HumanModel.Trunk = {
      #include "Model/FacetJoints.new/FacetJointsLumbar.any"
    };

    #include "Model/Environment.any"

    AnyFolder ModelEnvironmentConnection = {
      //--------------------------------------------------------------------------------
      // DEFINE MOTION OF THE MODEL:
      // this section uses the variables from MODEL SETUP section to prescribe motion to
      // the model. The posture is given by initial and final angles between thorax and
      // pelvis. All joint angles of the lumbar spine are computed using force-dependent
      // kinematics solver.
      //--------------------------------------------------------------------------------
      #include "Model/Drivers.any"
    };
    //--------------------------------------------------------------------------------
    // ADD SPINE FIXATION DEVICE
    //--------------------------------------------------------------------------------
    #include "Model/SpineFixation.any"
  };


  // The study: Operations to be performed on the model
  AnyBodyStudy Study = {
    AnyFolder &Model = .Model;
    Gravity = {0.0, -9.81, 0.0};
    tStart = 0.0;
    tEnd = Main.SimTime;
    nStep =20;

    InverseDynamics.Criterion.Power=2.0;
    Kinematics.KinematicTol=1e-7;
    //--------------------------------------------------------------------------------
    // SWITCH ON FORCE-DEPENDENT KINEMATICS SOLVER
    //--------------------------------------------------------------------------------
    InverseDynamics.ForceDepKinOnOff=On;
    InverseDynamics.Criterion.UpperBoundOnOff = Off;
    //InverseDynamics.Criterion.Type = MR_MinMaxStrict;

    //--------------------------------------------------------------------------------
    // DEFINE OUTPUT VARIABLES:
    // These variables show how the force-dependent kinematics solver automatically
    // determines angles of the spherical joints that are used to provide the lumbar
    // spine curvature. By changing parameters of the model one can understand how
    // the facets joints, the spine fixation device or other mechanisms affect the
    // "natural" (depending on external and muscle forces) shape of the lumbar spine
    //--------------------------------------------------------------------------------
    AnyOutputFile f_flexext =
    {  // flexion/extension angles of all joints in the lumbar spine
      FileName = ANYBODY_PATH_OUTPUT+"/LumbarSpineFlexExt.txt";
      AnyVar FE_t12l1 = Main.HumanModel.BodyModel.Trunk.JointsLumbar.T12L1Jnt.Pos[0]*180/pi;
      AnyVar FE_l1l2 = Main.HumanModel.BodyModel.Trunk.JointsLumbar.L1L2Jnt.Pos[0]*180/pi;
      AnyVar FE_l2l3 = Main.HumanModel.BodyModel.Trunk.JointsLumbar.L2L3Jnt.Pos[0]*180/pi;
      AnyVar FE_l3l4 = Main.HumanModel.BodyModel.Trunk.JointsLumbar.L3L4Jnt.Pos[0]*180/pi;
      AnyVar FE_l4l5 = Main.HumanModel.BodyModel.Trunk.JointsLumbar.L4L5Jnt.Pos[0]*180/pi;
      AnyVar FE_l5sacrum = Main.HumanModel.BodyModel.Trunk.JointsLumbar.L5SacrumJnt.Pos[0]*180/pi;
    };
    AnyOutputFile f_torsion =
    { // axial torsion angles of all joints in the lumbar spine
      FileName = ANYBODY_PATH_OUTPUT+"/LumbarSpineAxialTorsion.txt";
      AnyVar AT_t12l1 = Main.HumanModel.BodyModel.Trunk.JointsLumbar.T12L1Jnt.Pos[1]*180/pi;
      AnyVar AT_l1l2 = Main.HumanModel.BodyModel.Trunk.JointsLumbar.L1L2Jnt.Pos[1]*180/pi;
      AnyVar AT_l2l3 = Main.HumanModel.BodyModel.Trunk.JointsLumbar.L2L3Jnt.Pos[1]*180/pi;
      AnyVar AT_l3l4 = Main.HumanModel.BodyModel.Trunk.JointsLumbar.L3L4Jnt.Pos[1]*180/pi;
      AnyVar AT_l4l5 = Main.HumanModel.BodyModel.Trunk.JointsLumbar.L4L5Jnt.Pos[1]*180/pi;
      AnyVar AT_l5sacrum = Main.HumanModel.BodyModel.Trunk.JointsLumbar.L5SacrumJnt.Pos[1]*180/pi;
    };
    AnyOutputFile f_latbend =
    { // lateral bending angles of all joints in the lumbar spine
      FileName = ANYBODY_PATH_OUTPUT+"/LumbarSpineLatBend.txt";
      AnyVar LB_t12l1 = Main.HumanModel.BodyModel.Trunk.JointsLumbar.T12L1Jnt.Pos[2]*180/pi;
      AnyVar LB_l1l2 = Main.HumanModel.BodyModel.Trunk.JointsLumbar.L1L2Jnt.Pos[2]*180/pi;
      AnyVar LB_l2l3 = Main.HumanModel.BodyModel.Trunk.JointsLumbar.L2L3Jnt.Pos[2]*180/pi;
      AnyVar LB_l3l4 = Main.HumanModel.BodyModel.Trunk.JointsLumbar.L3L4Jnt.Pos[2]*180/pi;
      AnyVar LB_l4l5 = Main.HumanModel.BodyModel.Trunk.JointsLumbar.L4L5Jnt.Pos[2]*180/pi;
      AnyVar LB_l5sacrum = Main.HumanModel.BodyModel.Trunk.JointsLumbar.L5SacrumJnt.Pos[2]*180/pi;
    };
    AnyOutputFile f_thoraxpelvis = {
      // describes motion of the lumbar spine by showing all the angles between thorax and pelvis
      // please note that the order of rotation axes is different
      FileName = ANYBODY_PATH_OUTPUT+"/motion.txt";
      AnyVar LB_thpelvis = Main.HumanModel.BodyModel.Trunk.JointsLumbar.PelvisThoraxRotMeasure.Pos[0]*180/pi;
      AnyVar AT_thpelvis_at = Main.HumanModel.BodyModel.Trunk.JointsLumbar.PelvisThoraxRotMeasure.Pos[1]*180/pi;
      AnyVar FE_thpelvis = Main.HumanModel.BodyModel.Trunk.JointsLumbar.PelvisThoraxRotMeasure.Pos[2]*180/pi;
    };
  };

  // Include an operation sequence to run all required steps of your application (see Operations tab)
    #include "<ANYBODY_PATH_TOOLBOX>\Operations\RunAppSequence.any"

};  // Main
