  //Neck driver
  AnyKinEqSimpleDriver CervicalDriver ={
    AnyKinMeasureOrg &Ref1 = .RefHM.Interface.Trunk.SkullThoraxFlexion;
    AnyKinMeasureOrg &Ref2 = .RefHM.Interface.Trunk.SkullThoraxLateralBending;
    AnyKinMeasureOrg &Ref3 = .RefHM.Interface.Trunk.SkullThoraxRotation;
    DriverPos = pi/180*{0, 0, 0};
    DriverVel = pi/180*{0, 0, 0};
    Reaction.Type = {Off, Off, Off};
  };

  //Thorax pelvis rotation driver
  AnyKinEqSimpleDriver PostureDriver ={
    AnyKinMeasureOrg &Ref2 = ...HumanModel.Interface.Trunk.PelvisThoraxLateralBending;
    AnyKinMeasureOrg &Ref3 = ...HumanModel.Interface.Trunk.PelvisThoraxRotation;
    AnyKinMeasureOrg &Ref1 = ...HumanModel.Interface.Trunk.PelvisThoraxExtension;

    DriverPos = pi/180*{
          .JntPos.PelvisThoraxLateralBending,
      .JntPos.PelvisThoraxRotation,
      .JntPos.PelvisThoraxExtension
    };
    DriverVel = pi/180*{
      .JntVel.PelvisThoraxLateralBending,
      .JntVel.PelvisThoraxRotation,
      .JntVel.PelvisThoraxExtension
    };
    Reaction.Type = {Off,Off,Off};
  };


  MannequinLoads = {

    AnyForce3D TopVertebra = {
      AnyRefNode &ApplPoint = .hm.Trunk.SegmentsCervicalSpine.C1Seg.C1C0JntNode;
      F = .mql.TopVertebra;
    };
  };
