AnyFolder Drivers = {

  AnyFolder &JntPos=..Mannequin.Posture;
  AnyFolder &JntVel=..Mannequin.PostureVel;


  AnyFolder &Thorax = ..HumanModel.Trunk.SegmentsThorax.ThoraxSeg;


  // ************************************
  // Drivers for attaching the pelvis to the global reference system
  // ************************************

  AnyKinEqSimpleDriver PelvisGroundDriver ={
    AnyKinLinear lin ={
      AnyFixedRefFrame &ref1 =....EnvironmentModel.GlobalRef;
      AnySeg &ref2 =....HumanModel.Trunk.SegmentsLumbar.PelvisSeg;
    };
    AnyKinRotational rot ={
      AnyFixedRefFrame &ref1 =....EnvironmentModel.GlobalRef;
      AnySeg &ref2 =....HumanModel.Trunk.SegmentsLumbar.PelvisSeg;
      Type=RotAxesAngles;
    };
    DriverPos={
      .JntPos.PelvisPosX,
      .JntPos.PelvisPosY,
      .JntPos.PelvisPosZ,
      pi/180*.JntPos.PelvisRotZ,
      pi/180*.JntPos.PelvisRotY,
      pi/180*.JntPos.PelvisRotX
    };
    DriverVel={
      .JntVel.PelvisPosX,
      .JntVel.PelvisPosY,
      .JntVel.PelvisPosZ,
      pi/180*.JntVel.PelvisRotX,
      pi/180*.JntVel.PelvisRotY,
      pi/180*.JntVel.PelvisRotZ
    };
    Reaction.Type={On,On,On,On,On,On};
  };

  AnyFolder &RefHM = Main.Model.HumanModel;


  AnyFolder &ref=Main.Model.HumanModel.Trunk;


  // ************************************
  // Drivers for the spine
  // ************************************

  //Neck driver
  AnyKinEqSimpleDriver NeckJntDriver = {
    AnyKinMeasure& lb = ...HumanModel.Interface.Trunk.SkullThoraxLateralBending;
    AnyKinMeasure& ar = ...HumanModel.Interface.Trunk.SkullThoraxRotation;
    AnyKinMeasure& fe = ...HumanModel.Interface.Trunk.SkullThoraxFlexion;
    DriverPos = pi/180*{.JntPos.NeckLateralBending, .JntPos.NeckRotation, .JntPos.NeckExtension};
    DriverVel = pi/180*{.JntVel.NeckLateralBending, .JntVel.NeckRotation, .JntVel.NeckExtension};
    Reaction.Type = {Off, Off, Off};
  };

  //Thorax pelvis rotation driver
  AnyKinEqSimpleDriver PostureDriver ={
    AnyKinMeasure& Ref2 = ...HumanModel.Interface.Trunk.PelvisThoraxLateralBending;
    AnyKinMeasure& Ref3 = ...HumanModel.Interface.Trunk.PelvisThoraxRotation;
    AnyKinMeasure& Ref1 = ...HumanModel.Interface.Trunk.PelvisThoraxExtension;

    DriverPos = pi/180*{
      .JntPos.PelvisThoraxLateralBending,
      .JntPos.PelvisThoraxRotation,
      .JntPos.PelvisThoraxExtension
    };
    DriverVel = pi/180*{
      .JntVel.PelvisThoraxLateralBending,
      .JntVel.PelvisThoraxRotation,
      .JntVel.PelvisThoraxExtension
    };
    Reaction.Type = {Off,Off,Off};
  };


  // ************************************
  // Drivers for the right arm
  // ************************************


  //Sterno clavicular joint driver
  AnyKinEqSimpleDriver SCDriverRight ={
    AnyKinMeasure& ref1 =...HumanModel.Interface.Right.SternoClavicularProtraction;
    AnyKinMeasure& ref2 =...HumanModel.Interface.Right.SternoClavicularElevation;
    AnyKinMeasure& ref3 =...HumanModel.Interface.Right.SternoClavicularAxialRotation;
    DriverPos = pi/180*{
      .JntPos.Right.SternoClavicularProtraction,
      .JntPos.Right.SternoClavicularElevation,
      .JntPos.Right.SternoClavicularAxialRotation
    };
    DriverVel = {
      .JntVel.Right.SternoClavicularProtraction,
      .JntVel.Right.SternoClavicularElevation,
      .JntVel.Right.SternoClavicularAxialRotation
    };
    Reaction.Type={Off,Off,Off};
  };

  //Wrist driver
  AnyKinEqSimpleDriver WristDriverRight ={
    AnyKinMeasure& ref1 =...HumanModel.Interface.Right.WristFlexion;
    AnyKinMeasure& ref2 =...HumanModel.Interface.Right.WristAbduction;
    DriverPos = pi/180*{
      .JntPos.Right.WristFlexion,
      .JntPos.Right.WristAbduction
    };

    DriverVel = pi/180*{
      .JntVel.Right.WristFlexion,
      .JntVel.Right.WristAbduction};
    Reaction.Type={Off,Off};
  };


  //Elbow pronation driver
  AnyKinEqSimpleDriver ElbowPSDriverRight={
    AnyKinMeasure& Elbow =...HumanModel.Interface.Right.ElbowPronation;
    DriverPos= pi/180*{.JntPos.Right.ElbowPronation };
    DriverVel = pi/180*{.JntVel.Right.ElbowPronation };
    Reaction.Type={Off};
  };
  //Glenohumeral joint driver
  AnyKinEqSimpleDriver GHDriverRight={
    // AnyKinMeasure& ref1 =...HumanModel.Interface.Right.GlenohumeralAbduction;
    // AnyKinMeasure& ref2 =...HumanModel.Interface.Right.GlenohumeralFlexion;
    AnyKinMeasure& ref3 =...HumanModel.Interface.Right.GlenohumeralExternalRotation;
    DriverPos=pi/180*{
      // .JntPos.Right.GlenohumeralAbduction  //GH joint
      // .JntPos.Right.GlenohumeralFlexion,  //GH joint
         .JntPos.Right.GlenohumeralExternalRotation  //GH joint
    };
    DriverVel = pi/180*{
      //.JntVel.Right.GlenohumeralAbduction  //GH joint
      //.JntVel.Right.GlenohumeralFlexion,  //GH joint
        .JntVel.Right.GlenohumeralExternalRotation  //GH joint
    };
    Reaction.Type={
      //Off,Off
      Off};
  };


  // ************************************
  // Drivers for the left arm
  // ************************************


  //Sterno clavicular joint driver
  AnyKinEqSimpleDriver SCDriverLeft ={
    AnyKinMeasure& ref1 =...HumanModel.Interface.Left.SternoClavicularProtraction;
    AnyKinMeasure& ref2 =...HumanModel.Interface.Left.SternoClavicularElevation;
    AnyKinMeasure& ref3 =...HumanModel.Interface.Left.SternoClavicularAxialRotation;

    DriverPos = pi/180*{
      .JntPos.Left.SternoClavicularProtraction,
      .JntPos.Left.SternoClavicularElevation,
      .JntPos.Left.SternoClavicularAxialRotation
    };

    DriverVel = pi/180*{
      .JntVel.Left.SternoClavicularProtraction,
      .JntVel.Left.SternoClavicularElevation,
      .JntVel.Left.SternoClavicularAxialRotation
    };

    Reaction.Type={Off,Off,Off};
  };

  //Wrist driver
  AnyKinEqSimpleDriver WristDriverLeft ={
    AnyKinMeasure& ref1 =...HumanModel.Interface.Left.WristFlexion;
    AnyKinMeasure& ref2 =...HumanModel.Interface.Left.WristAbduction;
    DriverPos = pi/180*{
      .JntPos.Left.WristFlexion,
      .JntPos.Left.WristAbduction};

    DriverVel = pi/180*{
      .JntVel.Left.WristFlexion,
      .JntVel.Left.WristAbduction};
    Reaction.Type={Off,Off};
  };


  //Elbow pronation driver
  AnyKinEqSimpleDriver ElbowPSDriverLeft={
    AnyKinMeasure& Elbow =...HumanModel.Interface.Left.ElbowPronation;
    DriverPos= pi/180*{.JntPos.Left.ElbowPronation };
    DriverVel = pi/180*{.JntVel.Left.ElbowPronation };
    Reaction.Type={Off};
  };
  //Glenohumeral joint driver
  AnyKinEqSimpleDriver GHDriverLeft={
    // AnyKinMeasure& ref1 =...HumanModel.Interface.Left.GlenohumeralAbduction;
    // AnyKinMeasure& ref2 =...HumanModel.Interface.Left.GlenohumeralFlexion;
    AnyKinMeasure& ref3 =...HumanModel.Interface.Left.GlenohumeralExternalRotation;
    DriverPos=pi/180*{
      // .JntPos.Left.GlenohumeralAbduction,  //GH joint
      // .JntPos.Left.GlenohumeralFlexion,  //GH joint
      .JntPos.Left.GlenohumeralExternalRotation  //GH joint
    };
    DriverVel = pi/180*{
      //  .JntVel.Left.GlenohumeralAbduction,  //GH joint
      //  .JntVel.Left.GlenohumeralFlexion,  //GH joint
      .JntVel.Left.GlenohumeralExternalRotation  //GH joint
    };
    Reaction.Type={
      //Off,Off
      Off};
  };


}; //Drivers

// Joints between the human model and the environment
AnyFolder Joints = {
  AnySphericalJoint HandHandle = {
    AnySeg &Palm = Main.Model.HumanModel.Right.ShoulderArm.Seg.Glove;
    AnyRefNode &Rim = Main.Model.EnvironmentModel.Wheel.Handle;
  };

  AnySphericalJoint HandRest = {
    AnySeg &Palm = Main.Model.HumanModel.Left.ShoulderArm.Seg.Glove;
    AnyRefNode &Ground = Main.Model.EnvironmentModel.GlobalRef.HandRest;
  };
};
