Main.ModelSetup.LabSpecificData = {

 #path BODY_MODEL_CONFIG_FILE "BodyModelConfig.any"

 #path MOCAP_MARKER_PROTOCOL_FILE "MarkerProtocol.any"

 #path MOCAP_EXTRA_DRIVERS_FILE "ExtraDrivers.any"

 // The switch MOCAP_C3D_DATA_PATH can be used to specify the directory
 // where the C3D file is stored. Defaults to the main file directory.

 #path MOCAP_FORCE_PLATE_FILE "ForcePlates.any"

 #path MOCAP_C3DSETTINGS "C3DSettings.any"

// #path MOCAP_FORCE_PLATE_FILE "ForcePlates.any"

 // Controls where the Human-Ground residuals (hand of god) are applied
 // to the models. Choises are "Trunk" or "Pelvis".
 #define MOCAP_HUMAN_GROUND_RESIDUALS "Pelvis"


 Main.ModelSetup.TrialSpecificData =
{
   /// Uniqe ID for each trial
   AnyStringVar TrialID = Main.ModelSetup.TrialSpecificData.TrialFileName;
};


 // The low-pass filter cut-off frequencies are relatively low here. This is
 // to compensate for the noise in the recording.
 // A low cut-off frequency is possible since this is a slow excersize.
 // For other activities use higher values and check that the filter
 // does not alter the actual signal. (Suitable values for normal gait are 5/10).
 LowPassFilterSettings.MarkerFilterCutOffFrequency = 10;
 LowPassFilterSettings.ForceFilterCutOffFrequency = 12;

 // Disable the upper bound for muscle recruitment. This improves the stability of the model by
 // preventing the solver from changing if the some muscles becomes over loaded.
 Main.Studies.InverseDynamicStudy.InverseDynamics.Criterion.UpperBoundOnOff = Off;

 Gravity = -9.81*{0,0,1};


   // This adds different segment length as design variables to
  // to the parameter identification study (Main.Studies.ParameterIdentification)
  // This allows the segment length to be optimized based on the markers/motion
  #ifdef REFERENCE_TRIAL
  OptimizeAnthropometricsOnOff OptimizeAntropometricsOnOff (
    PELVIS_WIDTH = ON ,
    HEAD_HEIGHT = OFF,
    TRUNK_HEIGHT= ON,
    TRUNK_WIDTH = ON,
    TRUNK_DEPTH = ON,
    RIGHT_THIGH_LENGTH= ON,
    LEFT_THIGH_LENGTH = ON,
    RIGHT_SHANK_LENGTH= ON,
    LEFT_SHANK_LENGTH = ON,
    RIGHT_FOOT_LENGTH= ON,
    LEFT_FOOT_LENGTH = ON,
    RIGHT_UPPERARM_LENGTH= ON,
    LEFT_UPPERARM_LENGTH = ON,
    RIGHT_LOWERARM_LENGTH= ON,
    LEFT_LOWERARM_LENGTH = ON,
    RIGHT_HAND_LENGTH= ON,
    LEFT_HAND_LENGTH = ON,
    RIGHT_HAND_BREADTH= ON,
    LEFT_HAND_BREADTH = ON,
    RIGHT_TIBIAL_TORSION = ON,
    LEFT_TIBIAL_TORSION = ON,
    LEFT_RIGHT_SYMMETRY = ON
) ={};


 #else
  OptimizeAnthropometricsOnOff OptimizeAntropometricsOnOff ={};
 #endif

 #ifndef REFERENCE_TRIAL
 #define MOCAP_CREATE_PARAMETER_ID_SHORTCUT OFF
 #endif

 #path C3D_FILE_PATH "<MOCAP_C3D_DATA_PATH>" + SUBJECT_ID + "/" + MOCAP_NAME_MAINFILEDIR + ".c3d"

 #ifnpathexists C3D_FILE_PATH

  AnyMessage Download_data =
  {
    Type = MSG_ErrorFatal;
    TriggerPreProcess = On;
    Message = strformat("\n\n"+
    "------------------------------------------------------------------------------------------------------\n"+
    " Download the Rehazenter-adult-walking-dataset... \n"+
    "------------------------------------------------------------------------------------------------------\n"+
    "The 'Rehazenter-adult-walking-dataset' must be downloaded manually. It is available under \n"+
    "a Creative Commons license from fig-share: \n"+
    "https://ndownloader.figshare.com/files/22164558 \n"+
    "   \n"+
    "Download the data and extract the files into the 'c3dfiles/' subfolder. So the layout becomes\n"+
    "  C3DFiles\\ \n"+
    "     +---2014001\\ \n"+
    "     +---2014002\\ \n"+
    "     : \n"+
    "     +---2015043\\ \n" +
    "     \\---License \n" +
    "     \n "+
    "Please cite Schreiber and Moissenet (2019) when using this data: \n"+
    "   \n"+
    "     Schreiber, C., Moissenet, F. A multimodal dataset of human gait at different walking speeds\n"+
    "     established on injury-free adult participants. Sci Data 6, 111 (2019).\n"+
    "     https://doi.org/10.1038/s41597-019-0124-4 \n"+
    "   \n");
  };

 #endif

 Main.ModelSetup.Macros = {
   #include "CreateVideo.any"
 };

};
