Main.ModelSetup.TrialSpecificData =
{

  LoadParametersFrom = {"2014001_ST" };


  AnyStringVar WalkingCondition = "C5";

  // Special configuration/exception for this trial
  // Manually override the marker residual weight
  // for markers with large errors at start/end of trial
  Main.ModelSetup.MocapDrivers.R_HM5.MarkerWeightsFun = {
    Data = arrcat(-1+0*iarr(1,17), 1+0*iarr(1,127 - 17));
  };


  TrialFileName = MOCAP_NAME_MAINFILEDIR;

  /// Uniqe ID for each trial
  AnyStringVar TrialID = MOCAP_NAME_MAINFILEDIR;
  //nStep = 1+(tEnd-tStart)*.C3DFileData.Header.VideoFrameRate;


   // This class_template calculates the load time position and orientation of
   // the pelvis based on markers.
   AutoPelvisPos AutoPos(RASIS=R_IAS, LASIS=L_IAS, BACK=L_IPS) = {};

};
