Main.ModelSetup.TrialSpecificData =
{

  #define REFERENCE_TRIAL 1


  AnyStringVar WalkingCondition = "ST";

  // Special configuration/exception for this trial
  // SXS and JNJ are swapped in this trial
  #define EXCLUDE_SXS
  #define EXCLUDE_SJN
  Main.ModelSetup.MocapDrivers = {
    // Marker on the Sternum
    CreateMarkerDriver SXS (
      MarkerName= SJN,
      MarkerPlacement=Trunk.Segments.ThoraxSeg,
      OptX=ON,OptY=ON,OptZ=OFF,
      WeightX=1,WeightY=1,WeightZ=1
    ) = {
      sRelOpt = {0.180,0.25,0.0};
    };
    // Marker on the Clavicle
    CreateMarkerDriver SJN (
      MarkerName= SXS,
      MarkerPlacement=Trunk.Segments.SternumSeg,
      PlaceMarkerAt=ij,
      OptX=ON,OptY=OFF,OptZ=OFF
    ) = {
      sRelOpt = {0.01,0.015,0.0};
    };
  };


  TrialFileName = MOCAP_NAME_MAINFILEDIR;

  /// Uniqe ID for each trial
  AnyStringVar TrialID = MOCAP_NAME_MAINFILEDIR;
  // We need to manually set all these things since the reference files does not
  // contain exactly one frame.
  nStep = 1;
  Main.ModelSetup.C3DFileData.MarkerFilterIndex = -1;
  #define N_STEP_KINEMATICS 1


   // This class_template calculates the load time position and orientation of
   // the pelvis based on markers.
   AutoPelvisPos AutoPos(RASIS=R_IAS, LASIS=L_IAS, BACK=L_IPS) = {};

};
