Main.ModelSetup.SubjectSpecificData =
{

  AnyStringVar SubjectID = "2014051";
  #define SUBJECT_ID "2014051"
  AnyInt Gender = 1;
  AnyIntVar Age =  25;
  AnyFloat RightLegLength = 0.92;
  AnyFloat LeftLegLength = 0.92;

  // Special configuration/exception for this subject
  // This subject is missing a number of markers
  #define EXCLUDE_R_UOA
  #define EXCLUDE_L_UOA
  #define EXCLUDE_R_SAA
  #define EXCLUDE_L_SAA
  #define EXCLUDE_R_SRS
  #define EXCLUDE_L_SRS
  #define EXCLUDE_R_SIA
  #define EXCLUDE_L_SIA


};

Main.HumanModel.Anthropometrics =
{
     BodyMass = DesignVar(88.0);
     BodyHeight = DesignVar(1.91);

};
