//-------------------------------------------------------------------------------
//----------------------Right Thigh----------------------------------------------
//-------------------------------------------------------------------------------

BodyModel.Right.Leg.Seg.Thigh = {
  AnyRefNode KneeJoint = {
    sRel = (.CustomMarkerScaling(Main.HumanModel.FemurLandmarks_CT.TF_Med_Axis)+.CustomMarkerScaling(Main.HumanModel.FemurLandmarks_CT.TF_Lat_Axis))/2.0;
    ARel = RotMat(sRel,.CustomMarkerScaling(Main.HumanModel.FemurLandmarks_CT.TF_Lat_Axis),.CustomMarkerScaling(Main.HumanModel.BodyModel.Right.Leg.ModelParameters.Thigh.HipJoint))*RotMat(pi/2,y);
    //    ARel = RotMat((.Medial_TF.sRel),.Lateral_TF.sRel,.HipJoint.sRel);//*RotMat(pi/2,y);
    //    sRel = (.Medial_TF.sRel + .Lateral_TF.sRel)/2;
//        AnyDrawRefFrame drw={ScaleXYZ=0.02*{1,1,1};};

  };
};

//-------------------------------------------------------------------------------
//----------------------Right Shank----------------------------------------------
//-------------------------------------------------------------------------------
BodyModel.Right.Leg.Seg.Shank = {

  AnyRefNode KneeJoint = {
    sRel = (.CustomMarkerScaling(Main.HumanModel.FemurLandmarks_CT.TF_Med_Axis)+.CustomMarkerScaling(Main.HumanModel.FemurLandmarks_CT.TF_Lat_Axis))/2.0;
    ARel = RotMat(sRel,.CustomMarkerScaling(Main.HumanModel.FemurLandmarks_CT.TF_Lat_Axis),.CustomMarkerScaling(Main.HumanModel.BodyModel.Right.Leg.ModelParameters.Thigh.HipJoint))*RotMat(pi/2,y);
    //    ARel = RotMat((..Thigh.Medial_TF.sRel),..Thigh.Lateral_TF.sRel,..Thigh.HipJoint.sRel);//*RotMat(pi/2,y);
    //    sRel = (..Thigh.Medial_TF.sRel + ..Thigh.Lateral_TF.sRel)/2;

//        AnyDrawRefFrame drw={ScaleXYZ=0.02*{1,1,1};};
  };
};

BodyModel.Right.Leg.Jnt = {
  AnyRevoluteJoint Knee = {
    Axis = z;
    AnyRefNode &ThighNode = ..Seg.Thigh.KneeJoint;
    AnyRefNode &ShankNode = ..Seg.Shank.KneeJoint;
  };
  AnyMechObjectExcluder ExcludeDummyKneeJoint = {
    Objects = ObjSearchRecursive("Main.HumanModel.BodyModel.Right.Leg.Jnt.Knee","*","AnyMechObject");
  };
};
