Main.HumanModel.BodyModel.Right.Leg.Seg.Shank = {
  // Need to fit the EFC points in the Tibia Reference Frame, So we know where these locations are with respect to Tibia before adding an offset to obtain FFC Tibia Registration.
  // This node needs to be in the Tibia Registration frame.
  AnyDrawSurf Medial_TF_EFC_surf = {
    FileName = "C:\Users\cmd\Documents\Projects\MovingAxisAddOnProject\ammr_addonknee\Application\MocapExamples\AddOnKnee\Setup\STLs\Medial_TF_EFC.stl";
    Visible=Off;
    ScaleXYZ = {1.0, 1.0, 1.0}*0.001;
    RGB = {1,0,0};
    AnyFunTransform3D &Scale =.CustomMarkerScaling;
    Face=-1;
    AnyInt NumPoints = STL_Size(FileName, 1)[0];
    AnyFloat points = GetVertices(iarr(0, 1, NumPoints-1))*0.001;
  };
  // This node needs to be in the Tibia Registration frame.
  AnyDrawSurf Lateral_TF_EFC_surf = {
    FileName = "C:\Users\cmd\Documents\Projects\MovingAxisAddOnProject\ammr_addonknee\Application\MocapExamples\AddOnKnee\Setup\STLs\Lateral_TF_EFC.stl";
    Visible=Off;
    ScaleXYZ = {1.0, 1.0, 1.0}*0.001;
    RGB = {1,0,0};
    AnyFunTransform3D &Scale =.CustomMarkerScaling;
    Face=-1;
    AnyInt NumPoints = STL_Size(FileName, 1)[0];
    AnyFloat points = GetVertices(iarr(0, 1, NumPoints-1))*0.001;
  };

  FitCylinder(Medial_TF_EFC,Off)
  FitCylinder_PC(Medial_TF_EFC,On,1,Off,Off)
  FitCylinder(Lateral_TF_EFC,Off)
  FitCylinder_PC(Lateral_TF_EFC,On,1,Off,Off)


  //Offset values need to be set with respect to the literature. What is the average translation and rotation of the knee from 0 to 90 degree TF flexion? And where does these points need to be in order to achieve that.
  AnyRefNode Medial_TF_FFC = {
    AnyVec3 offset ={0,0,0};
    sRel=.Medial_TF_EFC.sRel+offset;
    AnyDrawNode drw={ScaleXYZ={1,1,1}*0.002;RGB={1,0,0};};
  };
  AnyRefNode Lateral_TF_FFC = {
    AnyVec3 offset ={0,0,0};
    sRel=.Lateral_TF_EFC.sRel+offset;
    AnyDrawNode drw={ScaleXYZ={1,1,1}*0.002;RGB={1,0,0};};
  };
};
