Main.ModelSetup.SubjectSpecificData =
{

  Main.HumanModel.Anthropometrics =
  {
     BodyMass = 75.4;
     BodyHeight = 1.73;
  };

 // This calculate the segment scale factors from the
 // bvh stick figure model. This is designed to work
 // with the SCALING_XYZ scaling law.
 #include "../CalculateSegmentScaleFactorsFromBVH.any"


};
