Main.EnvironmentModel.GlobalRef = {
  AnyFloat Offset = {2.0, 0.0, -3.0};
  AnyRefNode footHeel = {
    sRel = {2.487913, 0, -3.057181} - .Offset;
    AnyDrawNode drw = {RGB = {0,0,1};};
  };

  AnyRefNode footLat = {
    sRel = {2.558468, 0, -3.19534} - .Offset;
    AnyDrawNode drw = {RGB = {0,0,1};};
  };

  AnyRefNode footMed = {
    sRel = {2.488944, 0, -3.203054} - .Offset;
    AnyDrawNode drw = {RGB = {0,0,1};};
  };


  AnyFunSquareWave activelocation =
      {
        InitialValues = {0.0};
        Ts = {1.0,2.0};
        Values = {{1,0}};
        dT = {0.1,0.5};
      };

      AnyFloat SqWaveFunTest = activelocation(Main.Studies.BVH_StickFigure.t);

      Main.Studies.BVH_StickFigure = {
        AnyFolder &Env = Main.EnvironmentModel.GlobalRef;
      };
};
