//-------------------------------------------------------
// Definition of the points which are used by the arm for various attachements on thorax segment
// Adding geometry for wrapping to the throax segment
//-------------------------------------------------------
AnyFolder &PelvisSeg = ....Trunk.Segments.PelvisSeg._SIDE_;
AnyFolder &L1Seg = ....Trunk.Segments.L1Seg._SIDE_;
AnyFolder &L2Seg = ....Trunk.Segments.L2Seg._SIDE_;
AnyFolder &L3Seg = ....Trunk.Segments.L3Seg._SIDE_;
AnyFolder &L4Seg = ....Trunk.Segments.L4Seg._SIDE_;
AnyFolder &L5Seg = ....Trunk.Segments.L5Seg._SIDE_;
AnyFolder &T1Seg = ....Trunk.Segments.T1Seg._SIDE_;
AnyFolder &T2Seg = ....Trunk.Segments.T2Seg._SIDE_;
AnyFolder &T3Seg = ....Trunk.Segments.T3Seg._SIDE_;
AnyFolder &T4Seg = ....Trunk.Segments.T4Seg._SIDE_;
AnyFolder &T5Seg = ....Trunk.Segments.T5Seg._SIDE_;
AnyFolder &T6Seg = ....Trunk.Segments.T6Seg._SIDE_;
AnyFolder &T7Seg = ....Trunk.Segments.T7Seg._SIDE_;
AnyFolder &T8Seg = ....Trunk.Segments.T8Seg._SIDE_;
AnyFolder &T9Seg = ....Trunk.Segments.T9Seg._SIDE_;
AnyFolder &T10Seg = ....Trunk.Segments.T10Seg._SIDE_;
AnyFolder &T11Seg = ....Trunk.Segments.T11Seg._SIDE_;
AnyFolder &T12Seg = ....Trunk.Segments.T12Seg._SIDE_;
AnyFolder &R1Seg = ....Trunk.Segments._SIDE_.R1Seg;
AnyFolder &R2Seg = ....Trunk.Segments._SIDE_.R2Seg;
AnyFolder &R3Seg = ....Trunk.Segments._SIDE_.R3Seg;
AnyFolder &R4Seg = ....Trunk.Segments._SIDE_.R4Seg;
AnyFolder &R5Seg = ....Trunk.Segments._SIDE_.R5Seg;
AnyFolder &R6Seg = ....Trunk.Segments._SIDE_.R6Seg;
AnyFolder &R7Seg = ....Trunk.Segments._SIDE_.R7Seg;
AnyFolder &R8Seg = ....Trunk.Segments._SIDE_.R8Seg;
AnyFolder &R9Seg = ....Trunk.Segments._SIDE_.R9Seg;
AnyFolder &R10Seg = ....Trunk.Segments._SIDE_.R10Seg;
AnyFolder &ManubriumSeg = ....Trunk.Segments.SternumSeg._SIDE_;
AnyFolder &SternalBodySeg = ....Trunk.Segments.SternalBodySeg._SIDE_;
AnyFolder &C1Seg = ....Trunk.Segments.C1Seg._SIDE_;
AnyFolder &C2Seg = ....Trunk.Segments.C2Seg._SIDE_;
AnyFolder &C3Seg = ....Trunk.Segments.C3Seg._SIDE_;
AnyFolder &C4Seg = ....Trunk.Segments.C4Seg._SIDE_;
AnyFolder &C5Seg = ....Trunk.Segments.C5Seg._SIDE_;
AnyFolder &C6Seg = ....Trunk.Segments.C6Seg._SIDE_;
AnyFolder &C7Seg = ....Trunk.Segments.C7Seg._SIDE_;
AnyFolder &SkullSeg = ....Trunk.Segments.SkullSeg._SIDE_;

ManubriumSeg = {
  AnyRefNode SternocleidomastoidNode = {
     sRel = .Scale({0.06, 0.422, ....Sign*0.018});
  };
  AnyRefNode scj = {
    sRel = .Scale({0.0617-0.010, 0.4291-0.003, ....Sign*0.0207});
  };
};

PelvisSeg = {
  AnyRefNode O_latissimus_dorsi_11  = {
    sRel = .Scale({0.01, 0.042, ....Sign*0.065});

  };
};

L1Seg = {
  AnyRefNode O_latissimus_dorsi_6  = {
    sRel= .Scale({-0.01000, 0.107, 0.000000});
  };
};

L2Seg = {
  AnyRefNode O_latissimus_dorsi_7  = {
    sRel= .Scale({-0.008, 0.077, 0.000000});
  };
};

L3Seg = {
  AnyRefNode O_latissimus_dorsi_8 = {
    sRel=.Scale({0.000000, 0.051, 0.000000});
  };
};

L4Seg = {
  AnyRefNode O_latissimus_dorsi_9 = {
    sRel=.Scale({0.00000, 0.028, 0.000000});
  };
};

L5Seg = {
  AnyRefNode O_latissimus_dorsi_10 = {
    sRel=.Scale({0.00, 0.008, 0.000000});
  };
};

AnyMat33 Mirror  = {{1,0,0},{0,1,0},{0,0, ..Sign}};

T1Seg = {
  AnyRefNode O_rhomboideus_2 = {sRel = (.Scale(({-0.027, 0.45 , 0.005}))*..Mirror);};
  AnyRefNode O_trapezius_scapular_part_12 = {sRel = .Scale({-0.03471001, 0.44004, 0.00400})*..Mirror; };
};

T2Seg = {
  AnyRefNode O_rhomboideus_3 = {sRel = (.Scale(({-0.035, 0.425 , 0.005}))*..Mirror);};
  AnyRefNode O_trapezius_scapular_part_11 = {sRel = .Scale({-0.04471001, 0.41694, 0.00400})*..Mirror; };
};

T3Seg = {
  AnyRefNode O_rhomboideus_4 = {sRel = (.Scale(({-0.038, 0.405 , 0.005}))*..Mirror);};
  AnyRefNode O_trapezius_scapular_part_10 = {sRel = .Scale({-0.05471001, 0.39106, 0.00400})*..Mirror; };
};

T4Seg = {
  AnyRefNode O_rhomboideus_5 = {sRel = (.Scale(({-0.044, 0.38 , 0.005}))*..Mirror);};
  AnyRefNode O_trapezius_scapular_part_9 = {sRel = .Scale({-0.06107001, 0.3644, 0.00400})*..Mirror; };
};

T5Seg = {
  AnyRefNode O_rhomboideus_6 = {sRel = (.Scale(({-0.05, 0.35 , 0.005}))*..Mirror);};
  AnyRefNode O_trapezius_scapular_part_8 = {sRel = .Scale({-0.06307001, 0.3404, 0.00400})*..Mirror; };
};

T6Seg = {
  AnyRefNode O_trapezius_scapular_part_7 = {sRel = .Scale({-0.06707001, 0.3104, 0.00400})*..Mirror; };
};

T7Seg = {
  AnyRefNode O_trapezius_scapular_part_6 = {sRel = .Scale({-0.06507001, 0.2794, 0.00400})*..Mirror; };
};

T8Seg = {
  AnyRefNode O_latissimus_dorsi_1 = {sRel = .Scale({-0.06057001, 0.25472, -7.5035e-19}); };
  AnyRefNode O_trapezius_scapular_part_5 = {sRel = .Scale({-0.05927001, 0.25445, 0.00400})*..Mirror; };
};

T9Seg = {
  AnyRefNode O_latissimus_dorsi_2 = { sRel = .Scale({-0.05450501, 0.23701, -7.5035e-19});};
  AnyRefNode O_trapezius_scapular_part_4 = {sRel = .Scale({-0.05627001, 0.23245, 0.00500})*..Mirror; };
};

T10Seg = {
  AnyRefNode O_latissimus_dorsi_3 = {sRel = .Scale({-0.04744001, 0.1953, -7.5035e-19}); };
  AnyRefNode O_trapezius_scapular_part_3 = {sRel = .Scale({-0.04027001, 0.18345, 0.00500})*..Mirror; };
};

T11Seg = {
  AnyRefNode O_latissimus_dorsi_4 = { sRel = .Scale({-0.03701501, 0.161715, -7.5035e-19}); };
  AnyRefNode O_trapezius_scapular_part_2 = {sRel = .Scale({-0.03897001, 0.16282, 0.00500})*..Mirror; };
};

T12Seg = {
  AnyRefNode O_latissimus_dorsi_5 = {sRel = .Scale({-0.02859001, 0.12913, -7.5035e-19});};
  AnyRefNode O_trapezius_scapular_part_1 = {sRel = .Scale({-0.02897001, 0.13282, 0.00500})*..Mirror; };

};

SkullSeg = {
  AnyRefNode O_trapezius_clavicular_part_6 = {
    sRel = (......Trunk.Segments.SkullSeg.Scale(({-0.06, -0.02, 0.020})*..Mirror));
  };
  AnyRefNode SternocleidomastoidNode = {
    sRel = ......Trunk.Segments.SkullSeg.Scale({-0.034+0.018+0.01,-0.025+0.005,0.074})*..Mirror;
  };
};

C1Seg = {
  AnyRefNode O_levator_scapulae_1 = {
    sRel = (......Trunk.Segments.C1Seg.Scale(({0.025, 0.575 , 0.039}))*..Mirror);
  };

  AnyRefNode O_trapezius_clavicular_part_5 = {
      sRel = (......Trunk.Segments.C1Seg.Scale(({-0.01, 0.57 , 0.005}))*..Mirror);
  };
};

C2Seg = {
  AnyRefNode O_levator_scapulae_2 = {
    sRel = (......Trunk.Segments.C2Seg.Scale(({0.025, 0.565 , 0.025670}))*..Mirror);
  };
  AnyRefNode O_trapezius_clavicular_part_4        = {
     sRel = (......Trunk.Segments.C2Seg.Scale(({-0.01, 0.545 , 0.005}))*..Mirror);
  };
};

C3Seg = {
  AnyRefNode O_levator_scapulae_3 = {
    sRel = (......Trunk.Segments.C3Seg.Scale(({0.024, 0.55 , 0.023100}))*..Mirror);
  };
  AnyRefNode O_trapezius_clavicular_part_3        = {
    sRel = (......Trunk.Segments.C3Seg.Scale(({-0.012, 0.535 , 0.005}))*..Mirror);
  };
};

C4Seg = {
  AnyRefNode O_levator_scapulae_4 = {
    sRel = (......Trunk.Segments.C4Seg.Scale(({0.023, 0.535 , 0.023100}))*..Mirror);
  };
  AnyRefNode O_trapezius_clavicular_part_2        = {
    sRel = (......Trunk.Segments.C4Seg.Scale(({-0.014, 0.522 , 0.005}))*..Mirror);
  };
};

C5Seg = {
  AnyRefNode O_trapezius_clavicular_part_1        = {
    sRel = (......Trunk.Segments.C5Seg.Scale(({-0.022, 0.513 , 0.005}))*..Mirror);
  };
};

C6Seg = {
  AnyRefNode O_trapezius_scapular_part_14 = {
     sRel = (......Trunk.Segments.C6Seg.Scale(({-0.026, 0.495 , 0.005}))*..Mirror);
  };
};

C7Seg = {
  AnyRefNode O_trapezius_scapular_part_13 = {
     sRel = (......Trunk.Segments.C7Seg.Scale(({-0.030, 0.47 , 0.005}))*..Mirror);
  };
  AnyRefNode O_rhomboideus_1 = {
    sRel = (......Trunk.Segments.C7Seg.Scale(({-0.027, 0.47 , 0.005}))*..Mirror);
  };
};


R1Seg = {
  AnyRefNode O_serratus_anterior_1 = {sRel = .Scale({0.03086559, 0.440284, 0.06973759})*..Mirror; };
};

R2Seg = {
  AnyRefNode O_serratus_anterior_2 = {sRel = .Scale({0.04552761, 0.4013069, 0.0976202})*..Mirror; };
};

R3Seg = {
  AnyRefNode O_pectoralis_minor_1 = {sRel = .Scale({0.09608, 0.35878, 0.06841})*..Mirror; };
  AnyRefNode O_serratus_anterior_3 = {sRel = .Scale({0.05559559, 0.3733008, 0.1191529})*..Mirror; };
};

R4Seg = {
  AnyRefNode O_pectoralis_minor_2 = {sRel = .Scale({0.1073, 0.33053, 0.08741})*..Mirror; };
  AnyRefNode O_serratus_anterior_4 = {sRel = .Scale({0.07084623, 0.3422389, 0.1326857})*..Mirror; };
};

R5Seg = {
  AnyRefNode O_pectoralis_minor_3 = {sRel = .Scale({0.10875, 0.3091, 0.10852})*..Mirror; };
  AnyRefNode O_serratus_anterior_5 = {sRel = .Scale({0.07819623, 0.315153, 0.1410615})*..Mirror; };
};

R6Seg = {
  AnyRefNode O_serratus_anterior_6 = {sRel = .Scale({0.09050442, 0.2708675, 0.141745})*..Mirror; };
};

R7Seg = {
  AnyRefNode O_serratus_anterior_7 = {sRel = .Scale({0.07889677, 0.2501691, 0.1505875})*..Mirror; };
};

R8Seg = {
  AnyRefNode O_serratus_anterior_8 = {sRel = .Scale({0.06826739, 0.2239116, 0.1549104})*..Mirror; };
};

R9Seg = {
  AnyRefNode O_serratus_anterior_9 = {sRel = .Scale({0.05648257, 0.1853898, 0.1464613})*..Mirror; };
};


ManubriumSeg = {
  AnyRefNode O_pectoralis_major_thoracic_part_9   = {sRel = .Scale({0.07793758, 0.4043057 , 0.01272})*..Mirror; };
  AnyRefNode O_pectoralis_major_thoracic_part_10  = {sRel = .Scale({0.06234758, 0.4196957 , 0.03604})*..Mirror; };
};

SternalBodySeg = {
  AnyRefNode O_pectoralis_major_thoracic_part_1 = {sRel = .Scale({0.13174758, 0.2863157, 0.07997})*..Mirror; };
  AnyRefNode O_pectoralis_major_thoracic_part_2 = {sRel = .Scale({0.13174758, 0.2863157, 0.05797})*..Mirror; };
  AnyRefNode O_pectoralis_major_thoracic_part_3 = {sRel = .Scale({0.13174758, 0.2863157, 0.03597})*..Mirror; };
  AnyRefNode O_pectoralis_major_thoracic_part_4 = {sRel = .Scale({0.12764758, 0.2975757, 0.01294})*..Mirror; };
  AnyRefNode O_pectoralis_major_thoracic_part_5 = {sRel = .Scale({0.12064758, 0.3200757, 0.01294})*..Mirror; };
  AnyRefNode O_pectoralis_major_thoracic_part_6 = {sRel = .Scale({0.11364758, 0.3375757, 0.00694})*..Mirror; };
  AnyRefNode O_pectoralis_major_thoracic_part_7 = {sRel = .Scale({0.10988758, 0.3555557, 0.00245})*..Mirror; };
  AnyRefNode O_pectoralis_major_thoracic_part_8 = {sRel = .Scale({0.09788758, 0.3805557, 0.00245})*..Mirror; };
};
