 //This will run calibration on the right arm
AnyFolder RightShoulderCal={
  AnyFolder &SideHumanFolderRef=..BodyModel.Right;
  AnyFolder &SideInterfaceFolderRef=..BodyModel.Interface.Right;
  #include "ShoulderCal.any"
};

AnyFolder RightElbowCal={
  AnyFolder &SideHumanFolderRef=..BodyModel.Right;
  AnyFolder &SideInterfaceFolderRef=..BodyModel.Interface.Right;
  #include "ElbowCal.any"
};

AnyFolder RightWristCal={
  AnyFolder &SideHumanFolderRef=..BodyModel.Right;
  AnyFolder &SideInterfaceFolderRef=..BodyModel.Interface.Right;
  #include "WristCal.any"
};


CalibrationSequence ={
  AnyOperation &ArmCalRightShoulder = .RightShoulderCal.ArmCalibrationStudyShoulder.FiberAndTendonLengthAdjustment;
  AnyOperation &ArmCalRightElbow = .RightElbowCal.ArmCalibrationStudyElbow.FiberAndTendonLengthAdjustment;
  AnyOperation &ArmCalRightWrist = .RightWristCal.ArmCalibrationStudyWrist.FiberAndTendonLengthAdjustment;

};
