//This is the definition of the strength of the grip force of the hand
//The current strength is a guesstimate
MuscleModels={
  AnyMuscleModel HandGloveMomentStrength={
    F0=30; //Guesstimate!
  };
};

Mus={
  AnyGeneralMuscle RotMuscleZPos={
    AnyKinMeasure& ref=..Jnt.HandGloveRotZ;
    AnyMuscleModel &mdl=..MuscleModels.HandGloveMomentStrength;
    ForceDirection=-1;
    EXCLUDE_MUSCLE_METABOLISM

  };

  AnyGeneralMuscle RotMuscleZNeg={
    AnyKinMeasure& ref=..Jnt.HandGloveRotZ;
    AnyMuscleModel &mdl=..MuscleModels.HandGloveMomentStrength;
    ForceDirection=1;
    EXCLUDE_MUSCLE_METABOLISM

  };

  AnyGeneralMuscle RotMuscleYPos={
    AnyKinMeasure& ref=..Jnt.HandGloveRotY;
    AnyMuscleModel &mdl=..MuscleModels.HandGloveMomentStrength;
    ForceDirection=-1;
    EXCLUDE_MUSCLE_METABOLISM

  };

  AnyGeneralMuscle RotMuscleYNeg={
    AnyKinMeasure& ref=..Jnt.HandGloveRotY;
    AnyMuscleModel &mdl=..MuscleModels.HandGloveMomentStrength;
    ForceDirection=1;
    EXCLUDE_MUSCLE_METABOLISM

  };
  AnyGeneralMuscle RotMuscleXPos={
    AnyKinMeasure& ref=..Jnt.HandGloveRotX;
    AnyMuscleModel &mdl=..MuscleModels.HandGloveMomentStrength;
    ForceDirection=-1;
    EXCLUDE_MUSCLE_METABOLISM

  };

  AnyGeneralMuscle RotMuscleXNeg={
    AnyKinMeasure& ref=..Jnt.HandGloveRotX;
    AnyMuscleModel &mdl=..MuscleModels.HandGloveMomentStrength;
    ForceDirection=1;
    EXCLUDE_MUSCLE_METABOLISM

  };
};
