/**^
This folder implements the simple muscle models for the shoulder arm model.
Anatomical muscles are in many cases split into
several branches (elements). Strength parameters are split between the branches,
typically by uniform split.
*/

DEFAULT_PARAMETER_FOLDER SubjectMusPar(
    NPARAM = 1,
    PARAM_1 = PCSAfactor, PARAM_1_TYPE = AnyVar
) = {
  Default.PCSAfactor = ......HumanModel.StrengthParameters.SpecificMuscleTensionShoulderArm; // = PCSAfactor in N/cm^2 , the PCSA itself is given in cm^2 so F0 is in Newton`s.

  // Subject specific (scaled) muscle parameters.
  #include "SubjectMusPar.any"

};


/////////////////////////////////////////////////////
//     biceps_brachii_caput_breve (1 element )     //
/////////////////////////////////////////////////////
AnyMuscleModel biceps_brachii_caput_breve =
{
  AnyFolder& MuscleParameters = .SubjectMusPar.biceps_brachii_caput_breve;
  AnyIntVar MuscleElemNo = 1; ///< The number of this element of the muscle
  AnyIntVar MuscleElemAmount = MuscleParameters.MuscleElemAmount; ///< The total amount of elements for this muscle
  F0 = .SubjectMusPar.PCSAfactor*PCSA; ///< Maximum force output at optimum fiber length
  Lf0 = MuscleParameters.OptimalFiberlength / cos(pi/180*MuscleParameters.Pennationangle); //< Optimal fiber length corrected by pennation angle
  // New experimental variables for new pcsa and volume distribution
  AnyVar PCSA = 1e-2*MuscleParameters.MuscleVolume/(Lf0); //< PCSA (cm2) is calculated as muscle volume divided between muscle branches and divided by fiber length
  Vol0 = PCSA * Lf0; // New calculation of the vol for the specific muscle branch
};


//////////////////////////////////////////////////////
//     biceps_brachii_caput_longum (1 element )     //
//////////////////////////////////////////////////////
AnyMuscleModel biceps_brachii_caput_longum =
{
  AnyFolder& MuscleParameters = .SubjectMusPar.biceps_brachii_caput_longum;
  AnyIntVar MuscleElemNo = 1; ///< The number of this element of the muscle
  AnyIntVar MuscleElemAmount = MuscleParameters.MuscleElemAmount; ///< The total amount of elements for this muscle
  F0 = .SubjectMusPar.PCSAfactor*PCSA; ///< Maximum force output at optimum fiber length
  Lf0 = MuscleParameters.OptimalFiberlength / cos(pi/180*MuscleParameters.Pennationangle); //< Optimal fiber length corrected by pennation angle
  // New experimental variables for new pcsa and volume distribution
  AnyVar PCSA = 1e-2*MuscleParameters.MuscleVolume/(Lf0); //< PCSA (cm2) is calculated as muscle volume divided between muscle branches and divided by fiber length
  Vol0 = PCSA * Lf0; // New calculation of the vol for the specific muscle branch
};


///////////////////////////////////////////
//     coracobrachialis (6 elements)     //
///////////////////////////////////////////
AnyMuscleModel coracobrachialis_1 =
{
  AnyFolder& MuscleParameters = .SubjectMusPar.coracobrachialis;
  AnyIntVar MuscleElemNo = 1; ///< The number of this element of the muscle
  AnyIntVar MuscleElemAmount = MuscleParameters.MuscleElemAmount; ///< The total amount of elements for this muscle
  F0 = .SubjectMusPar.PCSAfactor*PCSA; ///< Maximum force output at optimum fiber length
  Lf0 = MuscleParameters.OptimalFiberlength / cos(pi/180*MuscleParameters.Pennationangle); //< Optimal fiber length corrected by pennation angle
  // New experimental variables for new pcsa and volume distribution
  AnyVar PCSA = 1e-2*MuscleParameters.MuscleVolume/(.coracobrachialis_1.Lf0 +.coracobrachialis_2.Lf0 +.coracobrachialis_3.Lf0 +.coracobrachialis_4.Lf0 +.coracobrachialis_5.Lf0 +.coracobrachialis_6.Lf0 ); //< PCSA (cm2) is calculated as muscle volume divided between muscle branches and divided by fiber length
  Vol0 = PCSA * Lf0; // New calculation of the vol for the specific muscle branch
};

AnyMuscleModel coracobrachialis_2 =
{
  AnyFolder& MuscleParameters = .SubjectMusPar.coracobrachialis;
  AnyIntVar MuscleElemNo = 2; ///< The number of this element of the muscle
  AnyIntVar MuscleElemAmount = MuscleParameters.MuscleElemAmount; ///< The total amount of elements for this muscle
  F0 = .SubjectMusPar.PCSAfactor*PCSA; ///< Maximum force output at optimum fiber length
  Lf0 = MuscleParameters.OptimalFiberlength / cos(pi/180*MuscleParameters.Pennationangle); //< Optimal fiber length corrected by pennation angle
  // New experimental variables for new pcsa and volume distribution
  AnyVar PCSA = 1e-2*MuscleParameters.MuscleVolume/(.coracobrachialis_1.Lf0 +.coracobrachialis_2.Lf0 +.coracobrachialis_3.Lf0 +.coracobrachialis_4.Lf0 +.coracobrachialis_5.Lf0 +.coracobrachialis_6.Lf0 ); //< PCSA (cm2) is calculated as muscle volume divided between muscle branches and divided by fiber length
  Vol0 = PCSA * Lf0; // New calculation of the vol for the specific muscle branch
};

AnyMuscleModel coracobrachialis_3 =
{
  AnyFolder& MuscleParameters = .SubjectMusPar.coracobrachialis;
  AnyIntVar MuscleElemNo = 3; ///< The number of this element of the muscle
  AnyIntVar MuscleElemAmount = MuscleParameters.MuscleElemAmount; ///< The total amount of elements for this muscle
  F0 = .SubjectMusPar.PCSAfactor*PCSA; ///< Maximum force output at optimum fiber length
  Lf0 = MuscleParameters.OptimalFiberlength / cos(pi/180*MuscleParameters.Pennationangle); //< Optimal fiber length corrected by pennation angle
  // New experimental variables for new pcsa and volume distribution
  AnyVar PCSA = 1e-2*MuscleParameters.MuscleVolume/(.coracobrachialis_1.Lf0 +.coracobrachialis_2.Lf0 +.coracobrachialis_3.Lf0 +.coracobrachialis_4.Lf0 +.coracobrachialis_5.Lf0 +.coracobrachialis_6.Lf0 ); //< PCSA (cm2) is calculated as muscle volume divided between muscle branches and divided by fiber length
  Vol0 = PCSA * Lf0; // New calculation of the vol for the specific muscle branch
};

AnyMuscleModel coracobrachialis_4 =
{
  AnyFolder& MuscleParameters = .SubjectMusPar.coracobrachialis;
  AnyIntVar MuscleElemNo = 4; ///< The number of this element of the muscle
  AnyIntVar MuscleElemAmount = MuscleParameters.MuscleElemAmount; ///< The total amount of elements for this muscle
  F0 = .SubjectMusPar.PCSAfactor*PCSA; ///< Maximum force output at optimum fiber length
  Lf0 = MuscleParameters.OptimalFiberlength / cos(pi/180*MuscleParameters.Pennationangle); //< Optimal fiber length corrected by pennation angle
  // New experimental variables for new pcsa and volume distribution
  AnyVar PCSA = 1e-2*MuscleParameters.MuscleVolume/(.coracobrachialis_1.Lf0 +.coracobrachialis_2.Lf0 +.coracobrachialis_3.Lf0 +.coracobrachialis_4.Lf0 +.coracobrachialis_5.Lf0 +.coracobrachialis_6.Lf0 ); //< PCSA (cm2) is calculated as muscle volume divided between muscle branches and divided by fiber length
  Vol0 = PCSA * Lf0; // New calculation of the vol for the specific muscle branch
};

AnyMuscleModel coracobrachialis_5 =
{
  AnyFolder& MuscleParameters = .SubjectMusPar.coracobrachialis;
  AnyIntVar MuscleElemNo = 5; ///< The number of this element of the muscle
  AnyIntVar MuscleElemAmount = MuscleParameters.MuscleElemAmount; ///< The total amount of elements for this muscle
  F0 = .SubjectMusPar.PCSAfactor*PCSA; ///< Maximum force output at optimum fiber length
  Lf0 = MuscleParameters.OptimalFiberlength / cos(pi/180*MuscleParameters.Pennationangle); //< Optimal fiber length corrected by pennation angle
  // New experimental variables for new pcsa and volume distribution
  AnyVar PCSA = 1e-2*MuscleParameters.MuscleVolume/(.coracobrachialis_1.Lf0 +.coracobrachialis_2.Lf0 +.coracobrachialis_3.Lf0 +.coracobrachialis_4.Lf0 +.coracobrachialis_5.Lf0 +.coracobrachialis_6.Lf0 ); //< PCSA (cm2) is calculated as muscle volume divided between muscle branches and divided by fiber length
  Vol0 = PCSA * Lf0; // New calculation of the vol for the specific muscle branch
};

AnyMuscleModel coracobrachialis_6 =
{
  AnyFolder& MuscleParameters = .SubjectMusPar.coracobrachialis;
  AnyIntVar MuscleElemNo = 6; ///< The number of this element of the muscle
  AnyIntVar MuscleElemAmount = MuscleParameters.MuscleElemAmount; ///< The total amount of elements for this muscle
  F0 = .SubjectMusPar.PCSAfactor*PCSA; ///< Maximum force output at optimum fiber length
  Lf0 = MuscleParameters.OptimalFiberlength / cos(pi/180*MuscleParameters.Pennationangle); //< Optimal fiber length corrected by pennation angle
  // New experimental variables for new pcsa and volume distribution
  AnyVar PCSA = 1e-2*MuscleParameters.MuscleVolume/(.coracobrachialis_1.Lf0 +.coracobrachialis_2.Lf0 +.coracobrachialis_3.Lf0 +.coracobrachialis_4.Lf0 +.coracobrachialis_5.Lf0 +.coracobrachialis_6.Lf0 ); //< PCSA (cm2) is calculated as muscle volume divided between muscle branches and divided by fiber length
  Vol0 = PCSA * Lf0; // New calculation of the vol for the specific muscle branch
};


#if BM_ARM_DELTOID_WRAPPING == OFF
/////////////////////////////////////////////////////
//     deltoideus_scapular_part_1 (1 element )     //
/////////////////////////////////////////////////////
AnyMuscleModel deltoideus_scapular_part_1 =
{
  AnyFolder& MuscleParameters = .SubjectMusPar.deltoideus_scapular_part_1;
  AnyIntVar MuscleElemNo = 1; ///< The number of this element of the muscle
  AnyIntVar MuscleElemAmount = MuscleParameters.MuscleElemAmount; ///< The total amount of elements for this muscle
  F0 = .SubjectMusPar.PCSAfactor*PCSA; ///< Maximum force output at optimum fiber length
  Lf0 = MuscleParameters.OptimalFiberlength / cos(pi/180*MuscleParameters.Pennationangle); //< Optimal fiber length corrected by pennation angle
  // New experimental variables for new pcsa and volume distribution
  AnyVar PCSA = 1e-2*MuscleParameters.MuscleVolume/(Lf0); //< PCSA (cm2) is calculated as muscle volume divided between muscle branches and divided by fiber length
  Vol0 = PCSA * Lf0; // New calculation of the vol for the specific muscle branch
};


#endif


#if BM_ARM_DELTOID_WRAPPING == OFF
/////////////////////////////////////////////////////
//     deltoideus_scapular_part_2 (1 element )     //
/////////////////////////////////////////////////////
AnyMuscleModel deltoideus_scapular_part_2 =
{
  AnyFolder& MuscleParameters = .SubjectMusPar.deltoideus_scapular_part_2;
  AnyIntVar MuscleElemNo = 1; ///< The number of this element of the muscle
  AnyIntVar MuscleElemAmount = MuscleParameters.MuscleElemAmount; ///< The total amount of elements for this muscle
  F0 = .SubjectMusPar.PCSAfactor*PCSA; ///< Maximum force output at optimum fiber length
  Lf0 = MuscleParameters.OptimalFiberlength / cos(pi/180*MuscleParameters.Pennationangle); //< Optimal fiber length corrected by pennation angle
  // New experimental variables for new pcsa and volume distribution
  AnyVar PCSA = 1e-2*MuscleParameters.MuscleVolume/(Lf0); //< PCSA (cm2) is calculated as muscle volume divided between muscle branches and divided by fiber length
  Vol0 = PCSA * Lf0; // New calculation of the vol for the specific muscle branch
};


#endif


#if BM_ARM_DELTOID_WRAPPING == OFF
/////////////////////////////////////////////////////
//     deltoideus_scapular_part_3 (1 element )     //
/////////////////////////////////////////////////////
AnyMuscleModel deltoideus_scapular_part_3 =
{
  AnyFolder& MuscleParameters = .SubjectMusPar.deltoideus_scapular_part_3;
  AnyIntVar MuscleElemNo = 1; ///< The number of this element of the muscle
  AnyIntVar MuscleElemAmount = MuscleParameters.MuscleElemAmount; ///< The total amount of elements for this muscle
  F0 = .SubjectMusPar.PCSAfactor*PCSA; ///< Maximum force output at optimum fiber length
  Lf0 = MuscleParameters.OptimalFiberlength / cos(pi/180*MuscleParameters.Pennationangle); //< Optimal fiber length corrected by pennation angle
  // New experimental variables for new pcsa and volume distribution
  AnyVar PCSA = 1e-2*MuscleParameters.MuscleVolume/(Lf0); //< PCSA (cm2) is calculated as muscle volume divided between muscle branches and divided by fiber length
  Vol0 = PCSA * Lf0; // New calculation of the vol for the specific muscle branch
};


#endif


#if BM_ARM_DELTOID_WRAPPING == OFF
/////////////////////////////////////////////////////
//     deltoideus_scapular_part_4 (1 element )     //
/////////////////////////////////////////////////////
AnyMuscleModel deltoideus_scapular_part_4 =
{
  AnyFolder& MuscleParameters = .SubjectMusPar.deltoideus_scapular_part_4;
  AnyIntVar MuscleElemNo = 1; ///< The number of this element of the muscle
  AnyIntVar MuscleElemAmount = MuscleParameters.MuscleElemAmount; ///< The total amount of elements for this muscle
  F0 = .SubjectMusPar.PCSAfactor*PCSA; ///< Maximum force output at optimum fiber length
  Lf0 = MuscleParameters.OptimalFiberlength / cos(pi/180*MuscleParameters.Pennationangle); //< Optimal fiber length corrected by pennation angle
  // New experimental variables for new pcsa and volume distribution
  AnyVar PCSA = 1e-2*MuscleParameters.MuscleVolume/(Lf0); //< PCSA (cm2) is calculated as muscle volume divided between muscle branches and divided by fiber length
  Vol0 = PCSA * Lf0; // New calculation of the vol for the specific muscle branch
};


#endif


#if BM_ARM_DELTOID_WRAPPING == OFF
/////////////////////////////////////////////////////
//     deltoideus_scapular_part_5 (1 element )     //
/////////////////////////////////////////////////////
AnyMuscleModel deltoideus_scapular_part_5 =
{
  AnyFolder& MuscleParameters = .SubjectMusPar.deltoideus_scapular_part_5;
  AnyIntVar MuscleElemNo = 1; ///< The number of this element of the muscle
  AnyIntVar MuscleElemAmount = MuscleParameters.MuscleElemAmount; ///< The total amount of elements for this muscle
  F0 = .SubjectMusPar.PCSAfactor*PCSA; ///< Maximum force output at optimum fiber length
  Lf0 = MuscleParameters.OptimalFiberlength / cos(pi/180*MuscleParameters.Pennationangle); //< Optimal fiber length corrected by pennation angle
  // New experimental variables for new pcsa and volume distribution
  AnyVar PCSA = 1e-2*MuscleParameters.MuscleVolume/(Lf0); //< PCSA (cm2) is calculated as muscle volume divided between muscle branches and divided by fiber length
  Vol0 = PCSA * Lf0; // New calculation of the vol for the specific muscle branch
};


#endif


#if BM_ARM_DELTOID_WRAPPING == OFF
/////////////////////////////////////////////////////
//     deltoideus_scapular_part_6 (1 element )     //
/////////////////////////////////////////////////////
AnyMuscleModel deltoideus_scapular_part_6 =
{
  AnyFolder& MuscleParameters = .SubjectMusPar.deltoideus_scapular_part_6;
  AnyIntVar MuscleElemNo = 1; ///< The number of this element of the muscle
  AnyIntVar MuscleElemAmount = MuscleParameters.MuscleElemAmount; ///< The total amount of elements for this muscle
  F0 = .SubjectMusPar.PCSAfactor*PCSA; ///< Maximum force output at optimum fiber length
  Lf0 = MuscleParameters.OptimalFiberlength / cos(pi/180*MuscleParameters.Pennationangle); //< Optimal fiber length corrected by pennation angle
  // New experimental variables for new pcsa and volume distribution
  AnyVar PCSA = 1e-2*MuscleParameters.MuscleVolume/(Lf0); //< PCSA (cm2) is calculated as muscle volume divided between muscle branches and divided by fiber length
  Vol0 = PCSA * Lf0; // New calculation of the vol for the specific muscle branch
};


#endif


#if BM_ARM_DELTOID_WRAPPING == OFF
///////////////////////////////////////////////////////
//     deltoideus_clavicular_part_1 (1 element )     //
///////////////////////////////////////////////////////
AnyMuscleModel deltoideus_clavicular_part_1 =
{
  AnyFolder& MuscleParameters = .SubjectMusPar.deltoideus_clavicular_part_1;
  AnyIntVar MuscleElemNo = 1; ///< The number of this element of the muscle
  AnyIntVar MuscleElemAmount = MuscleParameters.MuscleElemAmount; ///< The total amount of elements for this muscle
  F0 = .SubjectMusPar.PCSAfactor*PCSA; ///< Maximum force output at optimum fiber length
  Lf0 = MuscleParameters.OptimalFiberlength / cos(pi/180*MuscleParameters.Pennationangle); //< Optimal fiber length corrected by pennation angle
  // New experimental variables for new pcsa and volume distribution
  AnyVar PCSA = 1e-2*MuscleParameters.MuscleVolume/(Lf0); //< PCSA (cm2) is calculated as muscle volume divided between muscle branches and divided by fiber length
  Vol0 = PCSA * Lf0; // New calculation of the vol for the specific muscle branch
};


#endif


#if BM_ARM_DELTOID_WRAPPING == OFF
///////////////////////////////////////////////////////
//     deltoideus_clavicular_part_2 (1 element )     //
///////////////////////////////////////////////////////
AnyMuscleModel deltoideus_clavicular_part_2 =
{
  AnyFolder& MuscleParameters = .SubjectMusPar.deltoideus_clavicular_part_2;
  AnyIntVar MuscleElemNo = 1; ///< The number of this element of the muscle
  AnyIntVar MuscleElemAmount = MuscleParameters.MuscleElemAmount; ///< The total amount of elements for this muscle
  F0 = .SubjectMusPar.PCSAfactor*PCSA; ///< Maximum force output at optimum fiber length
  Lf0 = MuscleParameters.OptimalFiberlength / cos(pi/180*MuscleParameters.Pennationangle); //< Optimal fiber length corrected by pennation angle
  // New experimental variables for new pcsa and volume distribution
  AnyVar PCSA = 1e-2*MuscleParameters.MuscleVolume/(Lf0); //< PCSA (cm2) is calculated as muscle volume divided between muscle branches and divided by fiber length
  Vol0 = PCSA * Lf0; // New calculation of the vol for the specific muscle branch
};


#endif


#if BM_ARM_DELTOID_WRAPPING == OFF
///////////////////////////////////////////////////////
//     deltoideus_clavicular_part_3 (1 element )     //
///////////////////////////////////////////////////////
AnyMuscleModel deltoideus_clavicular_part_3 =
{
  AnyFolder& MuscleParameters = .SubjectMusPar.deltoideus_clavicular_part_3;
  AnyIntVar MuscleElemNo = 1; ///< The number of this element of the muscle
  AnyIntVar MuscleElemAmount = MuscleParameters.MuscleElemAmount; ///< The total amount of elements for this muscle
  F0 = .SubjectMusPar.PCSAfactor*PCSA; ///< Maximum force output at optimum fiber length
  Lf0 = MuscleParameters.OptimalFiberlength / cos(pi/180*MuscleParameters.Pennationangle); //< Optimal fiber length corrected by pennation angle
  // New experimental variables for new pcsa and volume distribution
  AnyVar PCSA = 1e-2*MuscleParameters.MuscleVolume/(Lf0); //< PCSA (cm2) is calculated as muscle volume divided between muscle branches and divided by fiber length
  Vol0 = PCSA * Lf0; // New calculation of the vol for the specific muscle branch
};


#endif


#if BM_ARM_DELTOID_WRAPPING == OFF
///////////////////////////////////////////////////////
//     deltoideus_clavicular_part_4 (1 element )     //
///////////////////////////////////////////////////////
AnyMuscleModel deltoideus_clavicular_part_4 =
{
  AnyFolder& MuscleParameters = .SubjectMusPar.deltoideus_clavicular_part_4;
  AnyIntVar MuscleElemNo = 1; ///< The number of this element of the muscle
  AnyIntVar MuscleElemAmount = MuscleParameters.MuscleElemAmount; ///< The total amount of elements for this muscle
  F0 = .SubjectMusPar.PCSAfactor*PCSA; ///< Maximum force output at optimum fiber length
  Lf0 = MuscleParameters.OptimalFiberlength / cos(pi/180*MuscleParameters.Pennationangle); //< Optimal fiber length corrected by pennation angle
  // New experimental variables for new pcsa and volume distribution
  AnyVar PCSA = 1e-2*MuscleParameters.MuscleVolume/(Lf0); //< PCSA (cm2) is calculated as muscle volume divided between muscle branches and divided by fiber length
  Vol0 = PCSA * Lf0; // New calculation of the vol for the specific muscle branch
};


#endif


#if BM_ARM_DELTOID_WRAPPING == OFF
///////////////////////////////////////////////////////
//     deltoideus_clavicular_part_5 (1 element )     //
///////////////////////////////////////////////////////
AnyMuscleModel deltoideus_clavicular_part_5 =
{
  AnyFolder& MuscleParameters = .SubjectMusPar.deltoideus_clavicular_part_5;
  AnyIntVar MuscleElemNo = 1; ///< The number of this element of the muscle
  AnyIntVar MuscleElemAmount = MuscleParameters.MuscleElemAmount; ///< The total amount of elements for this muscle
  F0 = .SubjectMusPar.PCSAfactor*PCSA; ///< Maximum force output at optimum fiber length
  Lf0 = MuscleParameters.OptimalFiberlength / cos(pi/180*MuscleParameters.Pennationangle); //< Optimal fiber length corrected by pennation angle
  // New experimental variables for new pcsa and volume distribution
  AnyVar PCSA = 1e-2*MuscleParameters.MuscleVolume/(Lf0); //< PCSA (cm2) is calculated as muscle volume divided between muscle branches and divided by fiber length
  Vol0 = PCSA * Lf0; // New calculation of the vol for the specific muscle branch
};


#endif


#if BM_ARM_DELTOID_WRAPPING == OFF
///////////////////////////////////////////////////////
//     deltoideus_clavicular_part_6 (1 element )     //
///////////////////////////////////////////////////////
AnyMuscleModel deltoideus_clavicular_part_6 =
{
  AnyFolder& MuscleParameters = .SubjectMusPar.deltoideus_clavicular_part_6;
  AnyIntVar MuscleElemNo = 1; ///< The number of this element of the muscle
  AnyIntVar MuscleElemAmount = MuscleParameters.MuscleElemAmount; ///< The total amount of elements for this muscle
  F0 = .SubjectMusPar.PCSAfactor*PCSA; ///< Maximum force output at optimum fiber length
  Lf0 = MuscleParameters.OptimalFiberlength / cos(pi/180*MuscleParameters.Pennationangle); //< Optimal fiber length corrected by pennation angle
  // New experimental variables for new pcsa and volume distribution
  AnyVar PCSA = 1e-2*MuscleParameters.MuscleVolume/(Lf0); //< PCSA (cm2) is calculated as muscle volume divided between muscle branches and divided by fiber length
  Vol0 = PCSA * Lf0; // New calculation of the vol for the specific muscle branch
};


#endif


#if BM_ARM_DELTOID_WRAPPING != OFF
////////////////////////////////////////////////////
//     deltoideus_posterior_part (4 elements)     //
////////////////////////////////////////////////////
AnyMuscleModel deltoideus_posterior_part_1 =
{
  AnyFolder& MuscleParameters = .SubjectMusPar.deltoideus_posterior_part;
  AnyIntVar MuscleElemNo = 1; ///< The number of this element of the muscle
  AnyIntVar MuscleElemAmount = MuscleParameters.MuscleElemAmount; ///< The total amount of elements for this muscle
  F0 = .SubjectMusPar.PCSAfactor*PCSA; ///< Maximum force output at optimum fiber length
  Lf0 = MuscleParameters.OptimalFiberlength / cos(pi/180*MuscleParameters.Pennationangle); //< Optimal fiber length corrected by pennation angle
  // New experimental variables for new pcsa and volume distribution
  AnyVar PCSA = 1e-2*MuscleParameters.MuscleVolume/(.deltoideus_posterior_part_1.Lf0 +.deltoideus_posterior_part_2.Lf0 +.deltoideus_posterior_part_3.Lf0 +.deltoideus_posterior_part_4.Lf0 ); //< PCSA (cm2) is calculated as muscle volume divided between muscle branches and divided by fiber length
  Vol0 = PCSA * Lf0; // New calculation of the vol for the specific muscle branch
};

AnyMuscleModel deltoideus_posterior_part_2 =
{
  AnyFolder& MuscleParameters = .SubjectMusPar.deltoideus_posterior_part;
  AnyIntVar MuscleElemNo = 2; ///< The number of this element of the muscle
  AnyIntVar MuscleElemAmount = MuscleParameters.MuscleElemAmount; ///< The total amount of elements for this muscle
  F0 = .SubjectMusPar.PCSAfactor*PCSA; ///< Maximum force output at optimum fiber length
  Lf0 = MuscleParameters.OptimalFiberlength / cos(pi/180*MuscleParameters.Pennationangle); //< Optimal fiber length corrected by pennation angle
  // New experimental variables for new pcsa and volume distribution
  AnyVar PCSA = 1e-2*MuscleParameters.MuscleVolume/(.deltoideus_posterior_part_1.Lf0 +.deltoideus_posterior_part_2.Lf0 +.deltoideus_posterior_part_3.Lf0 +.deltoideus_posterior_part_4.Lf0 ); //< PCSA (cm2) is calculated as muscle volume divided between muscle branches and divided by fiber length
  Vol0 = PCSA * Lf0; // New calculation of the vol for the specific muscle branch
};

AnyMuscleModel deltoideus_posterior_part_3 =
{
  AnyFolder& MuscleParameters = .SubjectMusPar.deltoideus_posterior_part;
  AnyIntVar MuscleElemNo = 3; ///< The number of this element of the muscle
  AnyIntVar MuscleElemAmount = MuscleParameters.MuscleElemAmount; ///< The total amount of elements for this muscle
  F0 = .SubjectMusPar.PCSAfactor*PCSA; ///< Maximum force output at optimum fiber length
  Lf0 = MuscleParameters.OptimalFiberlength / cos(pi/180*MuscleParameters.Pennationangle); //< Optimal fiber length corrected by pennation angle
  // New experimental variables for new pcsa and volume distribution
  AnyVar PCSA = 1e-2*MuscleParameters.MuscleVolume/(.deltoideus_posterior_part_1.Lf0 +.deltoideus_posterior_part_2.Lf0 +.deltoideus_posterior_part_3.Lf0 +.deltoideus_posterior_part_4.Lf0 ); //< PCSA (cm2) is calculated as muscle volume divided between muscle branches and divided by fiber length
  Vol0 = PCSA * Lf0; // New calculation of the vol for the specific muscle branch
};

AnyMuscleModel deltoideus_posterior_part_4 =
{
  AnyFolder& MuscleParameters = .SubjectMusPar.deltoideus_posterior_part;
  AnyIntVar MuscleElemNo = 4; ///< The number of this element of the muscle
  AnyIntVar MuscleElemAmount = MuscleParameters.MuscleElemAmount; ///< The total amount of elements for this muscle
  F0 = .SubjectMusPar.PCSAfactor*PCSA; ///< Maximum force output at optimum fiber length
  Lf0 = MuscleParameters.OptimalFiberlength / cos(pi/180*MuscleParameters.Pennationangle); //< Optimal fiber length corrected by pennation angle
  // New experimental variables for new pcsa and volume distribution
  AnyVar PCSA = 1e-2*MuscleParameters.MuscleVolume/(.deltoideus_posterior_part_1.Lf0 +.deltoideus_posterior_part_2.Lf0 +.deltoideus_posterior_part_3.Lf0 +.deltoideus_posterior_part_4.Lf0 ); //< PCSA (cm2) is calculated as muscle volume divided between muscle branches and divided by fiber length
  Vol0 = PCSA * Lf0; // New calculation of the vol for the specific muscle branch
};


#endif


#if BM_ARM_DELTOID_WRAPPING != OFF
//////////////////////////////////////////////////
//     deltoideus_lateral_part (4 elements)     //
//////////////////////////////////////////////////
AnyMuscleModel deltoideus_lateral_part_1 =
{
  AnyFolder& MuscleParameters = .SubjectMusPar.deltoideus_lateral_part;
  AnyIntVar MuscleElemNo = 1; ///< The number of this element of the muscle
  AnyIntVar MuscleElemAmount = MuscleParameters.MuscleElemAmount; ///< The total amount of elements for this muscle
  F0 = .SubjectMusPar.PCSAfactor*PCSA; ///< Maximum force output at optimum fiber length
  Lf0 = MuscleParameters.OptimalFiberlength / cos(pi/180*MuscleParameters.Pennationangle); //< Optimal fiber length corrected by pennation angle
  // New experimental variables for new pcsa and volume distribution
  AnyVar PCSA = 1e-2*MuscleParameters.MuscleVolume/(.deltoideus_lateral_part_1.Lf0 +.deltoideus_lateral_part_2.Lf0 +.deltoideus_lateral_part_3.Lf0 +.deltoideus_lateral_part_4.Lf0 ); //< PCSA (cm2) is calculated as muscle volume divided between muscle branches and divided by fiber length
  Vol0 = PCSA * Lf0; // New calculation of the vol for the specific muscle branch
};

AnyMuscleModel deltoideus_lateral_part_2 =
{
  AnyFolder& MuscleParameters = .SubjectMusPar.deltoideus_lateral_part;
  AnyIntVar MuscleElemNo = 2; ///< The number of this element of the muscle
  AnyIntVar MuscleElemAmount = MuscleParameters.MuscleElemAmount; ///< The total amount of elements for this muscle
  F0 = .SubjectMusPar.PCSAfactor*PCSA; ///< Maximum force output at optimum fiber length
  Lf0 = MuscleParameters.OptimalFiberlength / cos(pi/180*MuscleParameters.Pennationangle); //< Optimal fiber length corrected by pennation angle
  // New experimental variables for new pcsa and volume distribution
  AnyVar PCSA = 1e-2*MuscleParameters.MuscleVolume/(.deltoideus_lateral_part_1.Lf0 +.deltoideus_lateral_part_2.Lf0 +.deltoideus_lateral_part_3.Lf0 +.deltoideus_lateral_part_4.Lf0 ); //< PCSA (cm2) is calculated as muscle volume divided between muscle branches and divided by fiber length
  Vol0 = PCSA * Lf0; // New calculation of the vol for the specific muscle branch
};

AnyMuscleModel deltoideus_lateral_part_3 =
{
  AnyFolder& MuscleParameters = .SubjectMusPar.deltoideus_lateral_part;
  AnyIntVar MuscleElemNo = 3; ///< The number of this element of the muscle
  AnyIntVar MuscleElemAmount = MuscleParameters.MuscleElemAmount; ///< The total amount of elements for this muscle
  F0 = .SubjectMusPar.PCSAfactor*PCSA; ///< Maximum force output at optimum fiber length
  Lf0 = MuscleParameters.OptimalFiberlength / cos(pi/180*MuscleParameters.Pennationangle); //< Optimal fiber length corrected by pennation angle
  // New experimental variables for new pcsa and volume distribution
  AnyVar PCSA = 1e-2*MuscleParameters.MuscleVolume/(.deltoideus_lateral_part_1.Lf0 +.deltoideus_lateral_part_2.Lf0 +.deltoideus_lateral_part_3.Lf0 +.deltoideus_lateral_part_4.Lf0 ); //< PCSA (cm2) is calculated as muscle volume divided between muscle branches and divided by fiber length
  Vol0 = PCSA * Lf0; // New calculation of the vol for the specific muscle branch
};

AnyMuscleModel deltoideus_lateral_part_4 =
{
  AnyFolder& MuscleParameters = .SubjectMusPar.deltoideus_lateral_part;
  AnyIntVar MuscleElemNo = 4; ///< The number of this element of the muscle
  AnyIntVar MuscleElemAmount = MuscleParameters.MuscleElemAmount; ///< The total amount of elements for this muscle
  F0 = .SubjectMusPar.PCSAfactor*PCSA; ///< Maximum force output at optimum fiber length
  Lf0 = MuscleParameters.OptimalFiberlength / cos(pi/180*MuscleParameters.Pennationangle); //< Optimal fiber length corrected by pennation angle
  // New experimental variables for new pcsa and volume distribution
  AnyVar PCSA = 1e-2*MuscleParameters.MuscleVolume/(.deltoideus_lateral_part_1.Lf0 +.deltoideus_lateral_part_2.Lf0 +.deltoideus_lateral_part_3.Lf0 +.deltoideus_lateral_part_4.Lf0 ); //< PCSA (cm2) is calculated as muscle volume divided between muscle branches and divided by fiber length
  Vol0 = PCSA * Lf0; // New calculation of the vol for the specific muscle branch
};


#endif


#if BM_ARM_DELTOID_WRAPPING != OFF
///////////////////////////////////////////////////
//     deltoideus_anterior_part (4 elements)     //
///////////////////////////////////////////////////
AnyMuscleModel deltoideus_anterior_part_1 =
{
  AnyFolder& MuscleParameters = .SubjectMusPar.deltoideus_anterior_part;
  AnyIntVar MuscleElemNo = 1; ///< The number of this element of the muscle
  AnyIntVar MuscleElemAmount = MuscleParameters.MuscleElemAmount; ///< The total amount of elements for this muscle
  F0 = .SubjectMusPar.PCSAfactor*PCSA; ///< Maximum force output at optimum fiber length
  Lf0 = MuscleParameters.OptimalFiberlength / cos(pi/180*MuscleParameters.Pennationangle); //< Optimal fiber length corrected by pennation angle
  // New experimental variables for new pcsa and volume distribution
  AnyVar PCSA = 1e-2*MuscleParameters.MuscleVolume/(.deltoideus_anterior_part_1.Lf0 +.deltoideus_anterior_part_2.Lf0 +.deltoideus_anterior_part_3.Lf0 +.deltoideus_anterior_part_4.Lf0 ); //< PCSA (cm2) is calculated as muscle volume divided between muscle branches and divided by fiber length
  Vol0 = PCSA * Lf0; // New calculation of the vol for the specific muscle branch
};

AnyMuscleModel deltoideus_anterior_part_2 =
{
  AnyFolder& MuscleParameters = .SubjectMusPar.deltoideus_anterior_part;
  AnyIntVar MuscleElemNo = 2; ///< The number of this element of the muscle
  AnyIntVar MuscleElemAmount = MuscleParameters.MuscleElemAmount; ///< The total amount of elements for this muscle
  F0 = .SubjectMusPar.PCSAfactor*PCSA; ///< Maximum force output at optimum fiber length
  Lf0 = MuscleParameters.OptimalFiberlength / cos(pi/180*MuscleParameters.Pennationangle); //< Optimal fiber length corrected by pennation angle
  // New experimental variables for new pcsa and volume distribution
  AnyVar PCSA = 1e-2*MuscleParameters.MuscleVolume/(.deltoideus_anterior_part_1.Lf0 +.deltoideus_anterior_part_2.Lf0 +.deltoideus_anterior_part_3.Lf0 +.deltoideus_anterior_part_4.Lf0 ); //< PCSA (cm2) is calculated as muscle volume divided between muscle branches and divided by fiber length
  Vol0 = PCSA * Lf0; // New calculation of the vol for the specific muscle branch
};

AnyMuscleModel deltoideus_anterior_part_3 =
{
  AnyFolder& MuscleParameters = .SubjectMusPar.deltoideus_anterior_part;
  AnyIntVar MuscleElemNo = 3; ///< The number of this element of the muscle
  AnyIntVar MuscleElemAmount = MuscleParameters.MuscleElemAmount; ///< The total amount of elements for this muscle
  F0 = .SubjectMusPar.PCSAfactor*PCSA; ///< Maximum force output at optimum fiber length
  Lf0 = MuscleParameters.OptimalFiberlength / cos(pi/180*MuscleParameters.Pennationangle); //< Optimal fiber length corrected by pennation angle
  // New experimental variables for new pcsa and volume distribution
  AnyVar PCSA = 1e-2*MuscleParameters.MuscleVolume/(.deltoideus_anterior_part_1.Lf0 +.deltoideus_anterior_part_2.Lf0 +.deltoideus_anterior_part_3.Lf0 +.deltoideus_anterior_part_4.Lf0 ); //< PCSA (cm2) is calculated as muscle volume divided between muscle branches and divided by fiber length
  Vol0 = PCSA * Lf0; // New calculation of the vol for the specific muscle branch
};

AnyMuscleModel deltoideus_anterior_part_4 =
{
  AnyFolder& MuscleParameters = .SubjectMusPar.deltoideus_anterior_part;
  AnyIntVar MuscleElemNo = 4; ///< The number of this element of the muscle
  AnyIntVar MuscleElemAmount = MuscleParameters.MuscleElemAmount; ///< The total amount of elements for this muscle
  F0 = .SubjectMusPar.PCSAfactor*PCSA; ///< Maximum force output at optimum fiber length
  Lf0 = MuscleParameters.OptimalFiberlength / cos(pi/180*MuscleParameters.Pennationangle); //< Optimal fiber length corrected by pennation angle
  // New experimental variables for new pcsa and volume distribution
  AnyVar PCSA = 1e-2*MuscleParameters.MuscleVolume/(.deltoideus_anterior_part_1.Lf0 +.deltoideus_anterior_part_2.Lf0 +.deltoideus_anterior_part_3.Lf0 +.deltoideus_anterior_part_4.Lf0 ); //< PCSA (cm2) is calculated as muscle volume divided between muscle branches and divided by fiber length
  Vol0 = PCSA * Lf0; // New calculation of the vol for the specific muscle branch
};


#endif


////////////////////////////////////////
//     infraspinatus (6 elements)     //
////////////////////////////////////////
AnyMuscleModel infraspinatus_1 =
{
  AnyFolder& MuscleParameters = .SubjectMusPar.infraspinatus;
  AnyIntVar MuscleElemNo = 1; ///< The number of this element of the muscle
  AnyIntVar MuscleElemAmount = MuscleParameters.MuscleElemAmount; ///< The total amount of elements for this muscle
  F0 = .SubjectMusPar.PCSAfactor*PCSA; ///< Maximum force output at optimum fiber length
  Lf0 = MuscleParameters.OptimalFiberlength / cos(pi/180*MuscleParameters.Pennationangle); //< Optimal fiber length corrected by pennation angle
  // New experimental variables for new pcsa and volume distribution
  AnyVar PCSA = 1e-2*MuscleParameters.MuscleVolume/(.infraspinatus_1.Lf0 +.infraspinatus_2.Lf0 +.infraspinatus_3.Lf0 +.infraspinatus_4.Lf0 +.infraspinatus_5.Lf0 +.infraspinatus_6.Lf0 ); //< PCSA (cm2) is calculated as muscle volume divided between muscle branches and divided by fiber length
  Vol0 = PCSA * Lf0; // New calculation of the vol for the specific muscle branch
};

AnyMuscleModel infraspinatus_2 =
{
  AnyFolder& MuscleParameters = .SubjectMusPar.infraspinatus;
  AnyIntVar MuscleElemNo = 2; ///< The number of this element of the muscle
  AnyIntVar MuscleElemAmount = MuscleParameters.MuscleElemAmount; ///< The total amount of elements for this muscle
  F0 = .SubjectMusPar.PCSAfactor*PCSA; ///< Maximum force output at optimum fiber length
  Lf0 = MuscleParameters.OptimalFiberlength / cos(pi/180*MuscleParameters.Pennationangle); //< Optimal fiber length corrected by pennation angle
  // New experimental variables for new pcsa and volume distribution
  AnyVar PCSA = 1e-2*MuscleParameters.MuscleVolume/(.infraspinatus_1.Lf0 +.infraspinatus_2.Lf0 +.infraspinatus_3.Lf0 +.infraspinatus_4.Lf0 +.infraspinatus_5.Lf0 +.infraspinatus_6.Lf0 ); //< PCSA (cm2) is calculated as muscle volume divided between muscle branches and divided by fiber length
  Vol0 = PCSA * Lf0; // New calculation of the vol for the specific muscle branch
};

AnyMuscleModel infraspinatus_3 =
{
  AnyFolder& MuscleParameters = .SubjectMusPar.infraspinatus;
  AnyIntVar MuscleElemNo = 3; ///< The number of this element of the muscle
  AnyIntVar MuscleElemAmount = MuscleParameters.MuscleElemAmount; ///< The total amount of elements for this muscle
  F0 = .SubjectMusPar.PCSAfactor*PCSA; ///< Maximum force output at optimum fiber length
  Lf0 = MuscleParameters.OptimalFiberlength / cos(pi/180*MuscleParameters.Pennationangle); //< Optimal fiber length corrected by pennation angle
  // New experimental variables for new pcsa and volume distribution
  AnyVar PCSA = 1e-2*MuscleParameters.MuscleVolume/(.infraspinatus_1.Lf0 +.infraspinatus_2.Lf0 +.infraspinatus_3.Lf0 +.infraspinatus_4.Lf0 +.infraspinatus_5.Lf0 +.infraspinatus_6.Lf0 ); //< PCSA (cm2) is calculated as muscle volume divided between muscle branches and divided by fiber length
  Vol0 = PCSA * Lf0; // New calculation of the vol for the specific muscle branch
};

AnyMuscleModel infraspinatus_4 =
{
  AnyFolder& MuscleParameters = .SubjectMusPar.infraspinatus;
  AnyIntVar MuscleElemNo = 4; ///< The number of this element of the muscle
  AnyIntVar MuscleElemAmount = MuscleParameters.MuscleElemAmount; ///< The total amount of elements for this muscle
  F0 = .SubjectMusPar.PCSAfactor*PCSA; ///< Maximum force output at optimum fiber length
  Lf0 = MuscleParameters.OptimalFiberlength / cos(pi/180*MuscleParameters.Pennationangle); //< Optimal fiber length corrected by pennation angle
  // New experimental variables for new pcsa and volume distribution
  AnyVar PCSA = 1e-2*MuscleParameters.MuscleVolume/(.infraspinatus_1.Lf0 +.infraspinatus_2.Lf0 +.infraspinatus_3.Lf0 +.infraspinatus_4.Lf0 +.infraspinatus_5.Lf0 +.infraspinatus_6.Lf0 ); //< PCSA (cm2) is calculated as muscle volume divided between muscle branches and divided by fiber length
  Vol0 = PCSA * Lf0; // New calculation of the vol for the specific muscle branch
};

AnyMuscleModel infraspinatus_5 =
{
  AnyFolder& MuscleParameters = .SubjectMusPar.infraspinatus;
  AnyIntVar MuscleElemNo = 5; ///< The number of this element of the muscle
  AnyIntVar MuscleElemAmount = MuscleParameters.MuscleElemAmount; ///< The total amount of elements for this muscle
  F0 = .SubjectMusPar.PCSAfactor*PCSA; ///< Maximum force output at optimum fiber length
  Lf0 = MuscleParameters.OptimalFiberlength / cos(pi/180*MuscleParameters.Pennationangle); //< Optimal fiber length corrected by pennation angle
  // New experimental variables for new pcsa and volume distribution
  AnyVar PCSA = 1e-2*MuscleParameters.MuscleVolume/(.infraspinatus_1.Lf0 +.infraspinatus_2.Lf0 +.infraspinatus_3.Lf0 +.infraspinatus_4.Lf0 +.infraspinatus_5.Lf0 +.infraspinatus_6.Lf0 ); //< PCSA (cm2) is calculated as muscle volume divided between muscle branches and divided by fiber length
  Vol0 = PCSA * Lf0; // New calculation of the vol for the specific muscle branch
};

AnyMuscleModel infraspinatus_6 =
{
  AnyFolder& MuscleParameters = .SubjectMusPar.infraspinatus;
  AnyIntVar MuscleElemNo = 6; ///< The number of this element of the muscle
  AnyIntVar MuscleElemAmount = MuscleParameters.MuscleElemAmount; ///< The total amount of elements for this muscle
  F0 = .SubjectMusPar.PCSAfactor*PCSA; ///< Maximum force output at optimum fiber length
  Lf0 = MuscleParameters.OptimalFiberlength / cos(pi/180*MuscleParameters.Pennationangle); //< Optimal fiber length corrected by pennation angle
  // New experimental variables for new pcsa and volume distribution
  AnyVar PCSA = 1e-2*MuscleParameters.MuscleVolume/(.infraspinatus_1.Lf0 +.infraspinatus_2.Lf0 +.infraspinatus_3.Lf0 +.infraspinatus_4.Lf0 +.infraspinatus_5.Lf0 +.infraspinatus_6.Lf0 ); //< PCSA (cm2) is calculated as muscle volume divided between muscle branches and divided by fiber length
  Vol0 = PCSA * Lf0; // New calculation of the vol for the specific muscle branch
};


///////////////////////////////////////////
//     latissimus_dorsi (5 elements)     //
///////////////////////////////////////////
AnyMuscleModel latissimus_dorsi_1 =
{
  AnyFolder& MuscleParameters = .SubjectMusPar.latissimus_dorsi;
  AnyIntVar MuscleElemNo = 1; ///< The number of this element of the muscle
  AnyIntVar MuscleElemAmount = MuscleParameters.MuscleElemAmount; ///< The total amount of elements for this muscle
  F0 = .SubjectMusPar.PCSAfactor*PCSA; ///< Maximum force output at optimum fiber length
  Lf0 = MuscleParameters.OptimalFiberlength / cos(pi/180*MuscleParameters.Pennationangle); //< Optimal fiber length corrected by pennation angle
  // New experimental variables for new pcsa and volume distribution
  AnyVar PCSA = 1e-2*MuscleParameters.MuscleVolume/(.latissimus_dorsi_1.Lf0 +.latissimus_dorsi_2.Lf0 +.latissimus_dorsi_3.Lf0 +.latissimus_dorsi_4.Lf0 +.latissimus_dorsi_5.Lf0 ); //< PCSA (cm2) is calculated as muscle volume divided between muscle branches and divided by fiber length
  Vol0 = PCSA * Lf0; // New calculation of the vol for the specific muscle branch
};

AnyMuscleModel latissimus_dorsi_2 =
{
  AnyFolder& MuscleParameters = .SubjectMusPar.latissimus_dorsi;
  AnyIntVar MuscleElemNo = 2; ///< The number of this element of the muscle
  AnyIntVar MuscleElemAmount = MuscleParameters.MuscleElemAmount; ///< The total amount of elements for this muscle
  F0 = .SubjectMusPar.PCSAfactor*PCSA; ///< Maximum force output at optimum fiber length
  Lf0 = MuscleParameters.OptimalFiberlength / cos(pi/180*MuscleParameters.Pennationangle); //< Optimal fiber length corrected by pennation angle
  // New experimental variables for new pcsa and volume distribution
  AnyVar PCSA = 1e-2*MuscleParameters.MuscleVolume/(.latissimus_dorsi_1.Lf0 +.latissimus_dorsi_2.Lf0 +.latissimus_dorsi_3.Lf0 +.latissimus_dorsi_4.Lf0 +.latissimus_dorsi_5.Lf0 ); //< PCSA (cm2) is calculated as muscle volume divided between muscle branches and divided by fiber length
  Vol0 = PCSA * Lf0; // New calculation of the vol for the specific muscle branch
};

AnyMuscleModel latissimus_dorsi_3 =
{
  AnyFolder& MuscleParameters = .SubjectMusPar.latissimus_dorsi;
  AnyIntVar MuscleElemNo = 3; ///< The number of this element of the muscle
  AnyIntVar MuscleElemAmount = MuscleParameters.MuscleElemAmount; ///< The total amount of elements for this muscle
  F0 = .SubjectMusPar.PCSAfactor*PCSA; ///< Maximum force output at optimum fiber length
  Lf0 = MuscleParameters.OptimalFiberlength / cos(pi/180*MuscleParameters.Pennationangle); //< Optimal fiber length corrected by pennation angle
  // New experimental variables for new pcsa and volume distribution
  AnyVar PCSA = 1e-2*MuscleParameters.MuscleVolume/(.latissimus_dorsi_1.Lf0 +.latissimus_dorsi_2.Lf0 +.latissimus_dorsi_3.Lf0 +.latissimus_dorsi_4.Lf0 +.latissimus_dorsi_5.Lf0 ); //< PCSA (cm2) is calculated as muscle volume divided between muscle branches and divided by fiber length
  Vol0 = PCSA * Lf0; // New calculation of the vol for the specific muscle branch
};

AnyMuscleModel latissimus_dorsi_4 =
{
  AnyFolder& MuscleParameters = .SubjectMusPar.latissimus_dorsi;
  AnyIntVar MuscleElemNo = 4; ///< The number of this element of the muscle
  AnyIntVar MuscleElemAmount = MuscleParameters.MuscleElemAmount; ///< The total amount of elements for this muscle
  F0 = .SubjectMusPar.PCSAfactor*PCSA; ///< Maximum force output at optimum fiber length
  Lf0 = MuscleParameters.OptimalFiberlength / cos(pi/180*MuscleParameters.Pennationangle); //< Optimal fiber length corrected by pennation angle
  // New experimental variables for new pcsa and volume distribution
  AnyVar PCSA = 1e-2*MuscleParameters.MuscleVolume/(.latissimus_dorsi_1.Lf0 +.latissimus_dorsi_2.Lf0 +.latissimus_dorsi_3.Lf0 +.latissimus_dorsi_4.Lf0 +.latissimus_dorsi_5.Lf0 ); //< PCSA (cm2) is calculated as muscle volume divided between muscle branches and divided by fiber length
  Vol0 = PCSA * Lf0; // New calculation of the vol for the specific muscle branch
};

AnyMuscleModel latissimus_dorsi_5 =
{
  AnyFolder& MuscleParameters = .SubjectMusPar.latissimus_dorsi;
  AnyIntVar MuscleElemNo = 5; ///< The number of this element of the muscle
  AnyIntVar MuscleElemAmount = MuscleParameters.MuscleElemAmount; ///< The total amount of elements for this muscle
  F0 = .SubjectMusPar.PCSAfactor*PCSA; ///< Maximum force output at optimum fiber length
  Lf0 = MuscleParameters.OptimalFiberlength / cos(pi/180*MuscleParameters.Pennationangle); //< Optimal fiber length corrected by pennation angle
  // New experimental variables for new pcsa and volume distribution
  AnyVar PCSA = 1e-2*MuscleParameters.MuscleVolume/(.latissimus_dorsi_1.Lf0 +.latissimus_dorsi_2.Lf0 +.latissimus_dorsi_3.Lf0 +.latissimus_dorsi_4.Lf0 +.latissimus_dorsi_5.Lf0 ); //< PCSA (cm2) is calculated as muscle volume divided between muscle branches and divided by fiber length
  Vol0 = PCSA * Lf0; // New calculation of the vol for the specific muscle branch
};


///////////////////////////////////////////
//     levator_scapulae (4 elements)     //
///////////////////////////////////////////
AnyMuscleModel levator_scapulae_1 =
{
  AnyFolder& MuscleParameters = .SubjectMusPar.levator_scapulae;
  AnyIntVar MuscleElemNo = 1; ///< The number of this element of the muscle
  AnyIntVar MuscleElemAmount = MuscleParameters.MuscleElemAmount; ///< The total amount of elements for this muscle
  F0 = .SubjectMusPar.PCSAfactor*PCSA; ///< Maximum force output at optimum fiber length
  Lf0 = MuscleParameters.OptimalFiberlength / cos(pi/180*MuscleParameters.Pennationangle); //< Optimal fiber length corrected by pennation angle
  // New experimental variables for new pcsa and volume distribution
  AnyVar PCSA = 1e-2*MuscleParameters.MuscleVolume/(.levator_scapulae_1.Lf0 +.levator_scapulae_2.Lf0 +.levator_scapulae_3.Lf0 +.levator_scapulae_4.Lf0 ); //< PCSA (cm2) is calculated as muscle volume divided between muscle branches and divided by fiber length
  Vol0 = PCSA * Lf0; // New calculation of the vol for the specific muscle branch
};

AnyMuscleModel levator_scapulae_2 =
{
  AnyFolder& MuscleParameters = .SubjectMusPar.levator_scapulae;
  AnyIntVar MuscleElemNo = 2; ///< The number of this element of the muscle
  AnyIntVar MuscleElemAmount = MuscleParameters.MuscleElemAmount; ///< The total amount of elements for this muscle
  F0 = .SubjectMusPar.PCSAfactor*PCSA; ///< Maximum force output at optimum fiber length
  Lf0 = MuscleParameters.OptimalFiberlength / cos(pi/180*MuscleParameters.Pennationangle); //< Optimal fiber length corrected by pennation angle
  // New experimental variables for new pcsa and volume distribution
  AnyVar PCSA = 1e-2*MuscleParameters.MuscleVolume/(.levator_scapulae_1.Lf0 +.levator_scapulae_2.Lf0 +.levator_scapulae_3.Lf0 +.levator_scapulae_4.Lf0 ); //< PCSA (cm2) is calculated as muscle volume divided between muscle branches and divided by fiber length
  Vol0 = PCSA * Lf0; // New calculation of the vol for the specific muscle branch
};

AnyMuscleModel levator_scapulae_3 =
{
  AnyFolder& MuscleParameters = .SubjectMusPar.levator_scapulae;
  AnyIntVar MuscleElemNo = 3; ///< The number of this element of the muscle
  AnyIntVar MuscleElemAmount = MuscleParameters.MuscleElemAmount; ///< The total amount of elements for this muscle
  F0 = .SubjectMusPar.PCSAfactor*PCSA; ///< Maximum force output at optimum fiber length
  Lf0 = MuscleParameters.OptimalFiberlength / cos(pi/180*MuscleParameters.Pennationangle); //< Optimal fiber length corrected by pennation angle
  // New experimental variables for new pcsa and volume distribution
  AnyVar PCSA = 1e-2*MuscleParameters.MuscleVolume/(.levator_scapulae_1.Lf0 +.levator_scapulae_2.Lf0 +.levator_scapulae_3.Lf0 +.levator_scapulae_4.Lf0 ); //< PCSA (cm2) is calculated as muscle volume divided between muscle branches and divided by fiber length
  Vol0 = PCSA * Lf0; // New calculation of the vol for the specific muscle branch
};

AnyMuscleModel levator_scapulae_4 =
{
  AnyFolder& MuscleParameters = .SubjectMusPar.levator_scapulae;
  AnyIntVar MuscleElemNo = 4; ///< The number of this element of the muscle
  AnyIntVar MuscleElemAmount = MuscleParameters.MuscleElemAmount; ///< The total amount of elements for this muscle
  F0 = .SubjectMusPar.PCSAfactor*PCSA; ///< Maximum force output at optimum fiber length
  Lf0 = MuscleParameters.OptimalFiberlength / cos(pi/180*MuscleParameters.Pennationangle); //< Optimal fiber length corrected by pennation angle
  // New experimental variables for new pcsa and volume distribution
  AnyVar PCSA = 1e-2*MuscleParameters.MuscleVolume/(.levator_scapulae_1.Lf0 +.levator_scapulae_2.Lf0 +.levator_scapulae_3.Lf0 +.levator_scapulae_4.Lf0 ); //< PCSA (cm2) is calculated as muscle volume divided between muscle branches and divided by fiber length
  Vol0 = PCSA * Lf0; // New calculation of the vol for the specific muscle branch
};


/////////////////////////////////////////////////////////
//     pectoralis_major_thoracic_part (10 elements)     //
/////////////////////////////////////////////////////////
AnyMuscleModel pectoralis_major_thoracic_part_1 =
{
  AnyFolder& MuscleParameters = .SubjectMusPar.pectoralis_major_thoracic_part;
  AnyIntVar MuscleElemNo = 1; ///< The number of this element of the muscle
  AnyIntVar MuscleElemAmount = MuscleParameters.MuscleElemAmount; ///< The total amount of elements for this muscle
  F0 = .SubjectMusPar.PCSAfactor*PCSA; ///< Maximum force output at optimum fiber length
  Lf0 = MuscleParameters.OptimalFiberlength / cos(pi/180*MuscleParameters.Pennationangle); //< Optimal fiber length corrected by pennation angle
  // New experimental variables for new pcsa and volume distribution
  AnyVar PCSA = 1e-2*MuscleParameters.MuscleVolume/(.pectoralis_major_thoracic_part_1.Lf0 +.pectoralis_major_thoracic_part_2.Lf0 +.pectoralis_major_thoracic_part_3.Lf0 +.pectoralis_major_thoracic_part_4.Lf0 +.pectoralis_major_thoracic_part_5.Lf0 +.pectoralis_major_thoracic_part_6.Lf0 +.pectoralis_major_thoracic_part_7.Lf0 +.pectoralis_major_thoracic_part_8.Lf0 +.pectoralis_major_thoracic_part_9.Lf0 +.pectoralis_major_thoracic_part_10.Lf0 ); //< PCSA (cm2) is calculated as muscle volume divided between muscle branches and divided by fiber length
  Vol0 = PCSA * Lf0; // New calculation of the vol for the specific muscle branch
};

AnyMuscleModel pectoralis_major_thoracic_part_2 =
{
  AnyFolder& MuscleParameters = .SubjectMusPar.pectoralis_major_thoracic_part;
  AnyIntVar MuscleElemNo = 2; ///< The number of this element of the muscle
  AnyIntVar MuscleElemAmount = MuscleParameters.MuscleElemAmount; ///< The total amount of elements for this muscle
  F0 = .SubjectMusPar.PCSAfactor*PCSA; ///< Maximum force output at optimum fiber length
  Lf0 = MuscleParameters.OptimalFiberlength / cos(pi/180*MuscleParameters.Pennationangle); //< Optimal fiber length corrected by pennation angle
  // New experimental variables for new pcsa and volume distribution
  AnyVar PCSA = 1e-2*MuscleParameters.MuscleVolume/(.pectoralis_major_thoracic_part_1.Lf0 +.pectoralis_major_thoracic_part_2.Lf0 +.pectoralis_major_thoracic_part_3.Lf0 +.pectoralis_major_thoracic_part_4.Lf0 +.pectoralis_major_thoracic_part_5.Lf0 +.pectoralis_major_thoracic_part_6.Lf0 +.pectoralis_major_thoracic_part_7.Lf0 +.pectoralis_major_thoracic_part_8.Lf0 +.pectoralis_major_thoracic_part_9.Lf0 +.pectoralis_major_thoracic_part_10.Lf0 ); //< PCSA (cm2) is calculated as muscle volume divided between muscle branches and divided by fiber length
  Vol0 = PCSA * Lf0; // New calculation of the vol for the specific muscle branch
};

AnyMuscleModel pectoralis_major_thoracic_part_3 =
{
  AnyFolder& MuscleParameters = .SubjectMusPar.pectoralis_major_thoracic_part;
  AnyIntVar MuscleElemNo = 3; ///< The number of this element of the muscle
  AnyIntVar MuscleElemAmount = MuscleParameters.MuscleElemAmount; ///< The total amount of elements for this muscle
  F0 = .SubjectMusPar.PCSAfactor*PCSA; ///< Maximum force output at optimum fiber length
  Lf0 = MuscleParameters.OptimalFiberlength / cos(pi/180*MuscleParameters.Pennationangle); //< Optimal fiber length corrected by pennation angle
  // New experimental variables for new pcsa and volume distribution
  AnyVar PCSA = 1e-2*MuscleParameters.MuscleVolume/(.pectoralis_major_thoracic_part_1.Lf0 +.pectoralis_major_thoracic_part_2.Lf0 +.pectoralis_major_thoracic_part_3.Lf0 +.pectoralis_major_thoracic_part_4.Lf0 +.pectoralis_major_thoracic_part_5.Lf0 +.pectoralis_major_thoracic_part_6.Lf0 +.pectoralis_major_thoracic_part_7.Lf0 +.pectoralis_major_thoracic_part_8.Lf0 +.pectoralis_major_thoracic_part_9.Lf0 +.pectoralis_major_thoracic_part_10.Lf0 ); //< PCSA (cm2) is calculated as muscle volume divided between muscle branches and divided by fiber length
  Vol0 = PCSA * Lf0; // New calculation of the vol for the specific muscle branch
};

AnyMuscleModel pectoralis_major_thoracic_part_4 =
{
  AnyFolder& MuscleParameters = .SubjectMusPar.pectoralis_major_thoracic_part;
  AnyIntVar MuscleElemNo = 4; ///< The number of this element of the muscle
  AnyIntVar MuscleElemAmount = MuscleParameters.MuscleElemAmount; ///< The total amount of elements for this muscle
  F0 = .SubjectMusPar.PCSAfactor*PCSA; ///< Maximum force output at optimum fiber length
  Lf0 = MuscleParameters.OptimalFiberlength / cos(pi/180*MuscleParameters.Pennationangle); //< Optimal fiber length corrected by pennation angle
  // New experimental variables for new pcsa and volume distribution
  AnyVar PCSA = 1e-2*MuscleParameters.MuscleVolume/(.pectoralis_major_thoracic_part_1.Lf0 +.pectoralis_major_thoracic_part_2.Lf0 +.pectoralis_major_thoracic_part_3.Lf0 +.pectoralis_major_thoracic_part_4.Lf0 +.pectoralis_major_thoracic_part_5.Lf0 +.pectoralis_major_thoracic_part_6.Lf0 +.pectoralis_major_thoracic_part_7.Lf0 +.pectoralis_major_thoracic_part_8.Lf0 +.pectoralis_major_thoracic_part_9.Lf0 +.pectoralis_major_thoracic_part_10.Lf0 ); //< PCSA (cm2) is calculated as muscle volume divided between muscle branches and divided by fiber length
  Vol0 = PCSA * Lf0; // New calculation of the vol for the specific muscle branch
};

AnyMuscleModel pectoralis_major_thoracic_part_5 =
{
  AnyFolder& MuscleParameters = .SubjectMusPar.pectoralis_major_thoracic_part;
  AnyIntVar MuscleElemNo = 5; ///< The number of this element of the muscle
  AnyIntVar MuscleElemAmount = MuscleParameters.MuscleElemAmount; ///< The total amount of elements for this muscle
  F0 = .SubjectMusPar.PCSAfactor*PCSA; ///< Maximum force output at optimum fiber length
  Lf0 = MuscleParameters.OptimalFiberlength / cos(pi/180*MuscleParameters.Pennationangle); //< Optimal fiber length corrected by pennation angle
  // New experimental variables for new pcsa and volume distribution
  AnyVar PCSA = 1e-2*MuscleParameters.MuscleVolume/(.pectoralis_major_thoracic_part_1.Lf0 +.pectoralis_major_thoracic_part_2.Lf0 +.pectoralis_major_thoracic_part_3.Lf0 +.pectoralis_major_thoracic_part_4.Lf0 +.pectoralis_major_thoracic_part_5.Lf0 +.pectoralis_major_thoracic_part_6.Lf0 +.pectoralis_major_thoracic_part_7.Lf0 +.pectoralis_major_thoracic_part_8.Lf0 +.pectoralis_major_thoracic_part_9.Lf0 +.pectoralis_major_thoracic_part_10.Lf0 ); //< PCSA (cm2) is calculated as muscle volume divided between muscle branches and divided by fiber length
  Vol0 = PCSA * Lf0; // New calculation of the vol for the specific muscle branch
};

AnyMuscleModel pectoralis_major_thoracic_part_6 =
{
  AnyFolder& MuscleParameters = .SubjectMusPar.pectoralis_major_thoracic_part;
  AnyIntVar MuscleElemNo = 6; ///< The number of this element of the muscle
  AnyIntVar MuscleElemAmount = MuscleParameters.MuscleElemAmount; ///< The total amount of elements for this muscle
  F0 = .SubjectMusPar.PCSAfactor*PCSA; ///< Maximum force output at optimum fiber length
  Lf0 = MuscleParameters.OptimalFiberlength / cos(pi/180*MuscleParameters.Pennationangle); //< Optimal fiber length corrected by pennation angle
  // New experimental variables for new pcsa and volume distribution
  AnyVar PCSA = 1e-2*MuscleParameters.MuscleVolume/(.pectoralis_major_thoracic_part_1.Lf0 +.pectoralis_major_thoracic_part_2.Lf0 +.pectoralis_major_thoracic_part_3.Lf0 +.pectoralis_major_thoracic_part_4.Lf0 +.pectoralis_major_thoracic_part_5.Lf0 +.pectoralis_major_thoracic_part_6.Lf0 +.pectoralis_major_thoracic_part_7.Lf0 +.pectoralis_major_thoracic_part_8.Lf0 +.pectoralis_major_thoracic_part_9.Lf0 +.pectoralis_major_thoracic_part_10.Lf0 ); //< PCSA (cm2) is calculated as muscle volume divided between muscle branches and divided by fiber length
  Vol0 = PCSA * Lf0; // New calculation of the vol for the specific muscle branch
};

AnyMuscleModel pectoralis_major_thoracic_part_7 =
{
  AnyFolder& MuscleParameters = .SubjectMusPar.pectoralis_major_thoracic_part;
  AnyIntVar MuscleElemNo = 7; ///< The number of this element of the muscle
  AnyIntVar MuscleElemAmount = MuscleParameters.MuscleElemAmount; ///< The total amount of elements for this muscle
  F0 = .SubjectMusPar.PCSAfactor*PCSA; ///< Maximum force output at optimum fiber length
  Lf0 = MuscleParameters.OptimalFiberlength / cos(pi/180*MuscleParameters.Pennationangle); //< Optimal fiber length corrected by pennation angle
  // New experimental variables for new pcsa and volume distribution
  AnyVar PCSA = 1e-2*MuscleParameters.MuscleVolume/(.pectoralis_major_thoracic_part_1.Lf0 +.pectoralis_major_thoracic_part_2.Lf0 +.pectoralis_major_thoracic_part_3.Lf0 +.pectoralis_major_thoracic_part_4.Lf0 +.pectoralis_major_thoracic_part_5.Lf0 +.pectoralis_major_thoracic_part_6.Lf0 +.pectoralis_major_thoracic_part_7.Lf0 +.pectoralis_major_thoracic_part_8.Lf0 +.pectoralis_major_thoracic_part_9.Lf0 +.pectoralis_major_thoracic_part_10.Lf0 ); //< PCSA (cm2) is calculated as muscle volume divided between muscle branches and divided by fiber length
  Vol0 = PCSA * Lf0; // New calculation of the vol for the specific muscle branch
};

AnyMuscleModel pectoralis_major_thoracic_part_8 =
{
  AnyFolder& MuscleParameters = .SubjectMusPar.pectoralis_major_thoracic_part;
  AnyIntVar MuscleElemNo = 8; ///< The number of this element of the muscle
  AnyIntVar MuscleElemAmount = MuscleParameters.MuscleElemAmount; ///< The total amount of elements for this muscle
  F0 = .SubjectMusPar.PCSAfactor*PCSA; ///< Maximum force output at optimum fiber length
  Lf0 = MuscleParameters.OptimalFiberlength / cos(pi/180*MuscleParameters.Pennationangle); //< Optimal fiber length corrected by pennation angle
  // New experimental variables for new pcsa and volume distribution
  AnyVar PCSA = 1e-2*MuscleParameters.MuscleVolume/(.pectoralis_major_thoracic_part_1.Lf0 +.pectoralis_major_thoracic_part_2.Lf0 +.pectoralis_major_thoracic_part_3.Lf0 +.pectoralis_major_thoracic_part_4.Lf0 +.pectoralis_major_thoracic_part_5.Lf0 +.pectoralis_major_thoracic_part_6.Lf0 +.pectoralis_major_thoracic_part_7.Lf0 +.pectoralis_major_thoracic_part_8.Lf0 +.pectoralis_major_thoracic_part_9.Lf0 +.pectoralis_major_thoracic_part_10.Lf0 ); //< PCSA (cm2) is calculated as muscle volume divided between muscle branches and divided by fiber length
  Vol0 = PCSA * Lf0; // New calculation of the vol for the specific muscle branch
};

AnyMuscleModel pectoralis_major_thoracic_part_9 =
{
  AnyFolder& MuscleParameters = .SubjectMusPar.pectoralis_major_thoracic_part;
  AnyIntVar MuscleElemNo = 9; ///< The number of this element of the muscle
  AnyIntVar MuscleElemAmount = MuscleParameters.MuscleElemAmount; ///< The total amount of elements for this muscle
  F0 = .SubjectMusPar.PCSAfactor*PCSA; ///< Maximum force output at optimum fiber length
  Lf0 = MuscleParameters.OptimalFiberlength / cos(pi/180*MuscleParameters.Pennationangle); //< Optimal fiber length corrected by pennation angle
  // New experimental variables for new pcsa and volume distribution
  AnyVar PCSA = 1e-2*MuscleParameters.MuscleVolume/(.pectoralis_major_thoracic_part_1.Lf0 +.pectoralis_major_thoracic_part_2.Lf0 +.pectoralis_major_thoracic_part_3.Lf0 +.pectoralis_major_thoracic_part_4.Lf0 +.pectoralis_major_thoracic_part_5.Lf0 +.pectoralis_major_thoracic_part_6.Lf0 +.pectoralis_major_thoracic_part_7.Lf0 +.pectoralis_major_thoracic_part_8.Lf0 +.pectoralis_major_thoracic_part_9.Lf0 +.pectoralis_major_thoracic_part_10.Lf0 ); //< PCSA (cm2) is calculated as muscle volume divided between muscle branches and divided by fiber length
  Vol0 = PCSA * Lf0; // New calculation of the vol for the specific muscle branch
};

AnyMuscleModel pectoralis_major_thoracic_part_10 =
{
  AnyFolder& MuscleParameters = .SubjectMusPar.pectoralis_major_thoracic_part;
  AnyIntVar MuscleElemNo = 10; ///< The number of this element of the muscle
  AnyIntVar MuscleElemAmount = MuscleParameters.MuscleElemAmount; ///< The total amount of elements for this muscle
  F0 = .SubjectMusPar.PCSAfactor*PCSA; ///< Maximum force output at optimum fiber length
  Lf0 = MuscleParameters.OptimalFiberlength / cos(pi/180*MuscleParameters.Pennationangle); //< Optimal fiber length corrected by pennation angle
  // New experimental variables for new pcsa and volume distribution
  AnyVar PCSA = 1e-2*MuscleParameters.MuscleVolume/(.pectoralis_major_thoracic_part_1.Lf0 +.pectoralis_major_thoracic_part_2.Lf0 +.pectoralis_major_thoracic_part_3.Lf0 +.pectoralis_major_thoracic_part_4.Lf0 +.pectoralis_major_thoracic_part_5.Lf0 +.pectoralis_major_thoracic_part_6.Lf0 +.pectoralis_major_thoracic_part_7.Lf0 +.pectoralis_major_thoracic_part_8.Lf0 +.pectoralis_major_thoracic_part_9.Lf0 +.pectoralis_major_thoracic_part_10.Lf0 ); //< PCSA (cm2) is calculated as muscle volume divided between muscle branches and divided by fiber length
  Vol0 = PCSA * Lf0; // New calculation of the vol for the specific muscle branch
};


///////////////////////////////////////////////////////////
//     pectoralis_major_clavicular_part (5 elements)     //
///////////////////////////////////////////////////////////
AnyMuscleModel pectoralis_major_clavicular_part_1 =
{
  AnyFolder& MuscleParameters = .SubjectMusPar.pectoralis_major_clavicular_part;
  AnyIntVar MuscleElemNo = 1; ///< The number of this element of the muscle
  AnyIntVar MuscleElemAmount = MuscleParameters.MuscleElemAmount; ///< The total amount of elements for this muscle
  F0 = .SubjectMusPar.PCSAfactor*PCSA; ///< Maximum force output at optimum fiber length
  Lf0 = MuscleParameters.OptimalFiberlength / cos(pi/180*MuscleParameters.Pennationangle); //< Optimal fiber length corrected by pennation angle
  // New experimental variables for new pcsa and volume distribution
  AnyVar PCSA = 1e-2*MuscleParameters.MuscleVolume/(.pectoralis_major_clavicular_part_1.Lf0 +.pectoralis_major_clavicular_part_2.Lf0 +.pectoralis_major_clavicular_part_3.Lf0 +.pectoralis_major_clavicular_part_4.Lf0 +.pectoralis_major_clavicular_part_5.Lf0 ); //< PCSA (cm2) is calculated as muscle volume divided between muscle branches and divided by fiber length
  Vol0 = PCSA * Lf0; // New calculation of the vol for the specific muscle branch
};

AnyMuscleModel pectoralis_major_clavicular_part_2 =
{
  AnyFolder& MuscleParameters = .SubjectMusPar.pectoralis_major_clavicular_part;
  AnyIntVar MuscleElemNo = 2; ///< The number of this element of the muscle
  AnyIntVar MuscleElemAmount = MuscleParameters.MuscleElemAmount; ///< The total amount of elements for this muscle
  F0 = .SubjectMusPar.PCSAfactor*PCSA; ///< Maximum force output at optimum fiber length
  Lf0 = MuscleParameters.OptimalFiberlength / cos(pi/180*MuscleParameters.Pennationangle); //< Optimal fiber length corrected by pennation angle
  // New experimental variables for new pcsa and volume distribution
  AnyVar PCSA = 1e-2*MuscleParameters.MuscleVolume/(.pectoralis_major_clavicular_part_1.Lf0 +.pectoralis_major_clavicular_part_2.Lf0 +.pectoralis_major_clavicular_part_3.Lf0 +.pectoralis_major_clavicular_part_4.Lf0 +.pectoralis_major_clavicular_part_5.Lf0 ); //< PCSA (cm2) is calculated as muscle volume divided between muscle branches and divided by fiber length
  Vol0 = PCSA * Lf0; // New calculation of the vol for the specific muscle branch
};

AnyMuscleModel pectoralis_major_clavicular_part_3 =
{
  AnyFolder& MuscleParameters = .SubjectMusPar.pectoralis_major_clavicular_part;
  AnyIntVar MuscleElemNo = 3; ///< The number of this element of the muscle
  AnyIntVar MuscleElemAmount = MuscleParameters.MuscleElemAmount; ///< The total amount of elements for this muscle
  F0 = .SubjectMusPar.PCSAfactor*PCSA; ///< Maximum force output at optimum fiber length
  Lf0 = MuscleParameters.OptimalFiberlength / cos(pi/180*MuscleParameters.Pennationangle); //< Optimal fiber length corrected by pennation angle
  // New experimental variables for new pcsa and volume distribution
  AnyVar PCSA = 1e-2*MuscleParameters.MuscleVolume/(.pectoralis_major_clavicular_part_1.Lf0 +.pectoralis_major_clavicular_part_2.Lf0 +.pectoralis_major_clavicular_part_3.Lf0 +.pectoralis_major_clavicular_part_4.Lf0 +.pectoralis_major_clavicular_part_5.Lf0 ); //< PCSA (cm2) is calculated as muscle volume divided between muscle branches and divided by fiber length
  Vol0 = PCSA * Lf0; // New calculation of the vol for the specific muscle branch
};

AnyMuscleModel pectoralis_major_clavicular_part_4 =
{
  AnyFolder& MuscleParameters = .SubjectMusPar.pectoralis_major_clavicular_part;
  AnyIntVar MuscleElemNo = 4; ///< The number of this element of the muscle
  AnyIntVar MuscleElemAmount = MuscleParameters.MuscleElemAmount; ///< The total amount of elements for this muscle
  F0 = .SubjectMusPar.PCSAfactor*PCSA; ///< Maximum force output at optimum fiber length
  Lf0 = MuscleParameters.OptimalFiberlength / cos(pi/180*MuscleParameters.Pennationangle); //< Optimal fiber length corrected by pennation angle
  // New experimental variables for new pcsa and volume distribution
  AnyVar PCSA = 1e-2*MuscleParameters.MuscleVolume/(.pectoralis_major_clavicular_part_1.Lf0 +.pectoralis_major_clavicular_part_2.Lf0 +.pectoralis_major_clavicular_part_3.Lf0 +.pectoralis_major_clavicular_part_4.Lf0 +.pectoralis_major_clavicular_part_5.Lf0 ); //< PCSA (cm2) is calculated as muscle volume divided between muscle branches and divided by fiber length
  Vol0 = PCSA * Lf0; // New calculation of the vol for the specific muscle branch
};

AnyMuscleModel pectoralis_major_clavicular_part_5 =
{
  AnyFolder& MuscleParameters = .SubjectMusPar.pectoralis_major_clavicular_part;
  AnyIntVar MuscleElemNo = 5; ///< The number of this element of the muscle
  AnyIntVar MuscleElemAmount = MuscleParameters.MuscleElemAmount; ///< The total amount of elements for this muscle
  F0 = .SubjectMusPar.PCSAfactor*PCSA; ///< Maximum force output at optimum fiber length
  Lf0 = MuscleParameters.OptimalFiberlength / cos(pi/180*MuscleParameters.Pennationangle); //< Optimal fiber length corrected by pennation angle
  // New experimental variables for new pcsa and volume distribution
  AnyVar PCSA = 1e-2*MuscleParameters.MuscleVolume/(.pectoralis_major_clavicular_part_1.Lf0 +.pectoralis_major_clavicular_part_2.Lf0 +.pectoralis_major_clavicular_part_3.Lf0 +.pectoralis_major_clavicular_part_4.Lf0 +.pectoralis_major_clavicular_part_5.Lf0 ); //< PCSA (cm2) is calculated as muscle volume divided between muscle branches and divided by fiber length
  Vol0 = PCSA * Lf0; // New calculation of the vol for the specific muscle branch
};


///////////////////////////////////////////
//     pectoralis_minor (4 elements)     //
///////////////////////////////////////////
AnyMuscleModel pectoralis_minor_1 =
{
  AnyFolder& MuscleParameters = .SubjectMusPar.pectoralis_minor;
  AnyIntVar MuscleElemNo = 1; ///< The number of this element of the muscle
  AnyIntVar MuscleElemAmount = MuscleParameters.MuscleElemAmount; ///< The total amount of elements for this muscle
  F0 = .SubjectMusPar.PCSAfactor*PCSA; ///< Maximum force output at optimum fiber length
  Lf0 = MuscleParameters.OptimalFiberlength / cos(pi/180*MuscleParameters.Pennationangle); //< Optimal fiber length corrected by pennation angle
  // New experimental variables for new pcsa and volume distribution
  AnyVar PCSA = 1e-2*MuscleParameters.MuscleVolume/(.pectoralis_minor_1.Lf0 +.pectoralis_minor_2.Lf0 +.pectoralis_minor_3.Lf0 +.pectoralis_minor_4.Lf0 ); //< PCSA (cm2) is calculated as muscle volume divided between muscle branches and divided by fiber length
  Vol0 = PCSA * Lf0; // New calculation of the vol for the specific muscle branch
};

AnyMuscleModel pectoralis_minor_2 =
{
  AnyFolder& MuscleParameters = .SubjectMusPar.pectoralis_minor;
  AnyIntVar MuscleElemNo = 2; ///< The number of this element of the muscle
  AnyIntVar MuscleElemAmount = MuscleParameters.MuscleElemAmount; ///< The total amount of elements for this muscle
  F0 = .SubjectMusPar.PCSAfactor*PCSA; ///< Maximum force output at optimum fiber length
  Lf0 = MuscleParameters.OptimalFiberlength / cos(pi/180*MuscleParameters.Pennationangle); //< Optimal fiber length corrected by pennation angle
  // New experimental variables for new pcsa and volume distribution
  AnyVar PCSA = 1e-2*MuscleParameters.MuscleVolume/(.pectoralis_minor_1.Lf0 +.pectoralis_minor_2.Lf0 +.pectoralis_minor_3.Lf0 +.pectoralis_minor_4.Lf0 ); //< PCSA (cm2) is calculated as muscle volume divided between muscle branches and divided by fiber length
  Vol0 = PCSA * Lf0; // New calculation of the vol for the specific muscle branch
};

AnyMuscleModel pectoralis_minor_3 =
{
  AnyFolder& MuscleParameters = .SubjectMusPar.pectoralis_minor;
  AnyIntVar MuscleElemNo = 3; ///< The number of this element of the muscle
  AnyIntVar MuscleElemAmount = MuscleParameters.MuscleElemAmount; ///< The total amount of elements for this muscle
  F0 = .SubjectMusPar.PCSAfactor*PCSA; ///< Maximum force output at optimum fiber length
  Lf0 = MuscleParameters.OptimalFiberlength / cos(pi/180*MuscleParameters.Pennationangle); //< Optimal fiber length corrected by pennation angle
  // New experimental variables for new pcsa and volume distribution
  AnyVar PCSA = 1e-2*MuscleParameters.MuscleVolume/(.pectoralis_minor_1.Lf0 +.pectoralis_minor_2.Lf0 +.pectoralis_minor_3.Lf0 +.pectoralis_minor_4.Lf0 ); //< PCSA (cm2) is calculated as muscle volume divided between muscle branches and divided by fiber length
  Vol0 = PCSA * Lf0; // New calculation of the vol for the specific muscle branch
};

AnyMuscleModel pectoralis_minor_4 =
{
  AnyFolder& MuscleParameters = .SubjectMusPar.pectoralis_minor;
  AnyIntVar MuscleElemNo = 4; ///< The number of this element of the muscle
  AnyIntVar MuscleElemAmount = MuscleParameters.MuscleElemAmount; ///< The total amount of elements for this muscle
  F0 = .SubjectMusPar.PCSAfactor*PCSA; ///< Maximum force output at optimum fiber length
  Lf0 = MuscleParameters.OptimalFiberlength / cos(pi/180*MuscleParameters.Pennationangle); //< Optimal fiber length corrected by pennation angle
  // New experimental variables for new pcsa and volume distribution
  AnyVar PCSA = 1e-2*MuscleParameters.MuscleVolume/(.pectoralis_minor_1.Lf0 +.pectoralis_minor_2.Lf0 +.pectoralis_minor_3.Lf0 +.pectoralis_minor_4.Lf0 ); //< PCSA (cm2) is calculated as muscle volume divided between muscle branches and divided by fiber length
  Vol0 = PCSA * Lf0; // New calculation of the vol for the specific muscle branch
};


//////////////////////////////////////
//     rhomboideus (3 elements)     //
//////////////////////////////////////
AnyMuscleModel rhomboideus_1 =
{
  AnyFolder& MuscleParameters = .SubjectMusPar.rhomboideus;
  AnyIntVar MuscleElemNo = 1; ///< The number of this element of the muscle
  AnyIntVar MuscleElemAmount = MuscleParameters.MuscleElemAmount; ///< The total amount of elements for this muscle
  F0 = .SubjectMusPar.PCSAfactor*PCSA; ///< Maximum force output at optimum fiber length
  Lf0 = MuscleParameters.OptimalFiberlength / cos(pi/180*MuscleParameters.Pennationangle); //< Optimal fiber length corrected by pennation angle
  // New experimental variables for new pcsa and volume distribution
  AnyVar PCSA = 1e-2*MuscleParameters.MuscleVolume/(.rhomboideus_1.Lf0 +.rhomboideus_2.Lf0 +.rhomboideus_3.Lf0 ); //< PCSA (cm2) is calculated as muscle volume divided between muscle branches and divided by fiber length
  Vol0 = PCSA * Lf0; // New calculation of the vol for the specific muscle branch
};

AnyMuscleModel rhomboideus_2 =
{
  AnyFolder& MuscleParameters = .SubjectMusPar.rhomboideus;
  AnyIntVar MuscleElemNo = 2; ///< The number of this element of the muscle
  AnyIntVar MuscleElemAmount = MuscleParameters.MuscleElemAmount; ///< The total amount of elements for this muscle
  F0 = .SubjectMusPar.PCSAfactor*PCSA; ///< Maximum force output at optimum fiber length
  Lf0 = MuscleParameters.OptimalFiberlength / cos(pi/180*MuscleParameters.Pennationangle); //< Optimal fiber length corrected by pennation angle
  // New experimental variables for new pcsa and volume distribution
  AnyVar PCSA = 1e-2*MuscleParameters.MuscleVolume/(.rhomboideus_1.Lf0 +.rhomboideus_2.Lf0 +.rhomboideus_3.Lf0 ); //< PCSA (cm2) is calculated as muscle volume divided between muscle branches and divided by fiber length
  Vol0 = PCSA * Lf0; // New calculation of the vol for the specific muscle branch
};

AnyMuscleModel rhomboideus_3 =
{
  AnyFolder& MuscleParameters = .SubjectMusPar.rhomboideus;
  AnyIntVar MuscleElemNo = 3; ///< The number of this element of the muscle
  AnyIntVar MuscleElemAmount = MuscleParameters.MuscleElemAmount; ///< The total amount of elements for this muscle
  F0 = .SubjectMusPar.PCSAfactor*PCSA; ///< Maximum force output at optimum fiber length
  Lf0 = MuscleParameters.OptimalFiberlength / cos(pi/180*MuscleParameters.Pennationangle); //< Optimal fiber length corrected by pennation angle
  // New experimental variables for new pcsa and volume distribution
  AnyVar PCSA = 1e-2*MuscleParameters.MuscleVolume/(.rhomboideus_1.Lf0 +.rhomboideus_2.Lf0 +.rhomboideus_3.Lf0 ); //< PCSA (cm2) is calculated as muscle volume divided between muscle branches and divided by fiber length
  Vol0 = PCSA * Lf0; // New calculation of the vol for the specific muscle branch
};


////////////////////////////////////////////
//     serratus_anterior (6 elements)     //
////////////////////////////////////////////
AnyMuscleModel serratus_anterior_1 =
{
  AnyFolder& MuscleParameters = .SubjectMusPar.serratus_anterior;
  AnyIntVar MuscleElemNo = 1; ///< The number of this element of the muscle
  AnyIntVar MuscleElemAmount = MuscleParameters.MuscleElemAmount; ///< The total amount of elements for this muscle
  F0 = .SubjectMusPar.PCSAfactor*PCSA; ///< Maximum force output at optimum fiber length
  Lf0 = MuscleParameters.OptimalFiberlength / cos(pi/180*MuscleParameters.Pennationangle); //< Optimal fiber length corrected by pennation angle
  // New experimental variables for new pcsa and volume distribution
  AnyVar PCSA = 1e-2*MuscleParameters.MuscleVolume/(.serratus_anterior_1.Lf0 +.serratus_anterior_2.Lf0 +.serratus_anterior_3.Lf0 +.serratus_anterior_4.Lf0 +.serratus_anterior_5.Lf0 +.serratus_anterior_6.Lf0 ); //< PCSA (cm2) is calculated as muscle volume divided between muscle branches and divided by fiber length
  Vol0 = PCSA * Lf0; // New calculation of the vol for the specific muscle branch
};

AnyMuscleModel serratus_anterior_2 =
{
  AnyFolder& MuscleParameters = .SubjectMusPar.serratus_anterior;
  AnyIntVar MuscleElemNo = 2; ///< The number of this element of the muscle
  AnyIntVar MuscleElemAmount = MuscleParameters.MuscleElemAmount; ///< The total amount of elements for this muscle
  F0 = .SubjectMusPar.PCSAfactor*PCSA; ///< Maximum force output at optimum fiber length
  Lf0 = MuscleParameters.OptimalFiberlength / cos(pi/180*MuscleParameters.Pennationangle); //< Optimal fiber length corrected by pennation angle
  // New experimental variables for new pcsa and volume distribution
  AnyVar PCSA = 1e-2*MuscleParameters.MuscleVolume/(.serratus_anterior_1.Lf0 +.serratus_anterior_2.Lf0 +.serratus_anterior_3.Lf0 +.serratus_anterior_4.Lf0 +.serratus_anterior_5.Lf0 +.serratus_anterior_6.Lf0 ); //< PCSA (cm2) is calculated as muscle volume divided between muscle branches and divided by fiber length
  Vol0 = PCSA * Lf0; // New calculation of the vol for the specific muscle branch
};

AnyMuscleModel serratus_anterior_3 =
{
  AnyFolder& MuscleParameters = .SubjectMusPar.serratus_anterior;
  AnyIntVar MuscleElemNo = 3; ///< The number of this element of the muscle
  AnyIntVar MuscleElemAmount = MuscleParameters.MuscleElemAmount; ///< The total amount of elements for this muscle
  F0 = .SubjectMusPar.PCSAfactor*PCSA; ///< Maximum force output at optimum fiber length
  Lf0 = MuscleParameters.OptimalFiberlength / cos(pi/180*MuscleParameters.Pennationangle); //< Optimal fiber length corrected by pennation angle
  // New experimental variables for new pcsa and volume distribution
  AnyVar PCSA = 1e-2*MuscleParameters.MuscleVolume/(.serratus_anterior_1.Lf0 +.serratus_anterior_2.Lf0 +.serratus_anterior_3.Lf0 +.serratus_anterior_4.Lf0 +.serratus_anterior_5.Lf0 +.serratus_anterior_6.Lf0 ); //< PCSA (cm2) is calculated as muscle volume divided between muscle branches and divided by fiber length
  Vol0 = PCSA * Lf0; // New calculation of the vol for the specific muscle branch
};

AnyMuscleModel serratus_anterior_4 =
{
  AnyFolder& MuscleParameters = .SubjectMusPar.serratus_anterior;
  AnyIntVar MuscleElemNo = 4; ///< The number of this element of the muscle
  AnyIntVar MuscleElemAmount = MuscleParameters.MuscleElemAmount; ///< The total amount of elements for this muscle
  F0 = .SubjectMusPar.PCSAfactor*PCSA; ///< Maximum force output at optimum fiber length
  Lf0 = MuscleParameters.OptimalFiberlength / cos(pi/180*MuscleParameters.Pennationangle); //< Optimal fiber length corrected by pennation angle
  // New experimental variables for new pcsa and volume distribution
  AnyVar PCSA = 1e-2*MuscleParameters.MuscleVolume/(.serratus_anterior_1.Lf0 +.serratus_anterior_2.Lf0 +.serratus_anterior_3.Lf0 +.serratus_anterior_4.Lf0 +.serratus_anterior_5.Lf0 +.serratus_anterior_6.Lf0 ); //< PCSA (cm2) is calculated as muscle volume divided between muscle branches and divided by fiber length
  Vol0 = PCSA * Lf0; // New calculation of the vol for the specific muscle branch
};

AnyMuscleModel serratus_anterior_5 =
{
  AnyFolder& MuscleParameters = .SubjectMusPar.serratus_anterior;
  AnyIntVar MuscleElemNo = 5; ///< The number of this element of the muscle
  AnyIntVar MuscleElemAmount = MuscleParameters.MuscleElemAmount; ///< The total amount of elements for this muscle
  F0 = .SubjectMusPar.PCSAfactor*PCSA; ///< Maximum force output at optimum fiber length
  Lf0 = MuscleParameters.OptimalFiberlength / cos(pi/180*MuscleParameters.Pennationangle); //< Optimal fiber length corrected by pennation angle
  // New experimental variables for new pcsa and volume distribution
  AnyVar PCSA = 1e-2*MuscleParameters.MuscleVolume/(.serratus_anterior_1.Lf0 +.serratus_anterior_2.Lf0 +.serratus_anterior_3.Lf0 +.serratus_anterior_4.Lf0 +.serratus_anterior_5.Lf0 +.serratus_anterior_6.Lf0 ); //< PCSA (cm2) is calculated as muscle volume divided between muscle branches and divided by fiber length
  Vol0 = PCSA * Lf0; // New calculation of the vol for the specific muscle branch
};

AnyMuscleModel serratus_anterior_6 =
{
  AnyFolder& MuscleParameters = .SubjectMusPar.serratus_anterior;
  AnyIntVar MuscleElemNo = 6; ///< The number of this element of the muscle
  AnyIntVar MuscleElemAmount = MuscleParameters.MuscleElemAmount; ///< The total amount of elements for this muscle
  F0 = .SubjectMusPar.PCSAfactor*PCSA; ///< Maximum force output at optimum fiber length
  Lf0 = MuscleParameters.OptimalFiberlength / cos(pi/180*MuscleParameters.Pennationangle); //< Optimal fiber length corrected by pennation angle
  // New experimental variables for new pcsa and volume distribution
  AnyVar PCSA = 1e-2*MuscleParameters.MuscleVolume/(.serratus_anterior_1.Lf0 +.serratus_anterior_2.Lf0 +.serratus_anterior_3.Lf0 +.serratus_anterior_4.Lf0 +.serratus_anterior_5.Lf0 +.serratus_anterior_6.Lf0 ); //< PCSA (cm2) is calculated as muscle volume divided between muscle branches and divided by fiber length
  Vol0 = PCSA * Lf0; // New calculation of the vol for the specific muscle branch
};


//////////////////////////////////////////////
//     Sternocleidomastoid (2 elements)     //
//////////////////////////////////////////////
AnyMuscleModel Sternocleidomastoid_1 =
{
  AnyFolder& MuscleParameters = .SubjectMusPar.Sternocleidomastoid;
  AnyIntVar MuscleElemNo = 1; ///< The number of this element of the muscle
  AnyIntVar MuscleElemAmount = MuscleParameters.MuscleElemAmount; ///< The total amount of elements for this muscle
  F0 = .SubjectMusPar.PCSAfactor*PCSA; ///< Maximum force output at optimum fiber length
  Lf0 = MuscleParameters.OptimalFiberlength / cos(pi/180*MuscleParameters.Pennationangle); //< Optimal fiber length corrected by pennation angle
  // New experimental variables for new pcsa and volume distribution
  AnyVar PCSA = 1e-2*MuscleParameters.MuscleVolume/(.Sternocleidomastoid_1.Lf0 +.Sternocleidomastoid_2.Lf0 ); //< PCSA (cm2) is calculated as muscle volume divided between muscle branches and divided by fiber length
  Vol0 = PCSA * Lf0; // New calculation of the vol for the specific muscle branch
};

AnyMuscleModel Sternocleidomastoid_2 =
{
  AnyFolder& MuscleParameters = .SubjectMusPar.Sternocleidomastoid;
  AnyIntVar MuscleElemNo = 2; ///< The number of this element of the muscle
  AnyIntVar MuscleElemAmount = MuscleParameters.MuscleElemAmount; ///< The total amount of elements for this muscle
  F0 = .SubjectMusPar.PCSAfactor*PCSA; ///< Maximum force output at optimum fiber length
  Lf0 = MuscleParameters.OptimalFiberlength / cos(pi/180*MuscleParameters.Pennationangle); //< Optimal fiber length corrected by pennation angle
  // New experimental variables for new pcsa and volume distribution
  AnyVar PCSA = 1e-2*MuscleParameters.MuscleVolume/(.Sternocleidomastoid_1.Lf0 +.Sternocleidomastoid_2.Lf0 ); //< PCSA (cm2) is calculated as muscle volume divided between muscle branches and divided by fiber length
  Vol0 = PCSA * Lf0; // New calculation of the vol for the specific muscle branch
};


////////////////////////////////////////
//     subscapularis (6 elements)     //
////////////////////////////////////////
AnyMuscleModel subscapularis_1 =
{
  AnyFolder& MuscleParameters = .SubjectMusPar.subscapularis;
  AnyIntVar MuscleElemNo = 1; ///< The number of this element of the muscle
  AnyIntVar MuscleElemAmount = MuscleParameters.MuscleElemAmount; ///< The total amount of elements for this muscle
  F0 = .SubjectMusPar.PCSAfactor*PCSA; ///< Maximum force output at optimum fiber length
  Lf0 = MuscleParameters.OptimalFiberlength / cos(pi/180*MuscleParameters.Pennationangle); //< Optimal fiber length corrected by pennation angle
  // New experimental variables for new pcsa and volume distribution
  AnyVar PCSA = 1e-2*MuscleParameters.MuscleVolume/(.subscapularis_1.Lf0 +.subscapularis_2.Lf0 +.subscapularis_3.Lf0 +.subscapularis_4.Lf0 +.subscapularis_5.Lf0 +.subscapularis_6.Lf0 ); //< PCSA (cm2) is calculated as muscle volume divided between muscle branches and divided by fiber length
  Vol0 = PCSA * Lf0; // New calculation of the vol for the specific muscle branch
};

AnyMuscleModel subscapularis_2 =
{
  AnyFolder& MuscleParameters = .SubjectMusPar.subscapularis;
  AnyIntVar MuscleElemNo = 2; ///< The number of this element of the muscle
  AnyIntVar MuscleElemAmount = MuscleParameters.MuscleElemAmount; ///< The total amount of elements for this muscle
  F0 = .SubjectMusPar.PCSAfactor*PCSA; ///< Maximum force output at optimum fiber length
  Lf0 = MuscleParameters.OptimalFiberlength / cos(pi/180*MuscleParameters.Pennationangle); //< Optimal fiber length corrected by pennation angle
  // New experimental variables for new pcsa and volume distribution
  AnyVar PCSA = 1e-2*MuscleParameters.MuscleVolume/(.subscapularis_1.Lf0 +.subscapularis_2.Lf0 +.subscapularis_3.Lf0 +.subscapularis_4.Lf0 +.subscapularis_5.Lf0 +.subscapularis_6.Lf0 ); //< PCSA (cm2) is calculated as muscle volume divided between muscle branches and divided by fiber length
  Vol0 = PCSA * Lf0; // New calculation of the vol for the specific muscle branch
};

AnyMuscleModel subscapularis_3 =
{
  AnyFolder& MuscleParameters = .SubjectMusPar.subscapularis;
  AnyIntVar MuscleElemNo = 3; ///< The number of this element of the muscle
  AnyIntVar MuscleElemAmount = MuscleParameters.MuscleElemAmount; ///< The total amount of elements for this muscle
  F0 = .SubjectMusPar.PCSAfactor*PCSA; ///< Maximum force output at optimum fiber length
  Lf0 = MuscleParameters.OptimalFiberlength / cos(pi/180*MuscleParameters.Pennationangle); //< Optimal fiber length corrected by pennation angle
  // New experimental variables for new pcsa and volume distribution
  AnyVar PCSA = 1e-2*MuscleParameters.MuscleVolume/(.subscapularis_1.Lf0 +.subscapularis_2.Lf0 +.subscapularis_3.Lf0 +.subscapularis_4.Lf0 +.subscapularis_5.Lf0 +.subscapularis_6.Lf0 ); //< PCSA (cm2) is calculated as muscle volume divided between muscle branches and divided by fiber length
  Vol0 = PCSA * Lf0; // New calculation of the vol for the specific muscle branch
};

AnyMuscleModel subscapularis_4 =
{
  AnyFolder& MuscleParameters = .SubjectMusPar.subscapularis;
  AnyIntVar MuscleElemNo = 4; ///< The number of this element of the muscle
  AnyIntVar MuscleElemAmount = MuscleParameters.MuscleElemAmount; ///< The total amount of elements for this muscle
  F0 = .SubjectMusPar.PCSAfactor*PCSA; ///< Maximum force output at optimum fiber length
  Lf0 = MuscleParameters.OptimalFiberlength / cos(pi/180*MuscleParameters.Pennationangle); //< Optimal fiber length corrected by pennation angle
  // New experimental variables for new pcsa and volume distribution
  AnyVar PCSA = 1e-2*MuscleParameters.MuscleVolume/(.subscapularis_1.Lf0 +.subscapularis_2.Lf0 +.subscapularis_3.Lf0 +.subscapularis_4.Lf0 +.subscapularis_5.Lf0 +.subscapularis_6.Lf0 ); //< PCSA (cm2) is calculated as muscle volume divided between muscle branches and divided by fiber length
  Vol0 = PCSA * Lf0; // New calculation of the vol for the specific muscle branch
};

AnyMuscleModel subscapularis_5 =
{
  AnyFolder& MuscleParameters = .SubjectMusPar.subscapularis;
  AnyIntVar MuscleElemNo = 5; ///< The number of this element of the muscle
  AnyIntVar MuscleElemAmount = MuscleParameters.MuscleElemAmount; ///< The total amount of elements for this muscle
  F0 = .SubjectMusPar.PCSAfactor*PCSA; ///< Maximum force output at optimum fiber length
  Lf0 = MuscleParameters.OptimalFiberlength / cos(pi/180*MuscleParameters.Pennationangle); //< Optimal fiber length corrected by pennation angle
  // New experimental variables for new pcsa and volume distribution
  AnyVar PCSA = 1e-2*MuscleParameters.MuscleVolume/(.subscapularis_1.Lf0 +.subscapularis_2.Lf0 +.subscapularis_3.Lf0 +.subscapularis_4.Lf0 +.subscapularis_5.Lf0 +.subscapularis_6.Lf0 ); //< PCSA (cm2) is calculated as muscle volume divided between muscle branches and divided by fiber length
  Vol0 = PCSA * Lf0; // New calculation of the vol for the specific muscle branch
};

AnyMuscleModel subscapularis_6 =
{
  AnyFolder& MuscleParameters = .SubjectMusPar.subscapularis;
  AnyIntVar MuscleElemNo = 6; ///< The number of this element of the muscle
  AnyIntVar MuscleElemAmount = MuscleParameters.MuscleElemAmount; ///< The total amount of elements for this muscle
  F0 = .SubjectMusPar.PCSAfactor*PCSA; ///< Maximum force output at optimum fiber length
  Lf0 = MuscleParameters.OptimalFiberlength / cos(pi/180*MuscleParameters.Pennationangle); //< Optimal fiber length corrected by pennation angle
  // New experimental variables for new pcsa and volume distribution
  AnyVar PCSA = 1e-2*MuscleParameters.MuscleVolume/(.subscapularis_1.Lf0 +.subscapularis_2.Lf0 +.subscapularis_3.Lf0 +.subscapularis_4.Lf0 +.subscapularis_5.Lf0 +.subscapularis_6.Lf0 ); //< PCSA (cm2) is calculated as muscle volume divided between muscle branches and divided by fiber length
  Vol0 = PCSA * Lf0; // New calculation of the vol for the specific muscle branch
};


////////////////////////////////////////
//     supraspinatus (6 elements)     //
////////////////////////////////////////
AnyMuscleModel supraspinatus_1 =
{
  AnyFolder& MuscleParameters = .SubjectMusPar.supraspinatus;
  AnyIntVar MuscleElemNo = 1; ///< The number of this element of the muscle
  AnyIntVar MuscleElemAmount = MuscleParameters.MuscleElemAmount; ///< The total amount of elements for this muscle
  F0 = .SubjectMusPar.PCSAfactor*PCSA; ///< Maximum force output at optimum fiber length
  Lf0 = MuscleParameters.OptimalFiberlength / cos(pi/180*MuscleParameters.Pennationangle); //< Optimal fiber length corrected by pennation angle
  // New experimental variables for new pcsa and volume distribution
  AnyVar PCSA = 1e-2*MuscleParameters.MuscleVolume/(.supraspinatus_1.Lf0 +.supraspinatus_2.Lf0 +.supraspinatus_3.Lf0 +.supraspinatus_4.Lf0 +.supraspinatus_5.Lf0 +.supraspinatus_6.Lf0 ); //< PCSA (cm2) is calculated as muscle volume divided between muscle branches and divided by fiber length
  Vol0 = PCSA * Lf0; // New calculation of the vol for the specific muscle branch
};

AnyMuscleModel supraspinatus_2 =
{
  AnyFolder& MuscleParameters = .SubjectMusPar.supraspinatus;
  AnyIntVar MuscleElemNo = 2; ///< The number of this element of the muscle
  AnyIntVar MuscleElemAmount = MuscleParameters.MuscleElemAmount; ///< The total amount of elements for this muscle
  F0 = .SubjectMusPar.PCSAfactor*PCSA; ///< Maximum force output at optimum fiber length
  Lf0 = MuscleParameters.OptimalFiberlength / cos(pi/180*MuscleParameters.Pennationangle); //< Optimal fiber length corrected by pennation angle
  // New experimental variables for new pcsa and volume distribution
  AnyVar PCSA = 1e-2*MuscleParameters.MuscleVolume/(.supraspinatus_1.Lf0 +.supraspinatus_2.Lf0 +.supraspinatus_3.Lf0 +.supraspinatus_4.Lf0 +.supraspinatus_5.Lf0 +.supraspinatus_6.Lf0 ); //< PCSA (cm2) is calculated as muscle volume divided between muscle branches and divided by fiber length
  Vol0 = PCSA * Lf0; // New calculation of the vol for the specific muscle branch
};

AnyMuscleModel supraspinatus_3 =
{
  AnyFolder& MuscleParameters = .SubjectMusPar.supraspinatus;
  AnyIntVar MuscleElemNo = 3; ///< The number of this element of the muscle
  AnyIntVar MuscleElemAmount = MuscleParameters.MuscleElemAmount; ///< The total amount of elements for this muscle
  F0 = .SubjectMusPar.PCSAfactor*PCSA; ///< Maximum force output at optimum fiber length
  Lf0 = MuscleParameters.OptimalFiberlength / cos(pi/180*MuscleParameters.Pennationangle); //< Optimal fiber length corrected by pennation angle
  // New experimental variables for new pcsa and volume distribution
  AnyVar PCSA = 1e-2*MuscleParameters.MuscleVolume/(.supraspinatus_1.Lf0 +.supraspinatus_2.Lf0 +.supraspinatus_3.Lf0 +.supraspinatus_4.Lf0 +.supraspinatus_5.Lf0 +.supraspinatus_6.Lf0 ); //< PCSA (cm2) is calculated as muscle volume divided between muscle branches and divided by fiber length
  Vol0 = PCSA * Lf0; // New calculation of the vol for the specific muscle branch
};

AnyMuscleModel supraspinatus_4 =
{
  AnyFolder& MuscleParameters = .SubjectMusPar.supraspinatus;
  AnyIntVar MuscleElemNo = 4; ///< The number of this element of the muscle
  AnyIntVar MuscleElemAmount = MuscleParameters.MuscleElemAmount; ///< The total amount of elements for this muscle
  F0 = .SubjectMusPar.PCSAfactor*PCSA; ///< Maximum force output at optimum fiber length
  Lf0 = MuscleParameters.OptimalFiberlength / cos(pi/180*MuscleParameters.Pennationangle); //< Optimal fiber length corrected by pennation angle
  // New experimental variables for new pcsa and volume distribution
  AnyVar PCSA = 1e-2*MuscleParameters.MuscleVolume/(.supraspinatus_1.Lf0 +.supraspinatus_2.Lf0 +.supraspinatus_3.Lf0 +.supraspinatus_4.Lf0 +.supraspinatus_5.Lf0 +.supraspinatus_6.Lf0 ); //< PCSA (cm2) is calculated as muscle volume divided between muscle branches and divided by fiber length
  Vol0 = PCSA * Lf0; // New calculation of the vol for the specific muscle branch
};

AnyMuscleModel supraspinatus_5 =
{
  AnyFolder& MuscleParameters = .SubjectMusPar.supraspinatus;
  AnyIntVar MuscleElemNo = 5; ///< The number of this element of the muscle
  AnyIntVar MuscleElemAmount = MuscleParameters.MuscleElemAmount; ///< The total amount of elements for this muscle
  F0 = .SubjectMusPar.PCSAfactor*PCSA; ///< Maximum force output at optimum fiber length
  Lf0 = MuscleParameters.OptimalFiberlength / cos(pi/180*MuscleParameters.Pennationangle); //< Optimal fiber length corrected by pennation angle
  // New experimental variables for new pcsa and volume distribution
  AnyVar PCSA = 1e-2*MuscleParameters.MuscleVolume/(.supraspinatus_1.Lf0 +.supraspinatus_2.Lf0 +.supraspinatus_3.Lf0 +.supraspinatus_4.Lf0 +.supraspinatus_5.Lf0 +.supraspinatus_6.Lf0 ); //< PCSA (cm2) is calculated as muscle volume divided between muscle branches and divided by fiber length
  Vol0 = PCSA * Lf0; // New calculation of the vol for the specific muscle branch
};

AnyMuscleModel supraspinatus_6 =
{
  AnyFolder& MuscleParameters = .SubjectMusPar.supraspinatus;
  AnyIntVar MuscleElemNo = 6; ///< The number of this element of the muscle
  AnyIntVar MuscleElemAmount = MuscleParameters.MuscleElemAmount; ///< The total amount of elements for this muscle
  F0 = .SubjectMusPar.PCSAfactor*PCSA; ///< Maximum force output at optimum fiber length
  Lf0 = MuscleParameters.OptimalFiberlength / cos(pi/180*MuscleParameters.Pennationangle); //< Optimal fiber length corrected by pennation angle
  // New experimental variables for new pcsa and volume distribution
  AnyVar PCSA = 1e-2*MuscleParameters.MuscleVolume/(.supraspinatus_1.Lf0 +.supraspinatus_2.Lf0 +.supraspinatus_3.Lf0 +.supraspinatus_4.Lf0 +.supraspinatus_5.Lf0 +.supraspinatus_6.Lf0 ); //< PCSA (cm2) is calculated as muscle volume divided between muscle branches and divided by fiber length
  Vol0 = PCSA * Lf0; // New calculation of the vol for the specific muscle branch
};


//////////////////////////////////////
//     teres_major (6 elements)     //
//////////////////////////////////////
AnyMuscleModel teres_major_1 =
{
  AnyFolder& MuscleParameters = .SubjectMusPar.teres_major;
  AnyIntVar MuscleElemNo = 1; ///< The number of this element of the muscle
  AnyIntVar MuscleElemAmount = MuscleParameters.MuscleElemAmount; ///< The total amount of elements for this muscle
  F0 = .SubjectMusPar.PCSAfactor*PCSA; ///< Maximum force output at optimum fiber length
  Lf0 = MuscleParameters.OptimalFiberlength / cos(pi/180*MuscleParameters.Pennationangle); //< Optimal fiber length corrected by pennation angle
  // New experimental variables for new pcsa and volume distribution
  AnyVar PCSA = 1e-2*MuscleParameters.MuscleVolume/(.teres_major_1.Lf0 +.teres_major_2.Lf0 +.teres_major_3.Lf0 +.teres_major_4.Lf0 +.teres_major_5.Lf0 +.teres_major_6.Lf0 ); //< PCSA (cm2) is calculated as muscle volume divided between muscle branches and divided by fiber length
  Vol0 = PCSA * Lf0; // New calculation of the vol for the specific muscle branch
};

AnyMuscleModel teres_major_2 =
{
  AnyFolder& MuscleParameters = .SubjectMusPar.teres_major;
  AnyIntVar MuscleElemNo = 2; ///< The number of this element of the muscle
  AnyIntVar MuscleElemAmount = MuscleParameters.MuscleElemAmount; ///< The total amount of elements for this muscle
  F0 = .SubjectMusPar.PCSAfactor*PCSA; ///< Maximum force output at optimum fiber length
  Lf0 = MuscleParameters.OptimalFiberlength / cos(pi/180*MuscleParameters.Pennationangle); //< Optimal fiber length corrected by pennation angle
  // New experimental variables for new pcsa and volume distribution
  AnyVar PCSA = 1e-2*MuscleParameters.MuscleVolume/(.teres_major_1.Lf0 +.teres_major_2.Lf0 +.teres_major_3.Lf0 +.teres_major_4.Lf0 +.teres_major_5.Lf0 +.teres_major_6.Lf0 ); //< PCSA (cm2) is calculated as muscle volume divided between muscle branches and divided by fiber length
  Vol0 = PCSA * Lf0; // New calculation of the vol for the specific muscle branch
};

AnyMuscleModel teres_major_3 =
{
  AnyFolder& MuscleParameters = .SubjectMusPar.teres_major;
  AnyIntVar MuscleElemNo = 3; ///< The number of this element of the muscle
  AnyIntVar MuscleElemAmount = MuscleParameters.MuscleElemAmount; ///< The total amount of elements for this muscle
  F0 = .SubjectMusPar.PCSAfactor*PCSA; ///< Maximum force output at optimum fiber length
  Lf0 = MuscleParameters.OptimalFiberlength / cos(pi/180*MuscleParameters.Pennationangle); //< Optimal fiber length corrected by pennation angle
  // New experimental variables for new pcsa and volume distribution
  AnyVar PCSA = 1e-2*MuscleParameters.MuscleVolume/(.teres_major_1.Lf0 +.teres_major_2.Lf0 +.teres_major_3.Lf0 +.teres_major_4.Lf0 +.teres_major_5.Lf0 +.teres_major_6.Lf0 ); //< PCSA (cm2) is calculated as muscle volume divided between muscle branches and divided by fiber length
  Vol0 = PCSA * Lf0; // New calculation of the vol for the specific muscle branch
};

AnyMuscleModel teres_major_4 =
{
  AnyFolder& MuscleParameters = .SubjectMusPar.teres_major;
  AnyIntVar MuscleElemNo = 4; ///< The number of this element of the muscle
  AnyIntVar MuscleElemAmount = MuscleParameters.MuscleElemAmount; ///< The total amount of elements for this muscle
  F0 = .SubjectMusPar.PCSAfactor*PCSA; ///< Maximum force output at optimum fiber length
  Lf0 = MuscleParameters.OptimalFiberlength / cos(pi/180*MuscleParameters.Pennationangle); //< Optimal fiber length corrected by pennation angle
  // New experimental variables for new pcsa and volume distribution
  AnyVar PCSA = 1e-2*MuscleParameters.MuscleVolume/(.teres_major_1.Lf0 +.teres_major_2.Lf0 +.teres_major_3.Lf0 +.teres_major_4.Lf0 +.teres_major_5.Lf0 +.teres_major_6.Lf0 ); //< PCSA (cm2) is calculated as muscle volume divided between muscle branches and divided by fiber length
  Vol0 = PCSA * Lf0; // New calculation of the vol for the specific muscle branch
};

AnyMuscleModel teres_major_5 =
{
  AnyFolder& MuscleParameters = .SubjectMusPar.teres_major;
  AnyIntVar MuscleElemNo = 5; ///< The number of this element of the muscle
  AnyIntVar MuscleElemAmount = MuscleParameters.MuscleElemAmount; ///< The total amount of elements for this muscle
  F0 = .SubjectMusPar.PCSAfactor*PCSA; ///< Maximum force output at optimum fiber length
  Lf0 = MuscleParameters.OptimalFiberlength / cos(pi/180*MuscleParameters.Pennationangle); //< Optimal fiber length corrected by pennation angle
  // New experimental variables for new pcsa and volume distribution
  AnyVar PCSA = 1e-2*MuscleParameters.MuscleVolume/(.teres_major_1.Lf0 +.teres_major_2.Lf0 +.teres_major_3.Lf0 +.teres_major_4.Lf0 +.teres_major_5.Lf0 +.teres_major_6.Lf0 ); //< PCSA (cm2) is calculated as muscle volume divided between muscle branches and divided by fiber length
  Vol0 = PCSA * Lf0; // New calculation of the vol for the specific muscle branch
};

AnyMuscleModel teres_major_6 =
{
  AnyFolder& MuscleParameters = .SubjectMusPar.teres_major;
  AnyIntVar MuscleElemNo = 6; ///< The number of this element of the muscle
  AnyIntVar MuscleElemAmount = MuscleParameters.MuscleElemAmount; ///< The total amount of elements for this muscle
  F0 = .SubjectMusPar.PCSAfactor*PCSA; ///< Maximum force output at optimum fiber length
  Lf0 = MuscleParameters.OptimalFiberlength / cos(pi/180*MuscleParameters.Pennationangle); //< Optimal fiber length corrected by pennation angle
  // New experimental variables for new pcsa and volume distribution
  AnyVar PCSA = 1e-2*MuscleParameters.MuscleVolume/(.teres_major_1.Lf0 +.teres_major_2.Lf0 +.teres_major_3.Lf0 +.teres_major_4.Lf0 +.teres_major_5.Lf0 +.teres_major_6.Lf0 ); //< PCSA (cm2) is calculated as muscle volume divided between muscle branches and divided by fiber length
  Vol0 = PCSA * Lf0; // New calculation of the vol for the specific muscle branch
};
//////////////////////////////////////
//     teres_minor (6 elements)     //
//////////////////////////////////////
AnyMuscleModel teres_minor_1 =
{
  AnyFolder& MuscleParameters = .SubjectMusPar.teres_minor;
  AnyIntVar MuscleElemNo = 1; ///< The number of this element of the muscle
  AnyIntVar MuscleElemAmount = MuscleParameters.MuscleElemAmount; ///< The total amount of elements for this muscle
  F0 = .SubjectMusPar.PCSAfactor*PCSA; ///< Maximum force output at optimum fiber length
  Lf0 = MuscleParameters.OptimalFiberlength / cos(pi/180*MuscleParameters.Pennationangle); //< Optimal fiber length corrected by pennation angle
  // New experimental variables for new pcsa and volume distribution
  AnyVar PCSA = 1e-2*MuscleParameters.MuscleVolume/(.teres_minor_1.Lf0 +.teres_minor_2.Lf0 +.teres_minor_3.Lf0 +.teres_minor_4.Lf0 +.teres_minor_5.Lf0 +.teres_minor_6.Lf0 ); //< PCSA (cm2) is calculated as muscle volume divided between muscle branches and divided by fiber length
  Vol0 = PCSA * Lf0; // New calculation of the vol for the specific muscle branch
};

AnyMuscleModel teres_minor_2 =
{
  AnyFolder& MuscleParameters = .SubjectMusPar.teres_minor;
  AnyIntVar MuscleElemNo = 2; ///< The number of this element of the muscle
  AnyIntVar MuscleElemAmount = MuscleParameters.MuscleElemAmount; ///< The total amount of elements for this muscle
  F0 = .SubjectMusPar.PCSAfactor*PCSA; ///< Maximum force output at optimum fiber length
  Lf0 = MuscleParameters.OptimalFiberlength / cos(pi/180*MuscleParameters.Pennationangle); //< Optimal fiber length corrected by pennation angle
  // New experimental variables for new pcsa and volume distribution
  AnyVar PCSA = 1e-2*MuscleParameters.MuscleVolume/(.teres_minor_1.Lf0 +.teres_minor_2.Lf0 +.teres_minor_3.Lf0 +.teres_minor_4.Lf0 +.teres_minor_5.Lf0 +.teres_minor_6.Lf0 ); //< PCSA (cm2) is calculated as muscle volume divided between muscle branches and divided by fiber length
  Vol0 = PCSA * Lf0; // New calculation of the vol for the specific muscle branch
};

AnyMuscleModel teres_minor_3 =
{
  AnyFolder& MuscleParameters = .SubjectMusPar.teres_minor;
  AnyIntVar MuscleElemNo = 3; ///< The number of this element of the muscle
  AnyIntVar MuscleElemAmount = MuscleParameters.MuscleElemAmount; ///< The total amount of elements for this muscle
  F0 = .SubjectMusPar.PCSAfactor*PCSA; ///< Maximum force output at optimum fiber length
  Lf0 = MuscleParameters.OptimalFiberlength / cos(pi/180*MuscleParameters.Pennationangle); //< Optimal fiber length corrected by pennation angle
  // New experimental variables for new pcsa and volume distribution
  AnyVar PCSA = 1e-2*MuscleParameters.MuscleVolume/(.teres_minor_1.Lf0 +.teres_minor_2.Lf0 +.teres_minor_3.Lf0 +.teres_minor_4.Lf0 +.teres_minor_5.Lf0 +.teres_minor_6.Lf0 ); //< PCSA (cm2) is calculated as muscle volume divided between muscle branches and divided by fiber length
  Vol0 = PCSA * Lf0; // New calculation of the vol for the specific muscle branch
};

AnyMuscleModel teres_minor_4 =
{
  AnyFolder& MuscleParameters = .SubjectMusPar.teres_minor;
  AnyIntVar MuscleElemNo = 4; ///< The number of this element of the muscle
  AnyIntVar MuscleElemAmount = MuscleParameters.MuscleElemAmount; ///< The total amount of elements for this muscle
  F0 = .SubjectMusPar.PCSAfactor*PCSA; ///< Maximum force output at optimum fiber length
  Lf0 = MuscleParameters.OptimalFiberlength / cos(pi/180*MuscleParameters.Pennationangle); //< Optimal fiber length corrected by pennation angle
  // New experimental variables for new pcsa and volume distribution
  AnyVar PCSA = 1e-2*MuscleParameters.MuscleVolume/(.teres_minor_1.Lf0 +.teres_minor_2.Lf0 +.teres_minor_3.Lf0 +.teres_minor_4.Lf0 +.teres_minor_5.Lf0 +.teres_minor_6.Lf0 ); //< PCSA (cm2) is calculated as muscle volume divided between muscle branches and divided by fiber length
  Vol0 = PCSA * Lf0; // New calculation of the vol for the specific muscle branch
};

AnyMuscleModel teres_minor_5 =
{
  AnyFolder& MuscleParameters = .SubjectMusPar.teres_minor;
  AnyIntVar MuscleElemNo = 5; ///< The number of this element of the muscle
  AnyIntVar MuscleElemAmount = MuscleParameters.MuscleElemAmount; ///< The total amount of elements for this muscle
  F0 = .SubjectMusPar.PCSAfactor*PCSA; ///< Maximum force output at optimum fiber length
  Lf0 = MuscleParameters.OptimalFiberlength / cos(pi/180*MuscleParameters.Pennationangle); //< Optimal fiber length corrected by pennation angle
  // New experimental variables for new pcsa and volume distribution
  AnyVar PCSA = 1e-2*MuscleParameters.MuscleVolume/(.teres_minor_1.Lf0 +.teres_minor_2.Lf0 +.teres_minor_3.Lf0 +.teres_minor_4.Lf0 +.teres_minor_5.Lf0 +.teres_minor_6.Lf0 ); //< PCSA (cm2) is calculated as muscle volume divided between muscle branches and divided by fiber length
  Vol0 = PCSA * Lf0; // New calculation of the vol for the specific muscle branch
};

AnyMuscleModel teres_minor_6 =
{
  AnyFolder& MuscleParameters = .SubjectMusPar.teres_minor;
  AnyIntVar MuscleElemNo = 6; ///< The number of this element of the muscle
  AnyIntVar MuscleElemAmount = MuscleParameters.MuscleElemAmount; ///< The total amount of elements for this muscle
  F0 = .SubjectMusPar.PCSAfactor*PCSA; ///< Maximum force output at optimum fiber length
  Lf0 = MuscleParameters.OptimalFiberlength / cos(pi/180*MuscleParameters.Pennationangle); //< Optimal fiber length corrected by pennation angle
  // New experimental variables for new pcsa and volume distribution
  AnyVar PCSA = 1e-2*MuscleParameters.MuscleVolume/(.teres_minor_1.Lf0 +.teres_minor_2.Lf0 +.teres_minor_3.Lf0 +.teres_minor_4.Lf0 +.teres_minor_5.Lf0 +.teres_minor_6.Lf0 ); //< PCSA (cm2) is calculated as muscle volume divided between muscle branches and divided by fiber length
  Vol0 = PCSA * Lf0; // New calculation of the vol for the specific muscle branch
};


//////////////////////////////////////////////////
//     trapezius_scapular_part (6 elements)     //
//////////////////////////////////////////////////
AnyMuscleModel trapezius_scapular_part_1 =
{
  AnyFolder& MuscleParameters = .SubjectMusPar.trapezius_scapular_part;
  AnyIntVar MuscleElemNo = 1; ///< The number of this element of the muscle
  AnyIntVar MuscleElemAmount = MuscleParameters.MuscleElemAmount; ///< The total amount of elements for this muscle
  F0 = .SubjectMusPar.PCSAfactor*PCSA; ///< Maximum force output at optimum fiber length
  Lf0 = MuscleParameters.OptimalFiberlength / cos(pi/180*MuscleParameters.Pennationangle); //< Optimal fiber length corrected by pennation angle
  // New experimental variables for new pcsa and volume distribution
  AnyVar PCSA = 1e-2*MuscleParameters.MuscleVolume/(.trapezius_scapular_part_1.Lf0 +.trapezius_scapular_part_2.Lf0 +.trapezius_scapular_part_3.Lf0 +.trapezius_scapular_part_4.Lf0 +.trapezius_scapular_part_5.Lf0 +.trapezius_scapular_part_6.Lf0 ); //< PCSA (cm2) is calculated as muscle volume divided between muscle branches and divided by fiber length
  Vol0 = PCSA * Lf0; // New calculation of the vol for the specific muscle branch
};

AnyMuscleModel trapezius_scapular_part_2 =
{
  AnyFolder& MuscleParameters = .SubjectMusPar.trapezius_scapular_part;
  AnyIntVar MuscleElemNo = 2; ///< The number of this element of the muscle
  AnyIntVar MuscleElemAmount = MuscleParameters.MuscleElemAmount; ///< The total amount of elements for this muscle
  F0 = .SubjectMusPar.PCSAfactor*PCSA; ///< Maximum force output at optimum fiber length
  Lf0 = MuscleParameters.OptimalFiberlength / cos(pi/180*MuscleParameters.Pennationangle); //< Optimal fiber length corrected by pennation angle
  // New experimental variables for new pcsa and volume distribution
  AnyVar PCSA = 1e-2*MuscleParameters.MuscleVolume/(.trapezius_scapular_part_1.Lf0 +.trapezius_scapular_part_2.Lf0 +.trapezius_scapular_part_3.Lf0 +.trapezius_scapular_part_4.Lf0 +.trapezius_scapular_part_5.Lf0 +.trapezius_scapular_part_6.Lf0 ); //< PCSA (cm2) is calculated as muscle volume divided between muscle branches and divided by fiber length
  Vol0 = PCSA * Lf0; // New calculation of the vol for the specific muscle branch
};

AnyMuscleModel trapezius_scapular_part_3 =
{
  AnyFolder& MuscleParameters = .SubjectMusPar.trapezius_scapular_part;
  AnyIntVar MuscleElemNo = 3; ///< The number of this element of the muscle
  AnyIntVar MuscleElemAmount = MuscleParameters.MuscleElemAmount; ///< The total amount of elements for this muscle
  F0 = .SubjectMusPar.PCSAfactor*PCSA; ///< Maximum force output at optimum fiber length
  Lf0 = MuscleParameters.OptimalFiberlength / cos(pi/180*MuscleParameters.Pennationangle); //< Optimal fiber length corrected by pennation angle
  // New experimental variables for new pcsa and volume distribution
  AnyVar PCSA = 1e-2*MuscleParameters.MuscleVolume/(.trapezius_scapular_part_1.Lf0 +.trapezius_scapular_part_2.Lf0 +.trapezius_scapular_part_3.Lf0 +.trapezius_scapular_part_4.Lf0 +.trapezius_scapular_part_5.Lf0 +.trapezius_scapular_part_6.Lf0 ); //< PCSA (cm2) is calculated as muscle volume divided between muscle branches and divided by fiber length
  Vol0 = PCSA * Lf0; // New calculation of the vol for the specific muscle branch
};

AnyMuscleModel trapezius_scapular_part_4 =
{
  AnyFolder& MuscleParameters = .SubjectMusPar.trapezius_scapular_part;
  AnyIntVar MuscleElemNo = 4; ///< The number of this element of the muscle
  AnyIntVar MuscleElemAmount = MuscleParameters.MuscleElemAmount; ///< The total amount of elements for this muscle
  F0 = .SubjectMusPar.PCSAfactor*PCSA; ///< Maximum force output at optimum fiber length
  Lf0 = MuscleParameters.OptimalFiberlength / cos(pi/180*MuscleParameters.Pennationangle); //< Optimal fiber length corrected by pennation angle
  // New experimental variables for new pcsa and volume distribution
  AnyVar PCSA = 1e-2*MuscleParameters.MuscleVolume/(.trapezius_scapular_part_1.Lf0 +.trapezius_scapular_part_2.Lf0 +.trapezius_scapular_part_3.Lf0 +.trapezius_scapular_part_4.Lf0 +.trapezius_scapular_part_5.Lf0 +.trapezius_scapular_part_6.Lf0 ); //< PCSA (cm2) is calculated as muscle volume divided between muscle branches and divided by fiber length
  Vol0 = PCSA * Lf0; // New calculation of the vol for the specific muscle branch
};

AnyMuscleModel trapezius_scapular_part_5 =
{
  AnyFolder& MuscleParameters = .SubjectMusPar.trapezius_scapular_part;
  AnyIntVar MuscleElemNo = 5; ///< The number of this element of the muscle
  AnyIntVar MuscleElemAmount = MuscleParameters.MuscleElemAmount; ///< The total amount of elements for this muscle
  F0 = .SubjectMusPar.PCSAfactor*PCSA; ///< Maximum force output at optimum fiber length
  Lf0 = MuscleParameters.OptimalFiberlength / cos(pi/180*MuscleParameters.Pennationangle); //< Optimal fiber length corrected by pennation angle
  // New experimental variables for new pcsa and volume distribution
  AnyVar PCSA = 1e-2*MuscleParameters.MuscleVolume/(.trapezius_scapular_part_1.Lf0 +.trapezius_scapular_part_2.Lf0 +.trapezius_scapular_part_3.Lf0 +.trapezius_scapular_part_4.Lf0 +.trapezius_scapular_part_5.Lf0 +.trapezius_scapular_part_6.Lf0 ); //< PCSA (cm2) is calculated as muscle volume divided between muscle branches and divided by fiber length
  Vol0 = PCSA * Lf0; // New calculation of the vol for the specific muscle branch
};

AnyMuscleModel trapezius_scapular_part_6 =
{
  AnyFolder& MuscleParameters = .SubjectMusPar.trapezius_scapular_part;
  AnyIntVar MuscleElemNo = 6; ///< The number of this element of the muscle
  AnyIntVar MuscleElemAmount = MuscleParameters.MuscleElemAmount; ///< The total amount of elements for this muscle
  F0 = .SubjectMusPar.PCSAfactor*PCSA; ///< Maximum force output at optimum fiber length
  Lf0 = MuscleParameters.OptimalFiberlength / cos(pi/180*MuscleParameters.Pennationangle); //< Optimal fiber length corrected by pennation angle
  // New experimental variables for new pcsa and volume distribution
  AnyVar PCSA = 1e-2*MuscleParameters.MuscleVolume/(.trapezius_scapular_part_1.Lf0 +.trapezius_scapular_part_2.Lf0 +.trapezius_scapular_part_3.Lf0 +.trapezius_scapular_part_4.Lf0 +.trapezius_scapular_part_5.Lf0 +.trapezius_scapular_part_6.Lf0 ); //< PCSA (cm2) is calculated as muscle volume divided between muscle branches and divided by fiber length
  Vol0 = PCSA * Lf0; // New calculation of the vol for the specific muscle branch
};


////////////////////////////////////////////////////
//     trapezius_clavicular_part (6 elements)     //
////////////////////////////////////////////////////
AnyMuscleModel trapezius_clavicular_part_1 =
{
  AnyFolder& MuscleParameters = .SubjectMusPar.trapezius_clavicular_part;
  AnyIntVar MuscleElemNo = 1; ///< The number of this element of the muscle
  AnyIntVar MuscleElemAmount = MuscleParameters.MuscleElemAmount; ///< The total amount of elements for this muscle
  F0 = .SubjectMusPar.PCSAfactor*PCSA; ///< Maximum force output at optimum fiber length
  Lf0 = MuscleParameters.OptimalFiberlength / cos(pi/180*MuscleParameters.Pennationangle); //< Optimal fiber length corrected by pennation angle
  // New experimental variables for new pcsa and volume distribution
  AnyVar PCSA = 1e-2*MuscleParameters.MuscleVolume/(.trapezius_clavicular_part_1.Lf0 +.trapezius_clavicular_part_2.Lf0 +.trapezius_clavicular_part_3.Lf0 +.trapezius_clavicular_part_4.Lf0 +.trapezius_clavicular_part_5.Lf0 +.trapezius_clavicular_part_6.Lf0 ); //< PCSA (cm2) is calculated as muscle volume divided between muscle branches and divided by fiber length
  Vol0 = PCSA * Lf0; // New calculation of the vol for the specific muscle branch
};

AnyMuscleModel trapezius_clavicular_part_2 =
{
  AnyFolder& MuscleParameters = .SubjectMusPar.trapezius_clavicular_part;
  AnyIntVar MuscleElemNo = 2; ///< The number of this element of the muscle
  AnyIntVar MuscleElemAmount = MuscleParameters.MuscleElemAmount; ///< The total amount of elements for this muscle
  F0 = .SubjectMusPar.PCSAfactor*PCSA; ///< Maximum force output at optimum fiber length
  Lf0 = MuscleParameters.OptimalFiberlength / cos(pi/180*MuscleParameters.Pennationangle); //< Optimal fiber length corrected by pennation angle
  // New experimental variables for new pcsa and volume distribution
  AnyVar PCSA = 1e-2*MuscleParameters.MuscleVolume/(.trapezius_clavicular_part_1.Lf0 +.trapezius_clavicular_part_2.Lf0 +.trapezius_clavicular_part_3.Lf0 +.trapezius_clavicular_part_4.Lf0 +.trapezius_clavicular_part_5.Lf0 +.trapezius_clavicular_part_6.Lf0 ); //< PCSA (cm2) is calculated as muscle volume divided between muscle branches and divided by fiber length
  Vol0 = PCSA * Lf0; // New calculation of the vol for the specific muscle branch
};

AnyMuscleModel trapezius_clavicular_part_3 =
{
  AnyFolder& MuscleParameters = .SubjectMusPar.trapezius_clavicular_part;
  AnyIntVar MuscleElemNo = 3; ///< The number of this element of the muscle
  AnyIntVar MuscleElemAmount = MuscleParameters.MuscleElemAmount; ///< The total amount of elements for this muscle
  F0 = .SubjectMusPar.PCSAfactor*PCSA; ///< Maximum force output at optimum fiber length
  Lf0 = MuscleParameters.OptimalFiberlength / cos(pi/180*MuscleParameters.Pennationangle); //< Optimal fiber length corrected by pennation angle
  // New experimental variables for new pcsa and volume distribution
  AnyVar PCSA = 1e-2*MuscleParameters.MuscleVolume/(.trapezius_clavicular_part_1.Lf0 +.trapezius_clavicular_part_2.Lf0 +.trapezius_clavicular_part_3.Lf0 +.trapezius_clavicular_part_4.Lf0 +.trapezius_clavicular_part_5.Lf0 +.trapezius_clavicular_part_6.Lf0 ); //< PCSA (cm2) is calculated as muscle volume divided between muscle branches and divided by fiber length
  Vol0 = PCSA * Lf0; // New calculation of the vol for the specific muscle branch
};

AnyMuscleModel trapezius_clavicular_part_4 =
{
  AnyFolder& MuscleParameters = .SubjectMusPar.trapezius_clavicular_part;
  AnyIntVar MuscleElemNo = 4; ///< The number of this element of the muscle
  AnyIntVar MuscleElemAmount = MuscleParameters.MuscleElemAmount; ///< The total amount of elements for this muscle
  F0 = .SubjectMusPar.PCSAfactor*PCSA; ///< Maximum force output at optimum fiber length
  Lf0 = MuscleParameters.OptimalFiberlength / cos(pi/180*MuscleParameters.Pennationangle); //< Optimal fiber length corrected by pennation angle
  // New experimental variables for new pcsa and volume distribution
  AnyVar PCSA = 1e-2*MuscleParameters.MuscleVolume/(.trapezius_clavicular_part_1.Lf0 +.trapezius_clavicular_part_2.Lf0 +.trapezius_clavicular_part_3.Lf0 +.trapezius_clavicular_part_4.Lf0 +.trapezius_clavicular_part_5.Lf0 +.trapezius_clavicular_part_6.Lf0 ); //< PCSA (cm2) is calculated as muscle volume divided between muscle branches and divided by fiber length
  Vol0 = PCSA * Lf0; // New calculation of the vol for the specific muscle branch
};

AnyMuscleModel trapezius_clavicular_part_5 =
{
  AnyFolder& MuscleParameters = .SubjectMusPar.trapezius_clavicular_part;
  AnyIntVar MuscleElemNo = 5; ///< The number of this element of the muscle
  AnyIntVar MuscleElemAmount = MuscleParameters.MuscleElemAmount; ///< The total amount of elements for this muscle
  F0 = .SubjectMusPar.PCSAfactor*PCSA; ///< Maximum force output at optimum fiber length
  Lf0 = MuscleParameters.OptimalFiberlength / cos(pi/180*MuscleParameters.Pennationangle); //< Optimal fiber length corrected by pennation angle
  // New experimental variables for new pcsa and volume distribution
  AnyVar PCSA = 1e-2*MuscleParameters.MuscleVolume/(.trapezius_clavicular_part_1.Lf0 +.trapezius_clavicular_part_2.Lf0 +.trapezius_clavicular_part_3.Lf0 +.trapezius_clavicular_part_4.Lf0 +.trapezius_clavicular_part_5.Lf0 +.trapezius_clavicular_part_6.Lf0 ); //< PCSA (cm2) is calculated as muscle volume divided between muscle branches and divided by fiber length
  Vol0 = PCSA * Lf0; // New calculation of the vol for the specific muscle branch
};

AnyMuscleModel trapezius_clavicular_part_6 =
{
  AnyFolder& MuscleParameters = .SubjectMusPar.trapezius_clavicular_part;
  AnyIntVar MuscleElemNo = 6; ///< The number of this element of the muscle
  AnyIntVar MuscleElemAmount = MuscleParameters.MuscleElemAmount; ///< The total amount of elements for this muscle
  F0 = .SubjectMusPar.PCSAfactor*PCSA; ///< Maximum force output at optimum fiber length
  Lf0 = MuscleParameters.OptimalFiberlength / cos(pi/180*MuscleParameters.Pennationangle); //< Optimal fiber length corrected by pennation angle
  // New experimental variables for new pcsa and volume distribution
  AnyVar PCSA = 1e-2*MuscleParameters.MuscleVolume/(.trapezius_clavicular_part_1.Lf0 +.trapezius_clavicular_part_2.Lf0 +.trapezius_clavicular_part_3.Lf0 +.trapezius_clavicular_part_4.Lf0 +.trapezius_clavicular_part_5.Lf0 +.trapezius_clavicular_part_6.Lf0 ); //< PCSA (cm2) is calculated as muscle volume divided between muscle branches and divided by fiber length
  Vol0 = PCSA * Lf0; // New calculation of the vol for the specific muscle branch
};


/////////////////////////////////////
//     Triceps_LH (2 elements)     //
/////////////////////////////////////
AnyMuscleModel Triceps_LH_1 =
{
  AnyFolder& MuscleParameters = .SubjectMusPar.Triceps_LH;
  AnyIntVar MuscleElemNo = 1; ///< The number of this element of the muscle
  AnyIntVar MuscleElemAmount = MuscleParameters.MuscleElemAmount; ///< The total amount of elements for this muscle
  F0 = .SubjectMusPar.PCSAfactor*PCSA; ///< Maximum force output at optimum fiber length
  Lf0 = MuscleParameters.OptimalFiberlength / cos(pi/180*MuscleParameters.Pennationangle); //< Optimal fiber length corrected by pennation angle
  // New experimental variables for new pcsa and volume distribution
  AnyVar PCSA = 1e-2*MuscleParameters.MuscleVolume/(.Triceps_LH_1.Lf0 +.Triceps_LH_2.Lf0 ); //< PCSA (cm2) is calculated as muscle volume divided between muscle branches and divided by fiber length
  Vol0 = PCSA * Lf0; // New calculation of the vol for the specific muscle branch
};

AnyMuscleModel Triceps_LH_2 =
{
  AnyFolder& MuscleParameters = .SubjectMusPar.Triceps_LH;
  AnyIntVar MuscleElemNo = 2; ///< The number of this element of the muscle
  AnyIntVar MuscleElemAmount = MuscleParameters.MuscleElemAmount; ///< The total amount of elements for this muscle
  F0 = .SubjectMusPar.PCSAfactor*PCSA; ///< Maximum force output at optimum fiber length
  Lf0 = MuscleParameters.OptimalFiberlength / cos(pi/180*MuscleParameters.Pennationangle); //< Optimal fiber length corrected by pennation angle
  // New experimental variables for new pcsa and volume distribution
  AnyVar PCSA = 1e-2*MuscleParameters.MuscleVolume/(.Triceps_LH_1.Lf0 +.Triceps_LH_2.Lf0 ); //< PCSA (cm2) is calculated as muscle volume divided between muscle branches and divided by fiber length
  Vol0 = PCSA * Lf0; // New calculation of the vol for the specific muscle branch
};


/////////////////////////////////////
//     Brachialis (2 elements)     //
/////////////////////////////////////
AnyMuscleModel Brachialis_1 =
{
  AnyFolder& MuscleParameters = .SubjectMusPar.Brachialis;
  AnyIntVar MuscleElemNo = 1; ///< The number of this element of the muscle
  AnyIntVar MuscleElemAmount = MuscleParameters.MuscleElemAmount; ///< The total amount of elements for this muscle
  F0 = .SubjectMusPar.PCSAfactor*PCSA; ///< Maximum force output at optimum fiber length
  Lf0 = MuscleParameters.OptimalFiberlength / cos(pi/180*MuscleParameters.Pennationangle); //< Optimal fiber length corrected by pennation angle
  // New experimental variables for new pcsa and volume distribution
  AnyVar PCSA = 1e-2*MuscleParameters.MuscleVolume/(.Brachialis_1.Lf0 +.Brachialis_2.Lf0 ); //< PCSA (cm2) is calculated as muscle volume divided between muscle branches and divided by fiber length
  Vol0 = PCSA * Lf0; // New calculation of the vol for the specific muscle branch
};

AnyMuscleModel Brachialis_2 =
{
  AnyFolder& MuscleParameters = .SubjectMusPar.Brachialis;
  AnyIntVar MuscleElemNo = 2; ///< The number of this element of the muscle
  AnyIntVar MuscleElemAmount = MuscleParameters.MuscleElemAmount; ///< The total amount of elements for this muscle
  F0 = .SubjectMusPar.PCSAfactor*PCSA; ///< Maximum force output at optimum fiber length
  Lf0 = MuscleParameters.OptimalFiberlength / cos(pi/180*MuscleParameters.Pennationangle); //< Optimal fiber length corrected by pennation angle
  // New experimental variables for new pcsa and volume distribution
  AnyVar PCSA = 1e-2*MuscleParameters.MuscleVolume/(.Brachialis_1.Lf0 +.Brachialis_2.Lf0 ); //< PCSA (cm2) is calculated as muscle volume divided between muscle branches and divided by fiber length
  Vol0 = PCSA * Lf0; // New calculation of the vol for the specific muscle branch
};


/////////////////////////////////////
//     Triceps_ME (2 elements)     //
/////////////////////////////////////
AnyMuscleModel Triceps_ME_1 =
{
  AnyFolder& MuscleParameters = .SubjectMusPar.Triceps_ME;
  AnyIntVar MuscleElemNo = 1; ///< The number of this element of the muscle
  AnyIntVar MuscleElemAmount = MuscleParameters.MuscleElemAmount; ///< The total amount of elements for this muscle
  F0 = .SubjectMusPar.PCSAfactor*PCSA; ///< Maximum force output at optimum fiber length
  Lf0 = MuscleParameters.OptimalFiberlength / cos(pi/180*MuscleParameters.Pennationangle); //< Optimal fiber length corrected by pennation angle
  // New experimental variables for new pcsa and volume distribution
  AnyVar PCSA = 1e-2*MuscleParameters.MuscleVolume/(.Triceps_ME_1.Lf0 +.Triceps_ME_2.Lf0 ); //< PCSA (cm2) is calculated as muscle volume divided between muscle branches and divided by fiber length
  Vol0 = PCSA * Lf0; // New calculation of the vol for the specific muscle branch
};

AnyMuscleModel Triceps_ME_2 =
{
  AnyFolder& MuscleParameters = .SubjectMusPar.Triceps_ME;
  AnyIntVar MuscleElemNo = 2; ///< The number of this element of the muscle
  AnyIntVar MuscleElemAmount = MuscleParameters.MuscleElemAmount; ///< The total amount of elements for this muscle
  F0 = .SubjectMusPar.PCSAfactor*PCSA; ///< Maximum force output at optimum fiber length
  Lf0 = MuscleParameters.OptimalFiberlength / cos(pi/180*MuscleParameters.Pennationangle); //< Optimal fiber length corrected by pennation angle
  // New experimental variables for new pcsa and volume distribution
  AnyVar PCSA = 1e-2*MuscleParameters.MuscleVolume/(.Triceps_ME_1.Lf0 +.Triceps_ME_2.Lf0 ); //< PCSA (cm2) is calculated as muscle volume divided between muscle branches and divided by fiber length
  Vol0 = PCSA * Lf0; // New calculation of the vol for the specific muscle branch
};


/////////////////////////////////////
//     Triceps_LA (2 elements)     //
/////////////////////////////////////
AnyMuscleModel Triceps_LA_1 =
{
  AnyFolder& MuscleParameters = .SubjectMusPar.Triceps_LA;
  AnyIntVar MuscleElemNo = 1; ///< The number of this element of the muscle
  AnyIntVar MuscleElemAmount = MuscleParameters.MuscleElemAmount; ///< The total amount of elements for this muscle
  F0 = .SubjectMusPar.PCSAfactor*PCSA; ///< Maximum force output at optimum fiber length
  Lf0 = MuscleParameters.OptimalFiberlength / cos(pi/180*MuscleParameters.Pennationangle); //< Optimal fiber length corrected by pennation angle
  // New experimental variables for new pcsa and volume distribution
  AnyVar PCSA = 1e-2*MuscleParameters.MuscleVolume/(.Triceps_LA_1.Lf0 +.Triceps_LA_2.Lf0 ); //< PCSA (cm2) is calculated as muscle volume divided between muscle branches and divided by fiber length
  Vol0 = PCSA * Lf0; // New calculation of the vol for the specific muscle branch
};

AnyMuscleModel Triceps_LA_2 =
{
  AnyFolder& MuscleParameters = .SubjectMusPar.Triceps_LA;
  AnyIntVar MuscleElemNo = 2; ///< The number of this element of the muscle
  AnyIntVar MuscleElemAmount = MuscleParameters.MuscleElemAmount; ///< The total amount of elements for this muscle
  F0 = .SubjectMusPar.PCSAfactor*PCSA; ///< Maximum force output at optimum fiber length
  Lf0 = MuscleParameters.OptimalFiberlength / cos(pi/180*MuscleParameters.Pennationangle); //< Optimal fiber length corrected by pennation angle
  // New experimental variables for new pcsa and volume distribution
  AnyVar PCSA = 1e-2*MuscleParameters.MuscleVolume/(.Triceps_LA_1.Lf0 +.Triceps_LA_2.Lf0 ); //< PCSA (cm2) is calculated as muscle volume divided between muscle branches and divided by fiber length
  Vol0 = PCSA * Lf0; // New calculation of the vol for the specific muscle branch
};


////////////////////////////////////
//     Brach_rad (2 elements)     //
////////////////////////////////////
AnyMuscleModel Brach_rad_1 =
{
  AnyFolder& MuscleParameters = .SubjectMusPar.Brach_rad;
  AnyIntVar MuscleElemNo = 1; ///< The number of this element of the muscle
  AnyIntVar MuscleElemAmount = MuscleParameters.MuscleElemAmount; ///< The total amount of elements for this muscle
  F0 = .SubjectMusPar.PCSAfactor*PCSA; ///< Maximum force output at optimum fiber length
  Lf0 = MuscleParameters.OptimalFiberlength / cos(pi/180*MuscleParameters.Pennationangle); //< Optimal fiber length corrected by pennation angle
  // New experimental variables for new pcsa and volume distribution
  AnyVar PCSA = 1e-2*MuscleParameters.MuscleVolume/(.Brach_rad_1.Lf0 +.Brach_rad_2.Lf0 ); //< PCSA (cm2) is calculated as muscle volume divided between muscle branches and divided by fiber length
  Vol0 = PCSA * Lf0; // New calculation of the vol for the specific muscle branch
};

AnyMuscleModel Brach_rad_2 =
{
  AnyFolder& MuscleParameters = .SubjectMusPar.Brach_rad;
  AnyIntVar MuscleElemNo = 2; ///< The number of this element of the muscle
  AnyIntVar MuscleElemAmount = MuscleParameters.MuscleElemAmount; ///< The total amount of elements for this muscle
  F0 = .SubjectMusPar.PCSAfactor*PCSA; ///< Maximum force output at optimum fiber length
  Lf0 = MuscleParameters.OptimalFiberlength / cos(pi/180*MuscleParameters.Pennationangle); //< Optimal fiber length corrected by pennation angle
  // New experimental variables for new pcsa and volume distribution
  AnyVar PCSA = 1e-2*MuscleParameters.MuscleVolume/(.Brach_rad_1.Lf0 +.Brach_rad_2.Lf0 ); //< PCSA (cm2) is calculated as muscle volume divided between muscle branches and divided by fiber length
  Vol0 = PCSA * Lf0; // New calculation of the vol for the specific muscle branch
};


///////////////////////////////////
//     Anconeus (2 elements)     //
///////////////////////////////////
AnyMuscleModel Anconeus_1 =
{
  AnyFolder& MuscleParameters = .SubjectMusPar.Anconeus;
  AnyIntVar MuscleElemNo = 1; ///< The number of this element of the muscle
  AnyIntVar MuscleElemAmount = MuscleParameters.MuscleElemAmount; ///< The total amount of elements for this muscle
  F0 = .SubjectMusPar.PCSAfactor*PCSA; ///< Maximum force output at optimum fiber length
  Lf0 = MuscleParameters.OptimalFiberlength / cos(pi/180*MuscleParameters.Pennationangle); //< Optimal fiber length corrected by pennation angle
  // New experimental variables for new pcsa and volume distribution
  AnyVar PCSA = 1e-2*MuscleParameters.MuscleVolume/(.Anconeus_1.Lf0 +.Anconeus_2.Lf0 ); //< PCSA (cm2) is calculated as muscle volume divided between muscle branches and divided by fiber length
  Vol0 = PCSA * Lf0; // New calculation of the vol for the specific muscle branch
};

AnyMuscleModel Anconeus_2 =
{
  AnyFolder& MuscleParameters = .SubjectMusPar.Anconeus;
  AnyIntVar MuscleElemNo = 2; ///< The number of this element of the muscle
  AnyIntVar MuscleElemAmount = MuscleParameters.MuscleElemAmount; ///< The total amount of elements for this muscle
  F0 = .SubjectMusPar.PCSAfactor*PCSA; ///< Maximum force output at optimum fiber length
  Lf0 = MuscleParameters.OptimalFiberlength / cos(pi/180*MuscleParameters.Pennationangle); //< Optimal fiber length corrected by pennation angle
  // New experimental variables for new pcsa and volume distribution
  AnyVar PCSA = 1e-2*MuscleParameters.MuscleVolume/(.Anconeus_1.Lf0 +.Anconeus_2.Lf0 ); //< PCSA (cm2) is calculated as muscle volume divided between muscle branches and divided by fiber length
  Vol0 = PCSA * Lf0; // New calculation of the vol for the specific muscle branch
};


///////////////////////////////////////////////////////
//     Pronator_teres_caput_humeral (2 elements)     //
///////////////////////////////////////////////////////
AnyMuscleModel Pronator_teres_caput_humeral_1 =
{
  AnyFolder& MuscleParameters = .SubjectMusPar.Pronator_teres_caput_humeral;
  AnyIntVar MuscleElemNo = 1; ///< The number of this element of the muscle
  AnyIntVar MuscleElemAmount = MuscleParameters.MuscleElemAmount; ///< The total amount of elements for this muscle
  F0 = .SubjectMusPar.PCSAfactor*PCSA; ///< Maximum force output at optimum fiber length
  Lf0 = MuscleParameters.OptimalFiberlength / cos(pi/180*MuscleParameters.Pennationangle); //< Optimal fiber length corrected by pennation angle
  // New experimental variables for new pcsa and volume distribution
  AnyVar PCSA = 1e-2*MuscleParameters.MuscleVolume/(.Pronator_teres_caput_humeral_1.Lf0 +.Pronator_teres_caput_humeral_2.Lf0 ); //< PCSA (cm2) is calculated as muscle volume divided between muscle branches and divided by fiber length
  Vol0 = PCSA * Lf0; // New calculation of the vol for the specific muscle branch
};

AnyMuscleModel Pronator_teres_caput_humeral_2 =
{
  AnyFolder& MuscleParameters = .SubjectMusPar.Pronator_teres_caput_humeral;
  AnyIntVar MuscleElemNo = 2; ///< The number of this element of the muscle
  AnyIntVar MuscleElemAmount = MuscleParameters.MuscleElemAmount; ///< The total amount of elements for this muscle
  F0 = .SubjectMusPar.PCSAfactor*PCSA; ///< Maximum force output at optimum fiber length
  Lf0 = MuscleParameters.OptimalFiberlength / cos(pi/180*MuscleParameters.Pennationangle); //< Optimal fiber length corrected by pennation angle
  // New experimental variables for new pcsa and volume distribution
  AnyVar PCSA = 1e-2*MuscleParameters.MuscleVolume/(.Pronator_teres_caput_humeral_1.Lf0 +.Pronator_teres_caput_humeral_2.Lf0 ); //< PCSA (cm2) is calculated as muscle volume divided between muscle branches and divided by fiber length
  Vol0 = PCSA * Lf0; // New calculation of the vol for the specific muscle branch
};


//////////////////////////////////////////////////////
//     Pronator_teres_caput_ulnare (1 element )     //
//////////////////////////////////////////////////////
AnyMuscleModel Pronator_teres_caput_ulnare =
{
  AnyFolder& MuscleParameters = .SubjectMusPar.Pronator_teres_caput_ulnare;
  AnyIntVar MuscleElemNo = 1; ///< The number of this element of the muscle
  AnyIntVar MuscleElemAmount = MuscleParameters.MuscleElemAmount; ///< The total amount of elements for this muscle
  F0 = .SubjectMusPar.PCSAfactor*PCSA; ///< Maximum force output at optimum fiber length
  Lf0 = MuscleParameters.OptimalFiberlength / cos(pi/180*MuscleParameters.Pennationangle); //< Optimal fiber length corrected by pennation angle
  // New experimental variables for new pcsa and volume distribution
  AnyVar PCSA = 1e-2*MuscleParameters.MuscleVolume/(Lf0); //< PCSA (cm2) is calculated as muscle volume divided between muscle branches and divided by fiber length
  Vol0 = PCSA * Lf0; // New calculation of the vol for the specific muscle branch
};


/////////////////////////////////////////////////
//     Supinator_humerus_part (2 elements)     //
/////////////////////////////////////////////////
AnyMuscleModel Supinator_humerus_part_1 =
{
  AnyFolder& MuscleParameters = .SubjectMusPar.Supinator_humerus_part;
  AnyIntVar MuscleElemNo = 1; ///< The number of this element of the muscle
  AnyIntVar MuscleElemAmount = MuscleParameters.MuscleElemAmount; ///< The total amount of elements for this muscle
  F0 = .SubjectMusPar.PCSAfactor*PCSA; ///< Maximum force output at optimum fiber length
  Lf0 = MuscleParameters.OptimalFiberlength / cos(pi/180*MuscleParameters.Pennationangle); //< Optimal fiber length corrected by pennation angle
  // New experimental variables for new pcsa and volume distribution
  AnyVar PCSA = 1e-2*MuscleParameters.MuscleVolume/(.Supinator_humerus_part_1.Lf0 +.Supinator_humerus_part_2.Lf0 ); //< PCSA (cm2) is calculated as muscle volume divided between muscle branches and divided by fiber length
  Vol0 = PCSA * Lf0; // New calculation of the vol for the specific muscle branch
};

AnyMuscleModel Supinator_humerus_part_2 =
{
  AnyFolder& MuscleParameters = .SubjectMusPar.Supinator_humerus_part;
  AnyIntVar MuscleElemNo = 2; ///< The number of this element of the muscle
  AnyIntVar MuscleElemAmount = MuscleParameters.MuscleElemAmount; ///< The total amount of elements for this muscle
  F0 = .SubjectMusPar.PCSAfactor*PCSA; ///< Maximum force output at optimum fiber length
  Lf0 = MuscleParameters.OptimalFiberlength / cos(pi/180*MuscleParameters.Pennationangle); //< Optimal fiber length corrected by pennation angle
  // New experimental variables for new pcsa and volume distribution
  AnyVar PCSA = 1e-2*MuscleParameters.MuscleVolume/(.Supinator_humerus_part_1.Lf0 +.Supinator_humerus_part_2.Lf0 ); //< PCSA (cm2) is calculated as muscle volume divided between muscle branches and divided by fiber length
  Vol0 = PCSA * Lf0; // New calculation of the vol for the specific muscle branch
};


//////////////////////////////////////////////
//     Supinator_ulna_part (2 elements)     //
//////////////////////////////////////////////
AnyMuscleModel Supinator_ulna_part_1 =
{
  AnyFolder& MuscleParameters = .SubjectMusPar.Supinator_ulna_part;
  AnyIntVar MuscleElemNo = 1; ///< The number of this element of the muscle
  AnyIntVar MuscleElemAmount = MuscleParameters.MuscleElemAmount; ///< The total amount of elements for this muscle
  F0 = .SubjectMusPar.PCSAfactor*PCSA; ///< Maximum force output at optimum fiber length
  Lf0 = MuscleParameters.OptimalFiberlength / cos(pi/180*MuscleParameters.Pennationangle); //< Optimal fiber length corrected by pennation angle
  // New experimental variables for new pcsa and volume distribution
  AnyVar PCSA = 1e-2*MuscleParameters.MuscleVolume/(.Supinator_ulna_part_1.Lf0 +.Supinator_ulna_part_2.Lf0 ); //< PCSA (cm2) is calculated as muscle volume divided between muscle branches and divided by fiber length
  Vol0 = PCSA * Lf0; // New calculation of the vol for the specific muscle branch
};

AnyMuscleModel Supinator_ulna_part_2 =
{
  AnyFolder& MuscleParameters = .SubjectMusPar.Supinator_ulna_part;
  AnyIntVar MuscleElemNo = 2; ///< The number of this element of the muscle
  AnyIntVar MuscleElemAmount = MuscleParameters.MuscleElemAmount; ///< The total amount of elements for this muscle
  F0 = .SubjectMusPar.PCSAfactor*PCSA; ///< Maximum force output at optimum fiber length
  Lf0 = MuscleParameters.OptimalFiberlength / cos(pi/180*MuscleParameters.Pennationangle); //< Optimal fiber length corrected by pennation angle
  // New experimental variables for new pcsa and volume distribution
  AnyVar PCSA = 1e-2*MuscleParameters.MuscleVolume/(.Supinator_ulna_part_1.Lf0 +.Supinator_ulna_part_2.Lf0 ); //< PCSA (cm2) is calculated as muscle volume divided between muscle branches and divided by fiber length
  Vol0 = PCSA * Lf0; // New calculation of the vol for the specific muscle branch
};


/////////////////////////////////////
//     Pron_quadr (2 elements)     //
/////////////////////////////////////
AnyMuscleModel Pron_quadr_1 =
{
  AnyFolder& MuscleParameters = .SubjectMusPar.Pron_quadr;
  AnyIntVar MuscleElemNo = 1; ///< The number of this element of the muscle
  AnyIntVar MuscleElemAmount = MuscleParameters.MuscleElemAmount; ///< The total amount of elements for this muscle
  F0 = .SubjectMusPar.PCSAfactor*PCSA; ///< Maximum force output at optimum fiber length
  Lf0 = MuscleParameters.OptimalFiberlength / cos(pi/180*MuscleParameters.Pennationangle); //< Optimal fiber length corrected by pennation angle
  // New experimental variables for new pcsa and volume distribution
  AnyVar PCSA = 1e-2*MuscleParameters.MuscleVolume/(.Pron_quadr_1.Lf0 +.Pron_quadr_2.Lf0 ); //< PCSA (cm2) is calculated as muscle volume divided between muscle branches and divided by fiber length
  Vol0 = PCSA * Lf0; // New calculation of the vol for the specific muscle branch
};

AnyMuscleModel Pron_quadr_2 =
{
  AnyFolder& MuscleParameters = .SubjectMusPar.Pron_quadr;
  AnyIntVar MuscleElemNo = 2; ///< The number of this element of the muscle
  AnyIntVar MuscleElemAmount = MuscleParameters.MuscleElemAmount; ///< The total amount of elements for this muscle
  F0 = .SubjectMusPar.PCSAfactor*PCSA; ///< Maximum force output at optimum fiber length
  Lf0 = MuscleParameters.OptimalFiberlength / cos(pi/180*MuscleParameters.Pennationangle); //< Optimal fiber length corrected by pennation angle
  // New experimental variables for new pcsa and volume distribution
  AnyVar PCSA = 1e-2*MuscleParameters.MuscleVolume/(.Pron_quadr_1.Lf0 +.Pron_quadr_2.Lf0 ); //< PCSA (cm2) is calculated as muscle volume divided between muscle branches and divided by fiber length
  Vol0 = PCSA * Lf0; // New calculation of the vol for the specific muscle branch
};


///////////////////////////////////////////////////
//     Extensor_Pollicis_Longus (1 element )     //
///////////////////////////////////////////////////
AnyMuscleModel Extensor_Pollicis_Longus =
{
  AnyFolder& MuscleParameters = .SubjectMusPar.Extensor_Pollicis_Longus;
  AnyIntVar MuscleElemNo = 1; ///< The number of this element of the muscle
  AnyIntVar MuscleElemAmount = MuscleParameters.MuscleElemAmount; ///< The total amount of elements for this muscle
  F0 = .SubjectMusPar.PCSAfactor*PCSA; ///< Maximum force output at optimum fiber length
  Lf0 = MuscleParameters.OptimalFiberlength / cos(pi/180*MuscleParameters.Pennationangle); //< Optimal fiber length corrected by pennation angle
  // New experimental variables for new pcsa and volume distribution
  AnyVar PCSA = 1e-2*MuscleParameters.MuscleVolume/(Lf0); //< PCSA (cm2) is calculated as muscle volume divided between muscle branches and divided by fiber length
  Vol0 = PCSA * Lf0; // New calculation of the vol for the specific muscle branch
};


///////////////////////////////////////////////////
//     Extensor_Pollicis_Brevis (1 element )     //
///////////////////////////////////////////////////
AnyMuscleModel Extensor_Pollicis_Brevis =
{
  AnyFolder& MuscleParameters = .SubjectMusPar.Extensor_Pollicis_Brevis;
  AnyIntVar MuscleElemNo = 1; ///< The number of this element of the muscle
  AnyIntVar MuscleElemAmount = MuscleParameters.MuscleElemAmount; ///< The total amount of elements for this muscle
  F0 = .SubjectMusPar.PCSAfactor*PCSA; ///< Maximum force output at optimum fiber length
  Lf0 = MuscleParameters.OptimalFiberlength / cos(pi/180*MuscleParameters.Pennationangle); //< Optimal fiber length corrected by pennation angle
  // New experimental variables for new pcsa and volume distribution
  AnyVar PCSA = 1e-2*MuscleParameters.MuscleVolume/(Lf0); //< PCSA (cm2) is calculated as muscle volume divided between muscle branches and divided by fiber length
  Vol0 = PCSA * Lf0; // New calculation of the vol for the specific muscle branch
};


///////////////////////////////////////////////////
//     Abductor_Pollicis_Longus (1 element )     //
///////////////////////////////////////////////////
AnyMuscleModel Abductor_Pollicis_Longus =
{
  AnyFolder& MuscleParameters = .SubjectMusPar.Abductor_Pollicis_Longus;
  AnyIntVar MuscleElemNo = 1; ///< The number of this element of the muscle
  AnyIntVar MuscleElemAmount = MuscleParameters.MuscleElemAmount; ///< The total amount of elements for this muscle
  F0 = .SubjectMusPar.PCSAfactor*PCSA; ///< Maximum force output at optimum fiber length
  Lf0 = MuscleParameters.OptimalFiberlength / cos(pi/180*MuscleParameters.Pennationangle); //< Optimal fiber length corrected by pennation angle
  // New experimental variables for new pcsa and volume distribution
  AnyVar PCSA = 1e-2*MuscleParameters.MuscleVolume/(Lf0); //< PCSA (cm2) is calculated as muscle volume divided between muscle branches and divided by fiber length
  Vol0 = PCSA * Lf0; // New calculation of the vol for the specific muscle branch
};


///////////////////////////////////////////
//     Extensor_Indicis (1 element )     //
///////////////////////////////////////////
AnyMuscleModel Extensor_Indicis =
{
  AnyFolder& MuscleParameters = .SubjectMusPar.Extensor_Indicis;
  AnyIntVar MuscleElemNo = 1; ///< The number of this element of the muscle
  AnyIntVar MuscleElemAmount = MuscleParameters.MuscleElemAmount; ///< The total amount of elements for this muscle
  F0 = .SubjectMusPar.PCSAfactor*PCSA; ///< Maximum force output at optimum fiber length
  Lf0 = MuscleParameters.OptimalFiberlength / cos(pi/180*MuscleParameters.Pennationangle); //< Optimal fiber length corrected by pennation angle
  // New experimental variables for new pcsa and volume distribution
  AnyVar PCSA = 1e-2*MuscleParameters.MuscleVolume/(Lf0); //< PCSA (cm2) is calculated as muscle volume divided between muscle branches and divided by fiber length
  Vol0 = PCSA * Lf0; // New calculation of the vol for the specific muscle branch
};


/////////////////////////////////////////////////
//     Extensor_Carpi_Ulnaris (1 element )     //
/////////////////////////////////////////////////
AnyMuscleModel Extensor_Carpi_Ulnaris =
{
  AnyFolder& MuscleParameters = .SubjectMusPar.Extensor_Carpi_Ulnaris;
  AnyIntVar MuscleElemNo = 1; ///< The number of this element of the muscle
  AnyIntVar MuscleElemAmount = MuscleParameters.MuscleElemAmount; ///< The total amount of elements for this muscle
  F0 = .SubjectMusPar.PCSAfactor*PCSA; ///< Maximum force output at optimum fiber length
  Lf0 = MuscleParameters.OptimalFiberlength / cos(pi/180*MuscleParameters.Pennationangle); //< Optimal fiber length corrected by pennation angle
  // New experimental variables for new pcsa and volume distribution
  AnyVar PCSA = 1e-2*MuscleParameters.MuscleVolume/(Lf0); //< PCSA (cm2) is calculated as muscle volume divided between muscle branches and divided by fiber length
  Vol0 = PCSA * Lf0; // New calculation of the vol for the specific muscle branch
};


/////////////////////////////////////////////////////////
//     Extensor_Carpi_Radialis_Longus (1 element )     //
/////////////////////////////////////////////////////////
AnyMuscleModel Extensor_Carpi_Radialis_Longus =
{
  AnyFolder& MuscleParameters = .SubjectMusPar.Extensor_Carpi_Radialis_Longus;
  AnyIntVar MuscleElemNo = 1; ///< The number of this element of the muscle
  AnyIntVar MuscleElemAmount = MuscleParameters.MuscleElemAmount; ///< The total amount of elements for this muscle
  F0 = .SubjectMusPar.PCSAfactor*PCSA; ///< Maximum force output at optimum fiber length
  Lf0 = MuscleParameters.OptimalFiberlength / cos(pi/180*MuscleParameters.Pennationangle); //< Optimal fiber length corrected by pennation angle
  // New experimental variables for new pcsa and volume distribution
  AnyVar PCSA = 1e-2*MuscleParameters.MuscleVolume/(Lf0); //< PCSA (cm2) is calculated as muscle volume divided between muscle branches and divided by fiber length
  Vol0 = PCSA * Lf0; // New calculation of the vol for the specific muscle branch
};


/////////////////////////////////////////////////////////
//     Extensor_Carpi_Radialis_Brevis (1 element )     //
/////////////////////////////////////////////////////////
AnyMuscleModel Extensor_Carpi_Radialis_Brevis =
{
  AnyFolder& MuscleParameters = .SubjectMusPar.Extensor_Carpi_Radialis_Brevis;
  AnyIntVar MuscleElemNo = 1; ///< The number of this element of the muscle
  AnyIntVar MuscleElemAmount = MuscleParameters.MuscleElemAmount; ///< The total amount of elements for this muscle
  F0 = .SubjectMusPar.PCSAfactor*PCSA; ///< Maximum force output at optimum fiber length
  Lf0 = MuscleParameters.OptimalFiberlength / cos(pi/180*MuscleParameters.Pennationangle); //< Optimal fiber length corrected by pennation angle
  // New experimental variables for new pcsa and volume distribution
  AnyVar PCSA = 1e-2*MuscleParameters.MuscleVolume/(Lf0); //< PCSA (cm2) is calculated as muscle volume divided between muscle branches and divided by fiber length
  Vol0 = PCSA * Lf0; // New calculation of the vol for the specific muscle branch
};


////////////////////////////////////////////////
//     Flexor_Carpi_Radialis (1 element )     //
////////////////////////////////////////////////
AnyMuscleModel Flexor_Carpi_Radialis =
{
  AnyFolder& MuscleParameters = .SubjectMusPar.Flexor_Carpi_Radialis;
  AnyIntVar MuscleElemNo = 1; ///< The number of this element of the muscle
  AnyIntVar MuscleElemAmount = MuscleParameters.MuscleElemAmount; ///< The total amount of elements for this muscle
  F0 = .SubjectMusPar.PCSAfactor*PCSA; ///< Maximum force output at optimum fiber length
  Lf0 = MuscleParameters.OptimalFiberlength / cos(pi/180*MuscleParameters.Pennationangle); //< Optimal fiber length corrected by pennation angle
  // New experimental variables for new pcsa and volume distribution
  AnyVar PCSA = 1e-2*MuscleParameters.MuscleVolume/(Lf0); //< PCSA (cm2) is calculated as muscle volume divided between muscle branches and divided by fiber length
  Vol0 = PCSA * Lf0; // New calculation of the vol for the specific muscle branch
};


///////////////////////////////////////////////
//     Flexor_Carpi_Ulnaris (1 element )     //
///////////////////////////////////////////////
AnyMuscleModel Flexor_Carpi_Ulnaris =
{
  AnyFolder& MuscleParameters = .SubjectMusPar.Flexor_Carpi_Ulnaris;
  AnyIntVar MuscleElemNo = 1; ///< The number of this element of the muscle
  AnyIntVar MuscleElemAmount = MuscleParameters.MuscleElemAmount; ///< The total amount of elements for this muscle
  F0 = .SubjectMusPar.PCSAfactor*PCSA; ///< Maximum force output at optimum fiber length
  Lf0 = MuscleParameters.OptimalFiberlength / cos(pi/180*MuscleParameters.Pennationangle); //< Optimal fiber length corrected by pennation angle
  // New experimental variables for new pcsa and volume distribution
  AnyVar PCSA = 1e-2*MuscleParameters.MuscleVolume/(Lf0); //< PCSA (cm2) is calculated as muscle volume divided between muscle branches and divided by fiber length
  Vol0 = PCSA * Lf0; // New calculation of the vol for the specific muscle branch
};


//////////////////////////////////////////
//     Palmaris_Longus (1 element )     //
//////////////////////////////////////////
AnyMuscleModel Palmaris_Longus =
{
  AnyFolder& MuscleParameters = .SubjectMusPar.Palmaris_Longus;
  AnyIntVar MuscleElemNo = 1; ///< The number of this element of the muscle
  AnyIntVar MuscleElemAmount = MuscleParameters.MuscleElemAmount; ///< The total amount of elements for this muscle
  F0 = .SubjectMusPar.PCSAfactor*PCSA; ///< Maximum force output at optimum fiber length
  Lf0 = MuscleParameters.OptimalFiberlength / cos(pi/180*MuscleParameters.Pennationangle); //< Optimal fiber length corrected by pennation angle
  // New experimental variables for new pcsa and volume distribution
  AnyVar PCSA = 1e-2*MuscleParameters.MuscleVolume/(Lf0); //< PCSA (cm2) is calculated as muscle volume divided between muscle branches and divided by fiber length
  Vol0 = PCSA * Lf0; // New calculation of the vol for the specific muscle branch
};


////////////////////////////////////////////////////////////////
//     Flexor_Digitorum_Superficialis_Digit5 (1 element )     //
////////////////////////////////////////////////////////////////
AnyMuscleModel Flexor_Digitorum_Superficialis_Digit5 =
{
  AnyFolder& MuscleParameters = .SubjectMusPar.Flexor_Digitorum_Superficialis_Digit5;
  AnyIntVar MuscleElemNo = 1; ///< The number of this element of the muscle
  AnyIntVar MuscleElemAmount = MuscleParameters.MuscleElemAmount; ///< The total amount of elements for this muscle
  F0 = .SubjectMusPar.PCSAfactor*PCSA; ///< Maximum force output at optimum fiber length
  Lf0 = MuscleParameters.OptimalFiberlength / cos(pi/180*MuscleParameters.Pennationangle); //< Optimal fiber length corrected by pennation angle
  // New experimental variables for new pcsa and volume distribution
  AnyVar PCSA = 1e-2*MuscleParameters.MuscleVolume/(Lf0); //< PCSA (cm2) is calculated as muscle volume divided between muscle branches and divided by fiber length
  Vol0 = PCSA * Lf0; // New calculation of the vol for the specific muscle branch
};


////////////////////////////////////////////////////////////////
//     Flexor_Digitorum_Superficialis_Digit4 (1 element )     //
////////////////////////////////////////////////////////////////
AnyMuscleModel Flexor_Digitorum_Superficialis_Digit4 =
{
  AnyFolder& MuscleParameters = .SubjectMusPar.Flexor_Digitorum_Superficialis_Digit4;
  AnyIntVar MuscleElemNo = 1; ///< The number of this element of the muscle
  AnyIntVar MuscleElemAmount = MuscleParameters.MuscleElemAmount; ///< The total amount of elements for this muscle
  F0 = .SubjectMusPar.PCSAfactor*PCSA; ///< Maximum force output at optimum fiber length
  Lf0 = MuscleParameters.OptimalFiberlength / cos(pi/180*MuscleParameters.Pennationangle); //< Optimal fiber length corrected by pennation angle
  // New experimental variables for new pcsa and volume distribution
  AnyVar PCSA = 1e-2*MuscleParameters.MuscleVolume/(Lf0); //< PCSA (cm2) is calculated as muscle volume divided between muscle branches and divided by fiber length
  Vol0 = PCSA * Lf0; // New calculation of the vol for the specific muscle branch
};


////////////////////////////////////////////////////////////////
//     Flexor_Digitorum_Superficialis_Digit3 (1 element )     //
////////////////////////////////////////////////////////////////
AnyMuscleModel Flexor_Digitorum_Superficialis_Digit3 =
{
  AnyFolder& MuscleParameters = .SubjectMusPar.Flexor_Digitorum_Superficialis_Digit3;
  AnyIntVar MuscleElemNo = 1; ///< The number of this element of the muscle
  AnyIntVar MuscleElemAmount = MuscleParameters.MuscleElemAmount; ///< The total amount of elements for this muscle
  F0 = .SubjectMusPar.PCSAfactor*PCSA; ///< Maximum force output at optimum fiber length
  Lf0 = MuscleParameters.OptimalFiberlength / cos(pi/180*MuscleParameters.Pennationangle); //< Optimal fiber length corrected by pennation angle
  // New experimental variables for new pcsa and volume distribution
  AnyVar PCSA = 1e-2*MuscleParameters.MuscleVolume/(Lf0); //< PCSA (cm2) is calculated as muscle volume divided between muscle branches and divided by fiber length
  Vol0 = PCSA * Lf0; // New calculation of the vol for the specific muscle branch
};


////////////////////////////////////////////////////////////////
//     Flexor_Digitorum_Superficialis_Digit2 (1 element )     //
////////////////////////////////////////////////////////////////
AnyMuscleModel Flexor_Digitorum_Superficialis_Digit2 =
{
  AnyFolder& MuscleParameters = .SubjectMusPar.Flexor_Digitorum_Superficialis_Digit2;
  AnyIntVar MuscleElemNo = 1; ///< The number of this element of the muscle
  AnyIntVar MuscleElemAmount = MuscleParameters.MuscleElemAmount; ///< The total amount of elements for this muscle
  F0 = .SubjectMusPar.PCSAfactor*PCSA; ///< Maximum force output at optimum fiber length
  Lf0 = MuscleParameters.OptimalFiberlength / cos(pi/180*MuscleParameters.Pennationangle); //< Optimal fiber length corrected by pennation angle
  // New experimental variables for new pcsa and volume distribution
  AnyVar PCSA = 1e-2*MuscleParameters.MuscleVolume/(Lf0); //< PCSA (cm2) is calculated as muscle volume divided between muscle branches and divided by fiber length
  Vol0 = PCSA * Lf0; // New calculation of the vol for the specific muscle branch
};


////////////////////////////////////////////////////////////
//     Flexor_Digitorum_Profundus_Digit5 (1 element )     //
////////////////////////////////////////////////////////////
AnyMuscleModel Flexor_Digitorum_Profundus_Digit5 =
{
  AnyFolder& MuscleParameters = .SubjectMusPar.Flexor_Digitorum_Profundus_Digit5;
  AnyIntVar MuscleElemNo = 1; ///< The number of this element of the muscle
  AnyIntVar MuscleElemAmount = MuscleParameters.MuscleElemAmount; ///< The total amount of elements for this muscle
  F0 = .SubjectMusPar.PCSAfactor*PCSA; ///< Maximum force output at optimum fiber length
  Lf0 = MuscleParameters.OptimalFiberlength / cos(pi/180*MuscleParameters.Pennationangle); //< Optimal fiber length corrected by pennation angle
  // New experimental variables for new pcsa and volume distribution
  AnyVar PCSA = 1e-2*MuscleParameters.MuscleVolume/(Lf0); //< PCSA (cm2) is calculated as muscle volume divided between muscle branches and divided by fiber length
  Vol0 = PCSA * Lf0; // New calculation of the vol for the specific muscle branch
};


////////////////////////////////////////////////////////////
//     Flexor_Digitorum_Profundus_Digit4 (1 element )     //
////////////////////////////////////////////////////////////
AnyMuscleModel Flexor_Digitorum_Profundus_Digit4 =
{
  AnyFolder& MuscleParameters = .SubjectMusPar.Flexor_Digitorum_Profundus_Digit4;
  AnyIntVar MuscleElemNo = 1; ///< The number of this element of the muscle
  AnyIntVar MuscleElemAmount = MuscleParameters.MuscleElemAmount; ///< The total amount of elements for this muscle
  F0 = .SubjectMusPar.PCSAfactor*PCSA; ///< Maximum force output at optimum fiber length
  Lf0 = MuscleParameters.OptimalFiberlength / cos(pi/180*MuscleParameters.Pennationangle); //< Optimal fiber length corrected by pennation angle
  // New experimental variables for new pcsa and volume distribution
  AnyVar PCSA = 1e-2*MuscleParameters.MuscleVolume/(Lf0); //< PCSA (cm2) is calculated as muscle volume divided between muscle branches and divided by fiber length
  Vol0 = PCSA * Lf0; // New calculation of the vol for the specific muscle branch
};


////////////////////////////////////////////////////////////
//     Flexor_Digitorum_Profundus_Digit3 (1 element )     //
////////////////////////////////////////////////////////////
AnyMuscleModel Flexor_Digitorum_Profundus_Digit3 =
{
  AnyFolder& MuscleParameters = .SubjectMusPar.Flexor_Digitorum_Profundus_Digit3;
  AnyIntVar MuscleElemNo = 1; ///< The number of this element of the muscle
  AnyIntVar MuscleElemAmount = MuscleParameters.MuscleElemAmount; ///< The total amount of elements for this muscle
  F0 = .SubjectMusPar.PCSAfactor*PCSA; ///< Maximum force output at optimum fiber length
  Lf0 = MuscleParameters.OptimalFiberlength / cos(pi/180*MuscleParameters.Pennationangle); //< Optimal fiber length corrected by pennation angle
  // New experimental variables for new pcsa and volume distribution
  AnyVar PCSA = 1e-2*MuscleParameters.MuscleVolume/(Lf0); //< PCSA (cm2) is calculated as muscle volume divided between muscle branches and divided by fiber length
  Vol0 = PCSA * Lf0; // New calculation of the vol for the specific muscle branch
};


////////////////////////////////////////////////////////////
//     Flexor_Digitorum_Profundus_Digit2 (1 element )     //
////////////////////////////////////////////////////////////
AnyMuscleModel Flexor_Digitorum_Profundus_Digit2 =
{
  AnyFolder& MuscleParameters = .SubjectMusPar.Flexor_Digitorum_Profundus_Digit2;
  AnyIntVar MuscleElemNo = 1; ///< The number of this element of the muscle
  AnyIntVar MuscleElemAmount = MuscleParameters.MuscleElemAmount; ///< The total amount of elements for this muscle
  F0 = .SubjectMusPar.PCSAfactor*PCSA; ///< Maximum force output at optimum fiber length
  Lf0 = MuscleParameters.OptimalFiberlength / cos(pi/180*MuscleParameters.Pennationangle); //< Optimal fiber length corrected by pennation angle
  // New experimental variables for new pcsa and volume distribution
  AnyVar PCSA = 1e-2*MuscleParameters.MuscleVolume/(Lf0); //< PCSA (cm2) is calculated as muscle volume divided between muscle branches and divided by fiber length
  Vol0 = PCSA * Lf0; // New calculation of the vol for the specific muscle branch
};


////////////////////////////////////////////////////
//     Extensor_Digitorum_Digit5 (1 element )     //
////////////////////////////////////////////////////
AnyMuscleModel Extensor_Digitorum_Digit5 =
{
  AnyFolder& MuscleParameters = .SubjectMusPar.Extensor_Digitorum_Digit5;
  AnyIntVar MuscleElemNo = 1; ///< The number of this element of the muscle
  AnyIntVar MuscleElemAmount = MuscleParameters.MuscleElemAmount; ///< The total amount of elements for this muscle
  F0 = .SubjectMusPar.PCSAfactor*PCSA; ///< Maximum force output at optimum fiber length
  Lf0 = MuscleParameters.OptimalFiberlength / cos(pi/180*MuscleParameters.Pennationangle); //< Optimal fiber length corrected by pennation angle
  // New experimental variables for new pcsa and volume distribution
  AnyVar PCSA = 1e-2*MuscleParameters.MuscleVolume/(Lf0); //< PCSA (cm2) is calculated as muscle volume divided between muscle branches and divided by fiber length
  Vol0 = PCSA * Lf0; // New calculation of the vol for the specific muscle branch
};


////////////////////////////////////////////////////
//     Extensor_Digitorum_Digit4 (1 element )     //
////////////////////////////////////////////////////
AnyMuscleModel Extensor_Digitorum_Digit4 =
{
  AnyFolder& MuscleParameters = .SubjectMusPar.Extensor_Digitorum_Digit4;
  AnyIntVar MuscleElemNo = 1; ///< The number of this element of the muscle
  AnyIntVar MuscleElemAmount = MuscleParameters.MuscleElemAmount; ///< The total amount of elements for this muscle
  F0 = .SubjectMusPar.PCSAfactor*PCSA; ///< Maximum force output at optimum fiber length
  Lf0 = MuscleParameters.OptimalFiberlength / cos(pi/180*MuscleParameters.Pennationangle); //< Optimal fiber length corrected by pennation angle
  // New experimental variables for new pcsa and volume distribution
  AnyVar PCSA = 1e-2*MuscleParameters.MuscleVolume/(Lf0); //< PCSA (cm2) is calculated as muscle volume divided between muscle branches and divided by fiber length
  Vol0 = PCSA * Lf0; // New calculation of the vol for the specific muscle branch
};


////////////////////////////////////////////////////
//     Extensor_Digitorum_Digit3 (1 element )     //
////////////////////////////////////////////////////
AnyMuscleModel Extensor_Digitorum_Digit3 =
{
  AnyFolder& MuscleParameters = .SubjectMusPar.Extensor_Digitorum_Digit3;
  AnyIntVar MuscleElemNo = 1; ///< The number of this element of the muscle
  AnyIntVar MuscleElemAmount = MuscleParameters.MuscleElemAmount; ///< The total amount of elements for this muscle
  F0 = .SubjectMusPar.PCSAfactor*PCSA; ///< Maximum force output at optimum fiber length
  Lf0 = MuscleParameters.OptimalFiberlength / cos(pi/180*MuscleParameters.Pennationangle); //< Optimal fiber length corrected by pennation angle
  // New experimental variables for new pcsa and volume distribution
  AnyVar PCSA = 1e-2*MuscleParameters.MuscleVolume/(Lf0); //< PCSA (cm2) is calculated as muscle volume divided between muscle branches and divided by fiber length
  Vol0 = PCSA * Lf0; // New calculation of the vol for the specific muscle branch
};


////////////////////////////////////////////////////
//     Extensor_Digitorum_Digit2 (1 element )     //
////////////////////////////////////////////////////
AnyMuscleModel Extensor_Digitorum_Digit2 =
{
  AnyFolder& MuscleParameters = .SubjectMusPar.Extensor_Digitorum_Digit2;
  AnyIntVar MuscleElemNo = 1; ///< The number of this element of the muscle
  AnyIntVar MuscleElemAmount = MuscleParameters.MuscleElemAmount; ///< The total amount of elements for this muscle
  F0 = .SubjectMusPar.PCSAfactor*PCSA; ///< Maximum force output at optimum fiber length
  Lf0 = MuscleParameters.OptimalFiberlength / cos(pi/180*MuscleParameters.Pennationangle); //< Optimal fiber length corrected by pennation angle
  // New experimental variables for new pcsa and volume distribution
  AnyVar PCSA = 1e-2*MuscleParameters.MuscleVolume/(Lf0); //< PCSA (cm2) is calculated as muscle volume divided between muscle branches and divided by fiber length
  Vol0 = PCSA * Lf0; // New calculation of the vol for the specific muscle branch
};


/////////////////////////////////////////////////
//     Extensor_Digiti_Minimi (1 element )     //
/////////////////////////////////////////////////
AnyMuscleModel Extensor_Digiti_Minimi =
{
  AnyFolder& MuscleParameters = .SubjectMusPar.Extensor_Digiti_Minimi;
  AnyIntVar MuscleElemNo = 1; ///< The number of this element of the muscle
  AnyIntVar MuscleElemAmount = MuscleParameters.MuscleElemAmount; ///< The total amount of elements for this muscle
  F0 = .SubjectMusPar.PCSAfactor*PCSA; ///< Maximum force output at optimum fiber length
  Lf0 = MuscleParameters.OptimalFiberlength / cos(pi/180*MuscleParameters.Pennationangle); //< Optimal fiber length corrected by pennation angle
  // New experimental variables for new pcsa and volume distribution
  AnyVar PCSA = 1e-2*MuscleParameters.MuscleVolume/(Lf0); //< PCSA (cm2) is calculated as muscle volume divided between muscle branches and divided by fiber length
  Vol0 = PCSA * Lf0; // New calculation of the vol for the specific muscle branch
};


/////////////////////////////////////////////////
//     Flexor_Pollicis_Longus (1 element )     //
/////////////////////////////////////////////////
AnyMuscleModel Flexor_Pollicis_Longus =
{
  AnyFolder& MuscleParameters = .SubjectMusPar.Flexor_Pollicis_Longus;
  AnyIntVar MuscleElemNo = 1; ///< The number of this element of the muscle
  AnyIntVar MuscleElemAmount = MuscleParameters.MuscleElemAmount; ///< The total amount of elements for this muscle
  F0 = .SubjectMusPar.PCSAfactor*PCSA; ///< Maximum force output at optimum fiber length
  Lf0 = MuscleParameters.OptimalFiberlength / cos(pi/180*MuscleParameters.Pennationangle); //< Optimal fiber length corrected by pennation angle
  // New experimental variables for new pcsa and volume distribution
  AnyVar PCSA = 1e-2*MuscleParameters.MuscleVolume/(Lf0); //< PCSA (cm2) is calculated as muscle volume divided between muscle branches and divided by fiber length
  Vol0 = PCSA * Lf0; // New calculation of the vol for the specific muscle branch
};
