#if BM_COMPATIBILITY_MUSCLE_STRUCTURE == ON
  #include "ammr_3.0_compatibility_structure.any"
#endif

MuscleGroup LevatorScapulae() = {
  AnyMuscleViaPoint levator_scapulae_1 = {
    AnyMuscleModel &MusMdl = ...MuscleModels.levator_scapulae_1;
    AnyRefNode &Org = ..TrunkNodeAttachement.C1Seg.O_levator_scapulae_1;
    AnyRefNode &Ins = ...Segments.Scapula.I_levator_scapulae_1;
    viewMuscle = {#include "../DrawSettings/MusDrawSettings.any"};
  };

  AnyMuscleViaPoint levator_scapulae_2 = {
    AnyMuscleModel &MusMdl = ...MuscleModels.levator_scapulae_2;
    AnyRefNode &Org = ..TrunkNodeAttachement.C2Seg.O_levator_scapulae_2;
    AnyRefNode &Ins = ...Segments.Scapula.I_levator_scapulae_2;
    viewMuscle = {#include "../DrawSettings/MusDrawSettings.any"};
  };

  AnyMuscleViaPoint levator_scapulae_3 = {
    AnyMuscleModel &MusMdl = ...MuscleModels.levator_scapulae_3;
    AnyRefNode &Org = ..TrunkNodeAttachement.C3Seg.O_levator_scapulae_3;
    AnyRefNode &Ins = ...Segments.Scapula.I_levator_scapulae_3;
    viewMuscle = {#include "../DrawSettings/MusDrawSettings.any"};
  };

  AnyMuscleViaPoint levator_scapulae_4 ={
    AnyMuscleModel &MusMdl = ...MuscleModels.levator_scapulae_4;
    AnyRefNode &Org = ..TrunkNodeAttachement.C4Seg.O_levator_scapulae_4 ;
    AnyRefNode &Ins = ...Segments.Scapula.I_levator_scapulae_4 ;
    viewMuscle = {#include "../DrawSettings/MusDrawSettings.any"};
  };
};

MuscleGroup Sternocleidomastoid() = {
  AnyMuscleViaPoint Sternocleidomastoid_caput_clavicular = {
    AnyMuscleModel &MusMdl = ...MuscleModels.Sternocleidomastoid_1;
    AnyRefNode &Ins2 = ...Segments.Clavicula.SternocleidomastoidNode;
    AnyRefNode &Org = ..TrunkNodeAttachement.SkullSeg.SternocleidomastoidNode;
    viewMuscle = {#include "../DrawSettings/MusDrawSettings.any"};
  };

  AnyMuscleViaPoint Sternocleidomastoid_caput_Sternum = {
    AnyMuscleModel &MusMdl = ...MuscleModels.Sternocleidomastoid_2;
    AnyRefNode &Ins = ..TrunkNodeAttachement.ManubriumSeg.SternocleidomastoidNode;
    AnyRefNode &Org = ..TrunkNodeAttachement.SkullSeg.SternocleidomastoidNode;
    viewMuscle = {#include "../DrawSettings/MusDrawSettings.any"};
  };
};

MuscleGroup TrapeziusScapular() = {
  AnyMuscleShortestPath  trapezius_scapular_part_1 = {
    AnyMuscleModel &MusMdl =  ...MuscleModels.trapezius_scapular_part_1;
    AnyRefNode &Org = ..TrunkNodeAttachement.T12Seg.O_trapezius_scapular_part_1;
    AnyRefNode &Ins = ...Segments.Scapula.I_trapezius_scapular_part_1;
    viewMuscle = {#include "../DrawSettings/MusDrawSettings.any"};
    SPLine.StringMesh = 100;
    AnySurfCylinder &Surf = ..margo_medialis;
    SPLine = {
      AnyMatrix InitWrapPos = { transf3D({1.3*.Surf.Radius, 0,0.5*.Surf.Length}, &.Surf)};
      InitWrapPosVecArr = {&InitWrapPos};
    };
  };

  AnyMuscleShortestPath  trapezius_scapular_part_2 = {
    AnyMuscleModel &MusMdl = ...MuscleModels.trapezius_scapular_part_2;
    AnyRefNode &Org = ..TrunkNodeAttachement.T11Seg.O_trapezius_scapular_part_2;
    AnyRefNode &Ins = ...Segments.Scapula.I_trapezius_scapular_part_2;
    viewMuscle = {#include "../DrawSettings/MusDrawSettings.any"};
    SPLine.StringMesh = 100;
    AnySurfCylinder &Surf = ..margo_medialis;
    SPLine = {
      AnyMatrix InitWrapPos = { transf3D({1.3*.Surf.Radius, 0,0.5*.Surf.Length}, &.Surf)};
      InitWrapPosVecArr = {&InitWrapPos};
    };
  };

  AnyMuscleShortestPath trapezius_scapular_part_3 = {
    AnyMuscleModel &MusMdl = ...MuscleModels.trapezius_scapular_part_3;
    AnyRefNode &Org = ..TrunkNodeAttachement.T10Seg.O_trapezius_scapular_part_3;
    AnyRefNode &Ins = ...Segments.Scapula.I_trapezius_scapular_part_3;
    viewMuscle = {#include "../DrawSettings/MusDrawSettings.any"};
    SPLine.StringMesh = 100;
    AnySurfCylinder &Surf = ..margo_medialis;
    SPLine.InitWrapPosVecArr = .trapezius_scapular_part_1.SPLine.InitWrapPosVecArr;
  };

  AnyMuscleShortestPath trapezius_scapular_part_4 = {
    AnyMuscleModel &MusMdl = ...MuscleModels.trapezius_scapular_part_4;
    AnyRefNode &Org = ..TrunkNodeAttachement.T9Seg.O_trapezius_scapular_part_4;
    AnyRefNode &Ins = ...Segments.Scapula.I_trapezius_scapular_part_4;
    viewMuscle = {#include "../DrawSettings/MusDrawSettings.any"};
    SPLine.StringMesh = 100;
    AnySurfCylinder &Surf = ..margo_medialis;
    SPLine.InitWrapPosVecArr = .trapezius_scapular_part_1.SPLine.InitWrapPosVecArr;
  };

  AnyMuscleShortestPath trapezius_scapular_part_5 = {
    AnyMuscleModel &MusMdl = ...MuscleModels.trapezius_scapular_part_5;
    AnyRefNode &Org = ..TrunkNodeAttachement.T8Seg.O_trapezius_scapular_part_5;
    AnyRefNode &Ins = ...Segments.Scapula.I_trapezius_scapular_part_5;
    viewMuscle = {#include "../DrawSettings/MusDrawSettings.any"};
    SPLine.StringMesh = 100;
    AnySurfCylinder &Surf = ..margo_medialis;
    SPLine.InitWrapPosVecArr = .trapezius_scapular_part_1.SPLine.InitWrapPosVecArr;
  };

  AnyMuscleShortestPath trapezius_scapular_part_6 = {
    AnyMuscleModel &MusMdl = ...MuscleModels.trapezius_scapular_part_6;
    AnyRefNode &Org = ..TrunkNodeAttachement.T7Seg.O_trapezius_scapular_part_6;
    AnyRefNode &Ins = ...Segments.Scapula.I_trapezius_scapular_part_6;
    viewMuscle = {#include "../DrawSettings/MusDrawSettings.any"};
    SPLine.StringMesh = 100;
    AnySurfCylinder &Surf = ..margo_medialis;
    SPLine.InitWrapPosVecArr = .trapezius_scapular_part_1.SPLine.InitWrapPosVecArr;
  };

  AnyMuscleShortestPath trapezius_scapular_part_7 = {
    AnyMuscleModel &MusMdl = ...MuscleModels.trapezius_scapular_part_7;
    AnyRefNode &Org = ..TrunkNodeAttachement.T6Seg.O_trapezius_scapular_part_7;
    AnyRefNode &Ins = ...Segments.Scapula.I_trapezius_scapular_part_7;
    viewMuscle = {#include "../DrawSettings/MusDrawSettings.any"};
    SPLine.StringMesh = 100;
    AnySurfCylinder &Surf = ..margo_medialis;
    SPLine.InitWrapPosVecArr = .trapezius_scapular_part_1.SPLine.InitWrapPosVecArr;
  };

  AnyMuscleShortestPath trapezius_scapular_part_8 = {
    AnyMuscleModel &MusMdl = ...MuscleModels.trapezius_scapular_part_8;
    AnyRefNode &Org = ..TrunkNodeAttachement.T5Seg.O_trapezius_scapular_part_8;
    AnyRefNode &Ins = ...Segments.Scapula.I_trapezius_scapular_part_8;
    viewMuscle = {#include "../DrawSettings/MusDrawSettings.any"};
    SPLine.StringMesh = 100;
    AnySurfCylinder &Surf = ..margo_medialis;
    SPLine.InitWrapPosVecArr = .trapezius_scapular_part_1.SPLine.InitWrapPosVecArr;
  };

  AnyMuscleShortestPath trapezius_scapular_part_9 = {
    AnyMuscleModel &MusMdl = ...MuscleModels.trapezius_scapular_part_9;
    AnyRefNode &Org = ..TrunkNodeAttachement.T4Seg.O_trapezius_scapular_part_9;
    AnyRefNode &Ins = ...Segments.Scapula.I_trapezius_scapular_part_9;
    viewMuscle = {#include "../DrawSettings/MusDrawSettings.any"};
    SPLine.StringMesh = 100;
    AnySurfCylinder &Surf = ..margo_medialis;
    SPLine.InitWrapPosVecArr = .trapezius_scapular_part_1.SPLine.InitWrapPosVecArr;
  };

  AnyMuscleViaPoint trapezius_scapular_part_10 = {
    AnyMuscleModel &MusMdl = ...MuscleModels.trapezius_scapular_part_10;
    AnyRefNode &Org = ..TrunkNodeAttachement.T3Seg.O_trapezius_scapular_part_10;
    AnyRefNode &Ins = ...Segments.Scapula.I_trapezius_scapular_part_10;
    viewMuscle = {#include "../DrawSettings/MusDrawSettings.any"};
  };

  AnyMuscleViaPoint trapezius_scapular_part_11 = {
    AnyMuscleModel &MusMdl = ...MuscleModels.trapezius_scapular_part_11;
    AnyRefNode &Org = ..TrunkNodeAttachement.T2Seg.O_trapezius_scapular_part_11;
    AnyRefNode &Ins = ...Segments.Scapula.I_trapezius_scapular_part_11;
    viewMuscle = {#include "../DrawSettings/MusDrawSettings.any"};
  };

  AnyMuscleViaPoint trapezius_scapular_part_12 = {
    AnyMuscleModel &MusMdl = ...MuscleModels.trapezius_scapular_part_12;
    AnyRefNode &Org = ..TrunkNodeAttachement.T1Seg.O_trapezius_scapular_part_12;
    AnyRefNode &Ins = ...Segments.Scapula.I_trapezius_scapular_part_12;
    viewMuscle = {#include "../DrawSettings/MusDrawSettings.any"};
  };

  AnyMuscleViaPoint trapezius_scapular_part_13 = {
    AnyMuscleModel &MusMdl = ...MuscleModels.trapezius_scapular_part_13;
    AnyRefNode &Org = ..TrunkNodeAttachement.C7Seg.O_trapezius_scapular_part_13;
    AnyRefNode &Ins = ...Segments.Scapula.I_trapezius_scapular_part_13;
    viewMuscle = {#include "../DrawSettings/MusDrawSettings.any"};
  };

  AnyMuscleViaPoint trapezius_scapular_part_14 = {
    AnyMuscleModel &MusMdl = ...MuscleModels.trapezius_scapular_part_14;
    AnyRefNode &Org = ..TrunkNodeAttachement.C6Seg.O_trapezius_scapular_part_14;
    AnyRefNode &Ins = ...Segments.Scapula.I_trapezius_scapular_part_14;
    viewMuscle = {#include "../DrawSettings/MusDrawSettings.any"};
  };
};

MuscleGroup TrapeziusClavicular() = {
  AnyMuscleViaPoint  trapezius_clavicular_part_1 = {
    AnyMuscleModel &MusMdl = ...MuscleModels.trapezius_clavicular_part_1;
    AnyRefNode &Org = ..TrunkNodeAttachement.C5Seg.O_trapezius_clavicular_part_1;
    AnyRefNode &Ins = ...Segments.Clavicula.I_trapezius_clavicular_part_1;
    viewMuscle = {#include "../DrawSettings/MusDrawSettings.any"};
  };

  AnyMuscleViaPoint trapezius_clavicular_part_2 = {
    AnyMuscleModel &MusMdl = ...MuscleModels.trapezius_clavicular_part_2;
    AnyRefNode &Org = ..TrunkNodeAttachement.C4Seg.O_trapezius_clavicular_part_2;
    AnyRefNode &Ins = ...Segments.Clavicula.I_trapezius_clavicular_part_2;
    viewMuscle = {#include "../DrawSettings/MusDrawSettings.any"};
  };

  AnyMuscleViaPoint trapezius_clavicular_part_3 = {
    AnyMuscleModel &MusMdl = ...MuscleModels.trapezius_clavicular_part_3;
    AnyRefNode &Org = ..TrunkNodeAttachement.C3Seg.O_trapezius_clavicular_part_3;
    AnyRefNode &Ins = ...Segments.Clavicula.I_trapezius_clavicular_part_3;
    viewMuscle = {#include "../DrawSettings/MusDrawSettings.any"};
  };

  AnyMuscleViaPoint trapezius_clavicular_part_4 = {
    AnyMuscleModel &MusMdl = ...MuscleModels.trapezius_clavicular_part_4;
    AnyRefNode &Org = ..TrunkNodeAttachement.C2Seg.O_trapezius_clavicular_part_4;
    AnyRefNode &Ins = ...Segments.Clavicula.I_trapezius_clavicular_part_4;
    viewMuscle = {#include "../DrawSettings/MusDrawSettings.any"};
  };

  AnyMuscleViaPoint trapezius_clavicular_part_5 = {
    AnyMuscleModel &MusMdl = ...MuscleModels.trapezius_clavicular_part_5;
    AnyRefNode &Org = ..TrunkNodeAttachement.C1Seg.O_trapezius_clavicular_part_5;
    AnyRefNode &Ins = ...Segments.Clavicula.I_trapezius_clavicular_part_5;
    viewMuscle = {#include "../DrawSettings/MusDrawSettings.any"};
  };

  AnyMuscleViaPoint trapezius_clavicular_part_6 = {
    AnyMuscleModel &MusMdl = ...MuscleModels.trapezius_clavicular_part_6;
    AnyRefNode &Org = ..TrunkNodeAttachement.SkullSeg.O_trapezius_clavicular_part_6;
    AnyRefNode &Ins = ...Segments.Clavicula.I_trapezius_clavicular_part_6;
    viewMuscle = {#include "../DrawSettings/MusDrawSettings.any"};
  };
};

MuscleGroup BicepsBrachii = {
  AnyMuscleShortestPath  biceps_brachii_caput_breve = {
    AnyMuscleModel &MusMdl = ...MuscleModels.biceps_brachii_caput_breve;
    AnyRefNode &Org = ...Segments.Scapula.O_biceps_brachii_caput_breve;
    AnyRefNode &Ins = ...Segments.Radius.I_Biceps_SH ;
    viewMuscle = {#include "../DrawSettings/MusDrawSettings.any"};
    SPLine.StringMesh = 200;
    AnySurfCylinder &Surf0 = ..condylus_hum;
    AnySurfCylinder &Surf3 = ..bicepscyl;
    AnySurfEllipsoid &Surf4 = ..art_gh_humRef;
    SPLine.InitWrapPosVecArr = { &.biceps_brachii_caput_longum.SPLine.InitWrapPos };
  };

  AnyMuscleShortestPath biceps_brachii_caput_longum = {
    AnyMuscleModel &MusMdl = ...MuscleModels.biceps_brachii_caput_longum;

    AnyRefNode &Org = ...Segments.Scapula.O_biceps_brachii_caput_longum;//this point has been taken from VU study
    AnyRefNode &Via1 = ...Segments.Humerus.sulcus_intertubercularisTop;
    AnyRefNode &Via2 = ...Segments.Humerus.sulcus_intertubercularis;
    AnyRefNode &Ins = ...Segments.Radius.I_Biceps_LH;  //this point has been taken from MAYO study

    viewMuscle = {#include "../DrawSettings/MusDrawSettings.any"};
    SPLine.StringMesh = 150;
    AnySurfEllipsoid &Surfgh = ..art_gh_humRef;
    AnySurfCylinder &Surf0 = ..condylus_hum;
    AnySurfCylinder &Surf3 = ..bicepscyl;

    SPLine = {
      RelTol = 1e-6;
      AbsTol = 1e-5;
      AnyMatrix InitWrapPos = {
            transf3D(.Surf0.Radius*{0.5,0,....Sign*1.2}, &....Segments.Humerus.fe),
            transf3D({....Sign*-1.1*.Surf0.Radius,1*.Surf0.Radius, 0.45*.Surf0.Length }, &.Surf0 ),
            transf3D({ 0, 0  , 2*.Surf3.Radius }, &....Segments.Ulna.I_Brachialis_1),
            transf3D({ ....Sign*1*.Surf3.Radius,   -1*.Surf3.Radius, 0.65*.Surf3.Length }, &.Surf3)

      };
      InitWrapPosVecArr = { None,None, &InitWrapPos };
    };
  };
};

MuscleGroup Coracobrachialis = {
  AnyMuscleViaPoint coracobrachialis_1 = {
    AnyMuscleModel &MusMdl = ...MuscleModels.coracobrachialis_1;
    AnyRefNode &Org = ...Segments.Scapula.O_coracobrachialis_1;
    AnyRefNode &Ins = ...Segments.Humerus.I_coracobrachialis_1;
    viewMuscle = {#include "../DrawSettings/MusDrawSettings.any"};
  };

  AnyMuscleViaPoint coracobrachialis_2 = {
    AnyMuscleModel &MusMdl = ...MuscleModels.coracobrachialis_2;
    AnyRefNode &Org = ...Segments.Scapula.O_coracobrachialis_2;
    AnyRefNode &Ins = ...Segments.Humerus.I_coracobrachialis_2;
    viewMuscle = {#include "../DrawSettings/MusDrawSettings.any"};
  };

  AnyMuscleViaPoint coracobrachialis_3 = {
    AnyMuscleModel &MusMdl = ...MuscleModels.coracobrachialis_3;
    AnyRefNode &Org = ...Segments.Scapula.O_coracobrachialis_3;
    AnyRefNode &Ins = ...Segments.Humerus.I_coracobrachialis_3;
    viewMuscle = {#include "../DrawSettings/MusDrawSettings.any"};
  };

  AnyMuscleViaPoint coracobrachialis_4 = {
    AnyMuscleModel &MusMdl = ...MuscleModels.coracobrachialis_4;
    AnyRefNode &Org = ...Segments.Scapula.O_coracobrachialis_4;
    AnyRefNode &Ins = ...Segments.Humerus.I_coracobrachialis_4;
    viewMuscle = {#include "../DrawSettings/MusDrawSettings.any"};
  };

  AnyMuscleViaPoint coracobrachialis_5 = {
    AnyMuscleModel &MusMdl = ...MuscleModels.coracobrachialis_5;
    AnyRefNode &Org = ...Segments.Scapula.O_coracobrachialis_5;
    AnyRefNode &Ins = ...Segments.Humerus.I_coracobrachialis_5;
    viewMuscle = {#include "../DrawSettings/MusDrawSettings.any"};
  };

  AnyMuscleViaPoint coracobrachialis_6 = {
    AnyMuscleModel &MusMdl = ...MuscleModels.coracobrachialis_6;
    AnyRefNode &Org = ...Segments.Scapula.O_coracobrachialis_6;
    AnyRefNode &Ins = ...Segments.Humerus.I_coracobrachialis_6;
    viewMuscle = {#include "../DrawSettings/MusDrawSettings.any"};
  };
};

#if BM_ARM_DELTOID_WRAPPING == _DELTOID_WRAPPING_RAKE_
  MuscleGroup DeltoideusScapular = {
    AnyMuscleShortestPath deltoideus_scapular_part_1 = {
      AnyMuscleModel &MusMdl = ...MuscleModels.deltoideus_scapular_part_1;
      AnyRefNode &Org = ...Segments.Scapula.O_deltoideus_scapular_part_1;
      AnyRefNode &Via = .ArtificialRake.DeltoidMuscleConnector.DeltoidVia1;
      //AnySurfEllipsoid &surf1= .ArtificialRake.DeltoidMuscleConnector.EllipsoidCyl.Ellipsoid ;

      AnyRefNode &Ins = ...Segments.Humerus.I_deltoideus_scapular_part_1;
      viewMuscle = {#include "../DrawSettings/MusDrawSettings.any"};
      SPLine.StringMesh = 30;
      AnySurfSphere &Surf = ..art_tub_minus_tub_majusRef;
      SPLine = {
        AnyMatrix InitWrapPos = { transf3D({0, 0.8*.Surf.Radius,0}, &.Via)};
        InitWrapPosVecArr = {&InitWrapPos,None};
      };
    };

    AnyMuscleShortestPath deltoideus_scapular_part_2 = {
      AnyMuscleModel &MusMdl = ...MuscleModels.deltoideus_scapular_part_2;
      AnyRefNode &Org = ...Segments.Scapula.O_deltoideus_scapular_part_2;
      AnyRefNode &Via = .ArtificialRake.DeltoidMuscleConnector.DeltoidVia2;

      AnyRefNode &Ins = ...Segments.Humerus.I_deltoideus_scapular_part_2;
      viewMuscle = {#include "../DrawSettings/MusDrawSettings.any"};
      SPLine.StringMesh = 30;
      AnySurfSphere &Surf = ..art_tub_minus_tub_majusRef;
      SPLine = {
        AnyMatrix InitWrapPos = { transf3D({0, 0.8*.Surf.Radius,0}, &.Via)};
        InitWrapPosVecArr = {&InitWrapPos,None};
      };
    };

    AnyMuscleShortestPath deltoideus_scapular_part_3 = {
      AnyMuscleModel &MusMdl = ...MuscleModels.deltoideus_scapular_part_3;
      AnyRefNode &Org = ...Segments.Scapula.O_deltoideus_scapular_part_3;
      AnyRefNode &Via = .ArtificialRake.DeltoidMuscleConnector.DeltoidVia3;
      AnyRefNode &Ins = ...Segments.Humerus.I_deltoideus_scapular_part_3;
      viewMuscle = {#include "../DrawSettings/MusDrawSettings.any"};
      SPLine.StringMesh = 40;
      AnySurfSphere &Surf = ..art_tub_minus_tub_majusRef;
      SPLine = {
        AnyMatrix InitWrapPos = { transf3D({0, 0.8*.Surf.Radius,0}, &.Via)};
        InitWrapPosVecArr = {&InitWrapPos,None};
      };
    };

    AnyMuscleShortestPath deltoideus_scapular_part_4 = {
      AnyMuscleModel &MusMdl = ...MuscleModels.deltoideus_scapular_part_4;
      AnyRefNode &Org = ...Segments.Scapula.O_deltoideus_scapular_part_4;
      AnyRefNode &Via = .ArtificialRake.DeltoidMuscleConnector.DeltoidVia4;
      AnyRefNode &Ins = ...Segments.Humerus.I_deltoideus_scapular_part_4;
      viewMuscle = {#include "../DrawSettings/MusDrawSettings.any"};
      SPLine.StringMesh = 35;
      AnySurfSphere &Surf = ..art_tub_minus_tub_majusRef;
      SPLine = {
        AnyMatrix InitWrapPos = { transf3D({0, 0.8*.Surf.Radius,0}, &.Via)};
        InitWrapPosVecArr = {&InitWrapPos,None};
      };
    };

    AnyMuscleShortestPath deltoideus_scapular_part_5 = {
      AnyMuscleModel &MusMdl = ...MuscleModels.deltoideus_scapular_part_5;
      AnyRefNode &Org = ...Segments.Scapula.O_deltoideus_scapular_part_5;
      AnyRefNode &Via = .ArtificialRake.DeltoidMuscleConnector.DeltoidVia5;
      AnyRefNode &Ins = ...Segments.Humerus.I_deltoideus_scapular_part_5;
      viewMuscle = {#include "../DrawSettings/MusDrawSettings.any" };
      SPLine.StringMesh = 40;
      AnySurfSphere &Surf = ..art_tub_minus_tub_majusRef;
      SPLine = {
        AnyMatrix InitWrapPos = { transf3D({0, 0.8*.Surf.Radius,0}, &.Via)};
        InitWrapPosVecArr = {&InitWrapPos,None};
      };
    };

    AnyMuscleShortestPath deltoideus_scapular_part_6 = {
      AnyMuscleModel &MusMdl = ...MuscleModels.deltoideus_scapular_part_6;
      AnyRefNode &Org = ...Segments.Scapula.O_deltoideus_scapular_part_6;
      AnyRefNode &Via = .ArtificialRake.DeltoidMuscleConnector.DeltoidVia6;
      AnyRefNode &Ins = ...Segments.Humerus.I_deltoideus_scapular_part_6;
      viewMuscle = {#include "../DrawSettings/MusDrawSettings.any"};
      SPLine.StringMesh = 30;
      AnySurfSphere &Surf = ..art_tub_minus_tub_majusRef;
      SPLine = {
        AnyMatrix InitWrapPos = { transf3D({0, 0.8*.Surf.Radius,0}, &.Via)};
        InitWrapPosVecArr = {&InitWrapPos,None};
      };
    };
  };

  MuscleGroup DeltoideusClavicular = {
    AnyMuscleShortestPath deltoideus_clavicular_part_1 = {
      AnyMuscleModel &MusMdl = ...MuscleModels.deltoideus_clavicular_part_1;
      AnyRefNode &Org = ...Segments.Clavicula.O_deltoideus_clavicular_part_1;
      AnyRefNode &Via = .ArtificialRake.DeltoidMuscleConnector.DeltoidVia7;
      AnyRefNode &Ins = ...Segments.Humerus.I_deltoideus_clavicular_part_1;
      viewMuscle = {#include "../DrawSettings/MusDrawSettings.any"};
      AnySurfSphere &Surf = ..art_tub_minus_tub_majusRef;
      SPLine.StringMesh = 35;
      SPLine = {
        AnyMatrix InitWrapPos = { transf3D({0, 0.8*.Surf.Radius,0}, &.Via)};
        InitWrapPosVecArr = {&InitWrapPos,None};
      };
    };

    AnyMuscleShortestPath deltoideus_clavicular_part_2 = {
      AnyMuscleModel &MusMdl = ...MuscleModels.deltoideus_clavicular_part_2;
      AnyRefNode &Org = ...Segments.Clavicula.O_deltoideus_clavicular_part_2;
      AnyRefNode &Via = .ArtificialRake.DeltoidMuscleConnector.DeltoidVia8;
      AnyRefNode &Ins = ...Segments.Humerus.I_deltoideus_clavicular_part_2;
      viewMuscle = {#include "../DrawSettings/MusDrawSettings.any"};
      SPLine.StringMesh = 42;
      AnySurfSphere &Surf = ..art_tub_minus_tub_majusRef;
      SPLine = {
        AnyMatrix InitWrapPos = { transf3D({0, 0.8*.Surf.Radius,0}, &.Via)};
        InitWrapPosVecArr = {&InitWrapPos,None};
      };
    };

    AnyMuscleShortestPath deltoideus_clavicular_part_3 = {
      AnyMuscleModel &MusMdl = ...MuscleModels.deltoideus_clavicular_part_3;
      AnyRefNode &Org = ...Segments.Clavicula.O_deltoideus_clavicular_part_3;
      AnyRefNode &Via = .ArtificialRake.DeltoidMuscleConnector.DeltoidVia9;
      AnyRefNode &Ins = ...Segments.Humerus.I_deltoideus_clavicular_part_3;
      viewMuscle = {#include "../DrawSettings/MusDrawSettings.any"};
      AnySurfSphere &Surf = ..art_tub_minus_tub_majusRef;
      SPLine.StringMesh = 35;
      SPLine = {
        AnyMatrix InitWrapPos = { transf3D({0, 0.8*.Surf.Radius,0}, &.Via)};
        InitWrapPosVecArr = {&InitWrapPos,None};
      };
    };

    AnyMuscleShortestPath deltoideus_clavicular_part_4 = {
      AnyMuscleModel &MusMdl = ...MuscleModels.deltoideus_clavicular_part_4;
      AnyRefNode &Org = ...Segments.Clavicula.O_deltoideus_clavicular_part_4;
      AnyRefNode &Via = .ArtificialRake.DeltoidMuscleConnector.DeltoidVia10;
      AnyRefNode &Ins = ...Segments.Humerus.I_deltoideus_clavicular_part_4;
      viewMuscle = {#include "../DrawSettings/MusDrawSettings.any"};
      SPLine.StringMesh = 30;
      AnySurfSphere &Surf = ..art_tub_minus_tub_majusRef;
      SPLine = {
        AnyMatrix InitWrapPos = { transf3D({0, 0.8*.Surf.Radius,0}, &.Via)};
        InitWrapPosVecArr = {&InitWrapPos,None};
      };
    };

    AnyMuscleShortestPath deltoideus_clavicular_part_5 = {
      AnyMuscleModel &MusMdl = ...MuscleModels.deltoideus_clavicular_part_5;
      AnyRefNode &Org = ...Segments.Clavicula.O_deltoideus_clavicular_part_5;
      AnyRefNode &Via = .ArtificialRake.DeltoidMuscleConnector.DeltoidVia11;
      AnyRefNode &Ins = ...Segments.Humerus.I_deltoideus_clavicular_part_5;
      viewMuscle = {#include "../DrawSettings/MusDrawSettings.any"};
      SPLine.StringMesh = 35;
      AnySurfSphere &Surf = ..art_tub_minus_tub_majusRef;
      SPLine = {
        AnyMatrix InitWrapPos = { transf3D({0, 0.8*.Surf.Radius,0}, &.Via)};
        InitWrapPosVecArr = {&InitWrapPos,None};
      };
    };

    //most proximal unit
    AnyMuscleShortestPath deltoideus_clavicular_part_6 = {
      AnyMuscleModel &MusMdl = ...MuscleModels.deltoideus_clavicular_part_6;
      AnyRefNode &Org = ...Segments.Clavicula.O_deltoideus_clavicular_part_6;
      AnyRefNode &Via = .ArtificialRake.DeltoidMuscleConnector.DeltoidVia12;
      AnyRefNode &Ins = ...Segments.Humerus.I_deltoideus_clavicular_part_6;
      viewMuscle = {#include "../DrawSettings/MusDrawSettings.any"};
      SPLine.StringMesh = 20;
      AnySurfSphere &Surf = ..art_tub_minus_tub_majusRef;
      SPLine = {
        AnyMatrix InitWrapPos = { transf3D({0, 0.8*.Surf.Radius,0}, &.Via)};
        InitWrapPosVecArr = {&InitWrapPos,None};
      };
    };
  };
#else
  MuscleGroup DeltoideusPosterior = {
    // start of BM_ARM_DELTOID_WRAPPING
    AnyMuscleShortestPath deltoideus_posterior_part_1 = {
      AnyMuscleModel &MusMdl = ...MuscleModels.deltoideus_posterior_part_1;
      AnyRefNode &Org = ...Segments.Scapula.O_deltoideus_posterior_part_1;
      AnyRefNode &Ins = ...Segments.Humerus.I_deltoideus_posterior_part_1;
      viewMuscle = {#include "../DrawSettings/MusDrawSettings.any"};
      SPLine.StringMesh = 45;
      AnyParamSurfAnalytical &Surf = ..DeltoidWrappingPosterior.BASE_FRAME.Wrapping_1.Surf;
      AnyParamSurfAnalytical &Surf2 = ...Segments.Scapula.deltoid_cyl.cyl;
      SPLine = {
        AnyMatrix InitWrapPos = {
            transf3D({0.8*.Surf.Sizes[0],0.8*.Surf.Sizes[0 ],0}, &...DeltoidWrappingPosterior.BASE_FRAME.Wrapping_1.Center),
            transf3D({1.1*.Surf.Sizes[0],0,0},  &...DeltoidWrappingPosterior.BASE_FRAME.Wrapping_1.Center),
            transf3D({0.8*.Surf.Sizes[0],-0.8*.Surf.Sizes[0],0}, &...DeltoidWrappingPosterior.BASE_FRAME.Wrapping_1.Center)
        };
        InitWrapPosVecArr = {&InitWrapPos};
      };
    };

    AnyMuscleShortestPath deltoideus_posterior_part_3 = {
      AnyMuscleModel &MusMdl = ...MuscleModels.deltoideus_posterior_part_3;
      AnyRefNode &Org = ...Segments.Scapula.O_deltoideus_posterior_part_3;

      AnyRefNode &Ins = ...Segments.Humerus.I_deltoideus_posterior_part_3;
      viewMuscle = {#include "../DrawSettings/MusDrawSettings.any"};
      SPLine.StringMesh = 40;

      AnyParamSurfAnalytical &Surf = ..DeltoidWrappingPosterior.BASE_FRAME.Wrapping_3.Surf;
      AnyParamSurfAnalytical &Surf2 = ...Segments.Scapula.deltoid_cyl.cyl;

      SPLine = {
        AnyMatrix InitWrapPos = {
            transf3D({0.8*.Surf.Sizes[0],0.8*.Surf.Sizes[0 ],0}, &...DeltoidWrappingPosterior.BASE_FRAME.Wrapping_3.Center),
            transf3D({1.1*.Surf.Sizes[0],0,0},  &...DeltoidWrappingPosterior.BASE_FRAME.Wrapping_3.Center),
            transf3D({0.8*.Surf.Sizes[0],-0.8*.Surf.Sizes[0],0}, &...DeltoidWrappingPosterior.BASE_FRAME.Wrapping_3.Center)
        };
        InitWrapPosVecArr = {&InitWrapPos};
      };

    };

    // an extra fibers a/b
    AnyMuscleShortestPath deltoideus_posterior_part_2 = {
      AnyMuscleModel &MusMdl = ...MuscleModels.deltoideus_posterior_part_2;
      AnyRefNode &Org = ...Segments.Scapula.O_deltoideus_posterior_part_2;
      AnyRefNode &Ins = ...Segments.Humerus.I_deltoideus_posterior_part_2;
      SPLine.StringMesh = 30;
      viewMuscle = {#include "../DrawSettings/MusDrawSettings.any"};
      AnyParamSurfAnalytical &Surf = ..DeltoidWrappingPosterior.BASE_FRAME.Wrapping_2.Surf;
      AnyParamSurfAnalytical &Surf2 = ...Segments.Scapula.deltoid_cyl.cyl;
      SPLine = {
        AnyMatrix InitWrapPos = {
            transf3D({0.8*.Surf.Sizes[0],0.8*.Surf.Sizes[0 ],0}, &...DeltoidWrappingPosterior.BASE_FRAME.Wrapping_2.Center),
            transf3D({1.1*.Surf.Sizes[0],0,0},  &...DeltoidWrappingPosterior.BASE_FRAME.Wrapping_2.Center),
            transf3D({0.8*.Surf.Sizes[0],-0.8*.Surf.Sizes[0],0}, &...DeltoidWrappingPosterior.BASE_FRAME.Wrapping_2.Center)
        };
        InitWrapPosVecArr = {&InitWrapPos};
      };
    };

    AnyMuscleShortestPath deltoideus_posterior_part_4 = {
      AnyMuscleModel &MusMdl = ...MuscleModels.deltoideus_posterior_part_4;
      AnyRefNode &Org = ...Segments.Scapula.O_deltoideus_posterior_part_4;
      AnyRefNode &Ins = ...Segments.Humerus.I_deltoideus_posterior_part_4;
      SPLine.StringMesh = 20;
      viewMuscle = {#include "../DrawSettings/MusDrawSettings.any"};
      AnyParamSurfAnalytical &Surf = ..DeltoidWrappingPosterior.BASE_FRAME.Wrapping_4.Surf;
      AnyParamSurfAnalytical &Surf2 = ...Segments.Scapula.deltoid_cyl.cyl;

      SPLine = {
        AnyMatrix InitWrapPos = {
            transf3D({0.8*.Surf.Sizes[0],0.8*.Surf.Sizes[0 ],0}, &...DeltoidWrappingPosterior.BASE_FRAME.Wrapping_4.Center),
            transf3D({1.1*.Surf.Sizes[0],0,0},  &...DeltoidWrappingPosterior.BASE_FRAME.Wrapping_4.Center),
            transf3D({0.8*.Surf.Sizes[0],-0.8*.Surf.Sizes[0],0}, &...DeltoidWrappingPosterior.BASE_FRAME.Wrapping_4.Center)
        };
        InitWrapPosVecArr = {&InitWrapPos};
      };
    };
  };

  MuscleGroup DeltoideusLateral = {
    AnyMuscleShortestPath deltoideus_lateral_part_1 = {
      AnyMuscleModel &MusMdl = ...MuscleModels.deltoideus_lateral_part_1;
      AnyRefNode &Org = ...Segments.Scapula.O_deltoideus_lateral_part_1;

      AnyRefNode &Ins = ...Segments.Humerus.I_deltoideus_lateral_part_1;
      viewMuscle = {#include "../DrawSettings/MusDrawSettings.any"};
      SPLine.StringMesh = 30;

      AnyParamSurfAnalytical &Surf = ..DeltoidWrappingLateral.BASE_FRAME.Wrapping_1.Surf;
      SPLine = {
        AnyMatrix InitWrapPos = {
            transf3D({0.8*.Surf.Sizes[0],0.8*.Surf.Sizes[0 ],0}, &...DeltoidWrappingLateral.BASE_FRAME.Wrapping_1.Center),
            transf3D({1.1*.Surf.Sizes[0],0,0},  &...DeltoidWrappingLateral.BASE_FRAME.Wrapping_1.Center),
            transf3D({0.8*.Surf.Sizes[0],-0.8*.Surf.Sizes[0],0}, &...DeltoidWrappingLateral.BASE_FRAME.Wrapping_1.Center)
        };
        InitWrapPosVecArr = {&InitWrapPos};
      };
    };

    AnyMuscleShortestPath deltoideus_lateral_part_3 = {
      AnyMuscleModel &MusMdl = ...MuscleModels.deltoideus_lateral_part_3;
      AnyRefNode &Org = ...Segments.Scapula.O_deltoideus_lateral_part_3;
      AnyRefNode &Ins = ...Segments.Humerus.I_deltoideus_lateral_part_3;
      viewMuscle = {#include "../DrawSettings/MusDrawSettings.any"};
      SPLine.StringMesh = 30;


      AnyParamSurfAnalytical &Surf = ..DeltoidWrappingLateral.BASE_FRAME.Wrapping_3.Surf;

      SPLine = {
        AnyMatrix InitWrapPos = {
            transf3D({0.8*.Surf.Sizes[0],0.8*.Surf.Sizes[0 ],0}, &...DeltoidWrappingLateral.BASE_FRAME.Wrapping_2.Center),
            transf3D({1.1*.Surf.Sizes[0],0,0},  &...DeltoidWrappingLateral.BASE_FRAME.Wrapping_2.Center),
            transf3D({0.8*.Surf.Sizes[0],-0.8*.Surf.Sizes[0],0}, &...DeltoidWrappingLateral.BASE_FRAME.Wrapping_2.Center)
        };
        InitWrapPosVecArr = {&InitWrapPos};
      };
    };


    AnyMuscleShortestPath deltoideus_lateral_part_2 = {
      AnyMuscleModel &MusMdl = ...MuscleModels.deltoideus_lateral_part_2;
      AnyRefNode &Org = ...Segments.Scapula.O_deltoideus_lateral_part_2;
      AnyRefNode &Ins = ...Segments.Humerus.I_deltoideus_lateral_part_2;
      viewMuscle = {#include "../DrawSettings/MusDrawSettings.any"};
      SPLine.StringMesh = 30;
      AnyParamSurfAnalytical &Surf = ..DeltoidWrappingLateral.BASE_FRAME.Wrapping_2.Surf;

      SPLine = {
        AnyMatrix InitWrapPos = {
            transf3D({0.8*.Surf.Sizes[0],0.8*.Surf.Sizes[0 ],0}, &...DeltoidWrappingLateral.BASE_FRAME.Wrapping_3.Center),
            transf3D({1.1*.Surf.Sizes[0],0,0},  &...DeltoidWrappingLateral.BASE_FRAME.Wrapping_3.Center),
            transf3D({0.8*.Surf.Sizes[0],-0.8*.Surf.Sizes[0],0}, &...DeltoidWrappingLateral.BASE_FRAME.Wrapping_3.Center)
        };
        InitWrapPosVecArr = {&InitWrapPos};
      };
    };

    AnyMuscleShortestPath deltoideus_lateral_part_4 = {
      AnyMuscleModel &MusMdl = ...MuscleModels.deltoideus_lateral_part_4;
      AnyRefNode &Org = ...Segments.Scapula.O_deltoideus_lateral_part_4;
      AnyRefNode &Ins = ...Segments.Humerus.I_deltoideus_lateral_part_4;
      viewMuscle = {#include "../DrawSettings/MusDrawSettings.any" };
      SPLine.StringMesh = 30;


      AnyParamSurfAnalytical &Surf = ..DeltoidWrappingLateral.BASE_FRAME.Wrapping_4.Surf;
      SPLine = {
        AnyMatrix InitWrapPos = {
            transf3D({0.8*.Surf.Sizes[0],0.8*.Surf.Sizes[0 ],0}, &...DeltoidWrappingLateral.BASE_FRAME.Wrapping_4.Center),
            transf3D({1.1*.Surf.Sizes[0],0,0},  &...DeltoidWrappingLateral.BASE_FRAME.Wrapping_4.Center),
            transf3D({0.8*.Surf.Sizes[0],-0.8*.Surf.Sizes[0],0}, &...DeltoidWrappingLateral.BASE_FRAME.Wrapping_4.Center)
        };
        InitWrapPosVecArr = {&InitWrapPos};
      };
    };
  };

  MuscleGroup DeltoideusAnterior = {
    AnyMuscleShortestPath deltoideus_anterior_part_1 = {
      AnyMuscleModel &MusMdl = ...MuscleModels.deltoideus_anterior_part_1;
      AnyRefNode &Org = ...Segments.Clavicula.O_deltoideus_anterior_part_1;
      AnyRefNode &Ins = ...Segments.Humerus.I_deltoideus_anterior_part_1;
      viewMuscle = {#include "../DrawSettings/MusDrawSettings.any"};
      SPLine.StringMesh = 30;


      AnyParamSurfAnalytical &Surf = ..DeltoidWrappingAnterior.BASE_FRAME.Wrapping_1.Surf;
      SPLine = {
        AnyMatrix InitWrapPos = {
            transf3D({0.8*.Surf.Sizes[0],0.8*.Surf.Sizes[0 ],0}, &...DeltoidWrappingAnterior.BASE_FRAME.Wrapping_1.Center),
            transf3D({1.1*.Surf.Sizes[0],0,0},  &...DeltoidWrappingAnterior.BASE_FRAME.Wrapping_1.Center),
            transf3D({0.8*.Surf.Sizes[0],-0.8*.Surf.Sizes[0],0}, &...DeltoidWrappingAnterior.BASE_FRAME.Wrapping_1.Center)
        };
        InitWrapPosVecArr = {&InitWrapPos};

      };
    };


    AnyMuscleShortestPath deltoideus_anterior_part_2 = {
      AnyMuscleModel &MusMdl = ...MuscleModels.deltoideus_anterior_part_2;
      AnyRefNode &Org = ...Segments.Clavicula.O_deltoideus_anterior_part_2;

      AnyRefNode &Ins = ...Segments.Humerus.I_deltoideus_anterior_part_2;
      viewMuscle = {#include "../DrawSettings/MusDrawSettings.any"};
      SPLine.StringMesh = 30;

      AnyParamSurfAnalytical &Surf = ..DeltoidWrappingAnterior.BASE_FRAME.Wrapping_2.Surf;

      SPLine = {
        AnyMatrix InitWrapPos = {
            transf3D({0.8*.Surf.Sizes[0],0.8*.Surf.Sizes[0 ],0}, &...DeltoidWrappingAnterior.BASE_FRAME.Wrapping_2.Center),
            transf3D({1.1*.Surf.Sizes[0],0,0},  &...DeltoidWrappingAnterior.BASE_FRAME.Wrapping_2.Center),
            transf3D({0.8*.Surf.Sizes[0],-0.8*.Surf.Sizes[0],0}, &...DeltoidWrappingAnterior.BASE_FRAME.Wrapping_2.Center)
        };
        InitWrapPosVecArr = {&InitWrapPos};  };
    };

    AnyMuscleShortestPath deltoideus_anterior_part_3 = {
      AnyMuscleModel &MusMdl = ...MuscleModels.deltoideus_anterior_part_3;
      AnyRefNode &Org = ...Segments.Clavicula.O_deltoideus_anterior_part_3;
      AnyRefNode &Ins = ...Segments.Humerus.I_deltoideus_anterior_part_3;
      viewMuscle = {#include "../DrawSettings/MusDrawSettings.any"};


      SPLine.StringMesh = 30;
      AnyParamSurfAnalytical &Surf = ..DeltoidWrappingAnterior.BASE_FRAME.Wrapping_3.Surf;

      SPLine = {
        AnyMatrix InitWrapPos = {
            transf3D({0.8*.Surf.Sizes[0],0.8*.Surf.Sizes[0 ],0}, &...DeltoidWrappingAnterior.BASE_FRAME.Wrapping_3.Center),
            transf3D({1.1*.Surf.Sizes[0],0,0},  &...DeltoidWrappingAnterior.BASE_FRAME.Wrapping_3.Center),
            transf3D({0.8*.Surf.Sizes[0],-0.8*.Surf.Sizes[0],0}, &...DeltoidWrappingAnterior.BASE_FRAME.Wrapping_3.Center)
        };
        InitWrapPosVecArr = {&InitWrapPos};
      };

    };

    //most proximal unit
    AnyMuscleShortestPath deltoideus_anterior_part_4 = {
      AnyMuscleModel &MusMdl = ...MuscleModels.deltoideus_anterior_part_4;
      AnyRefNode &Org = ...Segments.Clavicula.O_deltoideus_anterior_part_4;
      AnyRefNode &Ins = ...Segments.Humerus.I_deltoideus_anterior_part_4;
      viewMuscle = {#include "../DrawSettings/MusDrawSettings.any"};

      SPLine.StringMesh = 30;

      AnyParamSurfAnalytical &Surf = ..DeltoidWrappingAnterior.BASE_FRAME.Wrapping_4.Surf;

      SPLine = {
        AnyMatrix InitWrapPos = {
            transf3D({0.8*.Surf.Sizes[0],0.8*.Surf.Sizes[0 ],0}, &...DeltoidWrappingAnterior.BASE_FRAME.Wrapping_4.Center),
            transf3D({1.1*.Surf.Sizes[0],0,0},  &...DeltoidWrappingAnterior.BASE_FRAME.Wrapping_4.Center),
            transf3D({0.8*.Surf.Sizes[0],-0.8*.Surf.Sizes[0],0}, &...DeltoidWrappingAnterior.BASE_FRAME.Wrapping_4.Center)
        };
        InitWrapPosVecArr = {&InitWrapPos};
      };
    };
  };
  // end of deltoid wrapping muscles
#endif

MuscleGroup Infraspinatus = {
  AnyMuscleShortestPath infraspinatus_1 = {
    AnyMuscleModel &MusMdl = ...MuscleModels.infraspinatus_1;
    AnyRefNode &Org = ...Segments.Scapula.O_infraspinatus_1;
    AnyRefNode &Ins = ...Segments.Humerus.I_infraspinatus_1;
    viewMuscle = {#include "../DrawSettings/MusDrawSettings.any"};
    SPLine.StringMesh = 30;
    AnyParamSurf &Surf = ...Segments.Humerus.infraspinatus_humurus_wrap.torus;
    SPLine = {
      AnyMatrix InitWrapPos = {
        transf3D({-1*(.Surf.MajorRadius+1.4*.Surf.MinorRadius)*....Sign, 0,  1.2*.Surf.MinorRadius}, &.Surf),
        transf3D({-1*(.Surf.MajorRadius+0.6*.Surf.MinorRadius)*....Sign, 0, 1.2*.Surf.MinorRadius}, &.Surf),
        transf3D({-1*(.Surf.MajorRadius)*....Sign,                       0, 1.3*.Surf.MinorRadius}, &.Surf),
        transf3D({-1*(.Surf.MajorRadius-0.6*.Surf.MinorRadius)*....Sign, 0, 0.9*.Surf.MinorRadius}, &.Surf),
        transf3D({-1*(.Surf.MajorRadius-1.2*.Surf.MinorRadius)*....Sign,0,  0.2*.Surf.MinorRadius}, &.Surf)
      };
      InitWrapPosVecArr = {&InitWrapPos};
    };
  };

  AnyMuscleShortestPath infraspinatus_2 = {
    AnyMuscleModel &MusMdl = ...MuscleModels.infraspinatus_2;
    AnyRefNode &Org = ...Segments.Scapula.O_infraspinatus_2;
    AnyRefNode &Ins = ...Segments.Humerus.I_infraspinatus_2;
    viewMuscle = {#include "../DrawSettings/MusDrawSettings.any"};
    SPLine.StringMesh = 30;
    AnyParamSurf &Surf = ...Segments.Humerus.infraspinatus_humurus_wrap.torus;
    SPLine.InitWrapPosVecArr = .infraspinatus_1.SPLine.InitWrapPosVecArr;
  };

  AnyMuscleShortestPath infraspinatus_3 = {
    AnyMuscleModel &MusMdl = ...MuscleModels.infraspinatus_3;
    AnyRefNode &Org = ...Segments.Scapula.O_infraspinatus_3;
    AnyRefNode &Ins = ...Segments.Humerus.I_infraspinatus_3;
    viewMuscle = {#include "../DrawSettings/MusDrawSettings.any"};
    SPLine.StringMesh = 30;
    AnyParamSurf &Surf = ...Segments.Humerus.infraspinatus_humurus_wrap.torus;
    SPLine.InitWrapPosVecArr = .infraspinatus_1.SPLine.InitWrapPosVecArr;
  };

  AnyMuscleShortestPath infraspinatus_4 = {
    AnyMuscleModel &MusMdl = ...MuscleModels.infraspinatus_4;
    AnyRefNode &Org = ...Segments.Scapula.O_infraspinatus_4;
    AnyRefNode &Ins = ...Segments.Humerus.I_infraspinatus_4;
    viewMuscle = {#include "../DrawSettings/MusDrawSettings.any"};
    SPLine.StringMesh = 30;
    AnyParamSurf &Surf = ...Segments.Humerus.infraspinatus_humurus_wrap.torus;
    SPLine.InitWrapPosVecArr = .infraspinatus_1.SPLine.InitWrapPosVecArr;
  };

  AnyMuscleShortestPath infraspinatus_5 = {
    AnyMuscleModel &MusMdl = ...MuscleModels.infraspinatus_5;
    AnyRefNode &Org = ...Segments.Scapula.O_infraspinatus_5;
    AnyRefNode &Ins = ...Segments.Humerus.I_infraspinatus_5;
    viewMuscle = {#include "../DrawSettings/MusDrawSettings.any"};
    SPLine.StringMesh = 40;
    AnyParamSurf &Surf = ...Segments.Humerus.infraspinatus_humurus_wrap.torus;
    SPLine.InitWrapPosVecArr = .infraspinatus_1.SPLine.InitWrapPosVecArr;
  };

  AnyMuscleShortestPath infraspinatus_6 = {
    AnyMuscleModel &MusMdl = ...MuscleModels.infraspinatus_6;
    AnyRefNode &Org = ...Segments.Scapula.O_infraspinatus_6;
    AnyRefNode &Ins = ...Segments.Humerus.I_infraspinatus_6;
    viewMuscle = {#include "../DrawSettings/MusDrawSettings.any"};
    SPLine.StringMesh = 40;
    AnyParamSurf &Surf = ...Segments.Humerus.infraspinatus_humurus_wrap.torus;
    SPLine.InitWrapPosVecArr = .infraspinatus_1.SPLine.InitWrapPosVecArr;
  };
};

MuscleGroup LatissimusDorsi = {
  AnyMuscleShortestPath latissimus_dorsi_1 = {
    AnyMuscleModel &MusMdl = ...MuscleModels.latissimus_dorsi_1;
    AnyRefNode &Org = ..TrunkNodeAttachement.T8Seg.O_latissimus_dorsi_1;
    AnyRefNode &Via = ..ThoraxWrappingSufaceSegRef.O_latissimus_dorsi_1_via;
    AnyRefNode &Ins = ...Segments.Humerus.I_latissimus_dorsi_1;
    SPLine.StringMesh = 100;
    AnyParamSurf  &Surf1 = ..ThoraxWrappingSufaceSegRef.EllipsoidLatissimusOrigin.EllipsoidSurf;
    AnyParamSurf  &Surf2 = ..collum_hum;
    AnyParamSurf  &Surf3 = ..LatissimusDorsiWrapping.BASE_FRAME.Wrapping_1.Surf;
    AnyParamSurf &Surf4 = ...Segments.Scapula.Lattisimus_wrap.cyl;

    SPLine = {
      AnyMatrix InitWrapPos = {
        transf3D({-.Surf1.Radius[0], 0*.Surf1.Radius[1],....Sign*0.1*.Surf1.Radius[2]}, &.Surf1),
        transf3D({-.Surf1.Radius[0],0*.Surf1.Radius[1],....Sign*0.4*.Surf1.Radius[2]}, &.Surf1),
        transf3D( {....Sign*1.4*.Surf4.Radius, -1.4*.Surf4.Radius, 0.85*.Surf4.Length}, &.Surf4),
        transf3D({1.2*.Surf3.Sizes[0],0,0},  &...LatissimusDorsiWrapping.BASE_FRAME.Wrapping_1.Center),
        transf3D({0, ....Sign*-3*.Surf2.Radius,0.8*.Surf2.Length}, &.Surf2)
      };
      InitWrapPosVecArr = {None, &InitWrapPos};
    };
    viewMuscle = {#include "../DrawSettings/MusDrawSettings.any"};

  };

  AnyMuscleShortestPath latissimus_dorsi_2 = {
    AnyMuscleModel &MusMdl = ...MuscleModels.latissimus_dorsi_2;
    AnyRefNode &Org = ..TrunkNodeAttachement.T9Seg.O_latissimus_dorsi_2;
    AnyRefNode &Via = ..ThoraxWrappingSufaceSegRef.O_latissimus_dorsi_2_via;
    AnyRefNode &Ins = ...Segments.Humerus.I_latissimus_dorsi_2;
    SPLine.StringMesh = 100;
    AnyParamSurf &Surf1 = ..collum_hum;
    AnyParamSurf  &Surf2 = ..ThoraxWrappingSufaceSegRef.EllipsoidLatissimusOrigin.EllipsoidSurf;
    AnyParamSurf  &Surf3 = ..LatissimusDorsiWrapping.BASE_FRAME.Wrapping_1.Surf;
    AnyParamSurf &Surf4 = ...Segments.Scapula.Lattisimus_wrap.cyl;

    SPLine.InitWrapPosVecArr = .latissimus_dorsi_1.SPLine.InitWrapPosVecArr;
    viewMuscle = {#include "../DrawSettings/MusDrawSettings.any"};
  };

  AnyMuscleShortestPath latissimus_dorsi_3 = {
    AnyMuscleModel &MusMdl = ...MuscleModels.latissimus_dorsi_3;
    AnyRefNode &Org = ..TrunkNodeAttachement.T10Seg.O_latissimus_dorsi_3;
    AnyRefNode &Via = ..ThoraxWrappingSufaceSegRef.O_latissimus_dorsi_3_via;
    AnyRefNode &Ins = ...Segments.Humerus.I_latissimus_dorsi_3;
    SPLine.StringMesh = 110;
    AnyParamSurf &Surf1 = ..collum_hum;
    AnyParamSurf  &Surf2 = ..ThoraxWrappingSufaceSegRef.EllipsoidLatissimusOrigin.EllipsoidSurf;
    AnyParamSurf  &Surf3 = ..LatissimusDorsiWrapping.BASE_FRAME.Wrapping_1.Surf;
    AnyParamSurf &Surf4 = ...Segments.Scapula.Lattisimus_wrap.cyl;

    SPLine.InitWrapPosVecArr = .latissimus_dorsi_1.SPLine.InitWrapPosVecArr;
    viewMuscle = {#include "../DrawSettings/MusDrawSettings.any"};
  };

  AnyMuscleShortestPath latissimus_dorsi_4 = {
    AnyMuscleModel &MusMdl = ...MuscleModels.latissimus_dorsi_4;
    AnyRefNode &Org = ..TrunkNodeAttachement.T11Seg.O_latissimus_dorsi_4;
    AnyRefNode &Via = ..ThoraxWrappingSufaceSegRef.O_latissimus_dorsi_4_via;
    AnyRefNode &Ins = ...Segments.Humerus.I_latissimus_dorsi_4;
    SPLine.StringMesh = 110;
    AnyParamSurf &Surf1 = ..collum_hum;
    AnyParamSurf  &Surf2 = ..ThoraxWrappingSufaceSegRef.EllipsoidLatissimusOrigin.EllipsoidSurf;
    AnyParamSurf  &Surf3 = ..LatissimusDorsiWrapping.BASE_FRAME.Wrapping_1.Surf;
    AnyParamSurf &Surf4 = ...Segments.Scapula.Lattisimus_wrap.cyl;

    SPLine.InitWrapPosVecArr = .latissimus_dorsi_1.SPLine.InitWrapPosVecArr;
    viewMuscle = {#include "../DrawSettings/MusDrawSettings.any"};
  };

  AnyMuscleShortestPath latissimus_dorsi_5 = {
    AnyMuscleModel &MusMdl = ...MuscleModels.latissimus_dorsi_5;
    AnyRefNode &Org = ..TrunkNodeAttachement.T12Seg.O_latissimus_dorsi_5;
    AnyRefNode &Via = ..ThoraxWrappingSufaceSegRef.O_latissimus_dorsi_5_via;
    AnyRefNode &Ins = ...Segments.Humerus.I_latissimus_dorsi_5;
    SPLine.StringMesh = 120;
    AnyParamSurf &Surf1 = ..collum_hum;
    AnyParamSurf  &Surf2 = ..ThoraxWrappingSufaceSegRef.EllipsoidLatissimusOrigin.EllipsoidSurf;
    AnyParamSurf  &Surf3 = ..LatissimusDorsiWrapping.BASE_FRAME.Wrapping_1.Surf;
    AnyParamSurf &Surf4 = ...Segments.Scapula.Lattisimus_wrap.cyl;

    SPLine.InitWrapPosVecArr = .latissimus_dorsi_1.SPLine.InitWrapPosVecArr;
    viewMuscle = {#include "../DrawSettings/MusDrawSettings.any"};
  };

  AnyMuscleShortestPath latissimus_dorsi_6 = {
    AnyMuscleModel &MusMdl =  ...MuscleModels.latissimus_dorsi_6;
    AnyRefNode &Org = ..TrunkNodeAttachement.L1Seg.O_latissimus_dorsi_6;
    AnyRefNode &Via = ..ThoraxWrappingSufaceSegRef.O_latissimus_dorsi_6_via;
    AnyRefNode &Ins = ...Segments.Humerus.I_latissimus_dorsi_6;
    SPLine.StringMesh = 110;
    AnyParamSurf  &Surf1 = ..ThoraxWrappingSufaceSegRef.EllipsoidLatissimusOrigin.EllipsoidSurf;
    AnyParamSurf &Surf2 = ..collum_hum;
    AnyParamSurf  &Surf3 = ..LatissimusDorsiWrapping.BASE_FRAME.Wrapping_1.Surf;
    AnyParamSurf &Surf4 = ...Segments.Scapula.Lattisimus_wrap.cyl;

    SPLine.InitWrapPosVecArr = .latissimus_dorsi_1.SPLine.InitWrapPosVecArr;
    viewMuscle = {#include "../DrawSettings/MusDrawSettings.any"};
  };

  AnyMuscleShortestPath latissimus_dorsi_7 = {
    AnyMuscleModel &MusMdl = ...MuscleModels.latissimus_dorsi_7;
    AnyRefNode &Org = ..TrunkNodeAttachement.L2Seg.O_latissimus_dorsi_7;
    AnyRefNode &Via = ..ThoraxWrappingSufaceSegRef.O_latissimus_dorsi_7_via;
    AnyRefNode &Ins = ...Segments.Humerus.I_latissimus_dorsi_7;
    SPLine.StringMesh = 110;
    AnyParamSurf  &Surf1 = ..ThoraxWrappingSufaceSegRef.EllipsoidLatissimusOrigin.EllipsoidSurf;
    AnyParamSurf  &Surf2 = ..collum_hum;
    AnyParamSurf  &Surf3 = ..LatissimusDorsiWrapping.BASE_FRAME.Wrapping_1.Surf;
    AnyParamSurf &Surf4 = ...Segments.Scapula.Lattisimus_wrap.cyl;

    SPLine.InitWrapPosVecArr = .latissimus_dorsi_1.SPLine.InitWrapPosVecArr;
    viewMuscle = {#include "../DrawSettings/MusDrawSettings.any"};
  };

  AnyMuscleShortestPath latissimus_dorsi_8 = {
    AnyMuscleModel &MusMdl = ...MuscleModels.latissimus_dorsi_8;
    AnyRefNode &Org = ..TrunkNodeAttachement.L3Seg.O_latissimus_dorsi_8;
    AnyRefNode &Via = ..ThoraxWrappingSufaceSegRef.O_latissimus_dorsi_8_via;
    AnyRefNode &Ins = ...Segments.Humerus.I_latissimus_dorsi_8;
    SPLine.StringMesh = 110;
    AnyParamSurf  &Surf1 = ..ThoraxWrappingSufaceSegRef.EllipsoidLatissimusOrigin.EllipsoidSurf;
    AnyParamSurf  &Surf2 = ..collum_hum;
    AnyParamSurf  &Surf3 = ..LatissimusDorsiWrapping.BASE_FRAME.Wrapping_1.Surf;
    AnyParamSurf &Surf4 = ...Segments.Scapula.Lattisimus_wrap.cyl;

    SPLine.InitWrapPosVecArr = .latissimus_dorsi_1.SPLine.InitWrapPosVecArr;
    viewMuscle = {#include "../DrawSettings/MusDrawSettings.any"};
  };

  AnyMuscleShortestPath latissimus_dorsi_9 = {
    AnyMuscleModel &MusMdl = ...MuscleModels.latissimus_dorsi_9;
    AnyRefNode &Org = ..TrunkNodeAttachement.L4Seg.O_latissimus_dorsi_9;
    AnyRefNode &Via = ..ThoraxWrappingSufaceSegRef.O_latissimus_dorsi_9_via;
    AnyRefNode &Ins = ...Segments.Humerus.I_latissimus_dorsi_9;
    SPLine.StringMesh = 110;
    AnyParamSurf  &Surf1 = ..ThoraxWrappingSufaceSegRef.EllipsoidLatissimusOrigin.EllipsoidSurf;
    AnyParamSurf  &Surf2 = ..collum_hum;
    AnyParamSurf  &Surf3 = ..LatissimusDorsiWrapping.BASE_FRAME.Wrapping_1.Surf;
    AnyParamSurf &Surf4 = ...Segments.Scapula.Lattisimus_wrap.cyl;

    SPLine.InitWrapPosVecArr = .latissimus_dorsi_1.SPLine.InitWrapPosVecArr;
    viewMuscle = {#include "../DrawSettings/MusDrawSettings.any"};
  };

  AnyMuscleShortestPath latissimus_dorsi_10 = {
    AnyMuscleModel &MusMdl = ...MuscleModels.latissimus_dorsi_10;
    AnyRefNode &Org = ..TrunkNodeAttachement.L5Seg.O_latissimus_dorsi_10;
    AnyRefNode &Via = ..ThoraxWrappingSufaceSegRef.O_latissimus_dorsi_10_via;
    AnyRefNode &Ins = ...Segments.Humerus.I_latissimus_dorsi_10;
    SPLine.StringMesh = 110;
    AnyParamSurf  &Surf1 = ..ThoraxWrappingSufaceSegRef.EllipsoidLatissimusOrigin.EllipsoidSurf;
    AnyParamSurf  &Surf2 = ..collum_hum;
    AnyParamSurf  &Surf3 = ..LatissimusDorsiWrapping.BASE_FRAME.Wrapping_1.Surf;
    AnyParamSurf &Surf4 = ...Segments.Scapula.Lattisimus_wrap.cyl;

    SPLine.InitWrapPosVecArr = .latissimus_dorsi_1.SPLine.InitWrapPosVecArr;
    viewMuscle = {#include "../DrawSettings/MusDrawSettings.any"};
  };

  AnyMuscleShortestPath latissimus_dorsi_11 = {
    AnyMuscleModel &MusMdl = ...MuscleModels.latissimus_dorsi_11;
    AnyRefNode &Org = ..TrunkNodeAttachement.PelvisSeg.O_latissimus_dorsi_11;

    AnyRefNode &Via = ..ThoraxWrappingSufaceSegRef.O_latissimus_dorsi_11_via;

    AnyRefNode &Ins = ...Segments.Humerus.I_latissimus_dorsi_11;
    SPLine.StringMesh = 200;
    AnyParamSurf  &Surf1 = ..ThoraxWrappingSufaceSegRef.EllipsoidLatissimusOrigin.EllipsoidSurf;
    AnyParamSurf &Surf2 = ..collum_hum;
    AnyParamSurf  &Surf3 = ..LatissimusDorsiWrapping.BASE_FRAME.Wrapping_1.Surf;
    AnyParamSurf &Surf4 = ...Segments.Scapula.Lattisimus_wrap.cyl;

    SPLine.InitWrapPosVecArr = .latissimus_dorsi_1.SPLine.InitWrapPosVecArr;
    viewMuscle = {#include "../DrawSettings/MusDrawSettings.any"};
  };
};


MuscleGroup PectoralisMajorThoracic = {
  AnyMuscleShortestPath pectoralis_major_thoracic_part_1 = {
    AnyMuscleModel &MusMdl = ...MuscleModels.pectoralis_major_thoracic_part_1;
    AnyRefNode &Org = ..TrunkNodeAttachement.SternalBodySeg.O_pectoralis_major_thoracic_part_1;
    AnyRefNode &Ins = ...Segments.Humerus.I_pectoralis_major_thoracic_part_1;
    SPLine.StringMesh = 40;
    AnyParamSurf& Surf = ..ThoraxWrappingSufaceSegRef.PectoralisWrappingEllipsoid;
    SPLine = {
      AnyMatrix InitWrapPos = {
        transf3D({0.9*.Surf.Radius[0], 0.4*.Surf.Radius[1], ....Sign*0.7*.Surf.Radius[2]}, &.Surf)
      };
      InitWrapPosVecArr = {&InitWrapPos};
    };
    viewMuscle = {#include "../DrawSettings/MusDrawSettings.any"};
  };

  AnyMuscleShortestPath pectoralis_major_thoracic_part_2 = {
    AnyMuscleModel &MusMdl = ...MuscleModels.pectoralis_major_thoracic_part_2;
    AnyRefNode &Org = ..TrunkNodeAttachement.SternalBodySeg.O_pectoralis_major_thoracic_part_2;
    AnyRefNode &Ins = ...Segments.Humerus.I_pectoralis_major_thoracic_part_2;
    SPLine.StringMesh = 40;
    AnyParamSurf& Surf = ..ThoraxWrappingSufaceSegRef.PectoralisWrappingEllipsoid;
    SPLine.InitWrapPosVecArr = .pectoralis_major_thoracic_part_1.SPLine.InitWrapPosVecArr;
    viewMuscle = {#include "../DrawSettings/MusDrawSettings.any"};
  };

  AnyMuscleShortestPath pectoralis_major_thoracic_part_3 = {
    AnyMuscleModel &MusMdl = ...MuscleModels.pectoralis_major_thoracic_part_3;
    AnyRefNode &Org = ..TrunkNodeAttachement.SternalBodySeg.O_pectoralis_major_thoracic_part_3;
    AnyRefNode &Ins = ...Segments.Humerus.I_pectoralis_major_thoracic_part_3;
    SPLine.StringMesh = 40;
    AnyParamSurf& Surf = ..ThoraxWrappingSufaceSegRef.PectoralisWrappingEllipsoid;
    SPLine.InitWrapPosVecArr = .pectoralis_major_thoracic_part_1.SPLine.InitWrapPosVecArr;
    viewMuscle = {#include "../DrawSettings/MusDrawSettings.any"};
  };

  AnyMuscleShortestPath pectoralis_major_thoracic_part_4 = {
    AnyMuscleModel &MusMdl = ...MuscleModels.pectoralis_major_thoracic_part_4;
    AnyRefNode &Org = ..TrunkNodeAttachement.SternalBodySeg.O_pectoralis_major_thoracic_part_4;
    AnyRefNode &Ins = ...Segments.Humerus.I_pectoralis_major_thoracic_part_4;
    SPLine.StringMesh = 40;
    AnyParamSurf& Surf = ..ThoraxWrappingSufaceSegRef.PectoralisWrappingEllipsoid;
    SPLine.InitWrapPosVecArr = .pectoralis_major_thoracic_part_1.SPLine.InitWrapPosVecArr;
    viewMuscle = {#include "../DrawSettings/MusDrawSettings.any"};
  };

  AnyMuscleShortestPath pectoralis_major_thoracic_part_5 = {
    AnyMuscleModel &MusMdl = ...MuscleModels.pectoralis_major_thoracic_part_5;
    AnyRefNode &Org = ..TrunkNodeAttachement.SternalBodySeg.O_pectoralis_major_thoracic_part_5;
    AnyRefNode &Ins = ...Segments.Humerus.I_pectoralis_major_thoracic_part_5;
    SPLine.StringMesh = 40;
    AnyParamSurf& Surf = ..ThoraxWrappingSufaceSegRef.PectoralisWrappingEllipsoid;
    SPLine.InitWrapPosVecArr = .pectoralis_major_thoracic_part_1.SPLine.InitWrapPosVecArr;
    viewMuscle = {#include "../DrawSettings/MusDrawSettings.any"};
  };

  AnyMuscleShortestPath pectoralis_major_thoracic_part_6 = {
    AnyMuscleModel &MusMdl = ...MuscleModels.pectoralis_major_thoracic_part_6;
    AnyRefNode &Org = ..TrunkNodeAttachement.SternalBodySeg.O_pectoralis_major_thoracic_part_6;
    AnyRefNode &Ins = ...Segments.Humerus.I_pectoralis_major_thoracic_part_6;
    SPLine.StringMesh = 40;
    AnyParamSurf& Surf = ..ThoraxWrappingSufaceSegRef.PectoralisWrappingEllipsoid;
    SPLine.InitWrapPosVecArr = .pectoralis_major_thoracic_part_1.SPLine.InitWrapPosVecArr;
    viewMuscle = {#include "../DrawSettings/MusDrawSettings.any"};
  };

  AnyMuscleShortestPath pectoralis_major_thoracic_part_7 = {
    AnyMuscleModel &MusMdl = ...MuscleModels.pectoralis_major_thoracic_part_7;
    AnyRefNode &Org = ..TrunkNodeAttachement.SternalBodySeg.O_pectoralis_major_thoracic_part_7;
    AnyRefNode &Ins = ...Segments.Humerus.I_pectoralis_major_thoracic_part_7;
    SPLine.StringMesh = 40;
    AnyParamSurf& Surf = ..ThoraxWrappingSufaceSegRef.PectoralisWrappingEllipsoid;
    SPLine.InitWrapPosVecArr = .pectoralis_major_thoracic_part_1.SPLine.InitWrapPosVecArr;
    viewMuscle = {#include "../DrawSettings/MusDrawSettings.any"};
  };

  AnyMuscleShortestPath pectoralis_major_thoracic_part_8 = {
    AnyMuscleModel &MusMdl = ...MuscleModels.pectoralis_major_thoracic_part_8;
    AnyRefNode &Org = ..TrunkNodeAttachement.SternalBodySeg.O_pectoralis_major_thoracic_part_8;
    AnyRefNode &Ins = ...Segments.Humerus.I_pectoralis_major_thoracic_part_8;
    SPLine.StringMesh = 40;
    AnyParamSurf& Surf = ..ThoraxWrappingSufaceSegRef.PectoralisWrappingEllipsoid;
    SPLine.InitWrapPosVecArr = .pectoralis_major_thoracic_part_1.SPLine.InitWrapPosVecArr;
    viewMuscle = {#include "../DrawSettings/MusDrawSettings.any"};
  };

  AnyMuscleShortestPath pectoralis_major_thoracic_part_9 = {
    AnyMuscleModel &MusMdl = ...MuscleModels.pectoralis_major_thoracic_part_9;
    AnyRefNode &Org = ..TrunkNodeAttachement.ManubriumSeg.O_pectoralis_major_thoracic_part_9;
    AnyRefNode &Ins = ...Segments.Humerus.I_pectoralis_major_thoracic_part_9;
    SPLine.StringMesh = 70;
    AnyParamSurf& Surf = ..ThoraxWrappingSufaceSegRef.PectoralisWrappingEllipsoid;
    AnyParamSurf& Surf1 = ..Pectoralis_minor1_cyl.Cylinder.Segment.Surf;
    SPLine = {
      AnyMatrix InitWrapPos = {
        transf3D({0, ....Sign*1.2*.Surf1.Radius,0.5*.Surf1.Length}, &.Surf1),
        transf3D({1*.Surf1.Radius, ....Sign*0.5*.Surf1.Radius,0.5*.Surf1.Length}, &.Surf1),
        transf3D({1.3*.Surf1.Radius, ....Sign* -0.5*.Surf1.Radius,0.5*.Surf1.Length}, &.Surf1),
      };
      InitWrapPosVecArr = {&InitWrapPos};
    };
    viewMuscle = {#include "../DrawSettings/MusDrawSettings.any"};

  };

  AnyMuscleShortestPath pectoralis_major_thoracic_part_10 = {
    AnyMuscleModel &MusMdl = ...MuscleModels.pectoralis_major_thoracic_part_10;
    AnyRefNode &Org = ..TrunkNodeAttachement.ManubriumSeg.O_pectoralis_major_thoracic_part_10;
    AnyRefNode &Ins = ...Segments.Humerus.I_pectoralis_major_thoracic_part_10;
    SPLine.StringMesh = 70;
    AnyParamSurf& Surf = ..ThoraxWrappingSufaceSegRef.PectoralisWrappingEllipsoid;
    AnyParamSurf& Surf1 = ..Pectoralis_minor1_cyl.Cylinder.Segment.Surf;
    SPLine.InitWrapPosVecArr = .pectoralis_major_thoracic_part_9.SPLine.InitWrapPosVecArr;
    viewMuscle = {#include "../DrawSettings/MusDrawSettings.any"};
  };
};

MuscleGroup PectoralisMajorClavicular = {
  AnyMuscleShortestPath pectoralis_major_clavicular_part_1 = {
    AnyMuscleModel &MusMdl = ...MuscleModels.pectoralis_major_clavicular_part_1;
    AnyRefNode &Org = ...Segments.Clavicula.O_pectoralis_major_clavicular_part_1;
    AnyRefNode &Ins = ...Segments.Humerus.I_pectoralis_major_clavicular_part_1;
    viewMuscle = {#include "../DrawSettings/MusDrawSettings.any"};
    SPLine.StringMesh = 60;
    AnyParamSurf& Surf = ..ThoraxWrappingSufaceSegRef.PectoralisWrappingEllipsoid;
    AnyParamSurf& Surf3 = ..Pectoralis_minor1_cyl.Cylinder.Segment.Surf;
    SPLine = {
      AnyMatrix InitWrapPos = {
        transf3D({0, ....Sign*1.2*.Surf3.Radius,0.4*.Surf3.Length}, &.Surf3),
        transf3D({1*.Surf3.Radius, ....Sign*0.5*.Surf3.Radius,0.5*.Surf3.Length}, &.Surf3),
        transf3D({1.3*.Surf3.Radius, ....Sign* -0.5*.Surf3.Radius,0.6*.Surf3.Length}, &.Surf3),
        transf3D({0,0,0.0}, &....Segments.Humerus.gh)
      };
      InitWrapPosVecArr = {&InitWrapPos};
    };
  };

  AnyMuscleShortestPath pectoralis_major_clavicular_part_2 = {
    AnyMuscleModel &MusMdl = ...MuscleModels.pectoralis_major_clavicular_part_2;
    AnyRefNode &Org = ...Segments.Clavicula.O_pectoralis_major_clavicular_part_2;
    AnyRefNode &Ins = ...Segments.Humerus.I_pectoralis_major_clavicular_part_2;
    viewMuscle = {#include "../DrawSettings/MusDrawSettings.any"};
    SPLine.StringMesh = 60;
    AnyParamSurf& Surf = ..ThoraxWrappingSufaceSegRef.PectoralisWrappingEllipsoid;
    AnyParamSurf& Surf3 = ..Pectoralis_minor1_cyl.Cylinder.Segment.Surf;
    SPLine.InitWrapPosVecArr = .pectoralis_major_clavicular_part_1.SPLine.InitWrapPosVecArr;
  };


  AnyMuscleShortestPath pectoralis_major_clavicular_part_3 = {
    AnyMuscleModel &MusMdl = ...MuscleModels.pectoralis_major_clavicular_part_3;
    AnyRefNode &Org = ...Segments.Clavicula.O_pectoralis_major_clavicular_part_3;
    AnyRefNode &Ins = ...Segments.Humerus.I_pectoralis_major_clavicular_part_3;
    viewMuscle = {#include "../DrawSettings/MusDrawSettings.any"};
    SPLine.StringMesh = 50;
    AnyParamSurf& Surf = ..ThoraxWrappingSufaceSegRef.PectoralisWrappingEllipsoid;
    AnyParamSurf& Surf3 = ..Pectoralis_minor1_cyl.Cylinder.Segment.Surf;
    SPLine.InitWrapPosVecArr = .pectoralis_major_clavicular_part_1.SPLine.InitWrapPosVecArr;
  };


  AnyMuscleShortestPath pectoralis_major_clavicular_part_4 = {
    AnyMuscleModel &MusMdl = ...MuscleModels.pectoralis_major_clavicular_part_4;
    AnyRefNode &Org = ...Segments.Clavicula.O_pectoralis_major_clavicular_part_4;
    AnyRefNode &Ins = ...Segments.Humerus.I_pectoralis_major_clavicular_part_4;
    viewMuscle = {#include "../DrawSettings/MusDrawSettings.any"};
    SPLine.StringMesh =40;
    AnyParamSurf& Surf = ..ThoraxWrappingSufaceSegRef.PectoralisWrappingEllipsoid;
    AnyParamSurf& Surf3 = ..Pectoralis_minor1_cyl.Cylinder.Segment.Surf;
    SPLine.InitWrapPosVecArr = .pectoralis_major_clavicular_part_1.SPLine.InitWrapPosVecArr;
  };

  AnyMuscleShortestPath pectoralis_major_clavicular_part_5 = {
    AnyMuscleModel &MusMdl = ...MuscleModels.pectoralis_major_clavicular_part_5;
    AnyRefNode &Org = ...Segments.Clavicula.O_pectoralis_major_clavicular_part_5;
    AnyRefNode &Ins = ...Segments.Humerus.I_pectoralis_major_clavicular_part_5;
    viewMuscle = {#include "../DrawSettings/MusDrawSettings.any"};
    SPLine.StringMesh = 35;
    AnyParamSurf& Surf1 = ..ThoraxWrappingSufaceSegRef.PectoralisWrappingEllipsoid;
    AnyParamSurf& Surf3 = ..Pectoralis_minor1_cyl.Cylinder.Segment.Surf;
    SPLine.InitWrapPosVecArr = .pectoralis_major_clavicular_part_1.SPLine.InitWrapPosVecArr;
  };
};

MuscleGroup PectoralisMinor = {
  AnyMuscleViaPoint pectoralis_minor_1 = {
    AnyMuscleModel &MusMdl = ...MuscleModels.pectoralis_minor_1;
    AnyRefNode &Org = ..TrunkNodeAttachement.R3Seg.O_pectoralis_minor_1;
    AnyRefNode &Ins = ...Segments.Scapula.I_pectoralis_minor_1;
    viewMuscle = {#include "../DrawSettings/MusDrawSettings.any"};
  };

  AnyMuscleViaPoint pectoralis_minor_2 = {
    AnyMuscleModel &MusMdl = ...MuscleModels.pectoralis_minor_2;
    AnyRefNode &Org = ..TrunkNodeAttachement.R4Seg.O_pectoralis_minor_2;
    AnyRefNode &Ins = ...Segments.Scapula.I_pectoralis_minor_2;
    viewMuscle = {#include "../DrawSettings/MusDrawSettings.any"};
  };

  AnyMuscleViaPoint pectoralis_minor_3 = {
    AnyMuscleModel &MusMdl = ...MuscleModels.pectoralis_minor_3;
    AnyRefNode &Org = ..TrunkNodeAttachement.R5Seg.O_pectoralis_minor_3;
    AnyRefNode &Ins = ...Segments.Scapula.I_pectoralis_minor_3;
    viewMuscle = {#include "../DrawSettings/MusDrawSettings.any"};
  };
};

MuscleGroup Rhomboideus = {
  AnyMuscleViaPoint rhomboideus_1 = {
    AnyMuscleModel &MusMdl = ...MuscleModels.rhomboideus_1;
    AnyRefNode &Org = ..TrunkNodeAttachement.C7Seg.O_rhomboideus_1;
    AnyRefNode &Ins = ...Segments.Scapula.I_rhomboideus_1;
    viewMuscle = {#include "../DrawSettings/MusDrawSettings.any"};
  };

  AnyMuscleViaPoint rhomboideus_2 = {
    AnyMuscleModel &MusMdl = ...MuscleModels.rhomboideus_2;
    AnyRefNode &Org = ..TrunkNodeAttachement.T1Seg.O_rhomboideus_2;
    AnyRefNode &Ins = ...Segments.Scapula.I_rhomboideus_2;
    viewMuscle = {#include "../DrawSettings/MusDrawSettings.any"};
  };

  AnyMuscleViaPoint rhomboideus_3 = {
    AnyMuscleModel &MusMdl = ...MuscleModels.rhomboideus_3;
    AnyRefNode &Org = ..TrunkNodeAttachement.T2Seg.O_rhomboideus_3;
    AnyRefNode &Ins = ...Segments.Scapula.I_rhomboideus_3;
    viewMuscle = {#include "../DrawSettings/MusDrawSettings.any"};
  };

  AnyMuscleViaPoint rhomboideus_4 = {
    AnyMuscleModel &MusMdl = ...MuscleModels.rhomboideus_4;
    AnyRefNode &Org = ..TrunkNodeAttachement.T3Seg.O_rhomboideus_4;
    AnyRefNode &Ins = ...Segments.Scapula.I_rhomboideus_4;
    viewMuscle = {#include "../DrawSettings/MusDrawSettings.any"};
  };

  AnyMuscleViaPoint rhomboideus_5 = {
    AnyMuscleModel &MusMdl = ...MuscleModels.rhomboideus_5;
    AnyRefNode &Org = ..TrunkNodeAttachement.T4Seg.O_rhomboideus_5;
    AnyRefNode &Ins = ...Segments.Scapula.I_rhomboideus_5;
    viewMuscle = {#include "../DrawSettings/MusDrawSettings.any"};
  };

  AnyMuscleViaPoint rhomboideus_6 = {
    AnyMuscleModel &MusMdl = ...MuscleModels.rhomboideus_6;
    AnyRefNode &Org = ..TrunkNodeAttachement.T5Seg.O_rhomboideus_6;
    AnyRefNode &Ins = ...Segments.Scapula.I_rhomboideus_6;
    viewMuscle = {#include "../DrawSettings/MusDrawSettings.any"};
  };
};

MuscleGroup SerratusAnterior = {
  AnyMuscleShortestPath serratus_anterior_1 = {
    AnyMuscleModel &MusMdl = ...MuscleModels.serratus_anterior_1;
    AnyRefNode &Org = ..TrunkNodeAttachement.R1Seg.O_serratus_anterior_1;
    AnyRefNode &Ins = ...Segments.Scapula.I_serratus_anterior_1;
    viewMuscle = {#include "../DrawSettings/MusDrawSettings.any"};
    SPLine.StringMesh = 40;
    AnySurfEllipsoid& Surf = ..ThoraxWrappingSufaceSegRef.SerratusAnteriorWrappingEllipsoid_1to5;
    SPLine.InitWrapPosVecArr = .serratus_anterior_9.SPLine.InitWrapPosVecArr;
  };

  AnyMuscleShortestPath serratus_anterior_2 = {
    AnyMuscleModel &MusMdl = ...MuscleModels.serratus_anterior_2;
    AnyRefNode &Org = ..TrunkNodeAttachement.R2Seg.O_serratus_anterior_2;
    AnyRefNode &Ins = ...Segments.Scapula.I_serratus_anterior_2;
    viewMuscle = {#include "../DrawSettings/MusDrawSettings.any"};
    SPLine.StringMesh = 40;
    AnySurfEllipsoid& Surf = ..ThoraxWrappingSufaceSegRef.SerratusAnteriorWrappingEllipsoid_1to5;
    SPLine.InitWrapPosVecArr = .serratus_anterior_9.SPLine.InitWrapPosVecArr;
  };

  AnyMuscleShortestPath serratus_anterior_3 = {
    AnyMuscleModel &MusMdl = ...MuscleModels.serratus_anterior_3;
    AnyRefNode &Org = ..TrunkNodeAttachement.R3Seg.O_serratus_anterior_3;
    AnyRefNode &Ins = ...Segments.Scapula.I_serratus_anterior_3;
    viewMuscle = {#include "../DrawSettings/MusDrawSettings.any"};
    SPLine.StringMesh = 40;
    AnySurfEllipsoid& Surf = ..ThoraxWrappingSufaceSegRef.SerratusAnteriorWrappingEllipsoid_1to5;
    SPLine.InitWrapPosVecArr = .serratus_anterior_9.SPLine.InitWrapPosVecArr;
  };

  AnyMuscleShortestPath serratus_anterior_4 = {
    AnyMuscleModel &MusMdl = ...MuscleModels.serratus_anterior_4;
    AnyRefNode &Org = ..TrunkNodeAttachement.R4Seg.O_serratus_anterior_4;
    AnyRefNode &Ins = ...Segments.Scapula.I_serratus_anterior_4;
    viewMuscle = {#include "../DrawSettings/MusDrawSettings.any"};
    SPLine.StringMesh = 40;
    AnySurfEllipsoid& Surf = ..ThoraxWrappingSufaceSegRef.SerratusAnteriorWrappingEllipsoid_1to5;
    SPLine.InitWrapPosVecArr = .serratus_anterior_9.SPLine.InitWrapPosVecArr;
  };

  AnyMuscleShortestPath serratus_anterior_5 = {
    AnyMuscleModel &MusMdl = ...MuscleModels.serratus_anterior_5;
    AnyRefNode &Org = ..TrunkNodeAttachement.R5Seg.O_serratus_anterior_5;
    AnyRefNode &Ins = ...Segments.Scapula.I_serratus_anterior_5;
    viewMuscle = {#include "../DrawSettings/MusDrawSettings.any"};
    SPLine.StringMesh = 56;
    AnySurfEllipsoid& Surf = ..ThoraxWrappingSufaceSegRef.SerratusAnteriorWrappingEllipsoid_1to5;
    SPLine.InitWrapPosVecArr = .serratus_anterior_9.SPLine.InitWrapPosVecArr;
  };

  AnyMuscleShortestPath serratus_anterior_6 = {
    AnyMuscleModel &MusMdl = ...MuscleModels.serratus_anterior_6;
    AnyRefNode &Org = ..TrunkNodeAttachement.R6Seg.O_serratus_anterior_6;
    AnyRefNode &Ins = ...Segments.Scapula.I_serratus_anterior_6;
    viewMuscle = {#include "../DrawSettings/MusDrawSettings.any"};
    SPLine.StringMesh = 30;
    AnySurfEllipsoid& Surf = ..ThoraxWrappingSufaceSegRef.SerratusAnteriorWrappingEllipsoid_6to9;
    SPLine.InitWrapPosVecArr = .serratus_anterior_9.SPLine.InitWrapPosVecArr;
  };

  AnyMuscleShortestPath serratus_anterior_7 = {
    AnyMuscleModel &MusMdl = ...MuscleModels.serratus_anterior_7;
    AnyRefNode &Org = ..TrunkNodeAttachement.R7Seg.O_serratus_anterior_7;
    AnyRefNode &Ins = ...Segments.Scapula.I_serratus_anterior_7;
    viewMuscle = {#include "../DrawSettings/MusDrawSettings.any"};
    SPLine.StringMesh = 30;
    AnySurfEllipsoid& Surf = ..ThoraxWrappingSufaceSegRef.SerratusAnteriorWrappingEllipsoid_6to9;
    SPLine.InitWrapPosVecArr = .serratus_anterior_9.SPLine.InitWrapPosVecArr;
  };

  AnyMuscleShortestPath serratus_anterior_8 = {
    AnyMuscleModel &MusMdl = ...MuscleModels.serratus_anterior_8;
    AnyRefNode &Org = ..TrunkNodeAttachement.R8Seg.O_serratus_anterior_8;
    AnyRefNode &Ins = ...Segments.Scapula.I_serratus_anterior_8;
    viewMuscle = {#include "../DrawSettings/MusDrawSettings.any"};
    SPLine.StringMesh = 35;
    AnySurfEllipsoid& Surf = ..ThoraxWrappingSufaceSegRef.SerratusAnteriorWrappingEllipsoid_6to9;
    SPLine.InitWrapPosVecArr = .serratus_anterior_9.SPLine.InitWrapPosVecArr;
  };

  AnyMuscleShortestPath serratus_anterior_9 = {
    AnyMuscleModel &MusMdl = ...MuscleModels.serratus_anterior_9;
    AnyRefNode &Org = ..TrunkNodeAttachement.R9Seg.O_serratus_anterior_9;
    AnyRefNode &Ins = ...Segments.Scapula.I_serratus_anterior_9;
    viewMuscle = {#include "../DrawSettings/MusDrawSettings.any"};
    SPLine.StringMesh = 35;
    AnySurfEllipsoid& Surf = ..ThoraxWrappingSufaceSegRef.SerratusAnteriorWrappingEllipsoid_6to9;
    SPLine = {
      AnyMatrix InitWrapPos = {
        transf3D({-0.8*.Surf.Radius[0], 0.55*.Surf.Radius[1],....Sign*1.1*.Surf.Radius[2]}, &.Surf),
        transf3D({-1.0*.Surf.Radius[0], 0.60*.Surf.Radius[1],....Sign*0.5*.Surf.Radius[2]}, &.Surf)
      };
      InitWrapPosVecArr = {&InitWrapPos};
    };
  };
};

MuscleGroup Subscapularis = {
  AnyMuscleShortestPath subscapularis_1 = {
    AnyMuscleModel &MusMdl = ...MuscleModels.subscapularis_1;
    AnyRefNode &Org = ...Segments.Scapula.O_subscapularis_1;
    AnyRefNode &Ins = ...Segments.Humerus.I_subscapularis_1;
    viewMuscle = {#include "../DrawSettings/MusDrawSettings.any"};
    SPLine.StringMesh = 100;
    AnyParamSurf &Surf1 = ...Segments.Scapula.subscapularis_torus.surface;
    AnyParamSurf &Surf2 = ...Segments.Humerus.SubscapularisHumerusWrapping.cyl;
    SPLine = {
      AnyMatrix InitWrapPos = {
        transf3D({0.0,0, 0.01*....Sign}, &.Surf1),
        transf3D({0.0,0,-0.01*....Sign}, &.Surf1),
        transf3D(.Surf1.MajorRadius*{-1,0,0}+1.05*.Surf1.MinorRadius*{-sin(-30*pi/180),0,-cos(-30*pi/180)*....Sign}, &.Surf1),
        transf3D(.Surf1.MajorRadius*{-1,0,0}+1.05*.Surf1.MinorRadius*{-sin(-0*pi/180),0,-cos(-0*pi/180)*....Sign}, &.Surf1),
        transf3D(.Surf1.MajorRadius*{-1,0,0}+1.05*.Surf1.MinorRadius*{-sin(30*pi/180),0,-cos(30*pi/180)*....Sign}, &.Surf1),
        transf3D(.Surf1.MajorRadius*{-1,0,0}+1.05*.Surf1.MinorRadius*{-sin(60*pi/180),0,-cos(60*pi/180)*....Sign}, &.Surf1),
        transf3D({-0.01,0,0}, &....Segments.Scapula.coronoid)
      };
      InitWrapPosVecArr = {&InitWrapPos};
    };
  };

  AnyMuscleShortestPath subscapularis_2 = {
    AnyMuscleModel &MusMdl = ...MuscleModels.subscapularis_2;
    AnyRefNode &Org = ...Segments.Scapula.O_subscapularis_2;
    AnyRefNode &Ins = ...Segments.Humerus.I_subscapularis_2;
    viewMuscle = {#include "../DrawSettings/MusDrawSettings.any"};
    SPLine.StringMesh = 100;
    AnyParamSurf &Surf1 = ...Segments.Scapula.subscapularis_torus.surface;
    AnyParamSurf &Surf2 = ...Segments.Humerus.SubscapularisHumerusWrapping.cyl;
    SPLine.InitWrapPosVecArr = .subscapularis_1.SPLine.InitWrapPosVecArr;
  };

  AnyMuscleShortestPath subscapularis_3 = {
    AnyMuscleModel &MusMdl = ...MuscleModels.subscapularis_3;
    AnyRefNode &Org = ...Segments.Scapula.O_subscapularis_3;
    AnyRefNode &Ins = ...Segments.Humerus.I_subscapularis_3;
    viewMuscle = {#include "../DrawSettings/MusDrawSettings.any"};
    SPLine.StringMesh =100;
    AnyParamSurf &Surf1 = ...Segments.Scapula.subscapularis_torus.surface;
    AnyParamSurf &Surf2 = ...Segments.Humerus.SubscapularisHumerusWrapping.cyl;
    SPLine.InitWrapPosVecArr = .subscapularis_1.SPLine.InitWrapPosVecArr;
  };


  AnyMuscleShortestPath subscapularis_4 = {
    AnyMuscleModel &MusMdl = ...MuscleModels.subscapularis_4;
    AnyRefNode &Org = ...Segments.Scapula.O_subscapularis_4;
    AnyRefNode &Ins = ...Segments.Humerus.I_subscapularis_4;
    viewMuscle = {#include "../DrawSettings/MusDrawSettings.any"};
    SPLine.StringMesh = 100;
    AnyParamSurf &Surf1 = ...Segments.Scapula.subscapularis_torus.surface;
    AnyParamSurf &Surf2 = ...Segments.Humerus.SubscapularisHumerusWrapping.cyl;
    SPLine.InitWrapPosVecArr = .subscapularis_1.SPLine.InitWrapPosVecArr;
  };

  AnyMuscleShortestPath subscapularis_5 = {
    AnyMuscleModel &MusMdl =  ...MuscleModels.subscapularis_5;
    AnyRefNode &Org = ...Segments.Scapula.O_subscapularis_5;
    AnyRefNode &Ins = ...Segments.Humerus.I_subscapularis_5;
    viewMuscle = {#include "../DrawSettings/MusDrawSettings.any"};
    SPLine.StringMesh = 100;
    AnyParamSurf &Surf1 = ...Segments.Scapula.subscapularis_torus.surface;
    AnyParamSurf &Surf2 = ...Segments.Humerus.SubscapularisHumerusWrapping.cyl;
    SPLine.InitWrapPosVecArr = .subscapularis_1.SPLine.InitWrapPosVecArr;
  };

  AnyMuscleShortestPath subscapularis_6 = {
    AnyMuscleModel &MusMdl = ...MuscleModels.subscapularis_6;
    AnyRefNode &Org = ...Segments.Scapula.O_subscapularis_6;
    AnyRefNode &Ins = ...Segments.Humerus.I_subscapularis_6;
    viewMuscle = {#include "../DrawSettings/MusDrawSettings.any"};
    SPLine.StringMesh = 100;
    AnyParamSurf &Surf1 = ...Segments.Scapula.subscapularis_torus.surface;
    AnyParamSurf &Surf2 = ...Segments.Humerus.SubscapularisHumerusWrapping.cyl;
    SPLine.InitWrapPosVecArr = .subscapularis_1.SPLine.InitWrapPosVecArr;
  };
};

MuscleGroup Supraspinatus = {
  AnyMuscleShortestPath supraspinatus_1 = {
    AnyMuscleModel &MusMdl = ...MuscleModels.supraspinatus_1;
    AnyRefNode &Org = ...Segments.Scapula.O_supraspinatus_1;
    AnyRefNode &Ins = ...Segments.Humerus.I_supraspinatus_1;
    viewMuscle = {#include "../DrawSettings/MusDrawSettings.any"};
    SPLine.StringMesh = 20;
    AnySurfEllipsoid &Surf = ..art_gh_humRef;
    SPLine = {
      AnyMatrix InitWrapPos = { transf3D({0*....Sign, 0.9*.Surf.Radius[1],0.9*.Surf.Radius[2]}, &....Segments.Humerus.gh)};
      InitWrapPosVecArr = {&InitWrapPos};
    };
  };

  AnyMuscleShortestPath supraspinatus_2 = {
    AnyMuscleModel &MusMdl = ...MuscleModels.supraspinatus_2;
    AnyRefNode &Org = ...Segments.Scapula.O_supraspinatus_2;
    AnyRefNode &Ins = ...Segments.Humerus.I_supraspinatus_2;
    viewMuscle = {#include "../DrawSettings/MusDrawSettings.any"};
    SPLine.StringMesh = 20;
    AnySurfEllipsoid &Surf = ..art_gh_humRef;
    SPLine.InitWrapPosVecArr = .supraspinatus_1.SPLine.InitWrapPosVecArr;
  };

  AnyMuscleShortestPath supraspinatus_3 = {
    AnyMuscleModel &MusMdl = ...MuscleModels.supraspinatus_3;
    AnyRefNode &Org = ...Segments.Scapula.O_supraspinatus_3;
    AnyRefNode &Ins = ...Segments.Humerus.I_supraspinatus_3;
    viewMuscle = {#include "../DrawSettings/MusDrawSettings.any"};
    SPLine.StringMesh = 20;
    AnySurfEllipsoid &Surf = ..art_gh_humRef;
    SPLine.InitWrapPosVecArr = .supraspinatus_1.SPLine.InitWrapPosVecArr;
  };

  AnyMuscleShortestPath supraspinatus_4 = {
    AnyMuscleModel &MusMdl = ...MuscleModels.supraspinatus_4;
    AnyRefNode &Org = ...Segments.Scapula.O_supraspinatus_4;
    AnyRefNode &Ins = ...Segments.Humerus.I_supraspinatus_4;
    viewMuscle = {#include "../DrawSettings/MusDrawSettings.any"};
    SPLine.StringMesh = 20;
    AnySurfEllipsoid &Surf = ..art_gh_humRef;
    SPLine.InitWrapPosVecArr = .supraspinatus_1.SPLine.InitWrapPosVecArr;
  };

  AnyMuscleShortestPath supraspinatus_5 = {
    AnyMuscleModel &MusMdl = ...MuscleModels.supraspinatus_5;
    AnyRefNode &Org = ...Segments.Scapula.O_supraspinatus_5;
    AnyRefNode &Ins = ...Segments.Humerus.I_supraspinatus_5;
    viewMuscle = {#include "../DrawSettings/MusDrawSettings.any"};
    SPLine.StringMesh = 20;
    AnySurfEllipsoid &Surf = ..art_gh_humRef;
    SPLine.InitWrapPosVecArr = .supraspinatus_1.SPLine.InitWrapPosVecArr;
  };

  AnyMuscleShortestPath supraspinatus_6 = {
    AnyMuscleModel &MusMdl = ...MuscleModels.supraspinatus_6;
    AnyRefNode &Org = ...Segments.Scapula.O_supraspinatus_6;
    AnyRefNode &Ins = ...Segments.Humerus.I_supraspinatus_6;
    viewMuscle = {#include "../DrawSettings/MusDrawSettings.any"};
    SPLine.StringMesh = 20;
    AnySurfEllipsoid &Surf = ..art_gh_humRef;
    SPLine.InitWrapPosVecArr = .supraspinatus_1.SPLine.InitWrapPosVecArr;
  };
};

MuscleGroup TeresMajor = {
  AnyMuscleShortestPath teres_major_1 = {
    AnyMuscleModel &MusMdl = ...MuscleModels.teres_major_1;
    AnyRefNode &Org = ...Segments.Scapula.O_teres_major_1;
    AnyRefNode &Ins = ...Segments.Humerus.I_teres_major_1;
    viewMuscle = {#include "../DrawSettings/MusDrawSettings.any"};
    SPLine.StringMesh = 30;
    AnySurfCylinder &Surf = ..collum_hum_teres_minor_major;
    AnySurfCylinder &Surf2 = ..teresmajor_cyl;
    SPLine = {
      AnyMatrix InitWrapPos = {
        transf3D({0, ....Sign*-0.04, -0.04}, &....Segments.Scapula.coronoid)
      };
      InitWrapPosVecArr = {&InitWrapPos};
    };
  };

  AnyMuscleShortestPath teres_major_2 = {
    AnyMuscleModel &MusMdl = ...MuscleModels.teres_major_2;
    AnyRefNode &Org = ...Segments.Scapula.O_teres_major_2;
    AnyRefNode &Ins = ...Segments.Humerus.I_teres_major_2;
    viewMuscle = {#include "../DrawSettings/MusDrawSettings.any"};
    SPLine.StringMesh = 35;
    AnySurfCylinder &Surf = ..collum_hum_teres_minor_major;
    AnySurfCylinder &Surf2 = ..teresmajor_cyl;
    SPLine.InitWrapPosVecArr = .teres_major_1.SPLine.InitWrapPosVecArr;
  };

  AnyMuscleShortestPath teres_major_3 = {
    AnyMuscleModel &MusMdl = ...MuscleModels.teres_major_3;
    AnyRefNode &Org = ...Segments.Scapula.O_teres_major_3;
    AnyRefNode &Ins = ...Segments.Humerus.I_teres_major_3;
    viewMuscle = {#include "../DrawSettings/MusDrawSettings.any"};
    SPLine.StringMesh = 40;
    AnySurfCylinder &Surf = ..collum_hum_teres_minor_major;
    AnySurfCylinder &Surf2 = ..teresmajor_cyl;
    SPLine.InitWrapPosVecArr = .teres_major_1.SPLine.InitWrapPosVecArr;
  };

  AnyMuscleShortestPath teres_major_4 = {
    AnyMuscleModel &MusMdl = ...MuscleModels.teres_major_4;
    AnyRefNode &Org = ...Segments.Scapula.O_teres_major_4;
    AnyRefNode &Ins = ...Segments.Humerus.I_teres_major_4;
    viewMuscle = {#include "../DrawSettings/MusDrawSettings.any"};
    SPLine.StringMesh = 30;
    AnySurfCylinder &Surf = ..collum_hum_teres_minor_major;
    AnySurfCylinder &Surf2 = ..teresmajor_cyl;
    SPLine.InitWrapPosVecArr = .teres_major_1.SPLine.InitWrapPosVecArr;
  };

  AnyMuscleShortestPath teres_major_5 = {
    AnyMuscleModel &MusMdl = ...MuscleModels.teres_major_5;
    AnyRefNode &Org = ...Segments.Scapula.O_teres_major_5;
    AnyRefNode &Ins = ...Segments.Humerus.I_teres_major_5;
    viewMuscle = {#include "../DrawSettings/MusDrawSettings.any"};
    SPLine.StringMesh = 35;
    AnySurfCylinder &Surf = ..collum_hum_teres_minor_major;
    AnySurfCylinder &Surf2 = ..teresmajor_cyl;
    SPLine.InitWrapPosVecArr = .teres_major_1.SPLine.InitWrapPosVecArr;
  };

  AnyMuscleShortestPath teres_major_6 = {
    AnyMuscleModel &MusMdl = ...MuscleModels.teres_major_6;
    AnyRefNode &Org = ...Segments.Scapula.O_teres_major_6;
    AnyRefNode &Ins = ...Segments.Humerus.I_teres_major_6;
    viewMuscle = {#include "../DrawSettings/MusDrawSettings.any"};
    SPLine.StringMesh = 30;
    AnySurfCylinder &Surf = ..collum_hum_teres_minor_major;
    AnySurfCylinder &Surf2 = ..teresmajor_cyl;
    SPLine.InitWrapPosVecArr = .teres_major_1.SPLine.InitWrapPosVecArr;
  };
};

MuscleGroup TeresMinor = {
  AnyMuscleShortestPath teres_minor_1 = {
    AnyMuscleModel &MusMdl = ...MuscleModels.teres_minor_1;
    AnyRefNode &Org = ...Segments.Scapula.O_teres_minor_1;//Correction to make wrap work
    AnyRefNode &Ins = ...Segments.Humerus.I_teres_minor_1;
    viewMuscle = {#include "../DrawSettings/MusDrawSettings.any"};
    SPLine.StringMesh = 30;
    AnyParamSurf &Surf = ...Segments.Humerus.teres_minor_humurus_wrap.torus;
    SPLine = {

      AnyMatrix InitWrapPos = {
        transf3D({-1*(.Surf.MajorRadius+1.4*.Surf.MinorRadius)*....Sign, 0,  1.2*.Surf.MinorRadius}, &.Surf),
        transf3D({-1*(.Surf.MajorRadius+0.6*.Surf.MinorRadius)*....Sign, 0, 1.2*.Surf.MinorRadius}, &.Surf),
        transf3D({-1*(.Surf.MajorRadius)*....Sign,                       0, 1.3*.Surf.MinorRadius}, &.Surf),
        transf3D({-1*(.Surf.MajorRadius-0.6*.Surf.MinorRadius)*....Sign, 0, 0.9*.Surf.MinorRadius}, &.Surf),
        transf3D({-1*(.Surf.MajorRadius-1.2*.Surf.MinorRadius)*....Sign,0,  0.2*.Surf.MinorRadius}, &.Surf)
  };
      InitWrapPosVecArr = {&InitWrapPos};
    };
  };

  AnyMuscleShortestPath teres_minor_2 = {
    AnyMuscleModel &MusMdl = ...MuscleModels.teres_minor_2;
    AnyRefNode &Org = ...Segments.Scapula.O_teres_minor_2;//Correction to make wrap work
    AnyRefNode &Ins = ...Segments.Humerus.I_teres_minor_2;
    viewMuscle = {#include "../DrawSettings/MusDrawSettings.any"};
    SPLine.StringMesh = 30;
    AnyParamSurf &Surf = ...Segments.Humerus.teres_minor_humurus_wrap.torus;
    SPLine.InitWrapPosVecArr = .teres_minor_1.SPLine.InitWrapPosVecArr;
  };

  AnyMuscleShortestPath teres_minor_3 = {
    AnyMuscleModel &MusMdl = ...MuscleModels.teres_minor_3;
    AnyRefNode &Org = ...Segments.Scapula.O_teres_minor_3;
    AnyRefNode &Ins = ...Segments.Humerus.I_teres_minor_3;
    viewMuscle = {#include "../DrawSettings/MusDrawSettings.any"};
    SPLine.StringMesh = 30;
    AnyParamSurf &Surf = ...Segments.Humerus.teres_minor_humurus_wrap.torus;
    SPLine.InitWrapPosVecArr = .teres_minor_1.SPLine.InitWrapPosVecArr;
  };

  AnyMuscleShortestPath teres_minor_4 = {
    AnyMuscleModel &MusMdl = ...MuscleModels.teres_minor_4;
    AnyRefNode &Org = ...Segments.Scapula.O_teres_minor_4;
    AnyRefNode &Ins = ...Segments.Humerus.I_teres_minor_4;
    viewMuscle = {#include "../DrawSettings/MusDrawSettings.any"};
    SPLine.StringMesh = 30;
    AnyParamSurf &Surf = ...Segments.Humerus.teres_minor_humurus_wrap.torus;
    SPLine.InitWrapPosVecArr = .teres_minor_1.SPLine.InitWrapPosVecArr;
  };

  AnyMuscleShortestPath teres_minor_5 = {
    AnyMuscleModel &MusMdl = ...MuscleModels.teres_minor_5;
    AnyRefNode &Org = ...Segments.Scapula.O_teres_minor_5;
    AnyRefNode &Ins = ...Segments.Humerus.I_teres_minor_5;
    viewMuscle = {#include "../DrawSettings/MusDrawSettings.any"};
    SPLine.StringMesh = 30;
    AnyParamSurf &Surf = ...Segments.Humerus.teres_minor_humurus_wrap.torus;
    SPLine.InitWrapPosVecArr = .teres_minor_1.SPLine.InitWrapPosVecArr;
  };

  AnyMuscleShortestPath teres_minor_6 = {
    AnyMuscleModel &MusMdl = ...MuscleModels.teres_minor_6;
    AnyRefNode &Org = ...Segments.Scapula.O_teres_minor_6;
    AnyRefNode &Ins = ...Segments.Humerus.I_teres_minor_6;
    viewMuscle = {#include "../DrawSettings/MusDrawSettings.any"};
    SPLine.StringMesh = 30;
    AnyParamSurf &Surf = ...Segments.Humerus.teres_minor_humurus_wrap.torus;
    SPLine.InitWrapPosVecArr = .teres_minor_1.SPLine.InitWrapPosVecArr;
  };
};

MuscleGroup Brachialis = {
  AnyMuscleShortestPath Brachialis_1 = {
    AnyMuscleModel &MusMdl = ...MuscleModels.Brachialis_1;
    AnyRefNode &Org = ...Segments.Humerus.O_Brachialis_1;
    AnyRefNode &Ins = ...Segments.Ulna.I_Brachialis_1;
    viewMuscle = {#include "../DrawSettings/MusDrawSettings.any"};
    AnySurfCylinder &Surf1 = ..condylus_hum;
    SPLine.StringMesh = 30;
    SPLine = {
      AnyMatrix InitWrapPos = {
            transf3D({....Sign*-1.1* .Surf1.Radius,0.5* .Surf1.Radius,  0.46*.Surf1.Length }, &.Surf1)
      };
      InitWrapPosVecArr = { &InitWrapPos };
    };
  };

  AnyMuscleShortestPath Brachialis_2 = {
    AnyMuscleModel &MusMdl = ...MuscleModels.Brachialis_2;
    AnyRefNode &Org = ...Segments.Humerus.O_Brachialis_2;
    AnyRefNode &Ins = ...Segments.Ulna.I_Brachialis_2;
    viewMuscle = {#include "../DrawSettings/MusDrawSettings.any"};
    AnySurfCylinder &Surf1 = ..condylus_hum;
    SPLine.StringMesh = 30;
    SPLine = {
      InitWrapPosVecArr = { &..Brachialis_1.SPLine.InitWrapPos };
    };
  };
};

MuscleGroup Triceps = {
  AnyMuscleShortestPath Triceps_LH_1 = {
    AnyMuscleModel &MusMdl = ...MuscleModels.Triceps_LH_1;
    AnyRefNode &Org = ...Segments.Scapula.O_Triceps_LH_1;
    AnyRefNode &Via = ...Segments.Humerus.Via_Triceps_LH_1;
    AnyRefNode &Ins = ...Segments.Ulna.I_Triceps_LH_1;
    viewMuscle = {#include "../DrawSettings/MusDrawSettings.any"};
    SPLine.StringMesh = 70;
    AnySurfCylinder &Surf1 = ..oleacron;
    AnyParamSurf &Surf2 = ..TricepsLHWrapping.BASE_FRAME.Wrapping_1.Surf;
    SPLine = {
      AnyMatrix InitWrapPosProximal = {
          transf3D({1.1*.Surf2.Radius[0], 0, ....Sign* 0}, &.Surf2)
      };
      AnyMatrix InitWrapPosDistal = {
          transf3D({0, ....Sign*1.1*.Surf1.Radius, 0.5*.Surf1.Length}, &.Surf1),
          transf3D({0.35*.Surf1.Radius,....Sign*1.05*.Surf1.Radius, 0.5* .Surf1.Length}, &.Surf1),
          transf3D({0.8*.Surf1.Radius,....Sign*0.8*.Surf1.Radius, 0.5* .Surf1.Length}, &.Surf1)
      };
      InitWrapPosVecArr = { &InitWrapPosProximal, &InitWrapPosDistal };
    };
  };

  AnyMuscleShortestPath Triceps_LH_2 = {
    AnyMuscleModel &MusMdl = ...MuscleModels.Triceps_LH_2;
    AnyRefNode &Org = ...Segments.Scapula.O_Triceps_LH_2;
    AnyRefNode &Via = ...Segments.Humerus.Via_Triceps_LH_2;
    AnyRefNode &Ins = ...Segments.Ulna.I_Triceps_LH_2;
    viewMuscle = {#include "../DrawSettings/MusDrawSettings.any"};
    SPLine.StringMesh = 70;
    AnySurfCylinder &Surf1 = ..oleacron;
    AnyParamSurf &Surf2 = ..TricepsLHWrapping.BASE_FRAME.Wrapping_1.Surf;
    SPLine = {
      InitWrapPosVecArr = { &..Triceps_LH_1.SPLine.InitWrapPosProximal,  &..Triceps_LH_1.SPLine.InitWrapPosDistal};
    };
  };

  AnyMuscleShortestPath Triceps_ME_1 = {
    AnyMuscleModel &MusMdl = ...MuscleModels.Triceps_ME_1;
    AnyRefNode &Org = ...Segments.Humerus.O_Triceps_ME_1;
    AnyRefNode &Ins = ...Segments.Ulna.I_Triceps_ME_1;
    viewMuscle = {#include "../DrawSettings/MusDrawSettings.any"};
    SPLine.StringMesh = 100;
    AnySurfCylinder &Surf1 = ..oleacron;
    SPLine = {
      InitWrapPosVecArr = { &..Triceps_LH_1.SPLine.InitWrapPosDistal };
    };
  };

  AnyMuscleShortestPath Triceps_ME_2 = {
    AnyMuscleModel &MusMdl = ...MuscleModels.Triceps_ME_2;
    AnyRefNode &Org = ...Segments.Humerus.O_Triceps_ME_2;
    AnyRefNode &Ins = ...Segments.Ulna.I_Triceps_ME_2;
    viewMuscle = {#include "../DrawSettings/MusDrawSettings.any"};
    SPLine.StringMesh = 90;
    AnySurfCylinder &Surf1 = ..oleacron;
    SPLine = {
      InitWrapPosVecArr = { &..Triceps_LH_1.SPLine.InitWrapPosDistal };
    };
  };

  AnyMuscleShortestPath Triceps_LA_1 = {
    AnyMuscleModel &MusMdl = ...MuscleModels.Triceps_LA_1;
    AnyRefNode &Org = ...Segments.Humerus.O_Triceps_LA_1;
    AnyRefNode &Ins = ...Segments.Ulna.I_Triceps_LA_1;
    viewMuscle = {#include "../DrawSettings/MusDrawSettings.any"};
    AnySurfCylinder &Surf1 = ..oleacron;
    SPLine.StringMesh = 90;
    SPLine = {
      InitWrapPosVecArr = { &..Triceps_LH_1.SPLine.InitWrapPosDistal };
    };
  };

  AnyMuscleShortestPath Triceps_LA_2 = {
    AnyMuscleModel &MusMdl = ...MuscleModels.Triceps_LA_2;
    AnyRefNode &Org = ...Segments.Humerus.O_Triceps_LA_2;
    AnyRefNode &Ins = ...Segments.Ulna.I_Triceps_LA_2;
    viewMuscle = {#include "../DrawSettings/MusDrawSettings.any"};
    AnySurfCylinder &Surf1 = ..oleacron;
    SPLine.StringMesh = 90;
    SPLine = {
      InitWrapPosVecArr = { &..Triceps_LH_1.SPLine.InitWrapPosDistal };
    };
  };
};

MuscleGroup Brachioradialis = {
  AnyMuscleShortestPath Brach_rad_1 = {
    AnyMuscleModel &MusMdl = ...MuscleModels.Brach_rad_1;
    AnyRefNode &Org = ...Segments.Humerus.O_Brach_rad_1;
    AnyRefNode &Ins = ...Segments.Radius.I_Brach_rad_1;
    viewMuscle = {#include "../DrawSettings/MusDrawSettings.any"};
    AnySurfCylinder &Surf1 = ..condylus_hum;
    SPLine.StringMesh = 50;
    SPLine = {
      AnyMatrix InitWrapPos = {
            transf3D({....Sign*-1.1* .Surf1.Radius,0,  0.47*.Surf1.Length }, &.Surf1)
      };
      InitWrapPosVecArr = { &InitWrapPos };
    };
  };

  AnyMuscleShortestPath Brach_rad_2 = {
    AnyMuscleModel &MusMdl = ...MuscleModels.Brach_rad_2;
    AnyRefNode &Org = ...Segments.Humerus.O_Brach_rad_2;
    AnyRefNode &Ins = ...Segments.Radius.I_Brach_rad_2;
    viewMuscle = {#include "../DrawSettings/MusDrawSettings.any"};
    AnySurfCylinder &Surf1 = ..condylus_hum;
    SPLine.StringMesh = 50;
    SPLine = {
      AnyMatrix InitWrapPos = {
            transf3D({....Sign*-1.1* .Surf1.Radius,0,  0.5*.Surf1.Length }, &.Surf1)
      };
      InitWrapPosVecArr = { &InitWrapPos };
    };
  };
};

MuscleGroup Anconeus = {
  AnyMuscleViaPoint Anconeus_1 = {
    AnyMuscleModel &MusMdl = ...MuscleModels.Anconeus_1;
    AnyRefNode &Org = ...Segments.Humerus.O_Anconeus_1;
    AnyRefNode &Ins = ...Segments.Ulna.I_Anconeus_1;
    viewMuscle = {#include "../DrawSettings/MusDrawSettings.any"};
  };

  AnyMuscleViaPoint Anconeus_2 = {
    AnyMuscleModel &MusMdl = ...MuscleModels.Anconeus_2;
    AnyRefNode &Org = ...Segments.Humerus.O_Anconeus_2;
    AnyRefNode &Ins = ...Segments.Ulna.I_Anconeus_2;
    viewMuscle = {#include "../DrawSettings/MusDrawSettings.any"};
  };
};

MuscleGroup PronatorTeres = {
  AnyMuscleShortestPath Pronator_teres_caput_humeral_1 = {
    AnyMuscleModel &MusMdl = ...MuscleModels.Pronator_teres_caput_humeral_1;
    AnyRefNode &Org = ...Segments.Humerus.O_Pronator_teres_caput_humeral_1;
    AnyRefNode &Ins = ...Segments.Radius.I_Pronator_teres_caput_humeral_1;
    viewMuscle = {#include "../DrawSettings/MusDrawSettings.any"};
    AnySurfCylinder &Surf1 = ..pronatorterescyl;
    SPLine.StringMesh = 45;
    SPLine = {
      AnyMatrix InitWrapPos = {
            transf3D(0.01*{4,....Sign*2,-1.8}, &.Ins),
            transf3D(0.01*{2,....Sign*0.5,-1.3}, &.Ins)
      };
      InitWrapPosVecArr = { &InitWrapPos };
    };
  };

  AnyMuscleShortestPath Pronator_teres_caput_humeral_2 = {
    AnyMuscleModel &MusMdl = ...MuscleModels.Pronator_teres_caput_humeral_2;
    AnyRefNode &Org = ...Segments.Humerus.O_Pronator_teres_caput_humeral_2;
    AnyRefNode &Ins = ...Segments.Radius.I_Pronator_teres_caput_humeral_2;
    viewMuscle = {#include "../DrawSettings/MusDrawSettings.any"};
    AnySurfCylinder &Surf1 = ..pronatorterescyl;
    SPLine.StringMesh = 45;
    SPLine = {
      AnyMatrix InitWrapPos = {
            transf3D(0.01*{4,....Sign*2,-1.8}, &.Ins),
            transf3D(0.01*{2,....Sign*0.5,-1.3}, &.Ins)
      };
      InitWrapPosVecArr = { &InitWrapPos };
    };
  };

  AnyMuscleShortestPath Pronator_teres_caput_ulnare_1 = {
    AnyMuscleModel &MusMdl = ...MuscleModels.Pronator_teres_caput_ulnare;
    AnyRefNode &Org = ...Segments.Ulna.O_Pronator_teres_caput_ulnare_1;
    AnyRefNode &Ins = ...Segments.Radius.I_Pronator_teres_caput_ulnare_1;
    viewMuscle = {#include "../DrawSettings/MusDrawSettings.any" };
    AnySurfCylinder &Surf1 = ..pronatorterescyl;
    SPLine.StringMesh = 35;
    SPLine = {
      AnyMatrix InitWrapPos = {
            transf3D(0.01*{4,....Sign*2,-1.8}, &.Ins),
            transf3D(0.01*{2,....Sign*0.5,-1.3}, &.Ins)
      };
      InitWrapPosVecArr = { &InitWrapPos };
    };
  };
};

MuscleGroup Supinator = {
  AnyMuscleShortestPath Supinator_humerus_part_1 = {
    AnyMuscleModel &MusMdl = ...MuscleModels.Supinator_humerus_part_1;
    AnyRefNode &Org = ...Segments.Humerus.O_Supinator_humerus_part_1;
    AnyRefNode &Ins = ...Segments.Radius.I_Supinator_humerus_part_1;
    viewMuscle = {#include "../DrawSettings/MusDrawSettings.any"};
    AnySurfCylinder &Surf1 = ..supinatorcyl;
    SPLine.StringMesh = 25;
    SPLine = {
      AnyMatrix InitWrapPos = {
            transf3D({1*.Surf1.Radius,....Sign*-1*.Surf1.Radius, 1*.Surf1.Radius},&.Ins)
      };
      InitWrapPosVecArr = { &InitWrapPos };
    };
  };

  AnyMuscleShortestPath Supinator_humerus_part_2 = {
    AnyMuscleModel &MusMdl = ...MuscleModels.Supinator_humerus_part_2;
    AnyRefNode &Org = ...Segments.Humerus.O_Supinator_humerus_part_2;
    AnyRefNode &Ins = ...Segments.Radius.I_Supinator_humerus_part_2;
    viewMuscle = {#include "../DrawSettings/MusDrawSettings.any"};
    AnySurfCylinder &Surf1 = ..supinatorcyl;
    SPLine.StringMesh = 30;
    SPLine = {
      AnyMatrix InitWrapPos = {
            transf3D({....Sign*1*.Surf1.Radius,....Sign*-1*.Surf1.Radius, 1*.Surf1.Radius},&.Ins)
      };
      InitWrapPosVecArr = { &InitWrapPos };
    };
  };

  AnyMuscleShortestPath Supinator_ulna_part_1 = {
    AnyMuscleModel &MusMdl = ...MuscleModels.Supinator_ulna_part_1;
    AnyRefNode &Org = ...Segments.Ulna.O_Supinator_ulna_part_1;
    AnyRefNode &Ins = ...Segments.Radius.I_Supinator_ulna_part_1;
    viewMuscle = {#include "../DrawSettings/MusDrawSettings.any"};
    AnySurfCylinder &Surf1 = ..supinatorcyl;

    SPLine.StringMesh = 35;
    SPLine.RelTol=0.0000001;
    SPLine = {
      AnyMatrix InitWrapPos = transf3D(.Surf1.Radius*
      {{5,....Sign*2.8, 1},
      {4,....Sign*2.2, 2},
      {3,....Sign*1.5, 2.5},
      {2,....Sign*0, 2.5},
      {1,....Sign*-1, 1}},
    &.Ins);
      InitWrapPosVecArr = { &InitWrapPos };
    };
  };

  AnyMuscleShortestPath Supinator_ulna_part_2 = {
    AnyMuscleModel &MusMdl = ...MuscleModels.Supinator_ulna_part_2;
    AnyRefNode &Org = ...Segments.Ulna.O_Supinator_ulna_part_2;
    AnyRefNode &Ins = ...Segments.Radius.I_Supinator_ulna_part_2;
    viewMuscle = {#include "../DrawSettings/MusDrawSettings.any"};
    AnySurfCylinder &Surf1 = ..supinatorcyl;
    SPLine.StringMesh = 25;
    SPLine = {
      AnyMatrix InitWrapPos = transf3D(.Surf1.Radius*
      {{5,....Sign*3.2,0.5},
      {4,....Sign*2.7, 1.5},
      {3,....Sign*2, 2},
      {2,....Sign*0.5, 2},
      {1,....Sign*-0.5, 0.5}},
    &.Ins);
      InitWrapPosVecArr = { &InitWrapPos };
    };
  };
};

MuscleGroup PronatorQuadratus = {
  AnyMuscleViaPoint Pron_quadr_1 = {
    AnyMuscleModel &MusMdl = ...MuscleModels.Pron_quadr_1;
    AnyRefNode &Org = ...Segments.Ulna.O_Pron_quadr_1;
    AnyRefNode &Ins = ...Segments.Radius.I_Pron_quadr_1;
    viewMuscle = {#include "../DrawSettings/MusDrawSettings.any"};
  };

  AnyMuscleViaPoint Pron_quadr_2 = {
    AnyMuscleModel &MusMdl = ...MuscleModels.Pron_quadr_2;
    AnyRefNode &Org = ...Segments.Ulna.O_Pron_quadr_2;
    AnyRefNode &Ins = ...Segments.Radius.I_Pron_quadr_2;
    viewMuscle = {#include "../DrawSettings/MusDrawSettings.any"};
  };
};

MuscleGroup ExtensorIndicis = {
  AnyMuscleShortestPath Extensor_Indicis ={
    AnyMuscleModel &MusMdl = ...MuscleModels.Extensor_Indicis;
    AnyRefNode &Org = ...Segments.Ulna.O_Extensor_Indicis;
    AnyRefNode &Via1 = ...Segments.Radius.Via_Extensor_Indicis;
    AnyRefNode &Via2 = ...Segments.Hand.Finger2MetaRef.Via1_Extensor_Indicis;
    AnyRefNode &Ins = ...Segments.Hand.Finger2MetaRef.I_Extensor_Indicis;
    viewMuscle = {#include "../DrawSettings/MusDrawSettings.any"};

    AnySurfEllipsoid &Surf1 = ...Segments.Radius.ExtensorMuscleEllipsoid.ellipsoid;
    SPLine = {
      AnyMatrix InitWrapPos = {
        transf3D({-0.2*.Surf1.Radius[0],-0.2*.Surf1.Radius[1], ....Sign*0.9*.Surf1.Radius[2] }, &.Surf1 ),
        transf3D({-0.8*.Surf1.Radius[0],-0.3*.Surf1.Radius[1], ....Sign*0.9*.Surf1.Radius[2] }, &.Surf1 )
      };
      InitWrapPosVecArr = {None,&InitWrapPos,None};
    };
    SPLine.StringMesh = 25;
    SPLine.RelTol=0.0000001;
  };
};

MuscleGroup AbductorPollicis = {
  AnyMuscleViaPoint Abductor_Pollicis_Longus ={

    AnyMuscleModel &MusMdl = ...MuscleModels.Abductor_Pollicis_Longus;
    AnyRefNode &Ins = ...Segments.Hand.Finger1MetaRef.I_Abductor_Pollicis_Longus;
    //AnyRefNode &Via1 = ...Segments.Hand.Via1_Abductor_Pollicis_Longus;

    AnyRefNode &Via2 = ...Segments.Radius.Via_Abductor_Pollicis_Longus;

    AnyRefNode &Org = ...Segments.Ulna.O_Abductor_Pollicis_Longus;

    //AnySurfCylinder &Surf1 = ...Segments.Hand.FlexorMuscleCyl.cyl;
  //  AnySurfCylinder &Surf2 = ...Segments.Radius.MedialExtensorCyl.cyl;

    // AnySurfCylinder &Surf2 = ...Segments.Radius.RadiusMuscleCyl.cyl;
    // AnySurfCylinder &Surf3 = ...Segments.Ulna.UlnaMuscleCyl.cyl;
    viewMuscle = {#include "../DrawSettings/MusDrawSettings.any"};

  //  SPLine.StringMesh = 45;
  //  SPLine.RelTol=0.0000001;
  //  SPLine.InitWrapPosVectors = {
  //    {0,0,..Sign*0.1}, {0,..Sign*0,0}
  //  };
  };
};

MuscleGroup ExtensorPollicis = {
  AnyMuscleShortestPath Extensor_Pollicis_Brevis ={
    AnyMuscleModel &MusMdl = ...MuscleModels.Extensor_Pollicis_Brevis;

    AnyRefNode &Ins = ...Segments.Hand.Finger1MetaRef.I_Extensor_Pollicis_Brevis;
    AnyRefNode &Via2 = ...Segments.Hand.Finger1MetaRef.Via1_Extensor_Pollicis_Brevis;
    AnyRefNode &Via1 = ...Segments.Radius.Via_Extensor_Pollicis_Longus;
    AnyRefNode &Org = ...Segments.Radius.O_Extensor_Pollicis_Brevis;

    viewMuscle = {#include "../DrawSettings/MusDrawSettings.any"};
    AnySurfCylinder &Surf2 = ...Segments.Radius.MedialExtensorCyl.cyl;
    SPLine.StringMesh = 30;
    SPLine.RelTol=0.0000001;
    SPLine = {
      AnyMatrix InitWrapPos = {
          transf3D({....Sign*1*.Surf2.Radius, 1.1*.Surf2.Radius, 0.3*.Surf2.Length }, &.Surf2)
      };
      InitWrapPosVecArr = {None, &InitWrapPos, None };
    };
  };

  AnyMuscleShortestPath Extensor_Pollicis_Longus ={
    AnyMuscleModel &MusMdl = ...MuscleModels.Extensor_Pollicis_Longus;
    AnyRefNode &Org = ...Segments.Ulna.O_Extensor_Pollicis_Longus;
    AnyRefNode &Via1 = ...Segments.Radius.Via_Extensor_Pollicis_Longus;
    AnyRefNode &Via2 = ...Segments.Hand.Finger1MetaRef.Via1_Extensor_Pollicis_Longus;
    AnyRefNode &Ins = ...Segments.Hand.Finger1MetaRef.I_Extensor_Pollicis_Longus;
    viewMuscle = {#include "../DrawSettings/MusDrawSettings.any"};
    AnySurfCylinder &Surf2 = ...Segments.Radius.MedialExtensorCyl.cyl;

    SPLine.StringMesh = 45;
    SPLine.RelTol=0.0000001;
    SPLine = {
      AnyMatrix InitWrapPos = {
          transf3D({....Sign*1*.Surf2.Radius, 1.1*.Surf2.Radius, 0.3*.Surf2.Length }, &.Surf2)
      };
      InitWrapPosVecArr = {None, &InitWrapPos, None};
    };
  };
};

MuscleGroup ExtensorCarpiRadialis = {
  AnyMuscleShortestPath Extensor_Carpi_Radialis_Longus ={
    AnySurfCylinder &Surf1 = ...Segments.Radius.MedialExtensorCyl.cyl;
    AnyMuscleModel &MusMdl = ...MuscleModels.Extensor_Carpi_Radialis_Longus;
    AnyRefNode &Org = ...Segments.Humerus.O_Extensor_Carpi_Radialis_Longus;
    AnyRefNode &Via1 = ...Segments.Radius.Via_Extensor_Carpi_Radialis_Longus;
    AnyRefNode &Ins = ...Segments.Hand.Finger2MetaRef.I_Extensor_Carpi_Radialis_Longus;
    viewMuscle = {#include "../DrawSettings/MusDrawSettings.any"};
    SPLine.StringMesh = 45;
    SPLine.AbsTol=1e-6;
    SPLine.RelTol=1e-7;
    SPLine = {
      AnyMatrix InitWrapPos = transf3D({{....Sign*1*.Surf1.Radius, 1.1*.Surf1.Radius, 0.3*.Surf1.Length }}, &.Surf1);
      InitWrapPosVecArr = { None,&InitWrapPos };
    };
  };

  AnyMuscleShortestPath Extensor_Carpi_Radialis_Brevis ={
    AnyMuscleModel &MusMdl = ...MuscleModels.Extensor_Carpi_Radialis_Brevis;
    AnyRefNode &Org = ...Segments.Humerus.O_Extensor_Carpi_Radialis_Brevis;
    AnyRefNode &Via1 = ...Segments.Radius.Via_Extensor_Carpi_Radialis_Brevis;
    AnyRefNode &Via2 = ...Segments.Hand.Finger3MetaRef.Via_Extensor_Carpi_Radialis_Brevis;
    AnyRefNode &Ins = ...Segments.Hand.Finger3MetaRef.I_Extensor_Carpi_Radialis_Brevis;
    viewMuscle = {#include "../DrawSettings/MusDrawSettings.any"};

    AnySurfEllipsoid &Surf1 = ...Segments.Radius.ExtensorMuscleEllipsoid.ellipsoid;
    SPLine = {
      AnyMatrix InitWrapPos = {
        transf3D({-0.2*.Surf1.Radius[0],-0.6*.Surf1.Radius[1], ....Sign*0.9*.Surf1.Radius[2] }, &.Surf1 ),
        transf3D({-0.8*.Surf1.Radius[0],-0.5*.Surf1.Radius[1], ....Sign*0.8*.Surf1.Radius[2]  }, &.Surf1 )
      };
      InitWrapPosVecArr = {None,&InitWrapPos,None};
    };
    SPLine.StringMesh = 60;
    SPLine.RelTol=10e-6;
    SPLine.AbsTol=10e-6;
  };
};

MuscleGroup ExtensorCarpiUlnaris = {
  AnyMuscleShortestPath Extensor_Carpi_Ulnaris ={
    AnyMuscleModel &MusMdl = ...MuscleModels.Extensor_Carpi_Ulnaris;
    AnyRefNode &Org = ...Segments.Humerus.O_Extensor_Carpi_Ulnaris;
    AnyRefNode &Via1 = ...Segments.Ulna.Via1_Extensor_Carpi_Ulnaris;
  //  AnyRefNode &Via2 = ...Segments.Ulna.Via2_Extensor_Carpi_Ulnaris;
    AnyRefNode &Via2 = ...Segments.Radius.Via_Extensor_Carpi_Ulnaris;
    AnyRefNode &Ins = ...Segments.Hand.Finger5MetaRef.I_Extensor_Carpi_Ulnaris;
    AnySurfCylinder &Surf2 = ...Segments.Radius.MedialExtensorCyl.cyl;
    viewMuscle = {#include "../DrawSettings/MusDrawSettings.any"};
    SPLine.StringMesh = 35;
    SPLine.RelTol=0.0000001;
    SPLine = {
      AnyMatrix InitWrapPos = {transf3D({....Sign*-0.4*.Surf2.Radius, 1.1*.Surf2.Radius, 0.8*.Surf2.Length }, &.Surf2),
                              transf3D({....Sign*1.3*.Surf2.Radius, 0.5*.Surf2.Radius, 0.8*.Surf2.Length }, &.Surf2)};
      InitWrapPosVecArr = { None, None, &InitWrapPos};
    };
  };
};

MuscleGroup FlexorCarpiUlnaris = {
  AnyMuscleShortestPath Flexor_Carpi_Ulnaris  ={
    AnyMuscleModel &MusMdl = ...MuscleModels.Flexor_Carpi_Ulnaris;
    AnyRefNode &Org = ...Segments.Humerus.O_Flexor_Carpi_Ulnaris;
    AnyRefNode &Via1 = ...Segments.Ulna.Via1_Flexor_Carpi_Ulnaris;
    AnyRefNode &Via2 = ...Segments.Radius.Via_Flexor_Carpi_Ulnaris;
    AnyRefNode &Ins = ...Segments.Hand.Finger5MetaRef.I_Flexor_Carpi_Ulnaris;
    viewMuscle = {#include "../DrawSettings/MusDrawSettings.any"};
    AnySurfCylinder &Surf2 = ...Segments.Radius.FlexorMuscleCyl.cyl;
    SPLine.StringMesh = 30;
    SPLine = {
      AnyMatrix InitWrapPos = {
        transf3D({....Sign*-0.8*.Surf2.Radius, 1.2*.Surf2.Radius, 0.8*.Surf2.Length }, &.Surf2 ) ,
        transf3D({....Sign*0.1*.Surf2.Radius, 1.2*.Surf2.Radius, 0.8*.Surf2.Length }, &.Surf2 )
      };
      InitWrapPosVecArr = {None, None ,&InitWrapPos};
    };
  };
};

MuscleGroup FlexorCarpiRadialis = {
  AnyMuscleShortestPath Flexor_Carpi_Radialis  ={
    AnyMuscleModel &MusMdl = ...MuscleModels.Flexor_Carpi_Radialis;
    AnyRefNode &Org = ...Segments.Humerus.O_Flexor_Carpi_Radialis;
    AnyRefNode &Via2 = ...Segments.Radius.Via_Flexor_Carpi_Radialis;
    AnyRefNode &Ins = ...Segments.Hand.Finger2MetaRef.I_Flexor_Carpi_Radialis;
    viewMuscle = {#include "../DrawSettings/MusDrawSettings.any"};

    AnySurfEllipsoid &Surf1 = ...Segments.Radius.FlexorMuscleEllipsoid.ellipsoid;
    SPLine = {
      AnyMatrix InitWrapPos = {
        transf3D({-0.2*.Surf1.Radius[0],-0.5*.Surf1.Radius[1], ....Sign*-0.8*.Surf1.Radius[2] }, &.Surf1 ) ,
        transf3D({-0.8*.Surf1.Radius[0],-0.5*.Surf1.Radius[1], ....Sign*-0.7*.Surf1.Radius[2]  }, &.Surf1 )
      };
      InitWrapPosVecArr = {None,&InitWrapPos};
    };
    SPLine.StringMesh = 25;
    SPLine.RelTol=0.0000001;
  };
};

MuscleGroup PalmarisLongus = {
  AnyMuscleShortestPath Palmaris_Longus  ={
    AnyMuscleModel &MusMdl = ...MuscleModels.Palmaris_Longus;
    AnyRefNode &Org = ...Segments.Humerus.O_Palmaris_Longus;
    AnyRefNode &Via2 = ...Segments.Radius.Via_Palmaris_Longus;
    AnyRefNode &Ins = ...Segments.Hand.Finger4MetaRef.I_Palmaris_Longus;
    viewMuscle = {#include "../DrawSettings/MusDrawSettings.any"};

    AnySurfEllipsoid &Surf1 = ...Segments.Radius.FlexorMuscleEllipsoid.ellipsoid;
    SPLine = {
      AnyMatrix InitWrapPos = {
        transf3D({-0.2*.Surf1.Radius[0],0.1*.Surf1.Radius[1], ....Sign*-1.0*.Surf1.Radius[2] }, &.Surf1 ) ,
        transf3D({-0.8*.Surf1.Radius[0],0.1*.Surf1.Radius[1], ....Sign*-0.9*.Surf1.Radius[2]  }, &.Surf1 )
      };
      InitWrapPosVecArr = {None,&InitWrapPos};
    };
    SPLine.StringMesh = 25;
    SPLine.RelTol=0.0000001;
  };
};
MuscleGroup FlexorDigitorumSuperficialis = {
  AnyMuscleShortestPath Flexor_Digitorum_Superficialis__Digit5 ={
    AnyMuscleModel &MusMdl = ...MuscleModels.Flexor_Digitorum_Superficialis_Digit5;
    AnyRefNode &Org = ...Segments.Humerus.O_Flexor_Digitorum_Superficialis;
    AnyRefNode &Via1 = ...Segments.Radius.Via_Flexor_Digitorum_Superficialis_Digit5;
    AnyRefNode &Via2 = ...Segments.Hand.Finger5MetaRef.Via_Flexor_Digitorum_Superficialis_Digit5;
    AnyRefNode &Ins = ...Segments.Hand.Finger5MetaRef.I_Flexor_Digitorum_Superficialis_Digit5;
    viewMuscle = {#include "../DrawSettings/MusDrawSettings.any"};

    AnySurfEllipsoid &Surf1 = ...Segments.Radius.FlexorMuscleEllipsoid.ellipsoid;
    SPLine = {
      AnyMatrix InitWrapPos = {
        transf3D({-0.2*.Surf1.Radius[0],-0.2*.Surf1.Radius[1], ....Sign*-1.1*.Surf1.Radius[2] }, &.Surf1 ) ,
        transf3D({-0.8*.Surf1.Radius[0],-0.2*.Surf1.Radius[1], ....Sign*-1.0*.Surf1.Radius[2]  }, &.Surf1 )
      };
      InitWrapPosVecArr = {None,&InitWrapPos,None};
    };
    SPLine.StringMesh = 25;
    SPLine.RelTol=0.0000001;
  };

  AnyMuscleShortestPath Flexor_Digitorum_Superficialis__Digit4 ={
    AnyMuscleModel &MusMdl = ...MuscleModels.Flexor_Digitorum_Superficialis_Digit4;
    AnyRefNode &Org = ...Segments.Humerus.O_Flexor_Digitorum_Superficialis;
    AnyRefNode &Via1 = ...Segments.Radius.Via_Flexor_Digitorum_Superficialis_Digit4;
    AnyRefNode &Via2 = ...Segments.Hand.Finger4MetaRef.Via_Flexor_Digitorum_Superficialis_Digit4;
    AnyRefNode &Ins = ...Segments.Hand.Finger4MetaRef.I_Flexor_Digitorum_Superficialis_Digit4;
    viewMuscle = {#include "../DrawSettings/MusDrawSettings.any"};

    AnySurfEllipsoid &Surf1 = ...Segments.Radius.FlexorMuscleEllipsoid.ellipsoid;
    SPLine = {
      AnyMatrix InitWrapPos = {
        transf3D({-0.2*.Surf1.Radius[0],-0.3*.Surf1.Radius[1], ....Sign*-1.1*.Surf1.Radius[2] }, &.Surf1 ) ,
        transf3D({-0.8*.Surf1.Radius[0],-0.3*.Surf1.Radius[1], ....Sign*-1.0*.Surf1.Radius[2]  }, &.Surf1 )
      };
      InitWrapPosVecArr = {None,&InitWrapPos,None};
    };
    SPLine.StringMesh = 25;
    SPLine.RelTol=0.0000001;
  };

  AnyMuscleShortestPath Flexor_Digitorum_Superficialis__Digit3 ={
    AnyMuscleModel &MusMdl = ...MuscleModels.Flexor_Digitorum_Superficialis_Digit3;
    AnyRefNode &Org = ...Segments.Humerus.O_Flexor_Digitorum_Superficialis;
    AnyRefNode &Via1 = ...Segments.Radius.Via_Flexor_Digitorum_Superficialis_Digit3;
    AnyRefNode &Via2 = ...Segments.Hand.Finger3MetaRef.Via_Flexor_Digitorum_Superficialis_Digit3;
    AnyRefNode &Ins = ...Segments.Hand.Finger3MetaRef.I_Flexor_Digitorum_Superficialis_Digit3;
    viewMuscle = {#include "../DrawSettings/MusDrawSettings.any"};

    AnySurfEllipsoid &Surf1 = ...Segments.Radius.FlexorMuscleEllipsoid.ellipsoid;
    SPLine = {
      AnyMatrix InitWrapPos = {
        transf3D({-0.2*.Surf1.Radius[0],-0.4*.Surf1.Radius[1], ....Sign*-1.1*.Surf1.Radius[2] }, &.Surf1 ) ,
        transf3D({-0.8*.Surf1.Radius[0],-0.4*.Surf1.Radius[1], ....Sign*-1.0*.Surf1.Radius[2]  }, &.Surf1 )
      };
      InitWrapPosVecArr = {None,&InitWrapPos,None};
    };
    SPLine.StringMesh = 25;
    SPLine.RelTol=0.0000001;
  };
  AnyMuscleShortestPath Flexor_Digitorum_Superficialis__Digit2 ={
    AnyMuscleModel &MusMdl = ...MuscleModels.Flexor_Digitorum_Superficialis_Digit2;
    AnyRefNode &Org = ...Segments.Humerus.O_Flexor_Digitorum_Superficialis;
    AnyRefNode &Via1 = ...Segments.Radius.Via_Flexor_Digitorum_Superficialis_Digit2;
    AnyRefNode &Via2 = ...Segments.Hand.Finger2MetaRef.Via_Flexor_Digitorum_Superficialis_Digit2;
    AnyRefNode &Ins = ...Segments.Hand.Finger2MetaRef.I_Flexor_Digitorum_Superficialis_Digit2;
    viewMuscle = {#include "../DrawSettings/MusDrawSettings.any"};

    AnySurfEllipsoid &Surf1 = ...Segments.Radius.FlexorMuscleEllipsoid.ellipsoid;
    SPLine = {
      AnyMatrix InitWrapPos = {
        transf3D({-0.2*.Surf1.Radius[0],-0.5*.Surf1.Radius[1], ....Sign*-1.1*.Surf1.Radius[2] }, &.Surf1 ) ,
        transf3D({-0.8*.Surf1.Radius[0],-0.5*.Surf1.Radius[1], ....Sign*-1.0*.Surf1.Radius[2]  }, &.Surf1 )
      };
      InitWrapPosVecArr = {None,&InitWrapPos,None};
    };
    SPLine.StringMesh = 30;
  };
};

MuscleGroup FlexorDigitorumProfundus = {
  AnyMuscleShortestPath Flexor_Digitorum_Profundus__Digit5 ={
    AnyMuscleModel &MusMdl = ...MuscleModels.Flexor_Digitorum_Profundus_Digit5;
    AnyRefNode &Org = ...Segments.Ulna.O_Flexor_Digitorum_Profundus;
    AnyRefNode &Via1 = ...Segments.Radius.Via_Flexor_Digitorum_Profundus_Digit5;
    AnyRefNode &Via2 = ...Segments.Hand.Finger5MetaRef.Via_Flexor_Digitorum_Profundus_Digit5;
    AnyRefNode &Ins = ...Segments.Hand.Finger5MetaRef.I_Flexor_Digitorum_Profundus_Digit5;
    viewMuscle = {#include "../DrawSettings/MusDrawSettings.any"};

    AnySurfEllipsoid &Surf1 = ...Segments.Radius.FlexorMuscleEllipsoid.ellipsoid;
    SPLine = {
      AnyMatrix InitWrapPos = {
        transf3D({-0.2*.Surf1.Radius[0],-0.1*.Surf1.Radius[1], ....Sign*-1.0*.Surf1.Radius[2] }, &.Surf1 ) ,
        transf3D({-0.8*.Surf1.Radius[0],-0.1*.Surf1.Radius[1], ....Sign*-0.9*.Surf1.Radius[2]  }, &.Surf1 )
      };
      InitWrapPosVecArr = {None,&InitWrapPos,None};
    };
    SPLine.StringMesh = 35;
  };

  AnyMuscleShortestPath Flexor_Digitorum_Profundus__Digit4 ={
    AnyMuscleModel &MusMdl = ...MuscleModels.Flexor_Digitorum_Profundus_Digit4;
    AnyRefNode &Org = ...Segments.Ulna.O_Flexor_Digitorum_Profundus;
    AnyRefNode &Via1 = ...Segments.Radius.Via_Flexor_Digitorum_Profundus_Digit4;
    AnyRefNode &Via2 = ...Segments.Hand.Finger4MetaRef.Via_Flexor_Digitorum_Profundus_Digit4;
    AnyRefNode &Ins = ...Segments.Hand.Finger4MetaRef.I_Flexor_Digitorum_Profundus_Digit4;
    viewMuscle = {#include "../DrawSettings/MusDrawSettings.any"};

    AnySurfEllipsoid &Surf1 = ...Segments.Radius.FlexorMuscleEllipsoid.ellipsoid;
    SPLine = {
      AnyMatrix InitWrapPos = {
        transf3D({-0.2*.Surf1.Radius[0],-0.2*.Surf1.Radius[1], ....Sign*-1.0*.Surf1.Radius[2] }, &.Surf1 ) ,
        transf3D({-0.8*.Surf1.Radius[0],-0.2*.Surf1.Radius[1], ....Sign*-0.9*.Surf1.Radius[2]  }, &.Surf1 )
      };
      InitWrapPosVecArr = {None,&InitWrapPos,None};
    };
    SPLine.StringMesh = 35;
  };

  AnyMuscleShortestPath Flexor_Digitorum_Profundus__Digit3 ={
    AnyMuscleModel &MusMdl = ...MuscleModels.Flexor_Digitorum_Profundus_Digit3;
    AnyRefNode &Org = ...Segments.Ulna.O_Flexor_Digitorum_Profundus;
    AnyRefNode &Via1 = ...Segments.Radius.Via_Flexor_Digitorum_Profundus_Digit3;
    AnyRefNode &Via2 = ...Segments.Hand.Finger3MetaRef.Via_Flexor_Digitorum_Profundus_Digit3;
    AnyRefNode &Ins = ...Segments.Hand.Finger3MetaRef.I_Flexor_Digitorum_Profundus_Digit3;
    viewMuscle = {#include "../DrawSettings/MusDrawSettings.any"};

    AnySurfEllipsoid &Surf1 = ...Segments.Radius.FlexorMuscleEllipsoid.ellipsoid;
    SPLine = {
      AnyMatrix InitWrapPos = {
        transf3D({-0.2*.Surf1.Radius[0],-0.3*.Surf1.Radius[1], ....Sign*-1.0*.Surf1.Radius[2] }, &.Surf1 ) ,
        transf3D({-0.8*.Surf1.Radius[0],-0.3*.Surf1.Radius[1], ....Sign*-0.9*.Surf1.Radius[2]  }, &.Surf1 )
      };
      InitWrapPosVecArr = {None,&InitWrapPos,None};
    };
    SPLine.StringMesh = 35;
  };

  AnyMuscleShortestPath Flexor_Digitorum_Profundus__Digit2 ={
    AnyMuscleModel &MusMdl = ...MuscleModels.Flexor_Digitorum_Profundus_Digit2;
    AnyRefNode &Org = ...Segments.Ulna.O_Flexor_Digitorum_Profundus;
    AnyRefNode &Via1 = ...Segments.Radius.Via_Flexor_Digitorum_Profundus_Digit2;
    AnyRefNode &Via2 = ...Segments.Hand.Finger2MetaRef.Via_Flexor_Digitorum_Profundus_Digit2;
    AnyRefNode &Ins = ...Segments.Hand.Finger2MetaRef.I_Flexor_Digitorum_Profundus_Digit2;
    viewMuscle = {#include "../DrawSettings/MusDrawSettings.any"};

    AnySurfEllipsoid &Surf1 = ...Segments.Radius.FlexorMuscleEllipsoid.ellipsoid;
    SPLine = {
      AnyMatrix InitWrapPos = {
        transf3D({-0.2*.Surf1.Radius[0],-0.4*.Surf1.Radius[1], ....Sign*-1.0*.Surf1.Radius[2] }, &.Surf1 ) ,
        transf3D({-0.8*.Surf1.Radius[0],-0.4*.Surf1.Radius[1], ....Sign*-0.9*.Surf1.Radius[2]  }, &.Surf1 )
      };
      InitWrapPosVecArr = {None,&InitWrapPos,None};
    };
    SPLine.StringMesh = 35;
  };
};

MuscleGroup ExtensorDigitorum ={
  AnyMuscleShortestPath Extensor_Digitorum__Digit5 ={
    AnyMuscleModel &MusMdl = ...MuscleModels.Extensor_Digitorum_Digit5;
    AnyRefNode &Org = ...Segments.Humerus.O_Extensor_Digitorum;

    AnyRefNode &Via2 = ...Segments.Radius.Via_Extensor_Digitorum_Digit5;
    AnyRefNode &Via1 = ...Segments.Hand.Finger5MetaRef.Via_Extensor_Digitorum_Digit5;

    AnyRefNode &Ins = ...Segments.Hand.Finger5MetaRef.I_Extensor_Digitorum_Digit5;
    viewMuscle = {#include "../DrawSettings/MusDrawSettings.any"};

    AnySurfEllipsoid &Surf1 = ...Segments.Radius.ExtensorMuscleEllipsoid.ellipsoid;
    SPLine = {
      AnyMatrix InitWrapPos = {
        transf3D({-0.2*.Surf1.Radius[0],-0.1*.Surf1.Radius[1], ....Sign*1.0*.Surf1.Radius[2] }, &.Surf1 ) ,
        transf3D({-0.8*.Surf1.Radius[0],-0.05*.Surf1.Radius[1], ....Sign*1.0*.Surf1.Radius[2]  }, &.Surf1 )
      };
      InitWrapPosVecArr = {None,&InitWrapPos,None};
    };
    SPLine.StringMesh = 50;
    SPLine.RelTol=1e-7;
    SPLine.AbsTol=1e-5;
  };

  AnyMuscleShortestPath Extensor_Digitorum__Digit4 ={
    AnyMuscleModel &MusMdl = ...MuscleModels.Extensor_Digitorum_Digit4;
    AnyRefNode &Org = ...Segments.Humerus.O_Extensor_Digitorum;
    AnyRefNode &Via2 = ...Segments.Radius.Via_Extensor_Digitorum_Digit4;
    AnyRefNode &Via1 = ...Segments.Hand.Finger4MetaRef.Via_Extensor_Digitorum_Digit4;
    AnyRefNode &Ins = ...Segments.Hand.Finger4MetaRef.I_Extensor_Digitorum_Digit4;
    viewMuscle = {#include "../DrawSettings/MusDrawSettings.any"};

    AnySurfEllipsoid &Surf1 = ...Segments.Radius.ExtensorMuscleEllipsoid.ellipsoid;
    SPLine = {
      AnyMatrix InitWrapPos = {
        transf3D({-0.2*.Surf1.Radius[0],-0.2*.Surf1.Radius[1], ....Sign*1.0*.Surf1.Radius[2] }, &.Surf1 ) ,
        transf3D({-0.8*.Surf1.Radius[0],-0.15*.Surf1.Radius[1], ....Sign*1.0*.Surf1.Radius[2]  }, &.Surf1 )
      };
      InitWrapPosVecArr = {None,&InitWrapPos,None};
    };
    SPLine.StringMesh = 50;
    SPLine.RelTol=1e-7;
    SPLine.AbsTol=1e-5;
  };

  AnyMuscleShortestPath Extensor_Digitorum__Digit3 ={
    AnyMuscleModel &MusMdl = ...MuscleModels.Extensor_Digitorum_Digit3;
    AnyRefNode &Org = ...Segments.Humerus.O_Extensor_Digitorum;
    AnyRefNode &Via2 = ...Segments.Radius.Via_Extensor_Digitorum_Digit3;
    AnyRefNode &Via1 = ...Segments.Hand.Finger3MetaRef.Via_Extensor_Digitorum_Digit3;
    AnyRefNode &Ins = ...Segments.Hand.Finger3MetaRef.I_Extensor_Digitorum_Digit3;
    viewMuscle = {#include "../DrawSettings/MusDrawSettings.any"};

    AnySurfEllipsoid &Surf1 = ...Segments.Radius.ExtensorMuscleEllipsoid.ellipsoid;
    SPLine = {
      AnyMatrix InitWrapPos = {
        transf3D({-0.2*.Surf1.Radius[0],-0.3*.Surf1.Radius[1], ....Sign*1.0*.Surf1.Radius[2] }, &.Surf1 ) ,
        transf3D({-0.8*.Surf1.Radius[0],-0.25*.Surf1.Radius[1], ....Sign*1.0*.Surf1.Radius[2]  }, &.Surf1 )
      };
      InitWrapPosVecArr = {None,&InitWrapPos,None};
    };
    SPLine.StringMesh = 50;
    SPLine.RelTol=1e-7;
    SPLine.AbsTol=1e-5;
  };

  AnyMuscleShortestPath Extensor_Digitorum__Digit2 ={
    AnyMuscleModel &MusMdl = ...MuscleModels.Extensor_Digitorum_Digit2;
    AnyRefNode &Org = ...Segments.Humerus.O_Extensor_Digitorum;
    AnyRefNode &Via2 = ...Segments.Radius.Via_Extensor_Digitorum_Digit2;
    AnyRefNode &Via1 = ...Segments.Hand.Finger2MetaRef.Via_Extensor_Digitorum_Digit2;
    AnyRefNode &Ins = ...Segments.Hand.Finger2MetaRef.I_Extensor_Digitorum_Digit2;
    viewMuscle = {#include "../DrawSettings/MusDrawSettings.any"};

    AnySurfEllipsoid &Surf1 = ...Segments.Radius.ExtensorMuscleEllipsoid.ellipsoid;
    SPLine = {
      AnyMatrix InitWrapPos = {
        transf3D({-0.2*.Surf1.Radius[0],-0.4*.Surf1.Radius[1], ....Sign*1.0*.Surf1.Radius[2] }, &.Surf1 ) ,
        transf3D({-0.8*.Surf1.Radius[0],-0.35*.Surf1.Radius[1], ....Sign*1.0*.Surf1.Radius[2]  }, &.Surf1 )
      };
      InitWrapPosVecArr = {None,&InitWrapPos,None};
    };
    SPLine.StringMesh = 50;
  };
};

MuscleGroup ExtensorDigitiMinimi = {
  AnyMuscleShortestPath Extensor_Digiti_Minimi ={
    AnyMuscleModel &MusMdl = ...MuscleModels.Extensor_Digiti_Minimi;
    AnyRefNode &Org = ...Segments.Humerus.O_Extensor_Digiti_Minimi;
    AnyRefNode &Via1 = ...Segments.Radius.Via_Extensor_Digiti_Minimi;
    AnyRefNode &Via2 = ...Segments.Hand.Finger5MetaRef.Via_Extensor_Digiti_Minimi;
    AnyRefNode &Ins = ...Segments.Hand.Finger5MetaRef.I_Extensor_Digiti_Minimi;
    viewMuscle = {#include "../DrawSettings/MusDrawSettings.any"};

    AnySurfEllipsoid &Surf1 = ...Segments.Radius.ExtensorMuscleEllipsoid.ellipsoid;
    SPLine = {
      AnyMatrix InitWrapPos = {
        transf3D({-0.2*.Surf1.Radius[0],-0.05*.Surf1.Radius[1], ....Sign*1.0*.Surf1.Radius[2] }, &.Surf1 ) ,
        transf3D({-0.8*.Surf1.Radius[0],0.05*.Surf1.Radius[1], ....Sign*1.0*.Surf1.Radius[2]  }, &.Surf1 )
      };
      InitWrapPosVecArr = {None,&InitWrapPos,None};
    };
    SPLine.StringMesh = 30;
    SPLine.RelTol=1e-7;
    SPLine.AbsTol=1e-5;
  };
};

MuscleGroup FlexorPollicisLongus = {
  AnyMuscleShortestPath Flexor_Pollicis_Longus ={
    AnyMuscleModel &MusMdl = ...MuscleModels.Flexor_Pollicis_Longus;
    AnyRefNode &Org = ...Segments.Radius.O_Flexor_Pollicis_Longus;
    AnyRefNode &Via1 = ...Segments.Radius.Via_Flexor_Pollicis_Longus;
    AnyRefNode &Via2 = ...Segments.Hand.Finger1MetaRef.Via_Flexor_Pollicis_Longus;
    AnyRefNode &Ins = ...Segments.Hand.Finger1MetaRef.I_Flexor_Pollicis_Longus;
    viewMuscle = {#include "../DrawSettings/MusDrawSettings.any"};

    AnySurfEllipsoid &Surf1 = ...Segments.Radius.FlexorMuscleEllipsoid.ellipsoid;
    SPLine = {
      AnyMatrix InitWrapPos = {
        transf3D({-0.2*.Surf1.Radius[0],-0.6*.Surf1.Radius[1], ....Sign*-0.9*.Surf1.Radius[2] }, &.Surf1 ) ,
        transf3D({-0.8*.Surf1.Radius[0],-0.6*.Surf1.Radius[1], ....Sign*-0.8*.Surf1.Radius[2]  }, &.Surf1 )
      };
      InitWrapPosVecArr = {None,&InitWrapPos,None};
    };
    SPLine.StringMesh = 25;
    SPLine.RelTol=1e-7;
    SPLine.AbsTol=1e-5;
  };
};


AnyFolder Pectoralis_minor1_cyl={

  AnyFolder& pectoralis_ref =  .TrunkNodeAttachement.R3Seg.O_pectoralis_minor_1;
  pectoralis_ref = {
    AnyRefNode PectoralisWrapAttachement = {
      ARel = RotMat(-pi/2,x)*RotMat(pi/5*....Sign, x);
    };
  };
  #include "WrapperCyl.any"
  Cylinder = {
    LengthScale = 2.3;
    ScaleFactor = (
      vnorm(...Segments.Humerus.Data.I_subscapularis_1_pos - ...Segments.Humerus.Data.I_subscapularis_5_pos) /
      vnorm(...Segments.Humerus.I_subscapularis_1.sRel - ...Segments.Humerus.I_subscapularis_5.sRel)
    );
    Segment.Axes0 = ..TrunkNodeAttachement.R3Seg.Axes0 * RotMat(-pi/2,x)*RotMat(pi/5*...Sign,x)*RotMat(-0.25,y);
    Segment.r0 = ..TrunkNodeAttachement.R3Seg.r0 + ..TrunkNodeAttachement.R3Seg.O_pectoralis_minor_1.sRel*..TrunkNodeAttachement.R3Seg.Axes0';
    AnyRefNode &StartNode = .pectoralis_ref.PectoralisWrapAttachement;
    AnyRefNode &EndNode = ...Segments.Scapula.I_pectoralis_minor_1;
  };
};

AnySurfCylinder &oleacron = .Segments.Ulna.oleacranon.oleacranon;
AnySurfCylinder &pronatorterescyl = .Segments.Radius.PronatorTeresCyl.cyl;
AnySurfCylinder &supinatorcyl = .Segments.Radius.SupinatorCyl.cyl;
AnySurfSphere &art_tub_minus_tub_majusRef = .Segments.Humerus.art_tub_minus_tub_majus.art_tub_minus_tub_majusSurf;
AnySurfCylinder &bicepscyl = .Segments.Radius.BicepsCyl.cyl;
AnySurfEllipsoid &art_gh_humRef = .Segments.Humerus.art_gh_hum.art_gh_humSurf;
AnySurfCylinder &collum_hum = .Segments.Humerus.collum_hum.collum_hum;
AnySurfCylinder &collum_hum_teres_minor_major = .Segments.Humerus.collum_hum_teres_minor_major.cyl;
AnyParamSurf &tricpes_gh_sphere = .Segments.Humerus.tricpes_gh_sphere.surf;
AnySurfCylinder &condylus_hum = .Segments.Humerus.condylus_hum.cyl;
AnySurfCylinder &condylus_humT = .Segments.Humerus.condylus_humT.condylus_humT;
AnySurfCylinder &margo_medialis = .Segments.Scapula.margo_medialis.cyl;
AnySurfCylinder &deltoid_cyl = .Segments.Scapula.deltoid_cyl.cyl;
AnySurfCylinder &acromion_cyl = .Segments.Scapula.acromion_cyl.cyl;
AnySurfCylinder &coracoid_cyl = .Segments.Scapula.coracoid_cyl.cyl;
AnySurfCylinder &teresmajor_cyl = .Segments.Scapula.teres_major_cyl.cyl;

#include "ThoraxWrappingSurfaces.any"
