//This is included from jnt.any when no shoulder rhythm is included.
// This is its own include file, so the calibration studies can reuse
// the drivers.

//Replaced by rhythm.
AnyKinEqSimpleDriver ScapulaTSThoraxNodeDriver =
{
  AnyKinPointSurface &Measure1=.ScapulaTSThoraxMeasure ;
  DriverPos = {0};
  DriverVel = {0};
  Reaction.Type = {Off};
};

AnyReacForce ScapulaTSThorax_ContactReaction = {
  Type = NonNegative;
  AnyKinPointSurface &ref=.ScapulaTSThoraxNodeDriver.Measure1 ;
};


//Replaced by rhythm
AnyKinEqSimpleDriver ConoideumLigamentDrv ={
  //This is the position of origo of clavicula unscaled
  AnyVec3  ClaviculaRStd=(-..Seg.Clavicula.NeutralPositionOnPelvis.StandardsRel*..Seg.Clavicula.Mirror)*..Seg.Clavicula.NeutralPositionOnPelvis.Clavicula_Axes';

  //This the position of conoid node on clavicual unscaled
  AnyVec3  ClaviculaConoidR=ClaviculaRStd+ (..Seg.Clavicula.ConoidStd*..Seg.Clavicula.Mirror)*..Seg.Clavicula.NeutralPositionOnPelvis.Clavicula_Axes';

  //This is the position of origo of Scapula unscaled
  AnyVec3  ScapulaRStd=(-..Seg.Scapula.NeutralPositionOnPelvis.StandardsRel*..Seg.Scapula.Mirror)*..Seg.Scapula.NeutralPositionOnPelvis.Scapula_Axes';

  //This the position of conoid node on clavicual unscaled
  AnyVec3  ScapulaConoidR=ScapulaRStd+ (..Seg.Scapula.ConoidStd*..Seg.Scapula.Mirror)*..Seg.Scapula.NeutralPositionOnPelvis.Scapula_Axes';

  AnyVec3 StandardConoidVector= ClaviculaConoidR-ScapulaConoidR;

  // This scaling factor measures unscaled and scaled thickness of scapula segment to assess the relative change in conoid ligament
  AnyVar ScaleFactor = vnorm(..Seg.Scapula.Data.O_deltoideus_scapular_part_5_pos -..Seg.Scapula.Data.O_deltoideus_scapular_part_3_pos)
    / vnorm (..Seg.Scapula.O_deltoideus_scapular_part_5.sRel -..Seg.Scapula.O_deltoideus_scapular_part_3.sRel);

  AnyFloat ScaleStdConoidVectorLength = vnorm(StandardConoidVector)*ScaleFactor;

  AnyKinPLine &ref=.ConoideumLigament;
  DriverPos={ScaleStdConoidVectorLength};
  DriverVel={0};
  Reaction.Type={Off};
};
