//This file defines artificial muscles working on the universal joint in the wrist.
AnyKinMeasureOrg FlexionExtension={
  AnyRevoluteJoint &jnt =..Jnt.WristJointFlexion;
  MeasureOrganizer={0};
};

AnyKinMeasureOrg AbductionAdduction={
  AnyRevoluteJoint &jnt =..Jnt.WristJointDeviation;
  MeasureOrganizer={0};
};

//Data taken from "Krafteatlas Teil 1 Datenauswertung statisher aktionskrafte"
//Schriftenreihe der Bundesanstalt fur Arbeitsmedizin
//Table 35: Vertikale Zug- und Druckkrafte des armes
//The momentarm has been set to 0.05 m this is a guesstimate
AnyMuscleModel WristExtensionMuscle={
  F0=440*0.05;
};

AnyMuscleModel WristFlexionMuscle={
  F0=440*0.05;
};

AnyMuscleModel WristAbductionMuscle={
  F0=440*0.05;
};
AnyMuscleModel WristAdductionMuscle={
  F0=440*0.05;
};

//Definition of wrist joint
AnyGeneralMuscle WristFlexion ={
  AnyKinMeasureOrg &ref1=.FlexionExtension;
  AnyMuscleModel &ref2=.WristFlexionMuscle;
  ForceDirection=-1;
};

//Definition of wrist joint
AnyGeneralMuscle WristExtension ={
  AnyKinMeasureOrg &ref1=.FlexionExtension;
  AnyMuscleModel &ref2=.WristFlexionMuscle;
  ForceDirection=1;
};

//Definition of wrist joint
AnyGeneralMuscle WristAbduction ={
    AnyKinMeasureOrg &ref1=.AbductionAdduction;
  AnyMuscleModel &ref2=.WristAbductionMuscle;
  ForceDirection=-1;
};

//Definition of wrist joint
AnyGeneralMuscle WristAdduction ={
    AnyKinMeasureOrg &ref1=.AbductionAdduction;
  AnyMuscleModel &ref2=.WristAdductionMuscle;
  ForceDirection=1;
};
