  AnyFolder StandardParameters = {
    #include "..\Include\BodyParameters.any"

    AnyFolder &Pelvis = ..BodyModel.Trunk.Data.unscaled.StandardParameters.Pelvis;
    AnyFolder &Thorax = ..BodyModel.Trunk.Data.unscaled.StandardParameters.Thorax;
    AnyFolder &Trunk = ..BodyModel.Trunk.Data.unscaled.StandardParameters.Trunk;
    AnyFolder &Head = ..BodyModel.Trunk.Data.unscaled.StandardParameters.Head;
    AnyFolder &CervicalSpine = ..BodyModel.Trunk.Data.unscaled.StandardParameters.CervicalSpine;
    AnyFolder &Neck = ..BodyModel.Trunk.Data.unscaled.StandardParameters.Neck;
    AnyFolder &Lumbar = ..BodyModel.Trunk.Data.unscaled.StandardParameters.Lumbar;
    AnyFolder &HeadWithoutNeck = ..BodyModel.Trunk.Data.unscaled.StandardParameters.HeadWithoutNeck;

    #include "..\..\Arm\StandardParameters.any"

    #if BM_LEG_MODEL_IS_TLEM
     AnyFolder Right = {
       #include "<BM_LEG_TLEM_PATH>\StandardParameters.any"
       #include "..\..\FootGM\StandardParameters.any"
     };
     AnyFolder Left  = {
       #include "<BM_LEG_TLEM_PATH>\StandardParameters.any"
       #include "..\..\FootGM\StandardParameters.any"
     };
    #else
     AnyFolder Right = {#include "..\..\Leg\StandardParameters.any"};
     AnyFolder Left  = {#include "..\..\Leg\StandardParameters.any"};
    #endif
  };
