//
// !!! THIS IS AN AUTOMATICALLY GENERATED FILE. DO NOT MODIFY IT !!!
//

#ifndef BM_CONSTANTS_DECLARED

#define ON 1

#define OFF 0

#define CONST_MUSCLES_NONE 0

#define CONST_MUSCLES_SIMPLE 1

#define CONST_MUSCLES_3E_HILL 2

#define CONST_HAND_SIMPLE 0

#define CONST_HAND_DETAILED 1

#define CONST_LEG_MODEL_OFF "OFF"

#define CONST_LEG_MODEL_Leg "Leg"

#define CONST_LEG_MODEL_TLEM "TLEM"

#define CONST_MORPH_NONE 0

#define CONST_MORPH_TRUNK_TO_LEG 1

#define CONST_MORPH_LEG_TO_TRUNK 2

#define CONST_PELVIS_DISPLAY_NONE 0

#define CONST_PELVIS_DISPLAY_LEGPELVIS_ONLY 1

#define CONST_PELVIS_DISPLAY_LEGANDTRUNKPELVIS 2

#define CONST_DISC_STIFFNESS_NONE 0

#define CONST_DISC_STIFFNESS_LINEAR 1

#define CONST_DISC_STIFFNESS_NONLINEAR  2

#define CONST_SCALING_CUSTOM -1

#define CONST_SCALING_STANDARD 0

#define CONST_SCALING_UNIFORM 1

#define CONST_SCALING_LENGTHMASS 2

#define CONST_SCALING_LENGTHMASSFAT 3

#define CONST_SCALING_UNIFORM_EXTMEASUREMENTS 4

#define CONST_SCALING_LENGTHMASS_EXTMEASUREMENTS 5

#define CONST_SCALING_LENGTHMASSFAT_EXTMEASUREMENTS 6

#define CONST_SCALING_LENGTHMASSFAT_MULTIDOFS 7

#define _1PARAMETER_CALIBRATION_ 1

#define _2PARAMETER_CALIBRATION_ 2

#define BM_CONSTANTS_DECLARED

#endif
