/*
Template to easily create a folder with default
values which can be overriden from other places in
the model. This usefull for setting etc. where end
user needs to be able to override the values.

      DEFAULT_PARAMETERS_FOLDER Settings(
          NPARAM = 2,
          VAR1 = TibialRotation, VAR2_TYPE = AnyMat33,
          VAR2 = Offset, VAR2_TYPE = AnyVar
      ) = {
          // Default values are specified with _default_ prefix.
          AnyMat33 _default_TibialRotation = RotMat(5*pi/180,y);
          AnyVar _default_Offset = 0.005;
      };

      // Parameters can now be overridden
      Settings.TibialRotation = RotMat(10*pi/180,y);

*/

#class_template DEFAULT_PARAMETERS_FOLDER (
    NPARAM=1,
    VAR1 =_, VAR1_TYPE = AnyVar,
    VAR2 =_, VAR2_TYPE = AnyVar,
    VAR3 =_, VAR3_TYPE = AnyVar,
    VAR4 =_, VAR4_TYPE = AnyVar,
    VAR5 =_, VAR5_TYPE = AnyVar,
    VAR6 =_, VAR6_TYPE = AnyVar,
    VAR7 =_, VAR7_TYPE = AnyVar,
    VAR8 =_, VAR8_TYPE = AnyVar,
    VAR9 =_, VAR9_TYPE = AnyVar,
    VAR10=_, VAR10_TYPE = AnyVar,
    VAR11=_, VAR11_TYPE = AnyVar,
    VAR12=_, VAR12_TYPE = AnyVar,
    VAR13=_, VAR13_TYPE = AnyVar,
    VAR14=_, VAR14_TYPE = AnyVar,
    VAR15=_, VAR15_TYPE = AnyVar,
    VAR16=_, VAR16_TYPE = AnyVar,
    VAR17=_, VAR17_TYPE = AnyVar,
    VAR18=_, VAR18_TYPE = AnyVar,
    VAR19=_, VAR19_TYPE = AnyVar,
    VAR20=_, VAR20_TYPE = AnyVar,
    VAR21=_, VAR21_TYPE = AnyVar,
    VAR22=_, VAR22_TYPE = AnyVar,
    VAR23=_, VAR23_TYPE = AnyVar,
    VAR24=_, VAR24_TYPE = AnyVar,
    VAR25=_, VAR25_TYPE = AnyVar,
    VAR26=_, VAR26_TYPE = AnyVar,
    VAR27=_, VAR27_TYPE = AnyVar,
    VAR28=_, VAR28_TYPE = AnyVar,
    VAR29=_, VAR29_TYPE = AnyVar,
    VAR30=_, VAR30_TYPE = AnyVar,
    VAR31=_, VAR31_TYPE = AnyVar,
    VAR32=_, VAR32_TYPE = AnyVar,
    VAR33=_, VAR33_TYPE = AnyVar,
    VAR34=_, VAR34_TYPE = AnyVar,
    VAR35=_, VAR35_TYPE = AnyVar,
    VAR36=_, VAR36_TYPE = AnyVar,
    VAR37=_, VAR37_TYPE = AnyVar,
    VAR38=_, VAR38_TYPE = AnyVar,
    VAR39=_, VAR39_TYPE = AnyVar,
    VAR40=_, VAR40_TYPE = AnyVar,
    VAR36=_, VAR36_TYPE = AnyVar
 ){
#if NPARAM>=1
      #var VAR1_TYPE VAR1  = _default_##VAR1;
#endif
#if NPARAM>=2
      #var VAR2_TYPE VAR2  = _default_##VAR2;
#endif
#if NPARAM>=3
      #var VAR3_TYPE VAR3  = _default_##VAR3;
#endif
#if NPARAM>=4
      #var VAR4_TYPE VAR4  = _default_##VAR4;
#endif
#if NPARAM>=5
      #var VAR5_TYPE VAR5  = _default_##VAR5;
#endif
#if NPARAM>=6
      #var VAR6_TYPE VAR6  = _default_##VAR6;
#endif
#if NPARAM>=7
      #var VAR7_TYPE VAR7  = _default_##VAR7;
#endif
#if NPARAM>=8
      #var VAR8_TYPE VAR8  = _default_##VAR8;
#endif
#if NPARAM>=9
      #var VAR9_TYPE VAR9  = _default_##VAR9;
#endif
#if NPARAM>=10
      #var VAR10_TYPE VAR10 = _default_##VAR10;
#endif
#if NPARAM>=11
      #var VAR11_TYPE VAR11 = _default_##VAR11;
#endif
#if NPARAM>=12
      #var VAR12_TYPE VAR12 = _default_##VAR12;
#endif
#if NPARAM>=13
      #var VAR13_TYPE VAR13 = _default_##VAR13;
#endif
#if NPARAM>=14
      #var VAR14_TYPE VAR14 = _default_##VAR14;
#endif
#if NPARAM>=15
      #var VAR15_TYPE VAR15 = _default_##VAR15;
#endif
#if NPARAM>=16
      #var VAR16_TYPE VAR16 = _default_##VAR16;
#endif
#if NPARAM>=17
      #var VAR17_TYPE VAR17 = _default_##VAR17;
#endif
#if NPARAM>=18
      #var VAR18_TYPE VAR18 = _default_##VAR18;
#endif
#if NPARAM>=19
      #var VAR19_TYPE VAR19 = _default_##VAR19;
#endif
#if NPARAM>=20
      #var VAR20_TYPE VAR20 = _default_##VAR20;
#endif
#if NPARAM>=21
      #var VAR21_TYPE VAR21 = _default_##VAR21;
#endif
#if NPARAM>=22
      #var VAR22_TYPE VAR22 = _default_##VAR22;
#endif
#if NPARAM>=23
      #var VAR23_TYPE VAR23 = _default_##VAR23;
#endif
#if NPARAM>=24
      #var VAR24_TYPE VAR24 = _default_##VAR24;
#endif
#if NPARAM>=25
      #var VAR25_TYPE VAR25 = _default_##VAR25;
#endif
#if NPARAM>=26
      #var VAR26_TYPE VAR26 = _default_##VAR26;
#endif
#if NPARAM>=27
      #var VAR27_TYPE VAR27 = _default_##VAR27;
#endif
#if NPARAM>=28
      #var VAR28_TYPE VAR28 = _default_##VAR28;
#endif
#if NPARAM>=29
      #var VAR29_TYPE VAR29 = _default_##VAR29;
#endif
#if NPARAM>=30
      #var VAR30_TYPE VAR30 = _default_##VAR30;
#endif
#if NPARAM>=31
      #var VAR31_TYPE VAR31 = _default_##VAR31;
#endif
#if NPARAM>=32
      #var VAR32_TYPE VAR32 = _default_##VAR32;
#endif
#if NPARAM>=33
      #var VAR33_TYPE VAR33 = _default_##VAR33;
#endif
#if NPARAM>=34
      #var VAR34_TYPE VAR34 = _default_##VAR34;
#endif
#if NPARAM>=35
      #var VAR35_TYPE VAR35 = _default_##VAR35;
#endif
#if NPARAM>=36
      #var VAR36_TYPE VAR36 = _default_##VAR36;
#endif
#if NPARAM>=37
      #var VAR37_TYPE VAR37 = _default_##VAR37;
#endif
#if NPARAM>=38
      #var VAR38_TYPE VAR38 = _default_##VAR38;
#endif
#if NPARAM>=39
      #var VAR39_TYPE VAR39 = _default_##VAR39;
#endif
#if NPARAM>=40
      #var VAR40_TYPE VAR40 = _default_##VAR40;
#endif
};
