Left = {

  AnyFolder ShoulderArm = {

      AnyFolder &Scaling = ...Scaling.GeometricalScaling.Left;
      AnyFolder &MassScaling = ...Scaling.MassScaling.Left;
      AnyFolder &StrengthScaling = ...Scaling.StrengthScaling.Left;

      #define _LEFT_RIGHT_ "Left"
      #define _SIDE_ Left

      #include "..\..\Arm\ShoulderArmModel.root.any"

      #undef _SIDE_
      #undef _LEFT_RIGHT_

      //Reference to interface folder
      AnyFolder &InterfaceFolder =..Interface.Left;

      //Reference to folder
      AnyFolder &MannequinValuesFolder = ..MannequinValuesFromModel.AnyFolder_Posture.AnyFolder_Left;

      #include "../Include/SettingsShoulderArm.any"

      //-------------------------------------------------------
      // Interface references that specifies what the arm "Arm/ShoulderArm.any" should connect to
      //-------------------------------------------------------
      //This point is used for attachement of the arm to the shoulder
      AnyRefFrame &ShoulderRef = ..Trunk.Segments.SternumSeg.iji;


      AnyRefFrame &PelvisRef=..Trunk.Segments.PelvisSeg.Left;
      AnyRefFrame &L1Ref=..Trunk.Segments.L1Seg.Left;
      AnyRefFrame &L2Ref=..Trunk.Segments.L2Seg.Left;
      AnyRefFrame &L3Ref=..Trunk.Segments.L3Seg.Left;
      AnyRefFrame &L4Ref=..Trunk.Segments.L4Seg.Left;
      AnyRefFrame &L5Ref=..Trunk.Segments.L5Seg.Left;
      AnyFolder &TrunkFolderRef=..Trunk;
      AnyRefFrame &ThoraxRef=..Trunk.Segments.T1Seg.Left;
      AnyRefFrame &SkullSegRef =..Trunk.Segments.SkullSeg.Left;
      AnyRefFrame &C1SegRef =..Trunk.Segments.C1Seg.Left;
      AnyRefFrame &C2SegRef =..Trunk.Segments.C2Seg.Left;
      AnyRefFrame &C3SegRef =..Trunk.Segments.C3Seg.Left;
      AnyRefFrame &C4SegRef =..Trunk.Segments.C4Seg.Left;
      AnyRefFrame &C5SegRef =..Trunk.Segments.C5Seg.Left;
      AnyRefFrame &C6SegRef =..Trunk.Segments.C6Seg.Left;
      AnyRefFrame &C7SegRef =..Trunk.Segments.C7Seg.Left;
      AnyRefFrame &R1Ref=..Trunk.Segments.Left.R1Seg;
      AnyRefFrame &R2Ref=..Trunk.Segments.Left.R2Seg;
      AnyRefFrame &R3Ref=..Trunk.Segments.Left.R3Seg;
      AnyRefFrame &R4Ref=..Trunk.Segments.Left.R4Seg;
      AnyRefFrame &R5Ref=..Trunk.Segments.Left.R5Seg;
      AnyRefFrame &R6Ref=..Trunk.Segments.Left.R6Seg;
      AnyRefFrame &R7Ref=..Trunk.Segments.Left.R7Seg;
      AnyRefFrame &R8Ref=..Trunk.Segments.Left.R8Seg;
      AnyRefFrame &R9Ref=..Trunk.Segments.Left.R9Seg;
      AnyRefFrame &R10Ref=..Trunk.Segments.Left.R10Seg;
      AnyRefFrame &T1Ref=..Trunk.Segments.T1Seg.Left;
      AnyRefFrame &T2Ref=..Trunk.Segments.T2Seg.Left;
      AnyRefFrame &T3Ref=..Trunk.Segments.T3Seg.Left;
      AnyRefFrame &T4Ref=..Trunk.Segments.T4Seg.Left;
      AnyRefFrame &T5Ref=..Trunk.Segments.T5Seg.Left;
      AnyRefFrame &T6Ref=..Trunk.Segments.T6Seg.Left;
      AnyRefFrame &T7Ref=..Trunk.Segments.T7Seg.Left;
      AnyRefFrame &T8Ref=..Trunk.Segments.T8Seg.Left;
      AnyRefFrame &T9Ref=..Trunk.Segments.T9Seg.Left;
      AnyRefFrame &T10Ref=..Trunk.Segments.T10Seg.Left;
      AnyRefFrame &T11Ref=..Trunk.Segments.T11Seg.Left;
      AnyRefFrame &T12Ref=..Trunk.Segments.T12Seg.Left;
      AnyRefFrame &ManubriumRef=..Trunk.Segments.SternumSeg.Left;
      AnyRefFrame &SternalBodyRef=..Trunk.Segments.SternalBodySeg.Left;

      //This is a sign variable which indicates that this is the right side
      AnyVar Sign =-1;

      AnyFolder BonesOpacity = {
        AnyVar Clavicula = Main.DrawSettings.BonesOpacity.LeftClavicula;
        AnyVar Scapula = Main.DrawSettings.BonesOpacity.LeftScapula;
        AnyVar Humerus = Main.DrawSettings.BonesOpacity.LeftHumerus;
        AnyVar Ulna = Main.DrawSettings.BonesOpacity.LeftUlna;
        AnyVar Radius = Main.DrawSettings.BonesOpacity.LeftRadius;
        AnyVar Hand = Main.DrawSettings.BonesOpacity.LeftHand;
      };

      AnyFolder MomentMeasure=
      {
           #include "..\..\Arm\ArmMoments.any"
      };

    }; //End ShoulderArm

  };


  #include "../../Arm/LeftArmMusclesSelectedOutput.any"
