  AnyFolder Right={
    //Reference to folder containing joint angles used for initial positions
    AnyFolder &JointPos=..Mannequin.Posture.Right;
  };//Right

  Interface = {
    AnyFolder Right ={};
  };


  MannequinValuesFromModel.AnyFolder_Posture = {
    AnyFolder AnyFolder_Right = {};
  };


  SelectedOutput = {
    AnyFolder Right = {};
  };
