Right = {

  AnyFolder Leg = {

    #include "..\..\Leg\LegMus3E.root.any"

      //Reference to folder which contains the interface of the right side
      AnyFolder &InterfaceFolder =..Interface.Right;

      //Reference to mannequin value from model folder
      AnyFolder &MannequinValuesFolder = ..MannequinValuesFromModel.AnyFolder_Posture.AnyFolder_Right;


      #include "../Include/SettingsLeg.any"

      //This is a sign variable which indicates that this is the right side
      AnyVar Sign =1;

      //-------------------------------------------------------
      // Interface references that specifies what the leg "Leg/Leg.any" should connect to
      //-------------------------------------------------------
      // INPUT

      AnyRefFrame &HipNodeRef= ..Trunk.SegmentsLumbar.PelvisSeg.HipJointRight;

      AnyFolder BonesTransparency = {
        AnyVar Foot = Main.DrawSettings.BonesTransparency.RightFoot;
        AnyVar Shank =Main.DrawSettings.BonesTransparency.RightShank;
        AnyVar Thigh = Main.DrawSettings.BonesTransparency.RightThigh;
      };


      AnyFolder MomentMeasure={
        AnyFolder &TrunkMuscles = ...Trunk.MusclesSpineRight;
        #include "..\..\Leg\LegMoments.any"
      };

    };//End Leg

  };


    Trunk = {
    AnyRefFrame &PsoasMajorRightReference=.Right.Leg.Seg.Thigh;
    };


    #include "../../Leg/RightLegMuscles3ESelectedOutput.any"
