Right = {

  AnyFolder Leg = {

    #include "..\..\LegTD\LegNoMuscles.root.any"

      //Reference to folder which contains the interface of the right side
      AnyFolder &InterfaceFolder =..Interface.Right;

      //Reference to mannequin value from model folder
      AnyFolder &MannequinValuesFolder = ..MannequinValuesFromModel.AnyFolder_Posture.AnyFolder_Right;


      #include "../Include/SettingsLeg.any"

      AnyFolder &Scaling =...Scaling;
      AnyFolder &StandardParameters =...Scaling.StandardParameters.Right;
      AnyFolder &GeoScaling =...Scaling.GeometricalScaling.Right;
      AnyFolder &MassScaling =...Scaling.MassScaling.Right;
      AnyFolder &FiberLengthScaling =...Scaling.FiberLengthScaling.Right;
      AnyFolder &StrengthScaling =...Scaling.StrengthScaling.Right;

      //This is a sign variable which indicates that this is the right side
      AnyVar Sign =1;

      //-------------------------------------------------------
      // Interface references that specifies what the leg "Leg/Leg.any" should connect to
      //-------------------------------------------------------
      // INPUT

      AnyRefFrame &HipNodeRef= ..Trunk.SegmentsLumbar.PelvisSeg.HipJointRightTD;

      AnyFolder BonesOpacity = {
        AnyVar Foot = Main.DrawSettings.BonesOpacity.RightFoot;
        AnyVar Shank = Main.DrawSettings.BonesOpacity.RightShank;
        AnyVar Thigh = Main.DrawSettings.BonesOpacity.RightThigh;
        AnyVar Talus = Main.DrawSettings.BonesOpacity.RightTalus;
        AnyVar Patella = Main.DrawSettings.BonesOpacity.RightPatella;
      };


      AnyFolder MomentMeasure={
        AnyForceMomentMeasure KneeJointReactionMoments =
        {
          AnyForceBase &Force = ..Jnt.Knee.Constraints.Reaction;
          AnyRefFrame &Thighknee = ..Seg.Thigh.KneeJoint;
          AnyVec3 Mlocal = M*Thighknee.Axes;
        };

        AnyForceMomentMeasure AnkleJointReactionMoments =
        {
          AnyForceBase &Force = ..Jnt.Ankle.Constraints.Reaction;
          AnyRefFrame &Shankankle = ..Seg.Shank.AnkleJoint;
          AnyVec3 Mlocal = M*Shankankle.Axes;
        };
      };

    };//End Leg

  };


    Trunk = {
    AnyRefFrame &PsoasMajorRightReference=.Right.Leg.Seg.Thigh;
    };

    #include "../../LegTD/RightLegNoMusclesSelectedOutput.any"
