AnyFolder LigamentsTarsal = {

  AnyFolder &Seg = ..Seg;


  AnySearchFun MusForceList =
  {
    Search = ".*.LigMus*.Fm";
  };


  AnyVar MusForceSum = sum(MusForceList());


  //**************************************************************************************************
  // Ligaments
  //**************************************************************************************************
  //References for conditional strength of artificial muscles above.
  //AnyFolder &MtTransversumProfundumLigRef = .MtTransversumProfundum;
  AnyFolder &TibioNavicularLigRef = .CollateralMedial.TibioNavicular;
  AnyFolder &CalcaneoNavicularPlantar1LigRef = .CalcaneoNavicularPlantar.CalcaneoNavicularPlantar1;
  AnyFolder &CalcaneoNavicularPlantar2LigRef = .CalcaneoNavicularPlantar.CalcaneoNavicularPlantar2;
  AnyFolder &CalcaneoNavicularPlantar3LigRef = .CalcaneoNavicularPlantar.CalcaneoNavicularPlantar3;
  AnyFolder &CalcaneoCuboidPlantar1LigRef = .CalcaneoCuboidPlantar.CalcaneoCuboidPlantar1;
  AnyFolder &CalcaneoCuboidPlantar2LigRef = .CalcaneoCuboidPlantar.CalcaneoCuboidPlantar2;


  AnyViaPointLigament TaloNavicularDorsal1Lig= {
    AnyRefFrame &ref1 = .Seg.Talus.LigTaloNavicularDorsalNode1;
    AnyRefFrame &ref2 = .Seg.Navicular.LigTaloNavicularDorsalNode1;
    #include "LigDriverAndMuscle.any"
    AnyFolder &LigParms=..LigParams.TaloNavicularDorsal1Lig;
    AnyVar StiffScale=..FootLigStiffnessScale;
    #include "LigParms.any"
  };


  AnyViaPointLigament TaloNavicularDorsal2Lig = {

    AnyRefFrame &ref1 = .Seg.Talus.LigTaloNavicularDorsalNode2;
    AnyRefFrame &ref2 = .Seg.Navicular.LigTaloNavicularDorsalNode2;
    #include "LigDriverAndMuscle.any"
    AnyFolder &LigParms=..LigParams.TaloNavicularDorsal2Lig;
    AnyVar StiffScale=..FootLigStiffnessScale;
    #include "LigParms.any"
  };


  AnyViaPointLigament CalcaneoNavicularBifurcateLig = {

    AnyRefFrame &ref1 = .Seg.Calcaneus.LigBifurcateNode;
    AnyRefFrame &ref2 = .Seg.Navicular.LigCalcaneoNavicularBifurcateNode;
    #include "LigDriverAndMuscle.any"
    AnyFolder &LigParms=..LigParams.CalcaneoNavicularBifurcateLig;
    AnyVar StiffScale=..FootLigStiffnessScale;
    #include "LigParms.any"

  };


  AnyViaPointLigament CalcaneoCuboidBifurcateLig = {

    AnyRefFrame &ref1 = .Seg.Calcaneus.LigBifurcateNode;
    AnyRefFrame &ref2 = .Seg.Cuboid.LigCalcaneoCuboidBifurcateNode;
    #include "LigDriverAndMuscle.any"
    AnyFolder &LigParms=..LigParams.CalcaneoCuboidBifurcateLig;
    AnyVar StiffScale=..FootLigStiffnessScale;
    #include "LigParms.any"

  };


  AnyViaPointLigament CalcaneoCuboidDorsal1Lig = {
    AnyRefFrame &ref1 = .Seg.Calcaneus.LigCalcaneoCuboidDorsalNode1;
    AnyRefFrame &ref2 = .Seg.Cuboid.LigCalcaneoCuboidDorsalNode1;
    #include "LigDriverAndMuscle.any"
    AnyFolder &LigParms=..LigParams.CalcaneoCuboidBifurcateLig;
    AnyVar StiffScale=..FootLigStiffnessScale;
    #include "LigParms.any"

  };


  AnyViaPointLigament CalcaneoCuboidDorsal2Lig = {

    AnyRefFrame &ref1 = .Seg.Calcaneus.LigCalcaneoCuboidDorsalNode2;
    AnyRefFrame &ref2 = .Seg.Cuboid.LigCalcaneoCuboidDorsalNode2;
    #include "LigDriverAndMuscle.any"
    AnyFolder &LigParms=..LigParams.CalcaneoCuboidDorsal2Lig;
    AnyVar StiffScale=..FootLigStiffnessScale;
    #include "LigParms.any"

  };


  AnyViaPointLigament CalcaneoCuboidDorsal3Lig = {
    AnyRefFrame &ref1 = .Seg.Calcaneus.LigCalcaneoCuboidDorsalNode3;
    AnyRefFrame &ref2 = .Seg.Cuboid.LigCalcaneoCuboidDorsalNode3;
    #include "LigDriverAndMuscle.any"
    AnyFolder &LigParms=..LigParams.CalcaneoCuboidDorsal3Lig;
    AnyVar StiffScale=..FootLigStiffnessScale;
    #include "LigParms.any"

  };
  AnyViaPointLigament CalcaneoCuboidDorsal4Lig = {
    AnyRefFrame &ref1 = .Seg.Calcaneus.LigCalcaneoCuboidDorsalNode4;
    AnyRefFrame &ref2 = .Seg.Cuboid.LigCalcaneoCuboidDorsalNode4;
    #include "LigDriverAndMuscle.any"
    AnyFolder &LigParms=..LigParams.CalcaneoCuboidDorsal4Lig;
    AnyVar StiffScale=..FootLigStiffnessScale;
    #include "LigParms.any"
  };

  AnyViaPointLigament CalcaneoCuboidDorsalCross1Lig = {
    AnyRefFrame &ref1 = .Seg.Calcaneus.LigCalcaneoCuboidDorsalNode1;
    AnyRefFrame &ref2 = .Seg.Cuboid.LigCalcaneoCuboidDorsalNode3;
    #include "LigDriverAndMuscle.any"
    AnyFolder &LigParms=..LigParams.CalcaneoCuboidDorsalCross1Lig;
    AnyVar StiffScale=..FootLigStiffnessScale;
    #include "LigParms.any"
  };

  AnyViaPointLigament CalcaneoCuboidDorsalCross2Lig = {
    AnyRefFrame &ref1 = .Seg.Calcaneus.LigCalcaneoCuboidDorsalNode3;
    AnyRefFrame &ref2 = .Seg.Cuboid.LigCalcaneoCuboidDorsalNode1;
    #include "LigDriverAndMuscle.any"
    AnyFolder &LigParms=..LigParams.CalcaneoCuboidDorsalCross2Lig;
    AnyVar StiffScale=..FootLigStiffnessScale;
    #include "LigParms.any"
  };

  AnyViaPointLigament CuneoNavicularDorsal1Lig = {

    AnyRefFrame &ref1 = .Seg.Navicular.LigCuneoNavicularDorsalNode1;
    AnyRefFrame &ref2 = .Seg.MedialCuneiform.LigCuneoNavicularDorsalNode;
    #include "LigDriverAndMuscle.any"
    AnyFolder &LigParms=..LigParams.CuneoNavicularDorsal1Lig;
    AnyVar StiffScale=..FootLigStiffnessScale;
    #include "LigParms.any"

  };


  AnyViaPointLigament IntermediateCuneiNavicularDorsalLig = {

    AnyRefFrame &ref1 = .Seg.Navicular.LigCuneoNavicularDorsalNode2;
    AnyRefFrame &ref2 = .Seg.IntermediateCuneiform.LigCuneoNavicularDorsalNode;
    #include "LigDriverAndMuscle.any"
    AnyFolder &LigParms=..LigParams.IntermediateCuneiNavicularDorsalLig;
    AnyVar StiffScale=..FootLigStiffnessScale;
    #include "LigParms.any"

  };


  AnyViaPointLigament CuneoNavicularDorsal3Lig = {

    AnyRefFrame &ref1 = .Seg.Navicular.LigCuneoNavicularDorsalNode3;
    AnyRefFrame &ref2 = .Seg.LateralCuneiform.LigCuneoNavicularDorsalNode;
    #include "LigDriverAndMuscle.any"
    AnyFolder &LigParms=..LigParams.CuneoNavicularDorsal3Lig;
    AnyVar StiffScale=..FootLigStiffnessScale;
    #include "LigParms.any"

  };


  AnyViaPointLigament CuneoNavicularMedial1Lig = {

    AnyRefFrame &ref1 = .Seg.Navicular.LigCuneoNavicularMedialNode1;
    AnyRefFrame &ref2 = .Seg.MedialCuneiform.LigCuneoNavicularMedialNode1;
    #include "LigDriverAndMuscle.any"
    AnyFolder &LigParms=..LigParams.CuneoNavicularMedial1Lig;
    AnyVar StiffScale=..FootLigStiffnessScale;
    #include "LigParms.any"

  };


  AnyViaPointLigament CuneoNavicularMedial2Lig = {

    AnyRefFrame &ref1 = .Seg.Navicular.LigCuneoNavicularMedialNode2;
    AnyRefFrame &ref2 = .Seg.MedialCuneiform.LigCuneoNavicularMedialNode2;
    #include "LigDriverAndMuscle.any"
    AnyFolder &LigParms=..LigParams.CuneoNavicularMedial2Lig;
    AnyVar StiffScale=..FootLigStiffnessScale;
    #include "LigParms.any"

  };


  AnyViaPointLigament CuneoNavicularMedial3Lig = {

    AnyRefFrame &ref1 = .Seg.Navicular.LigCuneoNavicularMedialNode3;
    AnyRefFrame &ref2 = .Seg.MedialCuneiform.LigCuneoNavicularMedialNode3;
    #include "LigDriverAndMuscle.any"
    AnyFolder &LigParms=..LigParams.CuneoNavicularMedial3Lig;
    AnyVar StiffScale=..FootLigStiffnessScale;
    #include "LigParms.any"

  };


  AnyViaPointLigament CuneoNavicularMedial4Lig = {

    AnyRefFrame &ref1 = .Seg.Navicular.LigCuneoNavicularMedialNode4;
    AnyRefFrame &ref2 = .Seg.MedialCuneiform.LigCuneoNavicularMedialNode4;
    #include "LigDriverAndMuscle.any"
    AnyFolder &LigParms=..LigParams.CuneoNavicularMedial4Lig;
    AnyVar StiffScale=..FootLigStiffnessScale;
    #include "LigParms.any"

  };

  AnyViaPointLigament CuneoNavicularMedialCross1Lig = {

    AnyRefFrame &ref1 = .Seg.Navicular.LigCuneoNavicularMedialNode4;
    AnyRefFrame &ref2 = .Seg.MedialCuneiform.LigCuneoNavicularMedialNode2;
    #include "LigDriverAndMuscle.any"
    AnyFolder &LigParms=..LigParams.CuneoNavicularMedialCross1Lig;
    AnyVar StiffScale=..FootLigStiffnessScale;
    #include "LigParms.any"

  };
  AnyViaPointLigament CuneoNavicularMedialCross2Lig = {

    AnyRefFrame &ref1 = .Seg.Navicular.LigCuneoNavicularMedialNode2;
    AnyRefFrame &ref2 = .Seg.MedialCuneiform.LigCuneoNavicularMedialNode4;
    #include "LigDriverAndMuscle.any"
    AnyFolder &LigParms=..LigParams.CuneoNavicularMedialCross2Lig;
    AnyVar StiffScale=..FootLigStiffnessScale;
    #include "LigParms.any"

  };


  AnyViaPointLigament MedialCuneoNavicularPlantar1Lig = {

    AnyRefFrame &ref1 = .Seg.Navicular.LigCuneoNavicularPlantarNode1a;
    AnyRefFrame &ref2 = .Seg.MedialCuneiform.LigCuneoNavicularPlantarNode1a;
    #include "LigDriverAndMuscle.any"
    AnyFolder &LigParms=..LigParams.MedialCuneoNavicularPlantar1Lig;
    AnyVar StiffScale=..FootLigStiffnessScale;
    #include "LigParms.any"

  };


  AnyViaPointLigament MedialCuneoNavicularPlantar2Lig = {

    AnyRefFrame &ref1 = .Seg.Navicular.LigCuneoNavicularPlantarNode1b;
    AnyRefFrame &ref2 = .Seg.MedialCuneiform.LigCuneoNavicularPlantarNode1b;
    #include "LigDriverAndMuscle.any"
    AnyFolder &LigParms=..LigParams.MedialCuneoNavicularPlantar2Lig;
    AnyVar StiffScale=..FootLigStiffnessScale;
    #include "LigParms.any"

  };


  AnyViaPointLigament MedialCuneoNavicularPlantar3Lig = {

    AnyRefFrame &ref1 = .Seg.Navicular.LigCuneoNavicularPlantarNode1c;
    AnyRefFrame &ref2 = .Seg.MedialCuneiform.LigCuneoNavicularPlantarNode1c;
    #include "LigDriverAndMuscle.any"
    AnyFolder &LigParms=..LigParams.MedialCuneoNavicularPlantar3Lig;
    AnyVar StiffScale=..FootLigStiffnessScale;
    #include "LigParms.any"

  };


  AnyViaPointLigament IntermediateCuneoNavicularPlantarLig = {

    AnyRefFrame &ref1 = .Seg.Navicular.LigCuneoNavicularPlantarNode2;
    AnyRefFrame &ref2 = .Seg.IntermediateCuneiform.LigCuneoNavicularPlantarNode;
    #include "LigDriverAndMuscle.any"
    AnyFolder &LigParms=..LigParams.IntermediateCuneoNavicularPlantarLig;
    AnyVar StiffScale=..FootLigStiffnessScale;
    #include "LigParms.any"

  };


  AnyViaPointLigament LateralCuneoNavicularPlantarLig = {

    AnyRefFrame &ref1 = .Seg.Navicular.LigCuneoNavicularPlantarNode3;
    AnyRefFrame &ref2 = .Seg.LateralCuneiform.LigCuneoNavicularPlantarNode;
    #include "LigDriverAndMuscle.any"
    AnyFolder &LigParms=..LigParams.LateralCuneoNavicularPlantarLig;
    AnyVar StiffScale=..FootLigStiffnessScale;
    #include "LigParms.any"

  };

  //
  //  AnyViaPointLigament InterCuneiformDorsal1Lig = {
  //
  //    AnyRefFrame &ref1 = .Seg.MedialCuneiform.LigInterCuneiformDorsalNode;
  //    AnyRefFrame &ref2 = .Seg.IntermediateCuneiform.LigInterCuneiformDorsalNode1;
  //    #include "LigDriverAndMuscle.any"
  //
  //    };


  AnyViaPointLigament InterMedialCuneiformIntermediateCuneiformDorsal1Lig = {

    AnyRefFrame &ref1 = .Seg.MedialCuneiform.LigInterMedialCuneiformIntermediateCuneiformDorsalNode1;
    AnyRefFrame &ref2 = .Seg.IntermediateCuneiform.LigInterMedialCuneiformIntermediateCuneiformDorsalNode1;
    #include "LigDriverAndMuscle.any"
    AnyFolder &LigParms=..LigParams.InterMedialCuneiformIntermediateCuneiformDorsal1Lig;
    AnyVar StiffScale=..FootLigStiffnessScale;
    #include "LigParms.any"

  };

  AnyViaPointLigament InterMedialCuneiformIntermediateCuneiformDorsal2Lig = {

    AnyRefFrame &ref1 = .Seg.MedialCuneiform.LigInterMedialCuneiformIntermediateCuneiformDorsalNode2;
    AnyRefFrame &ref2 = .Seg.IntermediateCuneiform.LigInterMedialCuneiformIntermediateCuneiformDorsalNode2;
    #include "LigDriverAndMuscle.any"
    AnyFolder &LigParms=..LigParams.InterMedialCuneiformIntermediateCuneiformDorsal2Lig;
    AnyVar StiffScale=..FootLigStiffnessScale;
    #include "LigParms.any"

  };

  AnyViaPointLigament InterMedialCuneiformIntermediateCuneiformDorsal3Lig = {

    AnyRefFrame &ref1 = .Seg.MedialCuneiform.LigInterMedialCuneiformIntermediateCuneiformDorsalNode3;
    AnyRefFrame &ref2 = .Seg.IntermediateCuneiform.LigInterMedialCuneiformIntermediateCuneiformDorsalNode3;
    #include "LigDriverAndMuscle.any"
    AnyFolder &LigParms=..LigParams.InterMedialCuneiformIntermediateCuneiformDorsal2Lig;
    AnyVar StiffScale=..FootLigStiffnessScale;
    #include "LigParms.any"

  };

  AnyViaPointLigament InterMedialCuneiformIntermediateCuneiformDorsal4Lig = {

    AnyRefFrame &ref1 = .Seg.MedialCuneiform.LigInterMedialCuneiformIntermediateCuneiformDorsalNode4;
    AnyRefFrame &ref2 = .Seg.IntermediateCuneiform.LigInterMedialCuneiformIntermediateCuneiformDorsalNode4;
    #include "LigDriverAndMuscle.any"
    AnyFolder &LigParms=..LigParams.InterMedialCuneiformIntermediateCuneiformDorsal4Lig;
    AnyVar StiffScale=..FootLigStiffnessScale;
    #include "LigParms.any"

  };


  //    AnyViaPointLigament InterCuneiformDorsal2Lig = {
  //
  //      AnyRefFrame &ref1 = .Seg.IntermediateCuneiform.LigInterCuneiformDorsalNode2;
  //      AnyRefFrame &ref2 = .Seg.LateralCuneiform.LigInterCuneiformDorsalNode;
  //      #include "LigDriverAndMuscle.any"
  //
  //    };

  AnyViaPointLigament InterIntermediateCuneiformLateralCuneiformDorsal1Lig = {

    AnyRefFrame &ref1 = .Seg.IntermediateCuneiform.InterIntermediateCuneiformLateralCuneiformDorsalNode1;
    AnyRefFrame &ref2 = .Seg.LateralCuneiform.InterIntermediateCuneiformLateralCuneiformDorsalNode1;
    #include "LigDriverAndMuscle.any"
    AnyFolder &LigParms=..LigParams.InterIntermediateCuneiformLateralCuneiformDorsal1Lig;
    AnyVar StiffScale=..FootLigStiffnessScale;
    #include "LigParms.any"

  };


  AnyViaPointLigament InterIntermediateCuneiformLateralCuneiformDorsal2Lig = {

    AnyRefFrame &ref1 = .Seg.IntermediateCuneiform.InterIntermediateCuneiformLateralCuneiformDorsalNode2;
    AnyRefFrame &ref2 = .Seg.LateralCuneiform.InterIntermediateCuneiformLateralCuneiformDorsalNode2;
    #include "LigDriverAndMuscle.any"
    AnyFolder &LigParms=..LigParams.InterIntermediateCuneiformLateralCuneiformDorsal2Lig;
    AnyVar StiffScale=..FootLigStiffnessScale;
    #include "LigParms.any"

  };


  AnyViaPointLigament InterIntermediateCuneiformLateralCuneiformDorsal3Lig = {

    AnyRefFrame &ref1 = .Seg.IntermediateCuneiform.InterIntermediateCuneiformLateralCuneiformDorsalNode3;
    AnyRefFrame &ref2 = .Seg.LateralCuneiform.InterIntermediateCuneiformLateralCuneiformDorsalNode3;
    #include "LigDriverAndMuscle.any"
    AnyFolder &LigParms=..LigParams.InterIntermediateCuneiformLateralCuneiformDorsal3Lig;
    AnyVar StiffScale=..FootLigStiffnessScale;
    #include "LigParms.any"

  };


  AnyViaPointLigament InterIntermediateCuneiformLateralCuneiformDorsal4Lig = {

    AnyRefFrame &ref1 = .Seg.IntermediateCuneiform.InterIntermediateCuneiformLateralCuneiformDorsalNode4;
    AnyRefFrame &ref2 = .Seg.LateralCuneiform.InterIntermediateCuneiformLateralCuneiformDorsalNode4;
    #include "LigDriverAndMuscle.any"
    AnyFolder &LigParms=..LigParams.InterIntermediateCuneiformLateralCuneiformDorsal4Lig;
    AnyVar StiffScale=..FootLigStiffnessScale;
    #include "LigParms.any"

  };


  AnyViaPointLigament InterIntermediateCuneiformLateralCuneiformDorsal5Lig = {

    AnyRefFrame &ref1 = .Seg.IntermediateCuneiform.InterIntermediateCuneiformLateralCuneiformDorsalNode5;
    AnyRefFrame &ref2 = .Seg.LateralCuneiform.InterIntermediateCuneiformLateralCuneiformDorsalNode5;
    #include "LigDriverAndMuscle.any"
    AnyFolder &LigParms=..LigParams.InterIntermediateCuneiformLateralCuneiformDorsal5Lig;
    AnyVar StiffScale=..FootLigStiffnessScale;
    #include "LigParms.any"

  };


  AnyViaPointLigament InterLateralCuneoCuboidDorsal1Lig = {

    AnyRefFrame &ref1 = .Seg.LateralCuneiform.LigInterLateralCuneoCuboidDorsalNode1;
    AnyRefFrame &ref2 = .Seg.Cuboid.LigInterLateralCuneoCuboidDorsalNode1;
    #include "LigDriverAndMuscle.any"
    AnyFolder &LigParms=..LigParams.InterLateralCuneoCuboidDorsal1Lig;
    AnyVar StiffScale=..FootLigStiffnessScale;
    #include "LigParms.any"

  };

  AnyViaPointLigament InterLateralCuneoCuboidDorsal2Lig = {

    AnyRefFrame &ref1 = .Seg.LateralCuneiform.LigInterLateralCuneoCuboidDorsalNode2;
    AnyRefFrame &ref2 = .Seg.Cuboid.LigInterLateralCuneoCuboidDorsalNode2;
    #include "LigDriverAndMuscle.any"
    AnyFolder &LigParms=..LigParams.InterLateralCuneoCuboidDorsal1Lig;
    AnyVar StiffScale=..FootLigStiffnessScale;
    #include "LigParms.any"

  };
  AnyViaPointLigament InterLateralCuneoCuboidDorsal3Lig = {

    AnyRefFrame &ref1 = .Seg.LateralCuneiform.LigInterLateralCuneoCuboidDorsalNode3;
    AnyRefFrame &ref2 = .Seg.Cuboid.LigInterLateralCuneoCuboidDorsalNode3;
    #include "LigDriverAndMuscle.any"
    AnyFolder &LigParms=..LigParams.InterLateralCuneoCuboidDorsal3Lig;
    AnyVar StiffScale=..FootLigStiffnessScale;
    #include "LigParms.any"
  };
  AnyViaPointLigament InterLateralCuneoCuboidDorsal4Lig = {

    AnyRefFrame &ref1 = .Seg.LateralCuneiform.LigInterLateralCuneoCuboidDorsalNode4;
    AnyRefFrame &ref2 = .Seg.Cuboid.LigInterLateralCuneoCuboidDorsalNode4;
    #include "LigDriverAndMuscle.any"
    AnyFolder &LigParms=..LigParams.InterLateralCuneoCuboidDorsal4Lig;
    AnyVar StiffScale=..FootLigStiffnessScale;
    #include "LigParms.any"
  };
  AnyViaPointLigament InterLateralCuneoCuboidDorsal5Lig = {
    AnyRefFrame &ref1 = .Seg.LateralCuneiform.LigInterLateralCuneoCuboidDorsalNode5;
    AnyRefFrame &ref2 = .Seg.Cuboid.LigInterLateralCuneoCuboidDorsalNode5;
    #include "LigDriverAndMuscle.any"
    AnyFolder &LigParms=..LigParams.InterLateralCuneoCuboidDorsal5Lig;
    AnyVar StiffScale=..FootLigStiffnessScale;
    #include "LigParms.any"
  };
  AnyViaPointLigament InterLateralCuneoCuboidDorsal6Lig = {
    AnyRefFrame &ref1 = .Seg.LateralCuneiform.LigInterLateralCuneoCuboidDorsalNode6;
    AnyRefFrame &ref2 = .Seg.Cuboid.LigInterLateralCuneoCuboidDorsalNode6;
    #include "LigDriverAndMuscle.any"
    AnyFolder &LigParms=..LigParams.InterLateralCuneoCuboidDorsal6Lig;
    AnyVar StiffScale=..FootLigStiffnessScale;
    #include "LigParms.any"
  };


  AnyViaPointLigament InterCuneiformLateralCuneifromPlantar1Lig = {

    AnyRefFrame &ref1 = .Seg.MedialCuneiform.LigInterCuneiformPlantarNode;
    AnyRefFrame &ref2 = .Seg.IntermediateCuneiform.LigInterCuneiformPlantarNode1;
    #include "LigDriverAndMuscle.any"
    AnyFolder &LigParms=..LigParams.InterCuneiformLateralCuneifromPlantar1Lig;
    AnyVar StiffScale=..FootLigStiffnessScale;
    #include "LigParms.any"
  };


  AnyViaPointLigament InterCuneiformLateralCuneifromPlantar2Lig = {

    AnyRefFrame &ref1 = .Seg.IntermediateCuneiform.LigInterCuneiformPlantarNode2;
    AnyRefFrame &ref2 = .Seg.LateralCuneiform.LigInterCuneiformPlantarNode;
    #include "LigDriverAndMuscle.any"
    AnyFolder &LigParms=..LigParams.InterCuneiformLateralCuneifromPlantar2Lig;
    AnyVar StiffScale=..FootLigStiffnessScale;
    #include "LigParms.any"

  };


  AnyViaPointLigament LateralCuneoCuboidPlantarLig = {

    AnyRefFrame &ref1 = .Seg.LateralCuneiform.LigCuneoCuboidPlantarNode;
    AnyRefFrame &ref2 = .Seg.Cuboid.LigCuneoCuboidPlantarNode;
    #include "LigDriverAndMuscle.any"
    AnyFolder &LigParms=..LigParams.LateralCuneoCuboidPlantarLig;
    AnyVar StiffScale=..FootLigStiffnessScale;
    #include "LigParms.any"
  };


  AnyViaPointLigament CuboideoNavicularDorsalLig = {

    AnyRefFrame &ref1 = .Seg.Cuboid.LigCuboideoNavicularDorsalNode;
    AnyRefFrame &ref2 = .Seg.Navicular.LigCuboideoNavicularDorsalNode;
    #include "LigDriverAndMuscle.any"
    AnyFolder &LigParms=..LigParams.CuboideoNavicularDorsalLig;
    AnyVar StiffScale=..FootLigStiffnessScale;
    #include "LigParms.any"

  };


  AnyViaPointLigament CuboideoNavicularPlantarLig = {
    AnyRefFrame &ref1 = .Seg.Cuboid.LigCuboideoNavicularPlantarNode;
    AnyRefFrame &ref2 = .Seg.Navicular.LigCuboideoNavicularPlantarNode;
    #include "LigDriverAndMuscle.any"
    AnyFolder &LigParms=..LigParams.CuboideoNavicularPlantarLig;
    AnyVar StiffScale=..FootLigStiffnessScale;
    #include "LigParms.any"
  };


  AnyViaPointLigament TarsoMetatarsalMedial1Lig = {
    AnyRefFrame &ref1 = .Seg.MedialCuneiform.LigTarsoMetatarsalMedial1;
    AnyRefFrame &ref2 = .Seg.Metatarsal1.LigTarsoMetatarsalMedial1;
    #include "LigDriverAndMuscle.any"
    AnyFolder &LigParms=..LigParams.TarsoMetatarsalMedial1Lig;
    AnyVar StiffScale=..FootLigStiffnessScale;
    #include "LigParms.any"
  };


  AnyViaPointLigament TarsoMetatarsalMedial2Lig = {
    AnyRefFrame &ref1 = .Seg.MedialCuneiform.LigTarsoMetatarsalMedial2;
    AnyRefFrame &ref2 = .Seg.Metatarsal1.LigTarsoMetatarsalMedial2;
    #include "LigDriverAndMuscle.any"
    AnyFolder &LigParms=..LigParams.TarsoMetatarsalMedial2Lig;
    AnyVar StiffScale=..FootLigStiffnessScale;
    #include "LigParms.any"
  };


  AnyViaPointLigament TarsoMetatarsalMedial3Lig = {
    AnyRefFrame &ref1 = .Seg.MedialCuneiform.LigTarsoMetatarsalMedial3;
    AnyRefFrame &ref2 = .Seg.Metatarsal1.LigTarsoMetatarsalMedial3;
    #include "LigDriverAndMuscle.any"
    AnyFolder &LigParms=..LigParams.TarsoMetatarsalMedial3Lig;
    AnyVar StiffScale=..FootLigStiffnessScale;
    #include "LigParms.any"
  };

  AnyViaPointLigament TarsoMetatarsalMedial4Lig = {
    AnyRefFrame &ref1 = .Seg.MedialCuneiform.LigTarsoMetatarsalMedial4;
    AnyRefFrame &ref2 = .Seg.Metatarsal1.LigTarsoMetatarsalMedial4;
    #include "LigDriverAndMuscle.any"
    AnyFolder &LigParms=..LigParams.TarsoMetatarsalMedial4Lig;
    AnyVar StiffScale=..FootLigStiffnessScale;
    #include "LigParms.any"
  };

  AnyViaPointLigament TarsoMetatarsalMedial5Lig = {
    AnyRefFrame &ref1 = .Seg.MedialCuneiform.LigTarsoMetatarsalMedial5;
    AnyRefFrame &ref2 = .Seg.Metatarsal1.LigTarsoMetatarsalMedial5;
    #include "LigDriverAndMuscle.any"
    AnyFolder &LigParms=..LigParams.TarsoMetatarsalMedial5Lig;
    AnyVar StiffScale=..FootLigStiffnessScale;
    #include "LigParms.any"
  };

  AnyViaPointLigament TarsoMetatarsalMedial6Lig = {
    AnyRefFrame &ref1 = .Seg.MedialCuneiform.LigTarsoMetatarsalMedial6;
    AnyRefFrame &ref2 = .Seg.Metatarsal1.LigTarsoMetatarsalMedial6;
    #include "LigDriverAndMuscle.any"
    AnyFolder &LigParms=..LigParams.TarsoMetatarsalMedial6Lig;
    AnyVar StiffScale=..FootLigStiffnessScale;
    #include "LigParms.any"
  };


  AnyViaPointLigament TarsoMetatarsalMedialCross1Lig = {
    AnyRefFrame &ref1 = .Seg.MedialCuneiform.LigTarsoMetatarsalMedial5;
    AnyRefFrame &ref2 = .Seg.Metatarsal1.LigTarsoMetatarsalMedial2;
    #include "LigDriverAndMuscle.any"
    AnyFolder &LigParms=..LigParams.TarsoMetatarsalMedialCross1Lig;
    AnyVar StiffScale=..FootLigStiffnessScale;
    #include "LigParms.any"
  };

  AnyViaPointLigament TarsoMetatarsalMedialCross2Lig = {
    AnyRefFrame &ref1 = .Seg.MedialCuneiform.LigTarsoMetatarsalMedial2;
    AnyRefFrame &ref2 = .Seg.Metatarsal1.LigTarsoMetatarsalMedial5;
    #include "LigDriverAndMuscle.any"
    AnyFolder &LigParms=..LigParams.TarsoMetatarsalMedialCross2Lig;
    AnyVar StiffScale=..FootLigStiffnessScale;
    #include "LigParms.any"
  };


  AnyViaPointLigament TarsoMetatarsalLataral1Lig = {
    AnyRefFrame &ref1 = .Seg.MedialCuneiform.LigTarsoMetatarsalLateral1;
    AnyRefFrame &ref2 = .Seg.Metatarsal1.LigTarsoMetatarsalLateral1;
    #include "LigDriverAndMuscle.any"
    AnyFolder &LigParms=..LigParams.TarsoMetatarsalLateral1Lig;
    AnyVar StiffScale=..FootLigStiffnessScale;
    #include "LigParms.any"
  };

  AnyViaPointLigament TarsoMetatarsalLateral2Lig = {
    AnyRefFrame &ref1 = .Seg.MedialCuneiform.LigTarsoMetatarsalLateral2;
    AnyRefFrame &ref2 = .Seg.Metatarsal1.LigTarsoMetatarsalLateral2;
    #include "LigDriverAndMuscle.any"
    AnyFolder &LigParms=..LigParams.TarsoMetatarsalLateral2Lig;
    AnyVar StiffScale=..FootLigStiffnessScale;
    #include "LigParms.any"
  };

  AnyViaPointLigament TarsoMetatarsalLateral3Lig = {
    AnyRefFrame &ref1 = .Seg.MedialCuneiform.LigTarsoMetatarsalLateral3;
    AnyRefFrame &ref2 = .Seg.Metatarsal1.LigTarsoMetatarsalLateral3;
    #include "LigDriverAndMuscle.any"
    AnyFolder &LigParms=..LigParams.TarsoMetatarsalLateral3Lig;
    AnyVar StiffScale=..FootLigStiffnessScale;
    #include "LigParms.any"
  };

  AnyViaPointLigament TarsoMetatarsalLateral4Lig = {
    AnyRefFrame &ref1 = .Seg.MedialCuneiform.LigTarsoMetatarsalLateral4;
    AnyRefFrame &ref2 = .Seg.Metatarsal1.LigTarsoMetatarsalLateral4;
    #include "LigDriverAndMuscle.any"
    AnyFolder &LigParms=..LigParams.TarsoMetatarsalLateral4Lig;
    AnyVar StiffScale=..FootLigStiffnessScale;
    #include "LigParms.any"
  };

  AnyViaPointLigament TarsoMetatarsalLataralCross1Lig = {
    AnyRefFrame &ref1 = .Seg.MedialCuneiform.LigTarsoMetatarsalLateral2;
    AnyRefFrame &ref2 = .Seg.Metatarsal1.LigTarsoMetatarsalLateral4;
    #include "LigDriverAndMuscle.any"
    AnyFolder &LigParms=..LigParams.TarsoMetatarsalLateralCross1Lig;
    AnyVar StiffScale=..FootLigStiffnessScale;
    #include "LigParms.any"
  };


  AnyViaPointLigament TarsoMetatarsalLataralCross2Lig = {
    AnyRefFrame &ref1 = .Seg.MedialCuneiform.LigTarsoMetatarsalLateral4;
    AnyRefFrame &ref2 = .Seg.Metatarsal1.LigTarsoMetatarsalLateral2;
    #include "LigDriverAndMuscle.any"
    AnyFolder &LigParms=..LigParams.TarsoMetatarsalLateralCross2Lig;
    AnyVar StiffScale=..FootLigStiffnessScale;
    #include "LigParms.any"
  };


  AnyViaPointLigament MedialCuneiformMetatarsal1Dorsal1Lig = {

    AnyRefFrame &ref1 = .Seg.MedialCuneiform.LigTarsoMetatarsalDorsalNode1;
    AnyRefFrame &ref2 = .Seg.Metatarsal1.LigTarsoMetatarsalDorsalNode;
    #include "LigDriverAndMuscle.any"
    AnyFolder &LigParms=Main.HumanModel.BodyModel.Right.Leg.Ligaments.LigParams.MedialCuneifromMetatarsal1Dorsal1Lig;
    //     AnyFolder &LigParms=..LigParams.MedialCuneiformMetatarsal1Dorsal1Lig;
    AnyVar StiffScale=..FootLigStiffnessScale;
    #include "LigParms.any"

  };


  AnyViaPointLigament MedialCuneiformMetatarsal1Dorsal2Lig = {

    AnyRefFrame &ref1 = .Seg.MedialCuneiform.LigTarsoMetatarsalDorsalNode3;
    AnyRefFrame &ref2 = .Seg.Metatarsal1.LigTarsoMetatarsalDorsalNode2;
    #include "LigDriverAndMuscle.any"
    // AnyFolder &LigParms=..LigParams.MedialCuneiformMetatarsal1Dorsal2Lig;

    AnyFolder &LigParms=Main.HumanModel.BodyModel.Right.Leg.Ligaments.LigParams.MedialCuneifromMetatarsal1Dorsal2Lig;       AnyVar StiffScale=..FootLigStiffnessScale;
    #include "LigParms.any"

  };


  AnyViaPointLigament MedialCuneiformMetatarsal1DorsalCross1Lig = {

    AnyRefFrame &ref1 = .Seg.MedialCuneiform.LigTarsoMetatarsalDorsalNode3;
    AnyRefFrame &ref2 = .Seg.Metatarsal1.LigTarsoMetatarsalDorsalNode;
    #include "LigDriverAndMuscle.any"
    // AnyFolder &LigParms=..LigParams.MedialCuneiformMetatarsal1Dorsal2Lig;

    AnyFolder &LigParms=Main.HumanModel.BodyModel.Right.Leg.Ligaments.LigParams.MedialCuneifromMetatarsal1DorsalCross1Lig;       AnyVar StiffScale=..FootLigStiffnessScale;
    #include "LigParms.any"

  };


  AnyViaPointLigament MedialCuneiformMetatarsal1DorsalCross2Lig = {

    AnyRefFrame &ref1 = .Seg.MedialCuneiform.LigTarsoMetatarsalDorsalNode1;
    AnyRefFrame &ref2 = .Seg.Metatarsal1.LigTarsoMetatarsalDorsalNode2;
    #include "LigDriverAndMuscle.any"
    // AnyFolder &LigParms=..LigParams.MedialCuneiformMetatarsal1Dorsal2Lig;

    AnyFolder &LigParms=Main.HumanModel.BodyModel.Right.Leg.Ligaments.LigParams.MedialCuneifromMetatarsal1DorsalCross1Lig;       AnyVar StiffScale=..FootLigStiffnessScale;
    #include "LigParms.any"

  };

  //    AnyViaPointLigament TarsoMetatarsalDorsal2Lig = {
  //
  //      AnyRefFrame &ref1 = .Seg.MedialCuneiform.LigTarsoMetatarsalDorsalNode2;
  //      AnyRefFrame &ref2 = .Seg.Metatarsal2.LigTarsoMetatarsalDorsalNode1;
  //      #include "LigDriverAndMuscle.any"
  //
  //    };


  AnyViaPointLigament InterMet2MedCuneiDorsal1Lig = {
    AnyRefFrame &ref1 = .Seg.Metatarsal2.LigInterMet2MedCuneiNode1;
    AnyRefFrame &ref2 = .Seg.MedialCuneiform.LigInterMet2MedCuneiNode1;
    #include "LigDriverAndMuscle.any"
    AnyFolder &LigParms=..LigParams.InterMet2MedCuneiDorsal1Lig;
    AnyVar StiffScale=..FootLigStiffnessScale;
    #include "LigParms.any"
  };

  AnyViaPointLigament InterMet2MedCuneiDorsal2Lig = {
    AnyRefFrame &ref1 = .Seg.Metatarsal2.LigInterMet2MedCuneiNode2;
    AnyRefFrame &ref2 = .Seg.MedialCuneiform.LigInterMet2MedCuneiNode2;
    #include "LigDriverAndMuscle.any"
    AnyFolder &LigParms=..LigParams.InterMet2MedCuneiDorsal2Lig;
    AnyVar StiffScale=..FootLigStiffnessScale;
    #include "LigParms.any"
  };
  AnyViaPointLigament InterMet2MedCuneiDorsal3Lig = {
    AnyRefFrame &ref1 = .Seg.Metatarsal2.LigInterMet2MedCuneiNode3;
    AnyRefFrame &ref2 = .Seg.MedialCuneiform.LigInterMet2MedCuneiNode3;
    #include "LigDriverAndMuscle.any"
    AnyFolder &LigParms=..LigParams.InterMet2MedCuneiDorsal3Lig;
    AnyVar StiffScale=..FootLigStiffnessScale;
    #include "LigParms.any"
  };

  AnyViaPointLigament InterMet2MedCuneiDorsal4Lig = {
    AnyRefFrame &ref1 = .Seg.Metatarsal2.LigInterMet2MedCuneiNode4;
    AnyRefFrame &ref2 = .Seg.MedialCuneiform.LigInterMet2MedCuneiNode4;
    #include "LigDriverAndMuscle.any"
    AnyFolder &LigParms=..LigParams.InterMet2MedCuneiDorsal4Lig;
    AnyVar StiffScale=..FootLigStiffnessScale;
    #include "LigParms.any"
  };


  AnyViaPointLigament IntermediateCuneiformMetatarsal2Dorsal1Lig = {

    AnyRefFrame &ref1 = .Seg.IntermediateCuneiform.LigTarsoMetatarsalDorsalNode;
    AnyRefFrame &ref2 = .Seg.Metatarsal2.LigTarsoMetatarsalDorsalNode2;
    #include "LigDriverAndMuscle.any"
    AnyFolder &LigParms=..LigParams.IntermediateCuneiformMetatarsal2Dorsal1Lig;
    AnyVar StiffScale=..FootLigStiffnessScale;
    #include "LigParms.any"

  };


  AnyViaPointLigament LateralCuneiformMetatarsal2DorsalLig = {

    AnyRefFrame &ref1 = .Seg.LateralCuneiform.LigTarsoMetatarsalDorsalNode1;
    AnyRefFrame &ref2 = .Seg.Metatarsal2.LigTarsoMetatarsalDorsalNode3;
    #include "LigDriverAndMuscle.any"
    AnyFolder &LigParms=..LigParams.LateralCuneiformMetatarsal2DorsalLig;
    AnyVar StiffScale=..FootLigStiffnessScale;
    #include "LigParms.any"

  };


  AnyViaPointLigament LateralCuneiformMetatarsal3DorsalLig = {

    AnyRefFrame &ref1 = .Seg.LateralCuneiform.LigTarsoMetatarsalDorsalNode2;
    AnyRefFrame &ref2 = .Seg.Metatarsal3.LigTarsoMetatarsalDorsalNode;
    #include "LigDriverAndMuscle.any"
    AnyFolder &LigParms=..LigParams.LateralCuneiformMetatarsal3DorsalLig;
    AnyVar StiffScale=..FootLigStiffnessScale;
    #include "LigParms.any"

  };


  AnyViaPointLigament LateralCuneiformMetatarsal4DorsalLig = {

    AnyRefFrame &ref1 = .Seg.LateralCuneiform.LigTarsoMetatarsalDorsalNode3;
    AnyRefFrame &ref2 = .Seg.Metatarsal4.LigTarsoMetatarsalDorsalNode1;
    #include "LigDriverAndMuscle.any"
    AnyFolder &LigParms=..LigParams.LateralCuneiformMetatarsal4DorsalLig;
    AnyVar StiffScale=..FootLigStiffnessScale;
    #include "LigParms.any"

  };


  AnyViaPointLigament CuboidMetatarsal4DorsalLig = {

    AnyRefFrame &ref1 = .Seg.Cuboid.LigTarsoMetatarsalDorsalNode1;
    AnyRefFrame &ref2 = .Seg.Metatarsal4.LigTarsoMetatarsalDorsalNode2;
    #include "LigDriverAndMuscle.any"
    AnyFolder &LigParms=..LigParams.CuboidMetatarsal4DorsalLig;
    AnyVar StiffScale=..FootLigStiffnessScale;
    #include "LigParms.any"

  };


  //    AnyViaPointLigament TarsoMetatarsalDorsal8Lig = {
  //
  //      AnyRefFrame &ref1 = .Seg.Cuboid.LigTarsoMetatarsalDorsalNode2;
  //      AnyRefFrame &ref2 = .Seg.Metatarsal5.LigTarsoMetatarsalDorsalNode;
  //      #include "LigDriverAndMuscle.any"
  //
  //    };


  AnyViaPointLigament CuboidMetatarsal5Dorsal1Lig = {
    AnyRefFrame &ref1 = .Seg.Cuboid.LigCuboidMetatarsal5DorsalNode1;
    AnyRefFrame &ref2 = .Seg.Metatarsal5.LigCuboidMetatarsal5DorsalNode1;
    #include "LigDriverAndMuscle.any"
    AnyFolder &LigParms=..LigParams.CuboidMetatarsal5Dorsal1Lig;
    AnyVar StiffScale=..FootLigStiffnessScale;
    #include "LigParms.any"
  };

  AnyViaPointLigament CuboidMetatarsal5Dorsal2Lig = {
    AnyRefFrame &ref1 = .Seg.Cuboid.LigCuboidMetatarsal5DorsalNode2;
    AnyRefFrame &ref2 = .Seg.Metatarsal5.LigCuboidMetatarsal5DorsalNode2;
    #include "LigDriverAndMuscle.any"
    AnyFolder &LigParms=..LigParams.CuboidMetatarsal5Dorsal2Lig;
    AnyVar StiffScale=..FootLigStiffnessScale;
    #include "LigParms.any"
  };

  AnyViaPointLigament CuboidMetatarsal5Dorsal3Lig = {
    AnyRefFrame &ref1 = .Seg.Cuboid.LigCuboidMetatarsal5DorsalNode3;
    AnyRefFrame &ref2 = .Seg.Metatarsal5.LigCuboidMetatarsal5DorsalNode3;
    #include "LigDriverAndMuscle.any"
    AnyFolder &LigParms=..LigParams.CuboidMetatarsal5Dorsal3Lig;
    AnyVar StiffScale=..FootLigStiffnessScale;
    #include "LigParms.any"
  };

  AnyViaPointLigament CuboidMetatarsal5Dorsal4Lig = {
    AnyRefFrame &ref1 = .Seg.Cuboid.LigCuboidMetatarsal5DorsalNode4;
    AnyRefFrame &ref2 = .Seg.Metatarsal5.LigCuboidMetatarsal5DorsalNode4;
    #include "LigDriverAndMuscle.any"
    AnyFolder &LigParms=..LigParams.CuboidMetatarsal5Dorsal4Lig;
    AnyVar StiffScale=..FootLigStiffnessScale;
    #include "LigParms.any"
  };


  AnyViaPointLigament MedialCuneiformMetatarsal1Plantar1Lig = {

    AnyRefFrame &ref1 = .Seg.MedialCuneiform.LigTarsoMetatarsalPlantarNode;
    AnyRefFrame &ref2 = .Seg.Metatarsal1.LigTarsoMetatarsalPlantarNode;
    #include "LigDriverAndMuscle.any"
    AnyFolder &LigParms=..LigParams.MedialCuneiformMetatarsal1Plantar1Lig;
    AnyVar StiffScale=..FootLigStiffnessScale;
    #include "LigParms.any"

  };


  AnyViaPointLigament MedialCuneiformMetatarsal1Plantar2Lig = {

    AnyRefFrame &ref1 = .Seg.MedialCuneiform.LigTarsoMetatarsalPlantarNode3;
    AnyRefFrame &ref2 = .Seg.Metatarsal1.LigTarsoMetatarsalPlantarNode2;
    #include "LigDriverAndMuscle.any"
    AnyFolder &LigParms=..LigParams.MedialCuneiformMetatarsal1Plantar2Lig;
    AnyVar StiffScale=..FootLigStiffnessScale;
    #include "LigParms.any"

  };


  AnyViaPointLigament IntermediateCuneiformMetatarsal2Plantar1Lig = {

    AnyRefFrame &ref1 = .Seg.IntermediateCuneiform.LigTarsoMetatarsalPlantarNode;
    AnyRefFrame &ref2 = .Seg.Metatarsal2.LigTarsoMetatarsalPlantarNode;
    #include "LigDriverAndMuscle.any"
    AnyFolder &LigParms=..LigParams.IntermediateCuneiformMetatarsal2Plantar1Lig;
    AnyVar StiffScale=..FootLigStiffnessScale;
    #include "LigParms.any"

  };


  AnyViaPointLigament LateralCuneiformMetatarsal3PlantarLig = {

    AnyRefFrame &ref1 = .Seg.LateralCuneiform.LigTarsoMetatarsalPlantarNode;
    AnyRefFrame &ref2 = .Seg.Metatarsal3.LigTarsoMetatarsalPlantarNode;
    #include "LigDriverAndMuscle.any"
    AnyFolder &LigParms=..LigParams.LateralCuneiformMetatarsal3PlantarLig;
    AnyVar StiffScale=..FootLigStiffnessScale;
    #include "LigParms.any"

  };


  AnyViaPointLigament LateralCuneiformMetatarsal4PlantarLig = {

    AnyRefFrame &ref1 = .Seg.Cuboid.LigTarsoMetatarsalPlantarNode1;
    AnyRefFrame &ref2 = .Seg.Metatarsal4.LigTarsoMetatarsalPlantarNode;
    #include "LigDriverAndMuscle.any"
    AnyFolder &LigParms=..LigParams.LateralCuneiformMetatarsal4PlantarLig;
    AnyVar StiffScale=..FootLigStiffnessScale;
    #include "LigParms.any"

  };


  AnyViaPointLigament CuboidMetatarsal5PlantarLig = {

    AnyRefFrame &ref1 = .Seg.Cuboid.LigTarsoMetatarsalPlantarNode2;
    AnyRefFrame &ref2 = .Seg.Metatarsal5.LigTarsoMetatarsalPlantarNode;
    #include "LigDriverAndMuscle.any"
    AnyFolder &LigParms=..LigParams.CuboidMetatarsal5PlantarLig;
    AnyVar StiffScale=..FootLigStiffnessScale;
    #include "LigParms.any"

  };


  AnyViaPointLigament MedialCuneiformMetatarsal3PlantarLig = {

    AnyRefFrame &ref1 = .Seg.MedialCuneiform.LigTarsoMetatarsalPlantarNode2;
    AnyRefFrame &ref2 = .Seg.Metatarsal3.LigTarsoMetatarsalPlantarNode2;
    #include "LigDriverAndMuscle.any"
    AnyFolder &LigParms=..LigParams.MedialCuneiformMetatarsal3PlantarLig;
    AnyVar StiffScale=..FootLigStiffnessScale;
    #include "LigParms.any"

  };


  AnyViaPointLigament MedialCuneiformMetatarsal4PlantarLig = {

    AnyRefFrame &ref1 = .Seg.LateralCuneiform.LigTarsoMetatarsalPlantarNode2;
    AnyRefFrame &ref2 = .Seg.Metatarsal4.LigTarsoMetatarsalPlantarNode2;
    #include "LigDriverAndMuscle.any"
    AnyFolder &LigParms=..LigParams.MedialCuneiformMetatarsal4PlantarLig;
    AnyVar StiffScale=..FootLigStiffnessScale;
    #include "LigParms.any"

  };

  //
  //    AnyViaPointLigament InterMetatarsalDorsal1Lig = {
  //
  //      AnyRefFrame &ref1 = .Seg.Metatarsal2.LigInterMetatarsalDorsalNode;
  //      AnyRefFrame &ref2 = .Seg.Metatarsal3.LigInterMetatarsalDorsalNode1;
  //      #include "LigDriverAndMuscle.any"
  //
  //    };


  //    AnyViaPointLigament InterMetatarsalDorsal2Lig = {
  //
  //      AnyRefFrame &ref1 = .Seg.Metatarsal3.LigInterMetatarsalDorsalNode2;
  //      AnyRefFrame &ref2 = .Seg.Metatarsal4.LigInterMetatarsalDorsalNode1;
  //      #include "LigDriverAndMuscle.any"
  //
  //    };


  //    AnyViaPointLigament InterMetatarsalDorsal3Lig = {
  //
  //      AnyRefFrame &ref1 = .Seg.Metatarsal4.LigInterMetatarsalDorsalNode2;
  //      AnyRefFrame &ref2 = .Seg.Metatarsal5.LigInterMetatarsalDorsalNode;
  //      #include "LigDriverAndMuscle.any"
  //
  //    };
  //

  AnyViaPointLigament InterMet3Met2Dorsal1Lig = {
    AnyRefFrame &ref1 = .Seg.Metatarsal3.LigInterMet3Met2DorsalNode1;
    AnyRefFrame &ref2 = .Seg.Metatarsal2.LigInterMet3Met2DorsalNode1;
    #include "LigDriverAndMuscle.any"
    AnyFolder &LigParms=..LigParams.InterMet3Met2Dorsal1Lig;
    AnyVar StiffScale=..FootLigStiffnessScale;
    #include "LigParms.any"
  };

  AnyViaPointLigament InterMet3Met2Dorsal2Lig = {
    AnyRefFrame &ref1 = .Seg.Metatarsal3.LigInterMet3Met2DorsalNode2;
    AnyRefFrame &ref2 = .Seg.Metatarsal2.LigInterMet3Met2DorsalNode2;
    #include "LigDriverAndMuscle.any"
    AnyFolder &LigParms=..LigParams.InterMet3Met2Dorsal2Lig;
    AnyVar StiffScale=..FootLigStiffnessScale;
    #include "LigParms.any"
  };
  AnyViaPointLigament InterMet3Met2Dorsal3Lig = {
    AnyRefFrame &ref1 = .Seg.Metatarsal3.LigInterMet3Met2DorsalNode3;
    AnyRefFrame &ref2 = .Seg.Metatarsal2.LigInterMet3Met2DorsalNode3;
    #include "LigDriverAndMuscle.any"
    AnyFolder &LigParms=..LigParams.InterMet3Met2Dorsal3Lig;
    AnyVar StiffScale=..FootLigStiffnessScale;
    #include "LigParms.any"
  };

  AnyViaPointLigament InterMet3Met2Dorsal4Lig = {
    AnyRefFrame &ref1 = .Seg.Metatarsal3.LigInterMet3Met2DorsalNode4;
    AnyRefFrame &ref2 = .Seg.Metatarsal2.LigInterMet3Met2DorsalNode4;
    #include "LigDriverAndMuscle.any"
    AnyFolder &LigParms=..LigParams.InterMet3Met2Dorsal4Lig;
    AnyVar StiffScale=..FootLigStiffnessScale;
    #include "LigParms.any"
  };

  AnyViaPointLigament InterMet4Met3Dorsal1Lig = {
    AnyRefFrame &ref1 = .Seg.Metatarsal4.LigInterMet4Met3DorsalNode1;
    AnyRefFrame &ref2 = .Seg.Metatarsal3.LigInterMet4Met3DorsalNode1;
    #include "LigDriverAndMuscle.any"
    AnyFolder &LigParms=..LigParams.InterMet4Met3Dorsal1Lig;
    AnyVar StiffScale=..FootLigStiffnessScale;
    #include "LigParms.any"
  };

  AnyViaPointLigament InterMet4Met3Dorsal2Lig = {
    AnyRefFrame &ref1 = .Seg.Metatarsal4.LigInterMet4Met3DorsalNode2;
    AnyRefFrame &ref2 = .Seg.Metatarsal3.LigInterMet4Met3DorsalNode2;
    #include "LigDriverAndMuscle.any"
    AnyFolder &LigParms=..LigParams.InterMet4Met3Dorsal2Lig;
    AnyVar StiffScale=..FootLigStiffnessScale;
    #include "LigParms.any"
  };
  AnyViaPointLigament InterMet4Met3Dorsal3Lig = {
    AnyRefFrame &ref1 = .Seg.Metatarsal4.LigInterMet4Met3DorsalNode3;
    AnyRefFrame &ref2 = .Seg.Metatarsal3.LigInterMet4Met3DorsalNode3;
    #include "LigDriverAndMuscle.any"
    AnyFolder &LigParms=..LigParams.InterMet4Met3Dorsal3Lig;
    AnyVar StiffScale=..FootLigStiffnessScale;
    #include "LigParms.any"
  };

  AnyViaPointLigament InterMet4Met3Dorsal4Lig = {
    AnyRefFrame &ref1 = .Seg.Metatarsal4.LigInterMet4Met3DorsalNode4;
    AnyRefFrame &ref2 = .Seg.Metatarsal3.LigInterMet4Met3DorsalNode4;
    #include "LigDriverAndMuscle.any"
    AnyFolder &LigParms=..LigParams.InterMet4Met3Dorsal3Lig;
    AnyVar StiffScale=..FootLigStiffnessScale;
    #include "LigParms.any"
  };


  AnyViaPointLigament InterMet5Met4Dorsal1Lig = {
    AnyRefFrame &ref1 = .Seg.Metatarsal4.LigInterMet5Met4DorsalNode1;
    AnyRefFrame &ref2 = .Seg.Metatarsal5.LigInterMet5Met4DorsalNode1;
    #include "LigDriverAndMuscle.any"
    AnyFolder &LigParms=..LigParams.InterMet5Met4Dorsal1Lig;
    AnyVar StiffScale=..FootLigStiffnessScale;
    #include "LigParms.any"
  };

  AnyViaPointLigament InterMet5Met4Dorsal2Lig = {
    AnyRefFrame &ref1 = .Seg.Metatarsal4.LigInterMet5Met4DorsalNode2;
    AnyRefFrame &ref2 = .Seg.Metatarsal5.LigInterMet5Met4DorsalNode2;
    #include "LigDriverAndMuscle.any"
    AnyFolder &LigParms=..LigParams.InterMet5Met4Dorsal2Lig;
    AnyVar StiffScale=..FootLigStiffnessScale;
    #include "LigParms.any"
  };
  AnyViaPointLigament InterMet5Met4Dorsal3Lig = {
    AnyRefFrame &ref1 = .Seg.Metatarsal4.LigInterMet5Met4DorsalNode3;
    AnyRefFrame &ref2 = .Seg.Metatarsal5.LigInterMet5Met4DorsalNode3;
    #include "LigDriverAndMuscle.any"
    AnyFolder &LigParms=..LigParams.InterMet5Met4Dorsal3Lig;
    AnyVar StiffScale=..FootLigStiffnessScale;
    #include "LigParms.any"
  };

  AnyViaPointLigament InterMet5Met4Dorsal4Lig = {
    AnyRefFrame &ref1 = .Seg.Metatarsal4.LigInterMet5Met4DorsalNode4;
    AnyRefFrame &ref2 = .Seg.Metatarsal5.LigInterMet5Met4DorsalNode4;
    #include "LigDriverAndMuscle.any"
    AnyFolder &LigParms=..LigParams.InterMet5Met4Dorsal4Lig;
    AnyVar StiffScale=..FootLigStiffnessScale;
    #include "LigParms.any"
  };


  AnyViaPointLigament InterMet2Met3Plantar1Lig = {

    AnyRefFrame &ref1 = .Seg.Metatarsal2.LigInterMetatarsalPlantarNode;
    AnyRefFrame &ref2 = .Seg.Metatarsal3.LigInterMetatarsalPlantarNode1;
    #include "LigDriverAndMuscle.any"
    AnyFolder &LigParms=..LigParams.InterMet2Met3Plantar1Lig;
    AnyVar StiffScale=..FootLigStiffnessScale;
    #include "LigParms.any"

  };


  AnyViaPointLigament InterMet2Met3Plantar2Lig = {

    AnyRefFrame &ref1 = .Seg.Metatarsal3.LigInterMetatarsalPlantarNode2;
    AnyRefFrame &ref2 = .Seg.Metatarsal4.LigInterMetatarsalPlantarNode1;
    #include "LigDriverAndMuscle.any"
    AnyFolder &LigParms=..LigParams.InterMet2Met3Plantar2Lig;
    AnyVar StiffScale=..FootLigStiffnessScale;
    #include "LigParms.any"

  };


  AnyViaPointLigament InterMet2Met3Plantar3Lig = {

    AnyRefFrame &ref1 = .Seg.Metatarsal4.LigInterMetatarsalPlantarNode2;
    AnyRefFrame &ref2 = .Seg.Metatarsal5.LigInterMetatarsalPlantarNode;
    #include "LigDriverAndMuscle.any"
    AnyFolder &LigParms=..LigParams.InterMet2Met3Plantar3Lig;
    AnyVar StiffScale=..FootLigStiffnessScale;
    #include "LigParms.any"

  };


}; // LigamentsTarsal
