/// Morhping GM foot to TLEM foot
AnyFolder InterfaceMorphingDef = {
  /// Mirroring about XY plane
  AnyMatrix MirroringMat ={ {1,0,0},{0,1,0},{0,0,...Sign} };
  /// Manually picked points on unscaled foot
  AnyMatrix IM_PickedPoints_GMFoot_Unscaled = {
    {-0.01923199, 0.08287545, -0.005511518},
    {-0.01524367, -0.03055783, 0.04927201},
    {-0.007463424, -0.06155794, 0.01020253},
    {-0.01293344, -0.05830658, -0.01899186},
    {-0.007135777, 0.08833511, 0.02071268},
    {0.02138242, 0.1071969, -0.008062809},
    {0.02375501, 0.02864095, -0.0233577},
    {0.03208032, 0.06022059, -0.02273428},
    {0.05175828, 0.02216302, -0.00340573},
    {-0.005682771, 0.02788353, 0.03648632},
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     // LatMal - estimated from skin
    {0.0604137, 0.063059, -0.040193}, // MedMal - estimated from skin
    0.5*({0.0429171, 0.0815658, 0.032548}+{0.0604137, 0.063059, -0.040193}), // Malleoli midpoint
  }*MirroringMat;
  /// Manually picked points on unscaled foot
  AnyMatrix IM_PickedPoints_TLEMFoot_Unscaled = {
    {-0.02130102, -0.03769134, -0.008233341},
    {0.1050721, -0.04453817, 0.03245867},
    {0.1222212, -0.03878504, -0.0002568579},
    {0.1292807, -0.04402486, -0.02382537},
    {-0.01380033, -0.02898138, 0.02019412},
    {-0.03260353, -0.001598987, -0.008218175},
    {0.03070482, -0.008148696, -0.03136819},
    {0.008430794, 0.003214434, -0.02903448},
    {0.04368711, 0.0177882, -0.0161216},
    {0.03992446, -0.02796289, 0.0270921},
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     // LatMal - picked from TLEM model parameters
    {0.008623813, 0.0271727, -0.04230592}, // MedMal - picked from TLEM model parameters
    0.5*({-0.007908084, 0.02393846, 0.02036821}+{0.008623813, 0.0271727, -0.04230592}), // Malleoli midpoint
  }*MirroringMat;

  AnyInt Reduced_Set = {0,1,2,3,5,6,8,9,11,12,13,46,47};

  /// Affine transformation of GM foot to TLEM foot
  AnyFunTransform3DLin2 IM_Foot_GM_To_TLEM_Affine = {
    Points0 = take(.IM_PickedPoints_GMFoot_Unscaled,.Reduced_Set,0);
    Points1 = take(.IM_PickedPoints_TLEMFoot_Unscaled,.Reduced_Set,0);
    Mode = VTK_LANDMARK_AFFINE;
  };
  /// RBF Transform of GM foot to Tlem foot using affine
  /// transformation as pretransform
  AnyFunTransform3DRBF IM_FootAffine_GM_To_TLEM_RBF = {
    Points0 = .IM_PickedPoints_GMFoot_Unscaled;
    Points1 = .IM_PickedPoints_TLEMFoot_Unscaled;
    PreTransforms = {&.IM_Foot_GM_To_TLEM_Affine};
    PolynomDegree = 1;
    RBFDef.Type = RBF_Triharmonic;
    BoundingBoxOnOff = On;
    BoundingBox.ScaleXYZ = {1,1,1}*2;
    BoundingBox.DivisionFactorXYZ = {1, 1, 1}*5;
    BoundingBox.Type = BB_Cartesian;
  };
  /// Interface morphing of GM foot to TLEM foot
  AnyFunTransform3DLin IM_Foot_GM_To_TLEM = {
    PreTransforms = {&.IM_FootAffine_GM_To_TLEM_RBF};
    ScaleMat = {{1,0,0},{0,1,0},{0,0,1}};
    Offset = {0,0,0};
  };
  /// Rigid transformation of GM foot to TLEM foot for SCALING NONE
  AnyFunTransform3DLin2 IM_Foot_GM_To_TLEM_Rigidbody = {
    Points0 = take(.IM_PickedPoints_GMFoot_Unscaled,.Reduced_Set,0);
    Points1 = take(.IM_PickedPoints_TLEMFoot_Unscaled,.Reduced_Set,0);
    Mode = VTK_LANDMARK_RIGIDBODY;
  };

  /// Affine transformation of TLEM foot to GM foot
  AnyFunTransform3DLin2 IM_Foot_TLEM_To_GM_Affine = {
    Points0 = take(.IM_PickedPoints_TLEMFoot_Unscaled,.Reduced_Set,0);
    Points1 = take(.IM_PickedPoints_GMFoot_Unscaled,.Reduced_Set,0);
    Mode = VTK_LANDMARK_AFFINE;
  };
  /// RBF Transform of TLEM foot to GM foot using affine
  /// transformation as pretransform
  AnyFunTransform3DRBF IM_FootAffine_TLEM_To_GM_RBF = {
    Points0 = .IM_PickedPoints_TLEMFoot_Unscaled;
    Points1 = .IM_PickedPoints_GMFoot_Unscaled;
    PreTransforms = {&.IM_Foot_TLEM_To_GM_Affine};
    PolynomDegree = 1;
    RBFDef.Type = RBF_Triharmonic;
    BoundingBoxOnOff = On;
    BoundingBox.ScaleXYZ = {1,1,1}*2;
    BoundingBox.DivisionFactorXYZ = {1, 1, 1}*5;
    BoundingBox.Type = BB_Cartesian;
  };
  /// Interface morphing of TLEM foot to GM foot
  AnyFunTransform3DLin IM_Foot_TLEM_To_GM = {
    PreTransforms = {&.IM_FootAffine_TLEM_To_GM_RBF};
    ScaleMat = {{1,0,0},{0,1,0},{0,0,1}};
    Offset = {0,0,0};
  };

};// Interface Morphing

AnyFunTransform3D Scale = {
  AnyFunTransform3D& GeomScale = ...GeoScaling.Foot.ScaleFunction;
  AnyFolder ScaleAfterInterfaceMorphingDef = {
    #define MACRO_CONSTRUCT_ANATOMICAL_FRAME_s(p, SIGN) 0.5*(p[0]+p[1])
    #define MACRO_CONSTRUCT_ANATOMICAL_FRAME_A(p, SIGN) RotMat(0.5*(p[0]+p[1]),0.5*(p[0]+p[1]) + cross(p[4]-p[3],p[5]-p[3])*SIGN, p[2]) * RotMat(-0.5*pi,z) * RotMat(1*pi,y)

    AnyFloat pUnscaled = ..InterfaceMorphingDef.IM_Foot_GM_To_TLEM(..pUnscaled);
    AnyFunTransform3D& GeomScale = .GeomScale;
    AnyVar Sign = ..Sign;
    Scale = {AnyFunTransform3D& GeomScale = .GeomScale;};

    #include "..\Scaling\SegScaleFunWrtAnatomicalFrame.any"
    #undef MACRO_CONSTRUCT_ANATOMICAL_FRAME_s
    #undef MACRO_CONSTRUCT_ANATOMICAL_FRAME_A

  };

  AnyFunTransform3DLin &T0 = ScaleAfterInterfaceMorphingDef.Scale.T0;

  PreTransforms = {
    #if BM_SCALING == _SCALING_NONE_
    // Use only rigidbody transformation of GM foot to TLEM foot: this will load
    // the GM foot stl in original size and shape but the segmental frame will be
    // transformed to the TLEM segmental frame
    &.InterfaceMorphingDef.IM_Foot_GM_To_TLEM_Rigidbody,
    #else
    // Use interface morphing of GM foot to TLEM foot. This applies the affine
    // and RBF transformation to morph the GM foot to the TLEM foot.
    &.InterfaceMorphingDef.IM_Foot_GM_To_TLEM,
    #endif
    &ScaleAfterInterfaceMorphingDef.Scale
  };
};
AnyFunTransform3D& GeomScale = ..GeoScaling.Foot.ScaleFunction;

Talus = {
  AnyFunTransform3D &Scale = .Scale;
  AnyFunTransform3D& GeomScale = .GeomScale;
};
Calcaneus = {
  AnyFunTransform3D &Scale = .Scale;
  AnyFunTransform3D& GeomScale = .GeomScale;
};
Cuboid = {
  AnyFunTransform3D &Scale = .Scale;
  AnyFunTransform3D& GeomScale = .GeomScale;
};
Navicular = {
  AnyFunTransform3D &Scale = .Scale;
  AnyFunTransform3D& GeomScale = .GeomScale;
};
MedialCuneiform = {
  AnyFunTransform3D &Scale = .Scale;
  AnyFunTransform3D& GeomScale = .GeomScale;
};
IntermediateCuneiform = {
  AnyFunTransform3D &Scale = .Scale;
  AnyFunTransform3D& GeomScale = .GeomScale;
};
LateralCuneiform = {
  AnyFunTransform3D &Scale = .Scale;
  AnyFunTransform3D& GeomScale = .GeomScale;
};
Metatarsal1 = {
  AnyFunTransform3D &Scale = .Scale;
  AnyFunTransform3D& GeomScale = .GeomScale;
};
Metatarsal2 = {
  AnyFunTransform3D &Scale = .Scale;
  AnyFunTransform3D& GeomScale = .GeomScale;
};
Metatarsal3 = {
  AnyFunTransform3D &Scale = .Scale;
  AnyFunTransform3D& GeomScale = .GeomScale;
};
Metatarsal4 = {
  AnyFunTransform3D &Scale = .Scale;
  AnyFunTransform3D& GeomScale = .GeomScale;
};
Metatarsal5 = {
  AnyFunTransform3D &Scale = .Scale;
  AnyFunTransform3D& GeomScale = .GeomScale;
};
ProximalPhalange1 = {
  AnyFunTransform3D &Scale = .Scale;
  AnyFunTransform3D& GeomScale = .GeomScale;
};
ProximalPhalange2 = {
  AnyFunTransform3D &Scale = .Scale;
  AnyFunTransform3D& GeomScale = .GeomScale;
};
ProximalPhalange3 = {
  AnyFunTransform3D &Scale = .Scale;
  AnyFunTransform3D& GeomScale = .GeomScale;
};
ProximalPhalange4 = {
  AnyFunTransform3D &Scale = .Scale;
  AnyFunTransform3D& GeomScale = .GeomScale;
};
ProximalPhalange5 = {
  AnyFunTransform3D &Scale = .Scale;
  AnyFunTransform3D& GeomScale = .GeomScale;
};
MiddlePhalange2 = {
  AnyFunTransform3D &Scale = .Scale;
  AnyFunTransform3D& GeomScale = .GeomScale;
};
MiddlePhalange3 = {
  AnyFunTransform3D &Scale = .Scale;
  AnyFunTransform3D& GeomScale = .GeomScale;
};
MiddlePhalange4 = {
  AnyFunTransform3D &Scale = .Scale;
  AnyFunTransform3D& GeomScale = .GeomScale;
};
MiddlePhalange5 = {
  AnyFunTransform3D &Scale = .Scale;
  AnyFunTransform3D& GeomScale = .GeomScale;
};
DistalPhalange1 = {
  AnyFunTransform3D &Scale = .Scale;
  AnyFunTransform3D& GeomScale = .GeomScale;
};
DistalPhalange2 = {
  AnyFunTransform3D &Scale = .Scale;
  AnyFunTransform3D& GeomScale = .GeomScale;
};
DistalPhalange3 = {
  AnyFunTransform3D &Scale = .Scale;
  AnyFunTransform3D& GeomScale = .GeomScale;
};
DistalPhalange4 = {
  AnyFunTransform3D &Scale = .Scale;
  AnyFunTransform3D& GeomScale = .GeomScale;
};
DistalPhalange5 = {
  AnyFunTransform3D &Scale = .Scale;
  AnyFunTransform3D& GeomScale = .GeomScale;
};
