//This will run calibration of the ligaments on the right hand
AnyFolder RightHandCalibration01={
  AnyFolder &SideHumanFolderRef=..BodyModel.Right;
  AnyFolder &SideInterfaceFolderRef=..BodyModel.Interface.Right;
  #include "HandCal_right.any"
};

CalibrationSequence ={
 AnyOperation &HandCalRight01 = .RightHandCalibration01.HandCalibrationStudy01.LigamentLengthAdjustment;
};
