//This file is used for making a interface to the dof of the arm
//the added rotnodes are needed to be able to have the same rotation definitions for
//the right and left side

AnyFolder Hand =
{
  AnyFolder Finger1 = {

    AnyKinMeasure& CMCFlexion = ...Seg.Hand.Finger1.Jnt.CMCFlexion;

    AnyKinMeasureOrg CMCAbduction = {
      AnyFolder &ref1 = ....Seg.Hand.Finger1.Seg.CMCJointSeg.AbductionAdductionJointNode;
      ref1 = {
        AnyRefNode RotNode={
          ARel={{......Sign*1,0,0},{0,......Sign*1,0},{0,0,1}};
        };
      };
      AnyFolder &ref2 = ....Seg.Hand.Finger1.Seg.Metacarpal.CMCAbductionAdductionAxis;
      ref2 = {
        AnyRefNode RotNode={
          ARel={{......Sign*1,0,0},{0,......Sign*1,0},{0,0,1}};
        };
      };
      AnyKinRotational CMCMeasure = {
        Type = RotAxesAngles;
        AnyRefNode &ref1 = .....Seg.Hand.Finger1.Seg.CMCJointSeg.AbductionAdductionJointNode.RotNode;
        AnyRefNode &ref2 = .....Seg.Hand.Finger1.Seg.Metacarpal.CMCAbductionAdductionAxis.RotNode;
    //    ref1 = {AnyDrawRefFrame drw = {RGB={1,0,0};ScaleXYZ ={1,1,1}*0.15;};};
    //    ref2 = {AnyDrawRefFrame drw = {RGB={0,0,1};ScaleXYZ ={1,1,1}*0.15;};};

      };
      MeasureOrganizer = {2};
    };

    AnyKinMeasure& MCPFlexion = ...Seg.Hand.Finger1.Jnt.MCPFlexion;

    AnyKinMeasureOrg MCPAbduction = {
      AnyFolder &ref1 = ....Seg.Hand.Finger1.Seg.MCPJointSeg.AbductionAdductionAxis;
      ref1 = {
        AnyRefNode RotNode={
          ARel={{......Sign*1,0,0},{0,1,0},{0,0,......Sign*1}};
        };
      };
      AnyFolder &ref2 = ....Seg.Hand.Finger1.Seg.ProximalPhalanx.MCPAbductionAdductionAxis;
      ref2 = {
        AnyRefNode RotNode={
          ARel={{......Sign*1,0,0},{0,1,0},{0,0,......Sign*1}};
        };
      };
      AnyKinRotational MCPJoint = {
        Type = RotAxesAngles;
        AnyRefNode &ref1 = .....Seg.Hand.Finger1.Seg.MCPJointSeg.AbductionAdductionAxis.RotNode;
        AnyRefNode &ref2 = .....Seg.Hand.Finger1.Seg.ProximalPhalanx.MCPAbductionAdductionAxis.RotNode;
        //    ref1 = {AnyDrawRefFrame drw = {RGB={1,0,0};ScaleXYZ ={1,1,1}*0.15;};};
        //    ref2 = {AnyDrawRefFrame drw = {RGB={0,0,1};ScaleXYZ ={1,1,1}*0.15;};};
      };
      MeasureOrganizer = {2};
    };

    AnyKinMeasure& DIPFlexion = ...Seg.Hand.Finger1.Jnt.DIP;

  }; // Finger1

  AnyFolder Finger2 =
  {
    AnyKinMeasureOrg CMCFlexion= {
       AnyKinMeasure& CMC = ....Seg.Hand.Finger2.Jnt.CMC;
       MeasureOrganizer = {0};
    };
     AnyKinMeasureOrg CMCAbduction = {
       AnyFolder &ref1 = ....Seg.Hand.Carpals.CMC2;
       ref1 = {
         AnyRefNode RotNodeAbd={
           ARel={{......Sign*1,0,0},{0,......Sign*1,0},{0,0,1}};
         };
       };
       AnyFolder &ref2 = ....Seg.Hand.Finger2.Seg.Metacarpal.ProximalJointNode;
       ref2 = {
         AnyRefNode RotNodeAbd={
           ARel={{......Sign*1,0,0},{0,......Sign*1,0},{0,0,1}};
         };
       };
       AnyKinRotational CMCMeasure = {
         Type = RotAxesAngles;
         AnyRefNode &ref1 = .....Seg.Hand.Carpals.CMC2.RotNodeAbd;
         AnyRefNode &ref2 = .....Seg.Hand.Finger2.Seg.Metacarpal.ProximalJointNode.RotNodeAbd;
         //    ref1 = {AnyDrawRefFrame drw = {RGB={1,0,0};ScaleXYZ ={1,1,1}*0.15;};};
         //    ref2 = {AnyDrawRefFrame drw = {RGB={0,0,1};ScaleXYZ ={1,1,1}*0.15;};};
       };
       MeasureOrganizer = {2};
     };

     AnyKinMeasureOrg MCPFlexion = {
       AnyKinMeasure& MCP = ....Seg.Hand.Finger2.Jnt.MCP;
       MeasureOrganizer = {0};
     };
     AnyKinMeasureOrg MCPAbduction = {
       AnyFolder &ref1 = ....Seg.Hand.Finger2.Seg.Metacarpal.DistalJointNode;
       ref1 = {
         AnyRefNode RotNodeAbd={
           ARel={{......Sign*1,0,0},{0,......Sign*1,0},{0,0,1}};
         };
       };
       AnyFolder &ref2 = ....Seg.Hand.Finger2.Seg.ProximalPhalanx.ProximalJointNode;
       ref2 = {
         AnyRefNode RotNodeAbd={
           ARel={{......Sign*1,0,0},{0,......Sign*1,0},{0,0,1}};
         };
       };
       AnyKinRotational MCPMeasure = {
         Type = RotAxesAngles;
         AnyRefNode &ref1 = .....Seg.Hand.Finger2.Seg.Metacarpal.DistalJointNode.RotNodeAbd;
         AnyRefNode &ref2 = .....Seg.Hand.Finger2.Seg.ProximalPhalanx.ProximalJointNode.RotNodeAbd;
         //    ref1 = {AnyDrawRefFrame drw = {RGB={1,0,0};ScaleXYZ ={1,1,1}*0.15;};};
         //    ref2 = {AnyDrawRefFrame drw = {RGB={0,0,1};ScaleXYZ ={1,1,1}*0.15;};};
       };
       MeasureOrganizer = {2};
     };

    AnyKinMeasure& PIPFlexion = ...Seg.Hand.Finger2.Jnt.PIP;
    AnyKinMeasure& DIPFlexion = ...Seg.Hand.Finger2.Jnt.DIP;
  };

  AnyFolder Finger3 =
  {
    AnyKinMeasureOrg CMCFlexion= {
       AnyKinMeasure& CMC = ....Seg.Hand.Finger3.Jnt.CMC;
       MeasureOrganizer = {0};
    };
     AnyKinMeasureOrg CMCAbduction = {
       AnyFolder &ref1 = ....Seg.Hand.Carpals.CMC3;
       ref1 = {
         AnyRefNode RotNodeAbd={
           ARel={{......Sign*1,0,0},{0,......Sign*1,0},{0,0,1}};
         };
       };
       AnyFolder &ref2 = ....Seg.Hand.Finger3.Seg.Metacarpal.ProximalJointNode;
       ref2 = {
         AnyRefNode RotNodeAbd={
           ARel={{......Sign*1,0,0},{0,......Sign*1,0},{0,0,1}};
         };
       };
       AnyKinRotational CMCMeasure = {
         Type = RotAxesAngles;
         AnyRefNode &ref1 = .....Seg.Hand.Carpals.CMC3.RotNodeAbd;
         AnyRefNode &ref2 = .....Seg.Hand.Finger3.Seg.Metacarpal.ProximalJointNode.RotNodeAbd;
         //    ref1 = {AnyDrawRefFrame drw = {RGB={1,0,0};ScaleXYZ ={1,1,1}*0.15;};};
         //    ref2 = {AnyDrawRefFrame drw = {RGB={0,0,1};ScaleXYZ ={1,1,1}*0.15;};};
       };
       MeasureOrganizer = {2};
     };

    AnyKinMeasureOrg MCPAbduction = {
       AnyFolder &ref1 = ....Seg.Hand.Finger3.Seg.Metacarpal.DistalJointNode;
       ref1 = {
         AnyRefNode RotNodeAbd={
           ARel={{......Sign*1,0,0},{0,......Sign*1,0},{0,0,1}};
         };
       };
       AnyFolder &ref2 = ....Seg.Hand.Finger3.Seg.ProximalPhalanx.ProximalJointNode;
       ref2 = {
         AnyRefNode RotNodeAbd={
           ARel={{......Sign*1,0,0},{0,......Sign*1,0},{0,0,1}};
         };
       };
       AnyKinRotational MCPMeasure = {
         Type = RotAxesAngles;
         AnyRefNode &ref1 = .....Seg.Hand.Finger3.Seg.Metacarpal.DistalJointNode.RotNodeAbd;
         AnyRefNode &ref2 = .....Seg.Hand.Finger3.Seg.ProximalPhalanx.ProximalJointNode.RotNodeAbd;
         //    ref1 = {AnyDrawRefFrame drw = {RGB={1,0,0};ScaleXYZ ={1,1,1}*0.15;};};
         //    ref2 = {AnyDrawRefFrame drw = {RGB={0,0,1};ScaleXYZ ={1,1,1}*0.15;};};
       };
       MeasureOrganizer = {2};
     };

     AnyKinMeasureOrg MCPFlexion = {
       AnyKinMeasure& MCP = ....Seg.Hand.Finger3.Jnt.MCP;
       MeasureOrganizer = {0};
     };
    AnyKinMeasure& PIPFlexion = ...Seg.Hand.Finger3.Jnt.PIP;
    AnyKinMeasure& DIPFlexion = ...Seg.Hand.Finger3.Jnt.DIP;
  };

  AnyFolder Finger4 =
  {
    AnyKinMeasureOrg CMCFlexion= {
       AnyKinMeasure& CMC = ....Seg.Hand.Finger4.Jnt.CMC;
       MeasureOrganizer = {0};
    };
     AnyKinMeasureOrg CMCAbduction = {
       AnyFolder &ref1 = ....Seg.Hand.Carpals.CMC4;
       ref1 = {
         AnyRefNode RotNodeAbd={
           ARel={{......Sign*1,0,0},{0,......Sign*1,0},{0,0,1}};
         };
       };
       AnyFolder &ref2 = ....Seg.Hand.Finger4.Seg.Metacarpal.ProximalJointNode;
       ref2 = {
         AnyRefNode RotNodeAbd={
           ARel={{......Sign*1,0,0},{0,......Sign*1,0},{0,0,1}};
         };
       };
       AnyKinRotational CMCMeasure = {
         Type = RotAxesAngles;
         AnyRefNode &ref1 = .....Seg.Hand.Carpals.CMC4.RotNodeAbd;
         AnyRefNode &ref2 = .....Seg.Hand.Finger4.Seg.Metacarpal.ProximalJointNode.RotNodeAbd;
         //    ref1 = {AnyDrawRefFrame drw = {RGB={1,0,0};ScaleXYZ ={1,1,1}*0.15;};};
         //    ref2 = {AnyDrawRefFrame drw = {RGB={0,0,1};ScaleXYZ ={1,1,1}*0.15;};};
       };
       MeasureOrganizer = {2};
     };
     AnyKinMeasureOrg MCPAbduction = {
       AnyFolder &ref1 = ....Seg.Hand.Finger4.Seg.Metacarpal.DistalJointNode;
       ref1 = {
         AnyRefNode RotNodeAbd={
           ARel={{......Sign*1,0,0},{0,......Sign*1,0},{0,0,1}};
         };
       };
       AnyFolder &ref2 = ....Seg.Hand.Finger4.Seg.ProximalPhalanx.ProximalJointNode;
       ref2 = {
         AnyRefNode RotNodeAbd={
           ARel={{......Sign*1,0,0},{0,......Sign*1,0},{0,0,1}};
         };
       };
       AnyKinRotational MCPMeasure = {
         Type = RotAxesAngles;
         AnyRefNode &ref1 = .....Seg.Hand.Finger4.Seg.Metacarpal.DistalJointNode.RotNodeAbd;
         AnyRefNode &ref2 = .....Seg.Hand.Finger4.Seg.ProximalPhalanx.ProximalJointNode.RotNodeAbd;
         //    ref1 = {AnyDrawRefFrame drw = {RGB={1,0,0};ScaleXYZ ={1,1,1}*0.15;};};
         //    ref2 = {AnyDrawRefFrame drw = {RGB={0,0,1};ScaleXYZ ={1,1,1}*0.15;};};
       };
       MeasureOrganizer = {2};
     };

     AnyKinMeasureOrg MCPFlexion = {
       AnyKinMeasure& MCP = ....Seg.Hand.Finger4.Jnt.MCP;
       MeasureOrganizer = {0};
     };
    AnyKinMeasure& PIPFlexion = ...Seg.Hand.Finger4.Jnt.PIP;
    AnyKinMeasure& DIPFlexion = ...Seg.Hand.Finger4.Jnt.DIP;
  };


  AnyFolder Finger5 =
  {
    AnyKinMeasureOrg CMCFlexion= {
       AnyKinMeasure& CMC = ....Seg.Hand.Finger5.Jnt.CMC;
       MeasureOrganizer = {0};
    };
     AnyKinMeasureOrg CMCAbduction = {
       AnyFolder &ref1 = ....Seg.Hand.Carpals.CMC5;
       ref1 = {
         AnyRefNode RotNodeAbd={
           ARel={{......Sign*1,0,0},{0,......Sign*1,0},{0,0,1}};
         };
       };
       AnyFolder &ref2 = ....Seg.Hand.Finger5.Seg.Metacarpal.ProximalJointNode;
       ref2 = {
         AnyRefNode RotNodeAbd={
           ARel={{......Sign*1,0,0},{0,......Sign*1,0},{0,0,1}};
         };
       };
       AnyKinRotational CMCMeasure = {
         Type = RotAxesAngles;
         AnyRefNode &ref1 = .....Seg.Hand.Carpals.CMC5.RotNodeAbd;
         AnyRefNode &ref2 = .....Seg.Hand.Finger5.Seg.Metacarpal.ProximalJointNode.RotNodeAbd;
         //    ref1 = {AnyDrawRefFrame drw = {RGB={1,0,0};ScaleXYZ ={1,1,1}*0.15;};};
         //    ref2 = {AnyDrawRefFrame drw = {RGB={0,0,1};ScaleXYZ ={1,1,1}*0.15;};};
       };
       MeasureOrganizer = {2};
     };

    AnyKinMeasureOrg MCPAbduction = {
       AnyFolder &ref1 = ....Seg.Hand.Finger5.Seg.Metacarpal.DistalJointNode;
       ref1 = {
         AnyRefNode RotNodeAbd={
           ARel={{......Sign*1,0,0},{0,......Sign*1,0},{0,0,1}};
         };
       };
       AnyFolder &ref2 = ....Seg.Hand.Finger5.Seg.ProximalPhalanx.ProximalJointNode;
       ref2 = {
         AnyRefNode RotNodeAbd={
           ARel={{......Sign*1,0,0},{0,......Sign*1,0},{0,0,1}};
         };
       };
       AnyKinRotational MCPMeasure = {
         Type = RotAxesAngles;
         AnyRefNode &ref1 = .....Seg.Hand.Finger5.Seg.Metacarpal.DistalJointNode.RotNodeAbd;
         AnyRefNode &ref2 = .....Seg.Hand.Finger5.Seg.ProximalPhalanx.ProximalJointNode.RotNodeAbd;
         //    ref1 = {AnyDrawRefFrame drw = {RGB={1,0,0};ScaleXYZ ={1,1,1}*0.15;};};
         //    ref2 = {AnyDrawRefFrame drw = {RGB={0,0,1};ScaleXYZ ={1,1,1}*0.15;};};
       };
       MeasureOrganizer = {2};
     };

     AnyKinMeasureOrg MCPFlexion = {
       AnyKinMeasure& MCP = ....Seg.Hand.Finger5.Jnt.MCP;
       MeasureOrganizer = {0};
     };
    AnyKinMeasure& PIPFlexion = ...Seg.Hand.Finger5.Jnt.PIP;
    AnyKinMeasure& DIPFlexion = ...Seg.Hand.Finger5.Jnt.DIP;
  };


};//Hand


AnyKinMeasureOrg CMCFlexion = {
  AnyFolder &ref1 = ..Seg.Hand.Carpals.CMC1;
  ref1 = {
    AnyRefNode RotNode={
      ARel={{1,0,0},{0,1,0},{0,0,1}};
    };
  };
  AnyFolder &Flex = ..Seg.Hand.Finger1.Seg.CMCJointSeg.FlexionExtensionJointNode;
  Flex = {
    AnyRefNode RotNode={
      ARel={{1,0,0},{0,1,0},{0,0,1}};
    };
  };

  AnyKinRotational CMCJoint = {

    Type = RotAxesAngles;
    AnyRefNode &ref1 = ...Seg.Hand.Carpals.CMC1.RotNode;
    AnyRefNode &ref2 = ...Seg.Hand.Finger1.Seg.CMCJointSeg.FlexionExtensionJointNode.RotNode;
//    ref1 = {AnyDrawRefFrame drw = {RGB={1,0,0};ScaleXYZ ={1,1,1}*0.15;};};
//    ref2 = {AnyDrawRefFrame drw = {RGB={0,0,1};ScaleXYZ ={1,1,1}*0.15;};};

  };
  MeasureOrganizer = {0};
};


AnyKinMeasureOrg CMCAbduction = {
  AnyFolder &ref1 = ..Seg.Hand.Finger1.Seg.CMCJointSeg.AbductionAdductionJointNode;
//  ref1 = {
//    AnyRefNode RotNode={
//      ARel={{....Sign*1,0,0},{0,....Sign*1,0},{0,0,1}};
//    };
//  };
  AnyFolder &ref2 = ..Seg.Hand.Finger1.Seg.Metacarpal.CMCAbductionAdductionAxis;
//  ref2 = {
//    AnyRefNode RotNode={
//      ARel={{....Sign*1,0,0},{0,....Sign*1,0},{0,0,1}};
//    };
//  };

  AnyKinRotational CMCJoint = {

    Type = RotAxesAngles;
    AnyRefNode &ref1 = ...Seg.Hand.Finger1.Seg.CMCJointSeg.AbductionAdductionJointNode.RotNode;
    AnyRefNode &ref2 = ...Seg.Hand.Finger1.Seg.Metacarpal.CMCAbductionAdductionAxis.RotNode;
//    ref1 = {AnyDrawRefFrame drw = {RGB={1,0,0};ScaleXYZ ={1,1,1}*0.15;};};
//    ref2 = {AnyDrawRefFrame drw = {RGB={0,0,1};ScaleXYZ ={1,1,1}*0.15;};};

  };
  MeasureOrganizer = {2};
};


AnyKinMeasureOrg MCPFlexion = {
  AnyFolder &ref1 = ..Seg.Hand.Finger1.Seg.Metacarpal.MCPFlexionExtensionAxis;
  ref1 = {
    AnyRefNode RotNode={
      ARel={{1,0,0},{0,1,0},{0,0,1}};
    };
  };
  AnyFolder &ref2 = ..Seg.Hand.Finger1.Seg.MCPJointSeg.FlexionExtensionAxis;
  ref2 = {
    AnyRefNode RotNode={
      ARel={{1,0,0},{0,1,0},{0,0,1}};
    };
  };

  AnyKinRotational MCPJoint = {

    Type = RotAxesAngles;
    AnyRefNode &ref1 = ...Seg.Hand.Finger1.Seg.Metacarpal.MCPFlexionExtensionAxis.RotNode;
    AnyRefNode &ref2 = ...Seg.Hand.Finger1.Seg.MCPJointSeg.FlexionExtensionAxis.RotNode;
//    ref1 = {AnyDrawRefFrame drw = {RGB={1,0,0};ScaleXYZ ={1,1,1}*0.15;};};
//    ref2 = {AnyDrawRefFrame drw = {RGB={0,0,1};ScaleXYZ ={1,1,1}*0.15;};};

  };
  MeasureOrganizer = {0};
};


AnyKinMeasureOrg MCPAbduction = {
  AnyFolder &ref1 = ..Seg.Hand.Finger1.Seg.MCPJointSeg.AbductionAdductionAxis;
  ref1 = {
//    AnyRefNode RotNode={
//      ARel={{....Sign*1,0,0},{0,1,0},{0,0,....Sign*1}};
//    };
  };
  AnyFolder &ref2 = ..Seg.Hand.Finger1.Seg.ProximalPhalanx.MCPAbductionAdductionAxis;

  ref2 = {
//    AnyRefNode RotNode={
//      ARel={{....Sign*1,0,0},{0,1,0},{0,0,....Sign*1}};
//    };
  };

  AnyKinRotational MCPJoint = {

    Type = RotAxesAngles;

    AnyRefNode &ref1 = ...Seg.Hand.Finger1.Seg.MCPJointSeg.AbductionAdductionAxis.RotNode;
    AnyRefNode &ref2 = ...Seg.Hand.Finger1.Seg.ProximalPhalanx.MCPAbductionAdductionAxis.RotNode;

//    ref1 = {AnyDrawRefFrame drw = {RGB={1,0,0};ScaleXYZ ={1,1,1}*0.15;};};
//    ref2 = {AnyDrawRefFrame drw = {RGB={0,0,1};ScaleXYZ ={1,1,1}*0.15;};};
//
  };
  MeasureOrganizer = {2};
};


AnyKinMeasureOrg DIP = {
  AnyFolder &ref1 = ..Seg.Hand.Finger1.Seg.ProximalPhalanx.IPFlexionExtensionAxis;
  ref1 = {
    AnyRefNode RotNode={
      ARel={{1,0,0},{0,1,0},{0,0,1}};
    };
  };
  AnyFolder &ref2 = ..Seg.Hand.Finger1.Seg.DistalPhalanx.IPFlexionExtensionAxis;

  ref2 = {
    AnyRefNode RotNode={
      ARel={{1,0,0},{0,1,0},{0,0,1}};
    };
  };

  AnyKinRotational DIP = {

    Type = RotAxesAngles;
    AnyRefNode &ref1 = ...Seg.Hand.Finger1.Seg.ProximalPhalanx.IPFlexionExtensionAxis.RotNode;
    AnyRefNode &ref2 = ...Seg.Hand.Finger1.Seg.DistalPhalanx.IPFlexionExtensionAxis.RotNode;

    //    ref1 = {AnyDrawRefFrame drw = {RGB={1,0,0};ScaleXYZ ={1,1,1}*0.15;};};
    //    ref2 = {AnyDrawRefFrame drw = {RGB={0,0,1};ScaleXYZ ={1,1,1}*0.15;};};

  };
  MeasureOrganizer = {0};
};


AnyKinMeasureOrg MCPAbduction_Finger2 = {
  AnyFolder &ref1 = ..Seg.Hand.Finger2.Seg.Metacarpal.DistalJointNode;
  ref1 = {
//    AnyRefNode RotNodeAbd={
//      ARel={{....Sign*1,0,0},{0,....Sign*1,0},{0,0,1}};
//    };
  };
  AnyFolder &ref2 = ..Seg.Hand.Finger2.Seg.ProximalPhalanx.ProximalJointNode;

  ref2 = {
//    AnyRefNode RotNodeAbd={
//      ARel={{....Sign*1,0,0},{0,....Sign*1,0},{0,0,1}};
//    };
  };

  AnyKinRotational MCPJoint = {

    Type = RotAxesAngles;

    AnyRefNode &ref1 = ...Seg.Hand.Finger2.Seg.Metacarpal.DistalJointNode.RotNodeAbd;
    AnyRefNode &ref2 = ...Seg.Hand.Finger2.Seg.ProximalPhalanx.ProximalJointNode.RotNodeAbd;

    //    ref1 = {AnyDrawRefFrame drw = {RGB={1,0,0};ScaleXYZ ={1,1,1}*0.15;};};
    //    ref2 = {AnyDrawRefFrame drw = {RGB={0,0,1};ScaleXYZ ={1,1,1}*0.15;};};
    //
  };
  MeasureOrganizer = {2};
};


AnyKinMeasureOrg MCPFlexion_Finger2 = {
  AnyFolder &ref1 = ..Seg.Hand.Finger2.Seg.Metacarpal.DistalJointNode;
  ref1 = {
    AnyRefNode RotNodeFlex={
      ARel={{1,0,0},{0,1,0},{0,0,1}};
    };
  };
  AnyFolder &ref2 = ..Seg.Hand.Finger2.Seg.ProximalPhalanx.ProximalJointNode;
  ref2 = {
    AnyRefNode RotNodeFlex={
      ARel={{1,0,0},{0,1,0},{0,0,1}};
    };
  };

  AnyKinRotational MCPJoint = {

    Type = RotAxesAngles;
    AnyRefNode &ref1 = ...Seg.Hand.Finger2.Seg.Metacarpal.DistalJointNode.RotNodeFlex;
    AnyRefNode &ref2 = ...Seg.Hand.Finger2.Seg.ProximalPhalanx.ProximalJointNode.RotNodeFlex;
    //    ref1 = {AnyDrawRefFrame drw = {RGB={1,0,0};ScaleXYZ ={1,1,1}*0.15;};};
    //    ref2 = {AnyDrawRefFrame drw = {RGB={0,0,1};ScaleXYZ ={1,1,1}*0.15;};};

  };
  MeasureOrganizer = {0};
};


AnyKinMeasureOrg MCPAbduction_Finger3 = {
  AnyFolder &ref1 = ..Seg.Hand.Finger3.Seg.Metacarpal.DistalJointNode;
  ref1 = {
//    AnyRefNode RotNodeAbd={
//      ARel={{....Sign*1,0,0},{0,....Sign*1,0},{0,0,1}};
//    };
  };
  AnyFolder &ref2 = ..Seg.Hand.Finger3.Seg.ProximalPhalanx.ProximalJointNode;

  ref2 = {
//    AnyRefNode RotNodeAbd={
//      ARel={{....Sign*1,0,0},{0,....Sign*1,0},{0,0,1}};
//    };
  };

  AnyKinRotational MCPJoint = {

    Type = RotAxesAngles;

    AnyRefNode &ref1 = ...Seg.Hand.Finger3.Seg.Metacarpal.DistalJointNode.RotNodeAbd;
    AnyRefNode &ref2 = ...Seg.Hand.Finger3.Seg.ProximalPhalanx.ProximalJointNode.RotNodeAbd;

    //    ref1 = {AnyDrawRefFrame drw = {RGB={1,0,0};ScaleXYZ ={1,1,1}*0.15;};};
    //    ref2 = {AnyDrawRefFrame drw = {RGB={0,0,1};ScaleXYZ ={1,1,1}*0.15;};};
    //
  };
  MeasureOrganizer = {2};
};


AnyKinMeasureOrg MCPFlexion_Finger3 = {
  AnyFolder &ref1 = ..Seg.Hand.Finger3.Seg.Metacarpal.DistalJointNode;
  ref1 = {
    AnyRefNode RotNodeFlex={
      ARel={{1,0,0},{0,1,0},{0,0,1}};
    };
  };
  AnyFolder &ref2 = ..Seg.Hand.Finger3.Seg.ProximalPhalanx.ProximalJointNode;
  ref2 = {
    AnyRefNode RotNodeFlex={
      ARel={{1,0,0},{0,1,0},{0,0,1}};
    };
  };

  AnyKinRotational MCPJoint = {

    Type = RotAxesAngles;
    AnyRefNode &ref1 = ...Seg.Hand.Finger3.Seg.Metacarpal.DistalJointNode.RotNodeFlex;
    AnyRefNode &ref2 = ...Seg.Hand.Finger3.Seg.ProximalPhalanx.ProximalJointNode.RotNodeFlex;
    //    ref1 = {AnyDrawRefFrame drw = {RGB={1,0,0};ScaleXYZ ={1,1,1}*0.15;};};
    //    ref2 = {AnyDrawRefFrame drw = {RGB={0,0,1};ScaleXYZ ={1,1,1}*0.15;};};

  };
  MeasureOrganizer = {0};
};


AnyKinMeasureOrg MCPAbduction_Finger4 = {
  AnyFolder &ref1 = ..Seg.Hand.Finger4.Seg.Metacarpal.DistalJointNode;
  ref1 = {
//    AnyRefNode RotNodeAbd={
//      ARel={{....Sign*1,0,0},{0,....Sign*1,0},{0,0,1}};
//    };
  };
  AnyFolder &ref2 = ..Seg.Hand.Finger4.Seg.ProximalPhalanx.ProximalJointNode;

  ref2 = {
//    AnyRefNode RotNodeAbd={
//      ARel={{....Sign*1,0,0},{0,....Sign*1,0},{0,0,1}};
//    };
  };

  AnyKinRotational MCPJoint = {

    Type = RotAxesAngles;

    AnyRefNode &ref1 = ...Seg.Hand.Finger4.Seg.Metacarpal.DistalJointNode.RotNodeAbd;
    AnyRefNode &ref2 = ...Seg.Hand.Finger4.Seg.ProximalPhalanx.ProximalJointNode.RotNodeAbd;

    //    ref1 = {AnyDrawRefFrame drw = {RGB={1,0,0};ScaleXYZ ={1,1,1}*0.15;};};
    //    ref2 = {AnyDrawRefFrame drw = {RGB={0,0,1};ScaleXYZ ={1,1,1}*0.15;};};
    //
  };
  MeasureOrganizer = {2};
};


AnyKinMeasureOrg MCPFlexion_Finger4 = {
  AnyFolder &ref1 = ..Seg.Hand.Finger4.Seg.Metacarpal.DistalJointNode;
  ref1 = {
    AnyRefNode RotNodeFlex={
      //Sign muesste noch eingefgt werden
      ARel={{1,0,0},{0,1,0},{0,0,1}};
    };
  };
  AnyFolder &ref2 = ..Seg.Hand.Finger4.Seg.ProximalPhalanx.ProximalJointNode;
  ref2 = {
    AnyRefNode RotNodeFlex={
      //Sign muesste noch eingefgt werden
      ARel={{1,0,0},{0,1,0},{0,0,1}};
    };
  };

  AnyKinRotational MCPJoint = {

    Type = RotAxesAngles;
    AnyRefNode &ref1 = ...Seg.Hand.Finger4.Seg.Metacarpal.DistalJointNode.RotNodeFlex;
    AnyRefNode &ref2 = ...Seg.Hand.Finger4.Seg.ProximalPhalanx.ProximalJointNode.RotNodeFlex;
    //    ref1 = {AnyDrawRefFrame drw = {RGB={1,0,0};ScaleXYZ ={1,1,1}*0.15;};};
    //    ref2 = {AnyDrawRefFrame drw = {RGB={0,0,1};ScaleXYZ ={1,1,1}*0.15;};};

  };
  MeasureOrganizer = {0};
};


AnyKinMeasureOrg MCPAbduction_Finger5 = {
  AnyFolder &ref1 = ..Seg.Hand.Finger5.Seg.Metacarpal.DistalJointNode;
  ref1 = {
//    AnyRefNode RotNodeAbd={
//      ARel={{....Sign*1,0,0},{0,....Sign*1,0},{0,0,1}};
//    };
  };
  AnyFolder &ref2 = ..Seg.Hand.Finger5.Seg.ProximalPhalanx.ProximalJointNode;

  ref2 = {
//    AnyRefNode RotNodeAbd={
//      ARel={{....Sign*1,0,0},{0,....Sign*1,0},{0,0,1}};
//    };
  };

  AnyKinRotational MCPJoint = {

    Type = RotAxesAngles;

    AnyRefNode &ref1 = ...Seg.Hand.Finger5.Seg.Metacarpal.DistalJointNode.RotNodeAbd;
    AnyRefNode &ref2 = ...Seg.Hand.Finger5.Seg.ProximalPhalanx.ProximalJointNode.RotNodeAbd;

    //    ref1 = {AnyDrawRefFrame drw = {RGB={1,0,0};ScaleXYZ ={1,1,1}*0.15;};};
    //    ref2 = {AnyDrawRefFrame drw = {RGB={0,0,1};ScaleXYZ ={1,1,1}*0.15;};};
    //
  };
  MeasureOrganizer = {2};
};


AnyKinMeasureOrg MCPFlexion_Finger5 = {
  AnyFolder &ref1 = ..Seg.Hand.Finger5.Seg.Metacarpal.DistalJointNode;
  ref1 = {
    AnyRefNode RotNodeFlex={
      ARel={{1,0,0},{0,1,0},{0,0,1}};
    };
  };
  AnyFolder &ref2 = ..Seg.Hand.Finger5.Seg.ProximalPhalanx.ProximalJointNode;
  ref2 = {
    AnyRefNode RotNodeFlex={
      ARel={{1,0,0},{0,1,0},{0,0,1}};
    };
  };

  AnyKinRotational MCPJoint = {

    Type = RotAxesAngles;
    AnyRefNode &ref1 = ...Seg.Hand.Finger5.Seg.Metacarpal.DistalJointNode.RotNodeFlex;
    AnyRefNode &ref2 = ...Seg.Hand.Finger5.Seg.ProximalPhalanx.ProximalJointNode.RotNodeFlex;
    //    ref1 = {AnyDrawRefFrame drw = {RGB={1,0,0};ScaleXYZ ={1,1,1}*0.15;};};
    //    ref2 = {AnyDrawRefFrame drw = {RGB={0,0,1};ScaleXYZ ={1,1,1}*0.15;};};

  };
  MeasureOrganizer = {0};
};
