// This include file contains all the muscle parameter
// data of the lower extremity. Please note that it is
// necessary to calibrate the model. This data is not
// calibrated!

// A lot of information in this file is obtained from:
// http: // isb.ri.ccf.org/data/delp/Muscle_parameter_table.txt

//All additional muscles from the Klein Horsman dataset that were not decribed in the former model, have been inserted.
//Some muscles of the former model are divided into more seperate parts.
//For each muscle(part), PCSA,AnyVar LfbarTemp, Lt0 and pennation angle are defined, based on the Klein Horsman dataset. The muscles
//that were defined already in the former model will keep their definitions of the parameters: Epsilonbar, K1, K2, Fcfast,
//Jt, Jpe and PEFactor. This will also be the case for the muscles that were divided into more seperate parts, for example
//the SoleusLateralis and SoleusMedialis will have the same definition of the parameters Epsilonbar up till PEFactor as the
//Soleus in the former model.
//An extra parameter, PCSA, became available from the dataset. Therefore, a new F0 will be calculated for each muscle
//using F0 = PCSAfactor * PCSA. This factor will be defined first and will be referred to later, so it can be changed easily.
//
//
//Oktober 2007, Karin Gorter

//Ward et al 2009
//Clin Orthop Relat Res (2009) 467:1074-1082
//Are Current Measurements of Lower Extremity Muscle
//Architecture Accurate?
//Samuel R. Ward PT, PhD, Carolyn M. Eng BS,
//Laura H. Smallwood BS, PA, Richard L. Lieber PhD


AnyVar StrengthScaleShank = .StrengthScaling.Shank.StrengthScale;
AnyVar StrengthScaleThigh = .StrengthScaling.Thigh.StrengthScale;
AnyVar StrengthScalePelvis = .Scaling.StrengthScaling.Pelvis.StrengthScale;
AnyVar FiberLengthScaleShank = .FiberLengthScaling.Shank.FiberLengthScale;
AnyVar FiberLengthScaleThigh = .FiberLengthScaling.Thigh.FiberLengthScale;
AnyVar FiberLengthScalePelvis = .FiberLengthScaling.Thigh.FiberLengthScale;//.Scaling.FiberLengthScaling.Pelvis.FiberLengthScale;


AnyVar PCSAfactor = 27*.....HumanModel.StrengthParameters.StrengthIndexLeg; // = PCSAfactor in N/cm^2 , the PCSA itself is given in cm^2 so F0 is in Newton`s.
//Klein Horsman used a PCSAfactor of 27 N/cm^2

AnyMuscleModel3E SoleusLateralis4Par = {
  F0 = .StrengthScaleShank*.PCSAfactor*85.9/3; // Maximum force output at optimum fiber length
// AnyVar LfbarTemp = (2.6/100); // Optimum fiber length  ORIGINAL DATA
AnyVar LfbarTemp = .FiberLengthScaleShank*(4.4/100); // Optimum fiber length
Lfbar=LfbarTemp;
  Lt0 = (8.5/100); // Tendon slack length
  Gammabar = 59*(3.14/180); // Pennation angle in radian: similar to Delp's soleus
  Epsilonbar = 0.053; // Tendon strain at F0
  K1 = 10; // Factor for determining shortening speed at optimum length
  K2 = 0; // Factor for determining shortening speed at optimum length
  Fcfast = 0.4; // Factor for determining shortening speed at optimum length
  Jt = 3.0; // Shape parameter for the tendon stiffness
  Jpe = 3.0; // Shape parameter for the parallel stiffness
  PEFactor = 5; // Parameter for influence of parallel stiffness

  AnyVar MusLengthUnScaled= 0.324808501  ;
  AnyVar LengthDifference=MusLengthUnScaled-Lt0-Lfbar*cos(Gammabar);
};

AnyMuscleModel3E SoleusLateralis5Par = {
  F0 = .StrengthScaleShank*.PCSAfactor*85.9/3; // Maximum force output at optimum fiber length
  // AnyVar LfbarTemp = (2.6/100); // Optimum fiber length  ORIGINAL DATA
  AnyVar LfbarTemp = .FiberLengthScaleShank*(4.4/100); // Optimum fiber length
  Lfbar=LfbarTemp;
  Lt0 = (8.5/100); // Tendon slack length
  Gammabar = 59*(3.14/180); // Pennation angle in radian: similar to Delp's soleus
  Epsilonbar = 0.053; // Tendon strain at F0
  K1 = 10; // Factor for determining shortening speed at optimum length
  K2 = 0; // Factor for determining shortening speed at optimum length
  Fcfast = 0.4; // Factor for determining shortening speed at optimum length
  Jt = 3.0; // Shape parameter for the tendon stiffness
  Jpe = 3.0; // Shape parameter for the parallel stiffness
  PEFactor = 5; // Parameter for influence of parallel stiffness
AnyVar MusLengthUnScaled= 0.351633123  ;
  AnyVar LengthDifference=MusLengthUnScaled-Lt0-Lfbar*cos(Gammabar);
};

AnyMuscleModel3E SoleusLateralis6Par = {
  F0 = .StrengthScaleShank*.PCSAfactor*85.9/3; // Maximum force output at optimum fiber length
// AnyVar LfbarTemp = (2.6/100); // Optimum fiber length  ORIGINAL DATA

  AnyVar LfbarTemp = .FiberLengthScaleShank*(4.4/100); // Optimum fiber length
  Lfbar=LfbarTemp;
  Lt0 = (8.5/100); // Tendon slack length
  Gammabar = 59*(3.14/180); // Pennation angle in radian: similar to Delp's soleus
  Epsilonbar = 0.053; // Tendon strain at F0
  K1 = 10; // Factor for determining shortening speed at optimum length
  K2 = 0; // Factor for determining shortening speed at optimum length
  Fcfast = 0.4; // Factor for determining shortening speed at optimum length
  Jt = 3.0; // Shape parameter for the tendon stiffness
  Jpe = 3.0; // Shape parameter for the parallel stiffness
  PEFactor = 5; // Parameter for influence of parallel stiffness
AnyVar MusLengthUnScaled= 0.390831117  ;
  AnyVar LengthDifference=MusLengthUnScaled-Lt0-Lfbar*cos(Gammabar);
};

AnyMuscleModel3E SoleusMedialis1Par = {
  F0 = .StrengthScaleShank*.PCSAfactor*94.3/3; // Maximum force output at optimum fiber length
 AnyVar LfbarTemp = .FiberLengthScaleShank*(4.4/100); // Optimum fiber length
Lfbar=LfbarTemp;
  Lt0 = (8.5/100); // Tendon slack length
  Gammabar = 64*(3.14/180); // Pennation angle in radian: similar to Delp's soleus
  Epsilonbar = 0.053; // Tendon strain at F0
  K1 = 10; // Factor for determining shortening speed at optimum length
  K2 = 0; // Factor for determining shortening speed at optimum length
  Fcfast = 0.4; // Factor for determining shortening speed at optimum length
  Jt = 3.0; // Shape parameter for the tendon stiffness
  Jpe = 3.0; // Shape parameter for the parallel stiffness
  PEFactor = 5; // Parameter for influence of parallel stiffness
AnyVar MusLengthUnScaled= 0.285474311;
  AnyVar LengthDifference=MusLengthUnScaled-Lt0-Lfbar*cos(Gammabar);

};

AnyMuscleModel3E SoleusMedialis2Par = {
  F0 = .StrengthScaleShank*.PCSAfactor*94.3/3; // Maximum force output at optimum fiber length
 AnyVar LfbarTemp = .FiberLengthScaleShank*(4.4/100); // Optimum fiber length
Lfbar=LfbarTemp;
  Lt0 = (8.5/100); // Tendon slack length
  Gammabar = 64*(3.14/180); // Pennation angle in radian: similar to Delp's soleus
  Epsilonbar = 0.053; // Tendon strain at F0
  K1 = 10; // Factor for determining shortening speed at optimum length
  K2 = 0; // Factor for determining shortening speed at optimum length
  Fcfast = 0.4; // Factor for determining shortening speed at optimum length
  Jt = 3.0; // Shape parameter for the tendon stiffness
  Jpe = 3.0; // Shape parameter for the parallel stiffness
  PEFactor = 5; // Parameter for influence of parallel stiffness
AnyVar MusLengthUnScaled= 0.315767408;
  AnyVar LengthDifference=MusLengthUnScaled-Lt0-Lfbar*cos(Gammabar);

};

AnyMuscleModel3E SoleusMedialis3Par = {
  F0 = .StrengthScaleShank*.PCSAfactor*94.3/3; // Maximum force output at optimum fiber length
 AnyVar LfbarTemp = .FiberLengthScaleShank*(4.4/100); // Optimum fiber length
Lfbar=LfbarTemp;
  Lt0 = (8.5/100); // Tendon slack length
  Gammabar = 64*(3.14/180); // Pennation angle in radian: similar to Delp's soleus
  Epsilonbar = 0.053; // Tendon strain at F0
  K1 = 10; // Factor for determining shortening speed at optimum length
  K2 = 0; // Factor for determining shortening speed at optimum length
  Fcfast = 0.4; // Factor for determining shortening speed at optimum length
  Jt = 3.0; // Shape parameter for the tendon stiffness
  Jpe = 3.0; // Shape parameter for the parallel stiffness
  PEFactor = 5; // Parameter for influence of parallel stiffness
AnyVar MusLengthUnScaled= 0.339058692  ;
  AnyVar LengthDifference=MusLengthUnScaled-Lt0-Lfbar*cos(Gammabar);
};

AnyMuscleModel3E GastrocnemiusLateralis1Par = {
  F0 = .StrengthScaleShank*.PCSAfactor*24; // Maximum force output at optimum fiber length
 AnyVar LfbarTemp = .FiberLengthScaleShank*(5.7/100); // Optimum fiber length
Lfbar=LfbarTemp;
  Lt0 = (23.4/100); // Tendon slack length
  Gammabar = 25.4*(3.14/180); // Pennation angle in radian
  Epsilonbar = 0.053; // Tendon strain at F0
  K1 = 10; // Factor for determining shortening speed at optimum length
  K2 = 0; // Factor for determining shortening speed at optimum length
  Fcfast = 0.4; // Factor for determining shortening speed at optimum length
  Jt = 3.0; // Shape parameter for the tendon stiffness
  Jpe = 3.0; // Shape parameter for the parallel stiffness
  PEFactor = 5; // Parameter for influence of parallel stiffness
AnyVar MusLengthUnScaled=  0.49453885 ;
  AnyVar LengthDifference=MusLengthUnScaled-Lt0-Lfbar*cos(Gammabar);
};

AnyMuscleModel3E GastrocnemiusMedialis1Par = {
  F0 = .StrengthScaleShank*.PCSAfactor*43.8; // Maximum force output at optimum fiber length
 AnyVar LfbarTemp = .FiberLengthScaleShank*(6/100); // Optimum fiber length
Lfbar=LfbarTemp;
  Lt0 = (21.2/100); // Tendon slack length
  Gammabar = 10.8*(3.14/180); // Pennation angle in radian
  Epsilonbar = 0.053; // Tendon strain at F0
  K1 = 10; // Factor for determining shortening speed at optimum length
  K2 = 0; // Factor for determining shortening speed at optimum length
  Fcfast = 0.4; // Factor for determining shortening speed at optimum length
  Jt = 3.0; // Shape parameter for the tendon stiffness
  Jpe = 3.0; // Shape parameter for the parallel stiffness
  PEFactor = 5; // Parameter for influence of parallel stiffness
AnyVar MusLengthUnScaled=  0.508345122 ;
  AnyVar LengthDifference=MusLengthUnScaled-Lt0-Lfbar*cos(Gammabar);
};


AnyMuscleModel3E FlexorDigitorumLongus1Par = {
  F0 = .StrengthScaleShank*.PCSAfactor*6.6/3; // Maximum force output at optimum fiber length
 AnyVar LfbarTemp = .FiberLengthScaleShank*(3.8/100); // Optimum fiber length
Lfbar=LfbarTemp;
  Lt0 = (16.6/100); // Tendon slack length
  Gammabar = 28.5*(3.14/180); // Pennation angle in radian
  Epsilonbar = 0.053; // Tendon strain at F0
  K1 = 10; // Factor for determining shortening speed at optimum length
  K2 = 0; // Factor for determining shortening speed at optimum length
  Fcfast = 0.4; // Factor for determining shortening speed at optimum length
  Jt = 3.0; // Shape parameter for the tendon stiffness
  Jpe = 3.0; // Shape parameter for the parallel stiffness
  PEFactor = 5.0; // Parameter for influence of parallel stiffness
AnyVar MusLengthUnScaled= 0.552622668 ;
  AnyVar LengthDifference=MusLengthUnScaled-Lt0-Lfbar*cos(Gammabar);
};

AnyMuscleModel3E FlexorDigitorumLongus2Par = {
  F0 = .StrengthScaleShank*.PCSAfactor*6.6/3; // Maximum force output at optimum fiber length
 AnyVar LfbarTemp = .FiberLengthScaleShank*(3.8/100); // Optimum fiber length
Lfbar=LfbarTemp;
  Lt0 = (16.6/100); // Tendon slack length
  Gammabar = 28.5*(3.14/180); // Pennation angle in radian
  Epsilonbar = 0.053; // Tendon strain at F0
  K1 = 10; // Factor for determining shortening speed at optimum length
  K2 = 0; // Factor for determining shortening speed at optimum length
  Fcfast = 0.4; // Factor for determining shortening speed at optimum length
  Jt = 3.0; // Shape parameter for the tendon stiffness
  Jpe = 3.0; // Shape parameter for the parallel stiffness
  PEFactor = 5.0; // Parameter for influence of parallel stiffness
AnyVar MusLengthUnScaled=  0.285474311 ;
  AnyVar LengthDifference=MusLengthUnScaled-Lt0-Lfbar*cos(Gammabar);
};

AnyMuscleModel3E FlexorDigitorumLongus3Par = {
  F0 = .StrengthScaleShank*.PCSAfactor*6.6/3; // Maximum force output at optimum fiber length
 AnyVar LfbarTemp = .FiberLengthScaleShank*(3.8/100); // Optimum fiber length
Lfbar=LfbarTemp;
  Lt0 = (16.6/100); // Tendon slack length
  Gammabar = 28.5*(3.14/180); // Pennation angle in radian
  Epsilonbar = 0.053; // Tendon strain at F0
  K1 = 10; // Factor for determining shortening speed at optimum length
  K2 = 0; // Factor for determining shortening speed at optimum length
  Fcfast = 0.4; // Factor for determining shortening speed at optimum length
  Jt = 3.0; // Shape parameter for the tendon stiffness
  Jpe = 3.0; // Shape parameter for the parallel stiffness
  PEFactor = 5.0; // Parameter for influence of parallel stiffness
AnyVar MusLengthUnScaled= 0.459677955  ;
  AnyVar LengthDifference=MusLengthUnScaled-Lt0-Lfbar*cos(Gammabar);
};

AnyMuscleModel3E FlexorHallucisLongus1Par = {
  F0 = .StrengthScaleShank*.PCSAfactor*31.1/3; // Maximum force output at optimum fiber length
// AnyVar LfbarTemp = (2.6/100) ; // Optimum fiber length
 AnyVar LfbarTemp = .FiberLengthScaleShank*(5.27/100); // Optimum fiber length Ward et al 2009

Lfbar=LfbarTemp;
  Lt0 = 0.38; // Tendon slack length
  Gammabar = 30*(3.14/180); // Pennation angle in radian
  Epsilonbar = 0.053; // Tendon strain at F0
  K1 = 10; // Factor for determining shortening speed at optimum length
  K2 = 0; // Factor for determining shortening speed at optimum length
  Fcfast = 0.4; // Factor for determining shortening speed at optimum length
  Jt = 3.0; // Shape parameter for the tendon stiffness
  Jpe = 3.0; // Shape parameter for the parallel stiffness
  PEFactor = 5.0; // Parameter for influence of parallel stiffness
AnyVar MusLengthUnScaled= 0.520894802;
  AnyVar LengthDifference=MusLengthUnScaled-Lt0-Lfbar*cos(Gammabar);
};

AnyMuscleModel3E FlexorHallucisLongus2Par = {
  F0 = .StrengthScaleShank*.PCSAfactor*31.1/3; // Maximum force output at optimum fiber length
 //AnyVar LfbarTemp = (2.6/100) ; // Optimum fiber length
 AnyVar LfbarTemp = .FiberLengthScaleShank*(5.27/100); // Optimum fiber length Ward et al 2009
Lfbar=LfbarTemp;
  Lt0 = 0.38; // Tendon slack length
  Gammabar = 30*(3.14/180); // Pennation angle in radian
  Epsilonbar = 0.053; // Tendon strain at F0
  K1 = 10; // Factor for determining shortening speed at optimum length
  K2 = 0; // Factor for determining shortening speed at optimum length
  Fcfast = 0.4; // Factor for determining shortening speed at optimum length
  Jt = 3.0; // Shape parameter for the tendon stiffness
  Jpe = 3.0; // Shape parameter for the parallel stiffness
  PEFactor = 5.0; // Parameter for influence of parallel stiffness
AnyVar MusLengthUnScaled= 0.467511318  ;
  AnyVar LengthDifference=MusLengthUnScaled-Lt0-Lfbar*cos(Gammabar);
};
AnyMuscleModel3E FlexorHallucisLongus3Par = {
  F0 = .StrengthScaleShank*.PCSAfactor*31.1/3; // Maximum force output at optimum fiber length
// AnyVar LfbarTemp = (2.6/100) ; // Optimum fiber length
 AnyVar LfbarTemp = .FiberLengthScaleShank*(5.27/100); // Optimum fiber length Ward et al 2009

Lfbar=LfbarTemp;
  Lt0 = 0.38; // Tendon slack length
  Gammabar = 30*(3.14/180); // Pennation angle in radian
  Epsilonbar = 0.053; // Tendon strain at F0
  K1 = 10; // Factor for determining shortening speed at optimum length
  K2 = 0; // Factor for determining shortening speed at optimum length
  Fcfast = 0.4; // Factor for determining shortening speed at optimum length
  Jt = 3.0; // Shape parameter for the tendon stiffness
  Jpe = 3.0; // Shape parameter for the parallel stiffness
  PEFactor = 5.0; // Parameter for influence of parallel stiffness
AnyVar MusLengthUnScaled=  0.413377603 ;
  AnyVar LengthDifference=MusLengthUnScaled-Lt0-Lfbar*cos(Gammabar);
};

AnyMuscleModel3E TibialisPosteriorMedialis1Par = {
  F0 = .StrengthScaleShank*.PCSAfactor*21.6/3; // Maximum force output at optimum fiber length
// AnyVar LfbarTemp = (2.4/100); // Optimum fiber length
 AnyVar LfbarTemp = .FiberLengthScaleShank*(3.78/100); // Optimum fiber length Ward et al 2009

Lfbar=LfbarTemp;
  Lt0 = (11/100); // Tendon slack length
  Gammabar = 25.2*(3.14/180); // Pennation angle in radian
  Epsilonbar = 0.053; // Tendon strain at F0
  K1 = 10; // Factor for determining shortening speed at optimum length
  K2 = 0; // Factor for determining shortening speed at optimum length
  Fcfast = 0.4; // Factor for determining shortening speed at optimum length
  Jt = 3.0; // Shape parameter for the tendon stiffness
  Jpe = 3.0; // Shape parameter for the parallel stiffness
  // PEFactor = 5.0; // Parameter for influence of parallel stiffness
  PEFactor = 5; // Parameter for influence of parallel stiffness
AnyVar MusLengthUnScaled= 0.40932624  ;
  AnyVar LengthDifference=MusLengthUnScaled-Lt0-Lfbar*cos(Gammabar);
};

AnyMuscleModel3E TibialisPosteriorMedialis2Par = {
  F0 = .StrengthScaleShank*.PCSAfactor*21.6/3; // Maximum force output at optimum fiber length
 //AnyVar LfbarTemp = (2.4/100); // Optimum fiber length
  AnyVar LfbarTemp = .FiberLengthScaleShank*(3.78/100); // Optimum fiber length Ward et al 2009

Lfbar=LfbarTemp;
  Lt0 = (11/100); // Tendon slack length
  Gammabar = 25.2*(3.14/180); // Pennation angle in radian
  Epsilonbar = 0.053; // Tendon strain at F0
  K1 = 10; // Factor for determining shortening speed at optimum length
  K2 = 0; // Factor for determining shortening speed at optimum length
  Fcfast = 0.4; // Factor for determining shortening speed at optimum length
  Jt = 3.0; // Shape parameter for the tendon stiffness
  Jpe = 3.0; // Shape parameter for the parallel stiffness
  PEFactor = 5; // Parameter for influence of parallel stiffness
AnyVar MusLengthUnScaled=  0.361015911;
  AnyVar LengthDifference=MusLengthUnScaled-Lt0-Lfbar*cos(Gammabar);
};

AnyMuscleModel3E TibialisPosteriorMedialis3Par = {
  F0 = .StrengthScaleShank*.PCSAfactor*21.6/3; // Maximum force output at optimum fiber length
// AnyVar LfbarTemp = (2.4/100); // Optimum fiber length
 AnyVar LfbarTemp = .FiberLengthScaleShank*(3.78/100); // Optimum fiber length Ward et al 2009

Lfbar=LfbarTemp;
  Lt0 = (11/100); // Tendon slack length
  Gammabar = 25.2*(3.14/180); // Pennation angle in radian
  Epsilonbar = 0.053; // Tendon strain at F0
  K1 = 10; // Factor for determining shortening speed at optimum length
  K2 = 0; // Factor for determining shortening speed at optimum length
  Fcfast = 0.4; // Factor for determining shortening speed at optimum length
  Jt = 3.0; // Shape parameter for the tendon stiffness
  Jpe = 3.0; // Shape parameter for the parallel stiffness
  PEFactor = 5; // Parameter for influence of parallel stiffness
AnyVar MusLengthUnScaled= 0.29867502  ;
  AnyVar LengthDifference=MusLengthUnScaled-Lt0-Lfbar*cos(Gammabar);
};

AnyMuscleModel3E TibialisPosteriorLateralis1Par = {
  F0 = .StrengthScaleShank*.PCSAfactor*21.6/3; // Maximum force output at optimum fiber length
 //AnyVar LfbarTemp = (2.4/100); // Optimum fiber length
  AnyVar LfbarTemp = .FiberLengthScaleShank*(3.78/100); // Optimum fiber length Ward et al 2009
Lfbar=LfbarTemp;
  Lt0 = (11/100); // Tendon slack length
  Gammabar = 43.1*(3.14/180); // Pennation angle in radian
  Epsilonbar = 0.053; // Tendon strain at F0
  K1 = 10; // Factor for determining shortening speed at optimum length
  K2 = 0; // Factor for determining shortening speed at optimum length
  Fcfast = 0.4; // Factor for determining shortening speed at optimum length
  Jt = 3.0; // Shape parameter for the tendon stiffness
  Jpe = 3.0; // Shape parameter for the parallel stiffness
  PEFactor = 5; // Parameter for influence of parallel stiffness
AnyVar MusLengthUnScaled=  0.372328813 ;
  AnyVar LengthDifference=MusLengthUnScaled-Lt0-Lfbar*cos(Gammabar);
};
AnyMuscleModel3E TibialisPosteriorLateralis2Par = {
  F0 = .StrengthScaleShank*.PCSAfactor*21.6/3; // Maximum force output at optimum fiber length
// AnyVar LfbarTemp = (2.4/100); // Optimum fiber length
 AnyVar LfbarTemp = .FiberLengthScaleShank*(3.78/100); // Optimum fiber length Ward et al 2009
Lfbar=LfbarTemp;
  Lt0 = (11/100); // Tendon slack length
  Gammabar = 43.1*(3.14/180); // Pennation angle in radian
  Epsilonbar = 0.053; // Tendon strain at F0
  K1 = 10; // Factor for determining shortening speed at optimum length
  K2 = 0; // Factor for determining shortening speed at optimum length
  Fcfast = 0.4; // Factor for determining shortening speed at optimum length
  Jt = 3.0; // Shape parameter for the tendon stiffness
  Jpe = 3.0; // Shape parameter for the parallel stiffness
  // PEFactor = 5.0; // Parameter for influence of parallel stiffness
  PEFactor = 5; // Parameter for influence of parallel stiffness
AnyVar MusLengthUnScaled= 0.29964953  ;
  AnyVar LengthDifference=MusLengthUnScaled-Lt0-Lfbar*cos(Gammabar);
};
AnyMuscleModel3E TibialisPosteriorLateralis3Par = {
  F0 = .StrengthScaleShank*.PCSAfactor*21.6/3; // Maximum force output at optimum fiber length
// AnyVar LfbarTemp = (2.4/100); // Optimum fiber length
 AnyVar LfbarTemp = .FiberLengthScaleShank*(3.78/100); // Optimum fiber length Ward et al 2009
Lfbar=LfbarTemp;
  Lt0 = (11/100); // Tendon slack length
  Gammabar = 43.1*(3.14/180); // Pennation angle in radian
  Epsilonbar = 0.053; // Tendon strain at F0
  K1 = 10; // Factor for determining shortening speed at optimum length
  K2 = 0; // Factor for determining shortening speed at optimum length
  Fcfast = 0.4; // Factor for determining shortening speed at optimum length
  Jt = 3.0; // Shape parameter for the tendon stiffness
  Jpe = 3.0; // Shape parameter for the parallel stiffness
  // PEFactor = 5.0; // Parameter for influence of parallel stiffness
  PEFactor = 5; // Parameter for influence of parallel stiffness
AnyVar MusLengthUnScaled= 0.23267825  ;
  AnyVar LengthDifference=MusLengthUnScaled-Lt0-Lfbar*cos(Gammabar);
};


AnyMuscleModel3E PeroneusBrevis1Par = {
  F0 = .StrengthScaleShank*.PCSAfactor*19/3; // Maximum force output at optimum fiber length
// AnyVar LfbarTemp = (2.7/100); // Optimum fiber length
 AnyVar LfbarTemp = .FiberLengthScaleShank*(4.54/100); // Optimum fiber length Ward et al 2009

Lfbar=LfbarTemp;
  Lt0 = (6.4/100); // Tendon slack length
  Gammabar = 23.1*(3.14/180); // Pennation angle in radian
  Epsilonbar = 0.053; // Tendon strain at F0
  K1 = 10; // Factor for determining shortening speed at optimum length
  K2 = 0; // Factor for determining shortening speed at optimum length
  Fcfast = 0.4; // Factor for determining shortening speed at optimum length
  Jt = 3.0; // Shape parameter for the tendon stiffness
  Jpe = 3.0; // Shape parameter for the parallel stiffness
  PEFactor = 5.0; // Parameter for influence of parallel stiffness
AnyVar MusLengthUnScaled=  0.354534257 ;
  AnyVar LengthDifference=MusLengthUnScaled-Lt0-Lfbar*cos(Gammabar);
};

AnyMuscleModel3E PeroneusBrevis2Par = {
  F0 = .StrengthScaleShank*.PCSAfactor*19/3; // Maximum force output at optimum fiber length
// AnyVar LfbarTemp = (2.7/100); // Optimum fiber length
 AnyVar LfbarTemp = .FiberLengthScaleShank*(4.54/100); // Optimum fiber length Ward et al 2009
Lfbar=LfbarTemp;
  Lt0 = (6.4/100); // Tendon slack length
  Gammabar = 23.1*(3.14/180); // Pennation angle in radian
  Epsilonbar = 0.053; // Tendon strain at F0
  K1 = 10; // Factor for determining shortening speed at optimum length
  K2 = 0; // Factor for determining shortening speed at optimum length
  Fcfast = 0.4; // Factor for determining shortening speed at optimum length
  Jt = 3.0; // Shape parameter for the tendon stiffness
  Jpe = 3.0; // Shape parameter for the parallel stiffness
  PEFactor = 5.0; // Parameter for influence of parallel stiffness
AnyVar MusLengthUnScaled=0.307592161   ;
  AnyVar LengthDifference=MusLengthUnScaled-Lt0-Lfbar*cos(Gammabar);
};
AnyMuscleModel3E PeroneusBrevis3Par = {
  F0 = .StrengthScaleShank*.PCSAfactor*19/3; // Maximum force output at optimum fiber length
// AnyVar LfbarTemp = (2.7/100); // Optimum fiber length
 AnyVar LfbarTemp = .FiberLengthScaleShank*(4.54/100); // Optimum fiber length Ward et al 2009
Lfbar=LfbarTemp;
  Lt0 = (6.4/100); // Tendon slack length
  Gammabar = 23.1*(3.14/180); // Pennation angle in radian
  Epsilonbar = 0.053; // Tendon strain at F0
  K1 = 10; // Factor for determining shortening speed at optimum length
  K2 = 0; // Factor for determining shortening speed at optimum length
  Fcfast = 0.4; // Factor for determining shortening speed at optimum length
  Jt = 3.0; // Shape parameter for the tendon stiffness
  Jpe = 3.0; // Shape parameter for the parallel stiffness
  PEFactor = 5.0; // Parameter for influence of parallel stiffness
AnyVar MusLengthUnScaled=0.262215121;
  AnyVar LengthDifference=MusLengthUnScaled-Lt0-Lfbar*cos(Gammabar);

};
AnyMuscleModel3E PeroneusLongus1Par = {
  F0 = .StrengthScaleShank*.PCSAfactor*23.9/3; // Maximum force output at optimum fiber length
// AnyVar LfbarTemp = (3.4/100); // Optimum fiber length
AnyVar LfbarTemp = .FiberLengthScaleShank*(5.08/100); // Optimum fiber length Ward et al 2009

  Lt0 = (15.9/100); // Tendon slack length
Lfbar=LfbarTemp;
  Gammabar = 15.8*(3.14/180); // Pennation angle in radian
  Epsilonbar = 0.053; // Tendon strain at F0
  Fcfast = 0.4; // Factor for determining shortening speed at optimum length Value from Peroneus Brevis
AnyVar MusLengthUnScaled=0.464650187;
  AnyVar LengthDifference=MusLengthUnScaled-Lt0-Lfbar*cos(Gammabar);

};

AnyMuscleModel3E PeroneusLongus2Par = {
  F0 = .StrengthScaleShank*.PCSAfactor*23.9/3; // Maximum force output at optimum fiber length
 //AnyVar LfbarTemp = (3.4/100); // Optimum fiber length
 AnyVar LfbarTemp = .FiberLengthScaleShank*(5.08/100); // Optimum fiber length Ward et al 2009
Lfbar=LfbarTemp;
  Lt0 = (15.9/100); // Tendon slack length
  Gammabar = 15.8*(3.14/180); // Pennation angle in radian
  Epsilonbar = 0.053; // Tendon strain at F0
  Fcfast = 0.4; // Factor for determining shortening speed at optimum length Value from Peroneus Brevis
AnyVar MusLengthUnScaled=0.42710615;
  AnyVar LengthDifference=MusLengthUnScaled-Lt0-Lfbar*cos(Gammabar);
};

AnyMuscleModel3E PeroneusLongus3Par = {
  F0 = .StrengthScaleShank*.PCSAfactor*23.9/3; // Maximum force output at optimum fiber length
 //AnyVar LfbarTemp = (3.4/100); // Optimum fiber length
 AnyVar LfbarTemp = .FiberLengthScaleShank*(5.08/100); // Optimum fiber length Ward et al 2009
Lfbar=LfbarTemp;
  Lt0 = (15.9/100); // Tendon slack length
  Gammabar = 15.8*(3.14/180); // Pennation angle in radian
  Epsilonbar = 0.053; // Tendon strain at F0
  Fcfast = 0.4; // Factor for determining shortening speed at optimum length Value from Peroneus Brevis
AnyVar MusLengthUnScaled=0.389961047;
  AnyVar LengthDifference=MusLengthUnScaled-Lt0-Lfbar*cos(Gammabar);
};

AnyMuscleModel3E PeroneusTertius1Par = {
  F0 = .StrengthScaleShank*.PCSAfactor*6.2/3; // Maximum force output at optimum fiber length
 AnyVar LfbarTemp = .FiberLengthScaleShank*(4.3/100); // Optimum fiber length
Lfbar=LfbarTemp;
  Lt0 = (10/100); // Tendon slack length
  Gammabar = 19.1*(3.14/180); // Pennation angle in radian
  Epsilonbar = 0.053; // Tendon strain at F0
  Fcfast = 0.4; // Factor for determining shortening speed at optimum length Value from Peroneus Brevis
AnyVar MusLengthUnScaled=0.298675027;
  AnyVar LengthDifference=MusLengthUnScaled-Lt0-Lfbar*cos(Gammabar);

};

AnyMuscleModel3E PeroneusTertius2Par = {
  F0 = .StrengthScaleShank*.PCSAfactor*6.2/3; // Maximum force output at optimum fiber length
 AnyVar LfbarTemp = .FiberLengthScaleShank*(4.3/100); // Optimum fiber length
Lfbar=LfbarTemp;
  Lt0 = (10/100); // Tendon slack length
  Gammabar = 19.1*(3.14/180); // Pennation angle in radian
  Epsilonbar = 0.053; // Tendon strain at F0
  Fcfast = 0.4; // Factor for determining shortening speed at optimum length Value from Peroneus Brevis
AnyVar MusLengthUnScaled= 0.329186894;
  AnyVar LengthDifference=MusLengthUnScaled-Lt0-Lfbar*cos(Gammabar);
};

AnyMuscleModel3E PeroneusTertius3Par = {
  F0 = .StrengthScaleShank*.PCSAfactor*6.2/3; // Maximum force output at optimum fiber length
 AnyVar LfbarTemp = .FiberLengthScaleShank*(4.3/100); // Optimum fiber length
Lfbar=LfbarTemp;
  Lt0 = (10/100); // Tendon slack length
  Gammabar = 19.1*(3.14/180); // Pennation angle in radian
  Epsilonbar = 0.053; // Tendon strain at F0
  Fcfast = 0.4; // Factor for determining shortening speed at optimum length Value from Peroneus Brevis
AnyVar MusLengthUnScaled=0.380199504;
AnyVar LengthDifference=MusLengthUnScaled-Lt0-Lfbar*cos(Gammabar);
};

AnyMuscleModel3E TibialisAnterior1Par = {
  F0 = .StrengthScaleShank*.PCSAfactor*26.6/3; // Maximum force output at optimum fiber length
 //AnyVar LfbarTemp = (4.6/100); // Optimum fiber length
 AnyVar LfbarTemp = .FiberLengthScaleShank*(6.83/100); // Optimum fiber length Ward et al 2009

Lfbar=LfbarTemp;
  Lt0 = (23.5/100); // Tendon slack length
  Gammabar = 9.6*(3.14/180); // Pennation angle in radian
  Epsilonbar = 0.053; // Tendon strain at F0
  K1 = 10; // Factor for determining shortening speed at optimum length
  K2 = 0; // Factor for determining shortening speed at optimum length
  Fcfast = 0.4; // Factor for determining shortening speed at optimum length
  Jt = 3.0; // Shape parameter for the tendon stiffness
  Jpe = 3.0; // Shape parameter for the parallel stiffness
  PEFactor = 5; // Parameter for influence of parallel stiffness
AnyVar MusLengthUnScaled=0.423028337;
  AnyVar LengthDifference=MusLengthUnScaled-Lt0-Lfbar*cos(Gammabar);

};
AnyMuscleModel3E TibialisAnterior2Par = {
  F0 = .StrengthScaleShank*.PCSAfactor*26.6/3; // Maximum force output at optimum fiber length
// AnyVar LfbarTemp = (4.6/100); // Optimum fiber length
 AnyVar LfbarTemp = .FiberLengthScaleShank*(6.83/100); // Optimum fiber length Ward et al 2009
Lfbar=LfbarTemp;
  Lt0 = (23.5/100); // Tendon slack length
  Gammabar = 9.6*(3.14/180); // Pennation angle in radian
  Epsilonbar = 0.053; // Tendon strain at F0
  K1 = 10; // Factor for determining shortening speed at optimum length
  K2 = 0; // Factor for determining shortening speed at optimum length
  Fcfast = 0.4; // Factor for determining shortening speed at optimum length
  Jt = 3.0; // Shape parameter for the tendon stiffness
  Jpe = 3.0; // Shape parameter for the parallel stiffness
  PEFactor = 5; // Parameter for influence of parallel stiffness
AnyVar MusLengthUnScaled=0.39558021;
  AnyVar LengthDifference=MusLengthUnScaled-Lt0-Lfbar*cos(Gammabar);

};
AnyMuscleModel3E TibialisAnterior3Par = {
  F0 = .StrengthScaleShank*.PCSAfactor*26.6/3; // Maximum force output at optimum fiber length
 //AnyVar LfbarTemp = (4.6/100); // Optimum fiber length
 AnyVar LfbarTemp = .FiberLengthScaleShank*(6.83/100); // Optimum fiber length Ward et al 2009
Lfbar=LfbarTemp;
  Lt0 = (23.5/100); // Tendon slack length
  Gammabar = 9.6*(3.14/180); // Pennation angle in radian
  Epsilonbar = 0.053; // Tendon strain at F0
  K1 = 10; // Factor for determining shortening speed at optimum length
  K2 = 0; // Factor for determining shortening speed at optimum length
  Fcfast = 0.4; // Factor for determining shortening speed at optimum length
  Jt = 3.0; // Shape parameter for the tendon stiffness
  Jpe = 3.0; // Shape parameter for the parallel stiffness
  PEFactor = 5; // Parameter for influence of parallel stiffness
AnyVar MusLengthUnScaled=0.343028558;
  AnyVar LengthDifference=MusLengthUnScaled-Lt0-Lfbar*cos(Gammabar);
};


AnyMuscleModel3E ExtensorDigitorumLongus1Par = {
  F0 = .StrengthScaleShank*.PCSAfactor*5.4/3; // Maximum force output at optimum fiber length
 AnyVar LfbarTemp = .FiberLengthScaleShank*(6/100); // Optimum fiber length
Lfbar=LfbarTemp;
  Lt0 = (30.1/100); // Tendon slack length
  Gammabar = 8.3*(3.14/180); // Pennation angle in radian
  Epsilonbar = 0.053; // Tendon strain at F0
  K1 = 10; // Factor for determining shortening speed at optimum length
  K2 = 0; // Factor for determining shortening speed at optimum length
  Fcfast = 0.4; // Factor for determining shortening speed at optimum length
  Jt = 3.0; // Shape parameter for the tendon stiffness
  Jpe = 3.0; // Shape parameter for the parallel stiffness
  PEFactor = 5; // Parameter for influence of parallel stiffness
AnyVar MusLengthUnScaled=0.496938665;
  AnyVar LengthDifference=MusLengthUnScaled-Lt0-Lfbar*cos(Gammabar);
};
AnyMuscleModel3E ExtensorDigitorumLongus2Par = {
  F0 = .StrengthScaleShank*.PCSAfactor*5.4/3; // Maximum force output at optimum fiber length
 AnyVar LfbarTemp = .FiberLengthScaleShank*(6/100); // Optimum fiber length
Lfbar=LfbarTemp;
  Lt0 = (30.1/100); // Tendon slack length
  Gammabar = 8.3*(3.14/180); // Pennation angle in radian
  Epsilonbar = 0.053; // Tendon strain at F0
  K1 = 10; // Factor for determining shortening speed at optimum length
  K2 = 0; // Factor for determining shortening speed at optimum length
  Fcfast = 0.4; // Factor for determining shortening speed at optimum length
  Jt = 3.0; // Shape parameter for the tendon stiffness
  Jpe = 3.0; // Shape parameter for the parallel stiffness
  PEFactor = 5; // Parameter for influence of parallel stiffness
AnyVar MusLengthUnScaled=0.410555579;
  AnyVar LengthDifference=MusLengthUnScaled-Lt0-Lfbar*cos(Gammabar);
};
AnyMuscleModel3E ExtensorDigitorumLongus3Par = {
  F0 = .StrengthScaleShank*.PCSAfactor*5.4/3; // Maximum force output at optimum fiber length
 AnyVar LfbarTemp = .FiberLengthScaleShank*(6/100); // Optimum fiber length
Lfbar=LfbarTemp;
  Lt0 = (30.1/100); // Tendon slack length
  Gammabar = 8.3*(3.14/180); // Pennation angle in radian
  Epsilonbar = 0.053; // Tendon strain at F0
  K1 = 10; // Factor for determining shortening speed at optimum length
  K2 = 0; // Factor for determining shortening speed at optimum length
  Fcfast = 0.4; // Factor for determining shortening speed at optimum length
  Jt = 3.0; // Shape parameter for the tendon stiffness
  Jpe = 3.0; // Shape parameter for the parallel stiffness
  PEFactor = 5; // Parameter for influence of parallel stiffness
AnyVar MusLengthUnScaled=0.464314882;
  AnyVar LengthDifference=MusLengthUnScaled-Lt0-Lfbar*cos(Gammabar);
};

AnyMuscleModel3E ExtensorHallucisLongus1Par = {
  F0 = .StrengthScaleShank*.PCSAfactor*6.1/3; // Maximum force output at optimum fiber length
 AnyVar LfbarTemp = .FiberLengthScaleShank*(6/100); // Optimum fiber length
Lfbar=LfbarTemp;
  Lt0 = (17.8/100); // Tendon slack length
  Gammabar = 14.4*(3.14/180); // Pennation angle in radian
  Epsilonbar = 0.053; // Tendon strain at F0
  K1 = 10; // Factor for determining shortening speed at optimum length
  K2 = 0; // Factor for determining shortening speed at optimum length
  Fcfast = 0.4; // Factor for determining shortening speed at optimum length
  Jt = 3.0; // Shape parameter for the tendon stiffness
  Jpe = 3.0; // Shape parameter for the parallel stiffness
  PEFactor =5; // Parameter for influence of parallel stiffness
AnyVar MusLengthUnScaled=0.358015105;
  AnyVar LengthDifference=MusLengthUnScaled-Lt0-Lfbar*cos(Gammabar);
};
AnyMuscleModel3E ExtensorHallucisLongus2Par = {
  F0 = .StrengthScaleShank*.PCSAfactor*6.1/3; // Maximum force output at optimum fiber length
 AnyVar LfbarTemp = .FiberLengthScaleShank*(6/100); // Optimum fiber length
Lfbar=LfbarTemp;
  Lt0 = (17.8/100); // Tendon slack length
  Gammabar = 14.4*(3.14/180); // Pennation angle in radian
  Epsilonbar = 0.053; // Tendon strain at F0
  K1 = 10; // Factor for determining shortening speed at optimum length
  K2 = 0; // Factor for determining shortening speed at optimum length
  Fcfast = 0.4; // Factor for determining shortening speed at optimum length
  Jt = 3.0; // Shape parameter for the tendon stiffness
  Jpe = 3.0; // Shape parameter for the parallel stiffness
  PEFactor =5; // Parameter for influence of parallel stiffness
AnyVar MusLengthUnScaled=0.410555579;
  AnyVar LengthDifference=MusLengthUnScaled-Lt0-Lfbar*cos(Gammabar);
};
AnyMuscleModel3E ExtensorHallucisLongus3Par = {
  F0 = .StrengthScaleShank*.PCSAfactor*6.1/3; // Maximum force output at optimum fiber length
 AnyVar LfbarTemp = .FiberLengthScaleShank*(6/100); // Optimum fiber length
Lfbar=LfbarTemp;
  Lt0 = (17.8/100); // Tendon slack length
  Gammabar = 14.4*(3.14/180); // Pennation angle in radian
  Epsilonbar = 0.053; // Tendon strain at F0
  K1 = 10; // Factor for determining shortening speed at optimum length
  K2 = 0; // Factor for determining shortening speed at optimum length
  Fcfast = 0.4; // Factor for determining shortening speed at optimum length
  Jt = 3.0; // Shape parameter for the tendon stiffness
  Jpe = 3.0; // Shape parameter for the parallel stiffness
  PEFactor =5; // Parameter for influence of parallel stiffness
AnyVar MusLengthUnScaled=0.464314882;
  AnyVar LengthDifference=MusLengthUnScaled-Lt0-Lfbar*cos(Gammabar);
};

AnyMuscleModel3E VastusLateralisInferior1Par = {
  F0 = .StrengthScaleThigh*.PCSAfactor*10.7/6; // Maximum force output at optimum fiber length
 AnyVar LfbarTemp = .FiberLengthScaleThigh*(4.2/100); // Optimum fiber length
Lfbar=LfbarTemp;
  Lt0 = (9.6/100); // Tendon slack length
  Gammabar = 0*(3.14/180); // Pennation angle in radian
  Epsilonbar = 0.053; // Tendon strain at F0
  K1 = 10; // Factor for determining shortening speed at optimum length
  K2 = 0; // Factor for determining shortening speed at optimum length
  Fcfast = 0.4; // Factor for determining shortening speed at optimum length
  Jt = 3.0; // Shape parameter for the tendon stiffness
  Jpe = 3.0; // Shape parameter for the parallel stiffness
  PEFactor = 5.0; // Parameter for influence of parallel stiffness
AnyVar MusLengthUnScaled=0.087485533;
  AnyVar LengthDifference=MusLengthUnScaled-Lt0-Lfbar*cos(Gammabar);
};
AnyMuscleModel3E VastusLateralisInferior2Par = {
  F0 = .StrengthScaleThigh*.PCSAfactor*10.7/6; // Maximum force output at optimum fiber length
 AnyVar LfbarTemp = .FiberLengthScaleThigh*(4.2/100); // Optimum fiber length
Lfbar=LfbarTemp;
  Lt0 = (9.6/100); // Tendon slack length
  Gammabar = 0*(3.14/180); // Pennation angle in radian
  Epsilonbar = 0.053; // Tendon strain at F0
  K1 = 10; // Factor for determining shortening speed at optimum length
  K2 = 0; // Factor for determining shortening speed at optimum length
  Fcfast = 0.4; // Factor for determining shortening speed at optimum length
  Jt = 3.0; // Shape parameter for the tendon stiffness
  Jpe = 3.0; // Shape parameter for the parallel stiffness
  PEFactor = 5.0; // Parameter for influence of parallel stiffness
AnyVar MusLengthUnScaled=0.125439458;
  AnyVar LengthDifference=MusLengthUnScaled-Lt0-Lfbar*cos(Gammabar);

};
AnyMuscleModel3E VastusLateralisInferior3Par = {
  F0 = .StrengthScaleThigh*.PCSAfactor*10.7/6; // Maximum force output at optimum fiber length
 AnyVar LfbarTemp = .FiberLengthScaleThigh*(4.2/100); // Optimum fiber length
Lfbar=LfbarTemp;
  Lt0 = (9.6/100); // Tendon slack length
  Gammabar = 0*(3.14/180); // Pennation angle in radian
  Epsilonbar = 0.053; // Tendon strain at F0
  K1 = 10; // Factor for determining shortening speed at optimum length
  K2 = 0; // Factor for determining shortening speed at optimum length
  Fcfast = 0.4; // Factor for determining shortening speed at optimum length
  Jt = 3.0; // Shape parameter for the tendon stiffness
  Jpe = 3.0; // Shape parameter for the parallel stiffness
  PEFactor = 5.0; // Parameter for influence of parallel stiffness
AnyVar MusLengthUnScaled=0.167707617;
  AnyVar LengthDifference=MusLengthUnScaled-Lt0-Lfbar*cos(Gammabar);

};
AnyMuscleModel3E VastusLateralisInferior4Par = {
  F0 = .StrengthScaleThigh*.PCSAfactor*10.7/6; // Maximum force output at optimum fiber length
 AnyVar LfbarTemp = .FiberLengthScaleThigh*(4.2/100); // Optimum fiber length
Lfbar=LfbarTemp;
  Lt0 = (9.6/100); // Tendon slack length
  Gammabar = 0*(3.14/180); // Pennation angle in radian
  Epsilonbar = 0.053; // Tendon strain at F0
  K1 = 10; // Factor for determining shortening speed at optimum length
  K2 = 0; // Factor for determining shortening speed at optimum length
  Fcfast = 0.4; // Factor for determining shortening speed at optimum length
  Jt = 3.0; // Shape parameter for the tendon stiffness
  Jpe = 3.0; // Shape parameter for the parallel stiffness
  PEFactor = 5.0; // Parameter for influence of parallel stiffness
AnyVar MusLengthUnScaled=0.211677529;
  AnyVar LengthDifference=MusLengthUnScaled-Lt0-Lfbar*cos(Gammabar);
};
AnyMuscleModel3E VastusLateralisInferior5Par = {
  F0 = .StrengthScaleThigh*.PCSAfactor*10.7/6; // Maximum force output at optimum fiber length
 AnyVar LfbarTemp = .FiberLengthScaleThigh*(4.2/100); // Optimum fiber length
Lfbar=LfbarTemp;
  Lt0 = (9.6/100); // Tendon slack length
  Gammabar = 0*(3.14/180); // Pennation angle in radian
  Epsilonbar = 0.053; // Tendon strain at F0
  K1 = 10; // Factor for determining shortening speed at optimum length
  K2 = 0; // Factor for determining shortening speed at optimum length
  Fcfast = 0.4; // Factor for determining shortening speed at optimum length
  Jt = 3.0; // Shape parameter for the tendon stiffness
  Jpe = 3.0; // Shape parameter for the parallel stiffness
  PEFactor = 5.0; // Parameter for influence of parallel stiffness
AnyVar MusLengthUnScaled=0.256498434;
  AnyVar LengthDifference=MusLengthUnScaled-Lt0-Lfbar*cos(Gammabar);
};
AnyMuscleModel3E VastusLateralisInferior6Par = {
  F0 = .StrengthScaleThigh*.PCSAfactor*10.7/6; // Maximum force output at optimum fiber length
 AnyVar LfbarTemp = .FiberLengthScaleThigh*(4.2/100); // Optimum fiber length
Lfbar=LfbarTemp;
  Lt0 = (9.6/100); // Tendon slack length
  Gammabar = 0*(3.14/180); // Pennation angle in radian
  Epsilonbar = 0.053; // Tendon strain at F0
  K1 = 10; // Factor for determining shortening speed at optimum length
  K2 = 0; // Factor for determining shortening speed at optimum length
  Fcfast = 0.4; // Factor for determining shortening speed at optimum length
  Jt = 3.0; // Shape parameter for the tendon stiffness
  Jpe = 3.0; // Shape parameter for the parallel stiffness
  PEFactor = 5.0; // Parameter for influence of parallel stiffness
AnyVar MusLengthUnScaled=0.302037637;
  AnyVar LengthDifference=MusLengthUnScaled-Lt0-Lfbar*cos(Gammabar);
};

AnyMuscleModel3E VastusLateralisSuperior7Par = {
  F0 = .StrengthScaleThigh*.PCSAfactor*59/2; // Maximum force output at optimum fiber length
 AnyVar LfbarTemp = .FiberLengthScaleThigh*(9.1/100); // Optimum fiber length
Lfbar=LfbarTemp;
  Lt0 = (9.6/100); // Tendon slack length
  Gammabar = 0*(3.14/180); // Pennation angle in radian
  Epsilonbar = 0.053; // Tendon strain at F0
  K1 = 10; // Factor for determining shortening speed at optimum length
  K2 = 0; // Factor for determining shortening speed at optimum length
  Fcfast = 0.4; // Factor for determining shortening speed at optimum length
  Jt = 3.0; // Shape parameter for the tendon stiffness
  Jpe = 3.0; // Shape parameter for the parallel stiffness
  PEFactor = 5.0; // Parameter for influence of parallel stiffness
AnyVar MusLengthUnScaled=0.337739983;
  AnyVar LengthDifference=MusLengthUnScaled-Lt0-Lfbar*cos(Gammabar);
};
AnyMuscleModel3E VastusLateralisSuperior8Par = {
  F0 = .StrengthScaleThigh*.PCSAfactor*59/2; // Maximum force output at optimum fiber length
 AnyVar LfbarTemp = .FiberLengthScaleThigh*(9.1/100); // Optimum fiber length
Lfbar=LfbarTemp;
  Lt0 = (9.6/100); // Tendon slack length
  Gammabar = 0*(3.14/180); // Pennation angle in radian
  Epsilonbar = 0.053; // Tendon strain at F0
  K1 = 10; // Factor for determining shortening speed at optimum length
  K2 = 0; // Factor for determining shortening speed at optimum length
  Fcfast = 0.4; // Factor for determining shortening speed at optimum length
  Jt = 3.0; // Shape parameter for the tendon stiffness
  Jpe = 3.0; // Shape parameter for the parallel stiffness
  PEFactor = 5.0; // Parameter for influence of parallel stiffness
AnyVar MusLengthUnScaled=0.352521443;
  AnyVar LengthDifference=MusLengthUnScaled-Lt0-Lfbar*cos(Gammabar);
};
AnyMuscleModel3E VastusMedialisInferior1Par = {
  F0 = .StrengthScaleThigh*.PCSAfactor*9.8/2; // Maximum force output at optimum fiber length
 AnyVar LfbarTemp = .FiberLengthScaleThigh*(7.6/100); // Optimum fiber length
Lfbar=LfbarTemp;
  Lt0 = (9.6/100); // Tendon slack length
  Gammabar = 0*(3.14/180); // Pennation angle in radian
  Epsilonbar = 0.053; // Tendon strain at F0
  K1 = 10; // Factor for determining shortening speed at optimum length
  K2 = 0; // Factor for determining shortening speed at optimum length
  Fcfast = 0.4; // Factor for determining shortening speed at optimum length
  Jt = 3.0; // Shape parameter for the tendon stiffness
  Jpe = 3.0; // Shape parameter for the parallel stiffness
  PEFactor = 5.0; // Parameter for influence of parallel stiffness
AnyVar MusLengthUnScaled=0.081908727;
  AnyVar LengthDifference=MusLengthUnScaled-Lt0-Lfbar*cos(Gammabar);
};
AnyMuscleModel3E VastusMedialisInferior2Par = {
  F0 = .StrengthScaleThigh*.PCSAfactor*9.8/2; // Maximum force output at optimum fiber length
 //AnyVar LfbarTemp = .FiberLengthScaleThigh*(7.6/100); // Optimum fiber length, ORIGINAL DATA
 AnyVar LfbarTemp = .FiberLengthScaleThigh*(5.6/100); // Optimum fiber length, reduced because too long compared to MusLengthUnScaled
Lfbar=LfbarTemp;
  Lt0 = (9.6/100); // Tendon slack length
  Gammabar = 0*(3.14/180); // Pennation angle in radian
  Epsilonbar = 0.053; // Tendon strain at F0
  K1 = 10; // Factor for determining shortening speed at optimum length
  K2 = 0; // Factor for determining shortening speed at optimum length
  Fcfast = 0.4; // Factor for determining shortening speed at optimum length
  Jt = 3.0; // Shape parameter for the tendon stiffness
  Jpe = 3.0; // Shape parameter for the parallel stiffness
  PEFactor = 5.0; // Parameter for influence of parallel stiffness
AnyVar MusLengthUnScaled=0.076862107;
  AnyVar LengthDifference=MusLengthUnScaled-Lt0-Lfbar*cos(Gammabar);
};

AnyMuscleModel3E VastusMedialisMid3Par = {
  F0 = .StrengthScaleThigh*.PCSAfactor*23.2/2; // Maximum force output at optimum fiber length
 AnyVar LfbarTemp = .FiberLengthScaleThigh*(7.6/100); // Optimum fiber length
Lfbar=LfbarTemp;
  Lt0 = (9.6/100); // Tendon slack length
  Gammabar = 0*(3.14/180); // Pennation angle in radian
  Epsilonbar = 0.053; // Tendon strain at F0
  K1 = 10; // Factor for determining shortening speed at optimum length
  K2 = 0; // Factor for determining shortening speed at optimum length
  Fcfast = 0.4; // Factor for determining shortening speed at optimum length
  Jt = 3.0; // Shape parameter for the tendon stiffness
  Jpe = 3.0; // Shape parameter for the parallel stiffness
  PEFactor = 5.0; // Parameter for influence of parallel stiffness
AnyVar MusLengthUnScaled=0.118942341;
  AnyVar LengthDifference=MusLengthUnScaled-Lt0-Lfbar*cos(Gammabar);
};
AnyMuscleModel3E VastusMedialisMid4Par = {
  F0 = .StrengthScaleThigh*.PCSAfactor*23.2/2; // Maximum force output at optimum fiber length
 AnyVar LfbarTemp = .FiberLengthScaleThigh*(7.6/100); // Optimum fiber length
Lfbar=LfbarTemp;
  Lt0 = (9.6/100); // Tendon slack length
  Gammabar = 0*(3.14/180); // Pennation angle in radian
  Epsilonbar = 0.053; // Tendon strain at F0
  K1 = 10; // Factor for determining shortening speed at optimum length
  K2 = 0; // Factor for determining shortening speed at optimum length
  Fcfast = 0.4; // Factor for determining shortening speed at optimum length
  Jt = 3.0; // Shape parameter for the tendon stiffness
  Jpe = 3.0; // Shape parameter for the parallel stiffness
  PEFactor = 5.0; // Parameter for influence of parallel stiffness
AnyVar MusLengthUnScaled=0.115913647;
  AnyVar LengthDifference=MusLengthUnScaled-Lt0-Lfbar*cos(Gammabar);
};

AnyMuscleModel3E VastusMedialisSuperior5Par = {
  F0 = .StrengthScaleThigh*.PCSAfactor*26.9/6; // Maximum force output at optimum fiber length
 AnyVar LfbarTemp = .FiberLengthScaleThigh*(8.3/100); // Optimum fiber length
Lfbar=LfbarTemp;
  Lt0 = (9.6/100); // Tendon slack length
  Gammabar = 0*(3.14/180); // Pennation angle in radian
  Epsilonbar = 0.053; // Tendon strain at F0
  K1 = 10; // Factor for determining shortening speed at optimum length
  K2 = 0; // Factor for determining shortening speed at optimum length
  Fcfast = 0.4; // Factor for determining shortening speed at optimum length
  Jt = 3.0; // Shape parameter for the tendon stiffness
  Jpe = 3.0; // Shape parameter for the parallel stiffness
  PEFactor = 5.0; // Parameter for influence of parallel stiffness
AnyVar MusLengthUnScaled=0.168568397;
  AnyVar LengthDifference=MusLengthUnScaled-Lt0-Lfbar*cos(Gammabar);
};
AnyMuscleModel3E VastusMedialisSuperior6Par = {
  F0 = .StrengthScaleThigh*.PCSAfactor*26.9/6; // Maximum force output at optimum fiber length
 AnyVar LfbarTemp = .FiberLengthScaleThigh*(8.3/100); // Optimum fiber length
Lfbar=LfbarTemp;
  Lt0 = (9.6/100); // Tendon slack length
  Gammabar = 0*(3.14/180); // Pennation angle in radian
  Epsilonbar = 0.053; // Tendon strain at F0
  K1 = 10; // Factor for determining shortening speed at optimum length
  K2 = 0; // Factor for determining shortening speed at optimum length
  Fcfast = 0.4; // Factor for determining shortening speed at optimum length
  Jt = 3.0; // Shape parameter for the tendon stiffness
  Jpe = 3.0; // Shape parameter for the parallel stiffness
  PEFactor = 5.0; // Parameter for influence of parallel stiffness
AnyVar MusLengthUnScaled=0.16653043;
  AnyVar LengthDifference=MusLengthUnScaled-Lt0-Lfbar*cos(Gammabar);
};
AnyMuscleModel3E VastusMedialisSuperior7Par = {
  F0 = .StrengthScaleThigh*.PCSAfactor*26.9/6; // Maximum force output at optimum fiber length
 AnyVar LfbarTemp = .FiberLengthScaleThigh*(8.3/100); // Optimum fiber length
Lfbar=LfbarTemp;
  Lt0 = (9.6/100); // Tendon slack length
  Gammabar = 0*(3.14/180); // Pennation angle in radian
  Epsilonbar = 0.053; // Tendon strain at F0
  K1 = 10; // Factor for determining shortening speed at optimum length
  K2 = 0; // Factor for determining shortening speed at optimum length
  Fcfast = 0.4; // Factor for determining shortening speed at optimum length
  Jt = 3.0; // Shape parameter for the tendon stiffness
  Jpe = 3.0; // Shape parameter for the parallel stiffness
  PEFactor = 5.0; // Parameter for influence of parallel stiffness
AnyVar MusLengthUnScaled=0.220900571;
  AnyVar LengthDifference=MusLengthUnScaled-Lt0-Lfbar*cos(Gammabar);
};
AnyMuscleModel3E VastusMedialisSuperior8Par = {
  F0 = .StrengthScaleThigh*.PCSAfactor*26.9/6; // Maximum force output at optimum fiber length
 AnyVar LfbarTemp = .FiberLengthScaleThigh*(8.3/100); // Optimum fiber length
Lfbar=LfbarTemp;
  Lt0 = (9.6/100); // Tendon slack length
  Gammabar = 0*(3.14/180); // Pennation angle in radian
  Epsilonbar = 0.053; // Tendon strain at F0
  K1 = 10; // Factor for determining shortening speed at optimum length
  K2 = 0; // Factor for determining shortening speed at optimum length
  Fcfast = 0.4; // Factor for determining shortening speed at optimum length
  Jt = 3.0; // Shape parameter for the tendon stiffness
  Jpe = 3.0; // Shape parameter for the parallel stiffness
  PEFactor = 5.0; // Parameter for influence of parallel stiffness
AnyVar MusLengthUnScaled=0.219176006;
  AnyVar LengthDifference=MusLengthUnScaled-Lt0-Lfbar*cos(Gammabar);
};
AnyMuscleModel3E VastusMedialisSuperior9Par = {
  F0 = .StrengthScaleThigh*.PCSAfactor*26.9/6; // Maximum force output at optimum fiber length
 AnyVar LfbarTemp = .FiberLengthScaleThigh*(8.3/100); // Optimum fiber length
Lfbar=LfbarTemp;
  Lt0 = (9.6/100); // Tendon slack length
  Gammabar = 0*(3.14/180); // Pennation angle in radian
  Epsilonbar = 0.053; // Tendon strain at F0
  K1 = 10; // Factor for determining shortening speed at optimum length
  K2 = 0; // Factor for determining shortening speed at optimum length
  Fcfast = 0.4; // Factor for determining shortening speed at optimum length
  Jt = 3.0; // Shape parameter for the tendon stiffness
  Jpe = 3.0; // Shape parameter for the parallel stiffness
  PEFactor = 5.0; // Parameter for influence of parallel stiffness
AnyVar MusLengthUnScaled=0.286846786;
  AnyVar LengthDifference=MusLengthUnScaled-Lt0-Lfbar*cos(Gammabar);
};
AnyMuscleModel3E VastusMedialisSuperior10Par = {
  F0 = .StrengthScaleThigh*.PCSAfactor*26.9/6; // Maximum force output at optimum fiber length
 AnyVar LfbarTemp = .FiberLengthScaleThigh*(8.3/100); // Optimum fiber length
Lfbar=LfbarTemp;
  Lt0 = (9.6/100); // Tendon slack length
  Gammabar = 0*(3.14/180); // Pennation angle in radian
  Epsilonbar = 0.053; // Tendon strain at F0
  K1 = 10; // Factor for determining shortening speed at optimum length
  K2 = 0; // Factor for determining shortening speed at optimum length
  Fcfast = 0.4; // Factor for determining shortening speed at optimum length
  Jt = 3.0; // Shape parameter for the tendon stiffness
  Jpe = 3.0; // Shape parameter for the parallel stiffness
  PEFactor = 5.0; // Parameter for influence of parallel stiffness
AnyVar MusLengthUnScaled=0.286074951;
  AnyVar LengthDifference=MusLengthUnScaled-Lt0-Lfbar*cos(Gammabar);
};


AnyMuscleModel3E VastusIntermedius1Par = {
  F0 = .StrengthScaleThigh*.PCSAfactor*38.1/6; // Maximum force output at optimum fiber length
 AnyVar LfbarTemp = .FiberLengthScaleThigh*(7.7/100); // Optimum fiber length
Lfbar=LfbarTemp;
  Lt0 = (12.6/100); // Tendon slack length
  Gammabar = 11.8*(3.14/180); // Pennation angle in radian
  Epsilonbar = 0.053; // Tendon strain at F0
  K1 = 10; // Factor for determining shortening speed at optimum length
  K2 = 0; // Factor for determining shortening speed at optimum length
  Fcfast = 0.4; // Factor for determining shortening speed at optimum length
  Jt = 3.0; // Shape parameter for the tendon stiffness
  Jpe = 3.0; // Shape parameter for the parallel stiffness
  PEFactor = 5.0; // Parameter for influence of parallel stiffness
AnyVar MusLengthUnScaled=0.128855692;
  AnyVar LengthDifference=MusLengthUnScaled-Lt0-Lfbar*cos(Gammabar);

};
AnyMuscleModel3E VastusIntermedius2Par = {
  F0 = .StrengthScaleThigh*.PCSAfactor*38.1/6; // Maximum force output at optimum fiber length
 AnyVar LfbarTemp = .FiberLengthScaleThigh*(7.7/100); // Optimum fiber length
Lfbar=LfbarTemp;
  Lt0 = (12.6/100); // Tendon slack length
  Gammabar = 11.8*(3.14/180); // Pennation angle in radian
  Epsilonbar = 0.053; // Tendon strain at F0
  K1 = 10; // Factor for determining shortening speed at optimum length
  K2 = 0; // Factor for determining shortening speed at optimum length
  Fcfast = 0.4; // Factor for determining shortening speed at optimum length
  Jt = 3.0; // Shape parameter for the tendon stiffness
  Jpe = 3.0; // Shape parameter for the parallel stiffness
  PEFactor = 5.0; // Parameter for influence of parallel stiffness
AnyVar MusLengthUnScaled=0.185393844;
  AnyVar LengthDifference=MusLengthUnScaled-Lt0-Lfbar*cos(Gammabar);

};
AnyMuscleModel3E VastusIntermedius3Par = {
  F0 = .StrengthScaleThigh*.PCSAfactor*38.1/6; // Maximum force output at optimum fiber length
 AnyVar LfbarTemp = .FiberLengthScaleThigh*(7.7/100); // Optimum fiber length
Lfbar=LfbarTemp;
  Lt0 = (12.6/100); // Tendon slack length
  Gammabar = 11.8*(3.14/180); // Pennation angle in radian
  Epsilonbar = 0.053; // Tendon strain at F0
  K1 = 10; // Factor for determining shortening speed at optimum length
  K2 = 0; // Factor for determining shortening speed at optimum length
  Fcfast = 0.4; // Factor for determining shortening speed at optimum length
  Jt = 3.0; // Shape parameter for the tendon stiffness
  Jpe = 3.0; // Shape parameter for the parallel stiffness
  PEFactor = 5.0; // Parameter for influence of parallel stiffness
AnyVar MusLengthUnScaled=0.246676849;
  AnyVar LengthDifference=MusLengthUnScaled-Lt0-Lfbar*cos(Gammabar);
};
AnyMuscleModel3E VastusIntermedius4Par = {
  F0 = .StrengthScaleThigh*.PCSAfactor*38.1/6; // Maximum force output at optimum fiber length
 AnyVar LfbarTemp = .FiberLengthScaleThigh*(7.7/100); // Optimum fiber length
Lfbar=LfbarTemp;
  Lt0 = (12.6/100); // Tendon slack length
  Gammabar = 11.8*(3.14/180); // Pennation angle in radian
  Epsilonbar = 0.053; // Tendon strain at F0
  K1 = 10; // Factor for determining shortening speed at optimum length
  K2 = 0; // Factor for determining shortening speed at optimum length
  Fcfast = 0.4; // Factor for determining shortening speed at optimum length
  Jt = 3.0; // Shape parameter for the tendon stiffness
  Jpe = 3.0; // Shape parameter for the parallel stiffness
  PEFactor = 5.0; // Parameter for influence of parallel stiffness
AnyVar MusLengthUnScaled=0.125884472;
  AnyVar LengthDifference=MusLengthUnScaled-Lt0-Lfbar*cos(Gammabar);
};
AnyMuscleModel3E VastusIntermedius5Par = {
  F0 = .StrengthScaleThigh*.PCSAfactor*38.1/6; // Maximum force output at optimum fiber length
 AnyVar LfbarTemp = .FiberLengthScaleThigh*(7.7/100); // Optimum fiber length
Lfbar=LfbarTemp;
  Lt0 = (12.6/100); // Tendon slack length
  Gammabar = 11.8*(3.14/180); // Pennation angle in radian
  Epsilonbar = 0.053; // Tendon strain at F0
  K1 = 10; // Factor for determining shortening speed at optimum length
  K2 = 0; // Factor for determining shortening speed at optimum length
  Fcfast = 0.4; // Factor for determining shortening speed at optimum length
  Jt = 3.0; // Shape parameter for the tendon stiffness
  Jpe = 3.0; // Shape parameter for the parallel stiffness
  PEFactor = 5.0; // Parameter for influence of parallel stiffness
AnyVar MusLengthUnScaled=0.182168163;
  AnyVar LengthDifference=MusLengthUnScaled-Lt0-Lfbar*cos(Gammabar);
};
AnyMuscleModel3E VastusIntermedius6Par = {
  F0 = .StrengthScaleThigh*.PCSAfactor*38.1/6; // Maximum force output at optimum fiber length
 AnyVar LfbarTemp = .FiberLengthScaleThigh*(7.7/100); // Optimum fiber length
Lfbar=LfbarTemp;
  Lt0 = (12.6/100); // Tendon slack length
  Gammabar = 11.8*(3.14/180); // Pennation angle in radian
  Epsilonbar = 0.053; // Tendon strain at F0
  K1 = 10; // Factor for determining shortening speed at optimum length
  K2 = 0; // Factor for determining shortening speed at optimum length
  Fcfast = 0.4; // Factor for determining shortening speed at optimum length
  Jt = 3.0; // Shape parameter for the tendon stiffness
  Jpe = 3.0; // Shape parameter for the parallel stiffness
  PEFactor = 5.0; // Parameter for influence of parallel stiffness
AnyVar MusLengthUnScaled=0.243574141;
  AnyVar LengthDifference=MusLengthUnScaled-Lt0-Lfbar*cos(Gammabar);
};


AnyMuscleModel3E RectusFemoris1Par = {
  F0 = .StrengthScaleThigh*.PCSAfactor*28.9/2; // Maximum force output at optimum fiber length
 AnyVar LfbarTemp = .FiberLengthScaleThigh*(7.8/100); // Optimum fiber length
Lfbar=LfbarTemp;
  Lt0 = (9.6/100); // Tendon slack length
  Gammabar = 22.0*(3.14/180); // Pennation angle in radian
  Epsilonbar = 0.053; // Tendon strain at F0
  K1 = 10; // Factor for determining shortening speed at optimum length
  K2 = 0; // Factor for determining shortening speed at optimum length
  Fcfast = 0.4; // Factor for determining shortening speed at optimum length
  Jt = 3.0; // Shape parameter for the tendon stiffness
  Jpe = 3.0; // Shape parameter for the parallel stiffness
  PEFactor = 5.0; // Parameter for influence of parallel stiffness
AnyVar MusLengthUnScaled=0.38660766;
  AnyVar LengthDifference=MusLengthUnScaled-Lt0-Lfbar*cos(Gammabar);
};
AnyMuscleModel3E RectusFemoris2Par = {
  F0 = .StrengthScaleThigh*.PCSAfactor*28.9/2; // Maximum force output at optimum fiber length
 AnyVar LfbarTemp = .FiberLengthScaleThigh*(7.8/100); // Optimum fiber length
Lfbar=LfbarTemp;
  Lt0 = (9.6/100); // Tendon slack length
  Gammabar = 22.0*(3.14/180); // Pennation angle in radian
  Epsilonbar = 0.053; // Tendon strain at F0
  K1 = 10; // Factor for determining shortening speed at optimum length
  K2 = 0; // Factor for determining shortening speed at optimum length
  Fcfast = 0.4; // Factor for determining shortening speed at optimum length
  Jt = 3.0; // Shape parameter for the tendon stiffness
  Jpe = 3.0; // Shape parameter for the parallel stiffness
  PEFactor = 5.0; // Parameter for influence of parallel stiffness
AnyVar MusLengthUnScaled=0.387412115;
  AnyVar LengthDifference=MusLengthUnScaled-Lt0-Lfbar*cos(Gammabar);
};


AnyMuscleModel3E Semitendinosus1Par = {
  F0 = .StrengthScaleThigh*.PCSAfactor*14.7; // Maximum force output at optimum fiber length
 AnyVar LfbarTemp = .FiberLengthScaleThigh*(14.2/100); // Optimum fiber length
Lfbar=LfbarTemp;
  Lt0 = (23.7/100); // Tendon slack length
  Gammabar = 0*(3.14/180); // Pennation angle in radian
  Epsilonbar = 0.053; // Tendon strain at F0
  K1 = 10; // Factor for determining shortening speed at optimum length
  K2 = 0; // Factor for determining shortening speed at optimum length
  Fcfast = 0.4; // Factor for determining shortening speed at optimum length
  Jt = 3.0; // Shape parameter for the tendon stiffness
  Jpe = 3.0; // Shape parameter for the parallel stiffness
  PEFactor = 5.0; // Parameter for influence of parallel stiffness
AnyVar MusLengthUnScaled=0.476539901;
  AnyVar LengthDifference=MusLengthUnScaled-Lt0-Lfbar*cos(Gammabar);
};

AnyMuscleModel3E Semimembranosus1Par = {
  F0 = .StrengthScaleThigh*.PCSAfactor*17.1; // Maximum force output at optimum fiber length
 AnyVar LfbarTemp = .FiberLengthScaleThigh*(8.1/100); // Optimum fiber length
Lfbar=LfbarTemp;
  Lt0 = (15.7/100); // Tendon slack length
  Gammabar = 25.0*(3.14/180); // Pennation angle in radian
  Epsilonbar = 0.053; // Tendon strain at F0
  K1 = 10; // Factor for determining shortening speed at optimum length
  K2 = 0; // Factor for determining shortening speed at optimum length
  Fcfast = 0.4; // Factor for determining shortening speed at optimum length
  Jt = 3.0; // Shape parameter for the tendon stiffness
  Jpe = 3.0; // Shape parameter for the parallel stiffness
  PEFactor = 5.0; // Parameter for influence of parallel stiffness
AnyVar MusLengthUnScaled=0.392451608;
  AnyVar LengthDifference=MusLengthUnScaled-Lt0-Lfbar*cos(Gammabar);
};


AnyMuscleModel3E BicepsFemorisCaputLongum1Par = {
  F0 = .StrengthScaleThigh*.PCSAfactor*27.2; // Maximum force output at optimum fiber length
 AnyVar LfbarTemp = .FiberLengthScaleThigh*(8.5/100); // Optimum fiber length
Lfbar=LfbarTemp;
  Lt0 = (13/100); // Tendon slack length
  Gammabar = 29.9*(3.14/180); // Pennation angle in radian
  Epsilonbar = 0.053; // Tendon strain at F0
  K1 = 10; // Factor for determining shortening speed at optimum length
  K2 = 0; // Factor for determining shortening speed at optimum length
  Fcfast = 0.4; // Factor for determining shortening speed at optimum length
  Jt = 3.0; // Shape parameter for the tendon stiffness
  Jpe = 3.0; // Shape parameter for the parallel stiffness
  PEFactor = 5.0; // Parameter for influence of parallel stiffness
AnyVar MusLengthUnScaled=0.406085299;
AnyVar LengthDifference=MusLengthUnScaled-Lt0-Lfbar*cos(Gammabar);
};

AnyMuscleModel3E BicepsFemorisCaputBreve1Par = {
  F0 = .StrengthScaleThigh*.PCSAfactor*11.8/3; // Maximum force output at optimum fiber length
 AnyVar LfbarTemp = .FiberLengthScaleThigh*(9.1/100); // Optimum fiber length
Lfbar=LfbarTemp;
  Lt0 = (3.1/100); // Tendon slack length
  Gammabar = 0*(3.14/180); // Pennation angle in radian
  Epsilonbar = 0.053; // Tendon strain at F0
  K1 = 10; // Factor for determining shortening speed at optimum length
  K2 = 0; // Factor for determining shortening speed at optimum length
  Fcfast = 0.4; // Factor for determining shortening speed at optimum length
  Jt = 3.0; // Shape parameter for the tendon stiffness
  Jpe = 3.0; // Shape parameter for the parallel stiffness
  PEFactor = 5.0; // Parameter for influence of parallel stiffness
AnyVar MusLengthUnScaled=0.24490245;
AnyVar LengthDifference=MusLengthUnScaled-Lt0-Lfbar*cos(Gammabar);
};
AnyMuscleModel3E BicepsFemorisCaputBreve2Par = {
  F0 = .StrengthScaleThigh*.PCSAfactor*11.8/3; // Maximum force output at optimum fiber length
 AnyVar LfbarTemp = .FiberLengthScaleThigh*(9.1/100); // Optimum fiber length
Lfbar=LfbarTemp;
  Lt0 = (3.1/100); // Tendon slack length
  Gammabar = 0*(3.14/180); // Pennation angle in radian
  Epsilonbar = 0.053; // Tendon strain at F0
  K1 = 10; // Factor for determining shortening speed at optimum length
  K2 = 0; // Factor for determining shortening speed at optimum length
  Fcfast = 0.4; // Factor for determining shortening speed at optimum length
  Jt = 3.0; // Shape parameter for the tendon stiffness
  Jpe = 3.0; // Shape parameter for the parallel stiffness
  PEFactor = 5.0; // Parameter for influence of parallel stiffness
AnyVar MusLengthUnScaled=0.200920109;
AnyVar LengthDifference=MusLengthUnScaled-Lt0-Lfbar*cos(Gammabar);
};

AnyMuscleModel3E BicepsFemorisCaputBreve3Par = {
  F0 = .StrengthScaleThigh*.PCSAfactor*11.8/3; // Maximum force output at optimum fiber length
 AnyVar LfbarTemp = .FiberLengthScaleThigh*(9.1/100); // Optimum fiber length
Lfbar=LfbarTemp;
  Lt0 = (3.1/100); // Tendon slack length
  Gammabar = 0*(3.14/180); // Pennation angle in radian
  Epsilonbar = 0.053; // Tendon strain at F0
  K1 = 10; // Factor for determining shortening speed at optimum length
  K2 = 0; // Factor for determining shortening speed at optimum length
  Fcfast = 0.4; // Factor for determining shortening speed at optimum length
  Jt = 3.0; // Shape parameter for the tendon stiffness
  Jpe = 3.0; // Shape parameter for the parallel stiffness
  PEFactor = 5.0; // Parameter for influence of parallel stiffness
AnyVar MusLengthUnScaled=0.200920109;
AnyVar LengthDifference=MusLengthUnScaled-Lt0-Lfbar*cos(Gammabar);
};

AnyMuscleModel3E SartoriusProximal1Par = {
  F0 = .StrengthScaleThigh*.PCSAfactor*5.9; // Maximum force output at optimum fiber length
 AnyVar LfbarTemp = .FiberLengthScaleThigh*(34.7/100); // Optimum fiber length
Lfbar=LfbarTemp;
  Lt0 = (7.9/100); // Tendon slack length
  Gammabar = 0*(3.14/180); // Pennation angle in radian
  Epsilonbar = 0.053; // Tendon strain at F0
  K1 = 10; // slow twitch Factor for determining shortening speed at optimum length
  K2 = 0; // fast twitch (zero when no info available) determines shortening speed at optimum length
  Fcfast = 0.4; // percentage fast to slow Factor for determining shortening speed at optimum length
  Jt = 3.0; // Shape parameter for the tendon stiffness
  Jpe = 3.0; // Shape parameter for the parallel stiffness
  PEFactor = 5.0; // Parameter for influence of parallel stiffness
AnyVar MusLengthUnScaled=0.569512272;
AnyVar LengthDifference=MusLengthUnScaled-Lt0-Lfbar*cos(Gammabar);
};


AnyMuscleModel3E SartoriusDistal1Par = {
  F0 = .StrengthScaleThigh*.PCSAfactor*5.9; // Maximum force output at optimum fiber length
 AnyVar LfbarTemp = .FiberLengthScaleThigh*(34.7/100); // Optimum fiber length
Lfbar=LfbarTemp;
  Lt0 = (7.9/100); // Tendon slack length
  Gammabar = 0*(3.14/180); // Pennation angle in radian
  Epsilonbar = 0.053; // Tendon strain at F0
  K1 = 10; // slow twitch Factor for determining shortening speed at optimum length
  K2 = 0; // fast twitch (zero when no info available) determines shortening speed at optimum length
  Fcfast = 0.4; // percentage fast to slow Factor for determining shortening speed at optimum length
  Jt = 3.0; // Shape parameter for the tendon stiffness
  Jpe = 3.0; // Shape parameter for the parallel stiffness
  PEFactor = 5.0; // Parameter for influence of parallel stiffness
AnyVar MusLengthUnScaled=0.567676999;
AnyVar LengthDifference=MusLengthUnScaled-Lt0-Lfbar*cos(Gammabar);
};


AnyMuscleModel3E Gracilis1Par = {
  F0 = .StrengthScaleThigh*.PCSAfactor*4.9/2; // Maximum force output at optimum fiber length
 AnyVar LfbarTemp = .FiberLengthScaleThigh*(18.1/100); // Optimum fiber length
Lfbar=LfbarTemp;
  Lt0 = (14/100); // Tendon slack length
  Gammabar = 0*(3.14/180); // Pennation angle in radian
  Epsilonbar = 0.053; // Tendon strain at F0
  K1 = 10; // slow twitch Factor for determining shortening speed at optimum length
  K2 = 0; // fast twitch (zero when no info available) determines shortening speed at optimum length
  Fcfast = 0.4; // percentage fast to slow Factor for determining shortening speed at optimum length
  Jt = 3.0; // Shape parameter for the tendon stiffness
  Jpe = 3.0; // Shape parameter for the parallel stiffness
  PEFactor = 5.0; // Parameter for influence of parallel stiffness
AnyVar MusLengthUnScaled=0.479393798;
AnyVar LengthDifference=MusLengthUnScaled-Lt0-Lfbar*cos(Gammabar);
};
AnyMuscleModel3E Gracilis2Par = {
  F0 = .StrengthScaleThigh*.PCSAfactor*4.9/2; // Maximum force output at optimum fiber length
 AnyVar LfbarTemp = .FiberLengthScaleThigh*(18.1/100); // Optimum fiber length
Lfbar=LfbarTemp;
  Lt0 = (14/100); // Tendon slack length
  Gammabar = 0*(3.14/180); // Pennation angle in radian
  Epsilonbar = 0.053; // Tendon strain at F0
  K1 = 10; // slow twitch Factor for determining shortening speed at optimum length
  K2 = 0; // fast twitch (zero when no info available) determines shortening speed at optimum length
  Fcfast = 0.4; // percentage fast to slow Factor for determining shortening speed at optimum length
  Jt = 3.0; // Shape parameter for the tendon stiffness
  Jpe = 3.0; // Shape parameter for the parallel stiffness
  PEFactor = 5.0; // Parameter for influence of parallel stiffness
AnyVar MusLengthUnScaled=0.487342796;
AnyVar LengthDifference=MusLengthUnScaled-Lt0-Lfbar*cos(Gammabar);
};

AnyMuscleModel3E IliacusLateralis1Par = {
  F0 = .StrengthScalePelvis*.PCSAfactor*6.6/3; // Maximum force output at optimum fiber length
 AnyVar LfbarTemp = .FiberLengthScaleThigh*(10.3/100); // Optimum fiber length
Lfbar=LfbarTemp;
  Lt0 = (11.3/100); // Tendon slack length
  Gammabar = 26.5*(3.14/180); // Pennation angle in radian
  Epsilonbar = 0.053; // Tendon strain at F0
  K1 = 10; // Factor for determining shortening speed at optimum length
  K2 = 0; // Factor for determining shortening speed at optimum length
  Fcfast = 0.4; // Factor for determining shortening speed at optimum length
  Jt = 3.0; // Shape parameter for the tendon stiffness
  Jpe = 3.0; // Shape parameter for the parallel stiffness
  PEFactor = 5.0; // Parameter for influence of parallel stiffness
AnyVar MusLengthUnScaled=0.231024327;
AnyVar LengthDifference=MusLengthUnScaled-Lt0-Lfbar*cos(Gammabar);
};
AnyMuscleModel3E IliacusLateralis2Par = {
  F0 = .StrengthScalePelvis*.PCSAfactor*6.6/3; // Maximum force output at optimum fiber length
 AnyVar LfbarTemp = .FiberLengthScaleThigh*(10.3/100); // Optimum fiber length
Lfbar=LfbarTemp;
  Lt0 = (11.3/100); // Tendon slack length
  Gammabar = 26.5*(3.14/180); // Pennation angle in radian
  Epsilonbar = 0.053; // Tendon strain at F0
  K1 = 10; // Factor for determining shortening speed at optimum length
  K2 = 0; // Factor for determining shortening speed at optimum length
  Fcfast = 0.4; // Factor for determining shortening speed at optimum length
  Jt = 3.0; // Shape parameter for the tendon stiffness
  Jpe = 3.0; // Shape parameter for the parallel stiffness
  PEFactor = 5.0; // Parameter for influence of parallel stiffness
AnyVar MusLengthUnScaled=0.209658095;
AnyVar LengthDifference=MusLengthUnScaled-Lt0-Lfbar*cos(Gammabar);
};
AnyMuscleModel3E IliacusLateralis3Par = {
  F0 = .StrengthScalePelvis*.PCSAfactor*6.6/3; // Maximum force output at optimum fiber length
 AnyVar LfbarTemp = .FiberLengthScaleThigh*(10.3/100); // Optimum fiber length
Lfbar=LfbarTemp;
  Lt0 = (11.3/100); // Tendon slack length
  Gammabar = 26.5*(3.14/180); // Pennation angle in radian
  Epsilonbar = 0.053; // Tendon strain at F0
  K1 = 10; // Factor for determining shortening speed at optimum length
  K2 = 0; // Factor for determining shortening speed at optimum length
  Fcfast = 0.4; // Factor for determining shortening speed at optimum length
  Jt = 3.0; // Shape parameter for the tendon stiffness
  Jpe = 3.0; // Shape parameter for the parallel stiffness
  PEFactor = 5.0; // Parameter for influence of parallel stiffness
AnyVar MusLengthUnScaled=0.194360878;
AnyVar LengthDifference=MusLengthUnScaled-Lt0-Lfbar*cos(Gammabar);
};

AnyMuscleModel3E IliacusMid1Par = {
  F0 = .StrengthScalePelvis*.PCSAfactor*13/3; // Maximum force output at optimum fiber length
 AnyVar LfbarTemp = .FiberLengthScaleThigh*(5.2/100); // Optimum fiber length
Lfbar=LfbarTemp;
  Lt0 = (11.3/100); // Tendon slack length
  Gammabar = 0*(3.14/180); // Pennation angle in radian
  Epsilonbar = 0.053; // Tendon strain at F0
  K1 = 10; // Factor for determining shortening speed at optimum length
  K2 = 0; // Factor for determining shortening speed at optimum length
  Fcfast = 0.4; // Factor for determining shortening speed at optimum length
  Jt = 3.0; // Shape parameter for the tendon stiffness
  Jpe = 3.0; // Shape parameter for the parallel stiffness
  PEFactor = 5.0; // Parameter for influence of parallel stiffness
AnyVar MusLengthUnScaled=0.24222684;
AnyVar LengthDifference=MusLengthUnScaled-Lt0-Lfbar*cos(Gammabar);
};
AnyMuscleModel3E IliacusMid2Par = {
  F0 = .StrengthScalePelvis*.PCSAfactor*13/3; // Maximum force output at optimum fiber length
 AnyVar LfbarTemp = .FiberLengthScaleThigh*(5.2/100); // Optimum fiber length
Lfbar=LfbarTemp;
  Lt0 = (11.3/100); // Tendon slack length
  Gammabar = 0*(3.14/180); // Pennation angle in radian
  Epsilonbar = 0.053; // Tendon strain at F0
  K1 = 10; // Factor for determining shortening speed at optimum length
  K2 = 0; // Factor for determining shortening speed at optimum length
  Fcfast = 0.4; // Factor for determining shortening speed at optimum length
  Jt = 3.0; // Shape parameter for the tendon stiffness
  Jpe = 3.0; // Shape parameter for the parallel stiffness
  PEFactor = 5.0; // Parameter for influence of parallel stiffness
AnyVar MusLengthUnScaled=0.214866209;
AnyVar LengthDifference=MusLengthUnScaled-Lt0-Lfbar*cos(Gammabar);
};
AnyMuscleModel3E IliacusMid3Par = {
  F0 = .StrengthScalePelvis*.PCSAfactor*13/3; // Maximum force output at optimum fiber length
 AnyVar LfbarTemp = .FiberLengthScaleThigh*(5.2/100); // Optimum fiber length
Lfbar=LfbarTemp;
  Lt0 = (11.3/100); // Tendon slack length
  Gammabar = 0*(3.14/180); // Pennation angle in radian
  Epsilonbar = 0.053; // Tendon strain at F0
  K1 = 10; // Factor for determining shortening speed at optimum length
  K2 = 0; // Factor for determining shortening speed at optimum length
  Fcfast = 0.4; // Factor for determining shortening speed at optimum length
  Jt = 3.0; // Shape parameter for the tendon stiffness
  Jpe = 3.0; // Shape parameter for the parallel stiffness
  PEFactor = 5.0; // Parameter for influence of parallel stiffness
AnyVar MusLengthUnScaled=0.214866209;
AnyVar LengthDifference=MusLengthUnScaled-Lt0-Lfbar*cos(Gammabar);
};

AnyMuscleModel3E IliacusMedialis1Par = {
  F0 = .StrengthScalePelvis*.PCSAfactor*7.6/3; // Maximum force output at optimum fiber length
 AnyVar LfbarTemp = .FiberLengthScaleThigh*(8.9/100); // Optimum fiber length
Lfbar=LfbarTemp;
  Lt0 = (15.5/100); // Tendon slack length
  Gammabar = 0*(3.14/180); // Pennation angle in radian
  Epsilonbar = 0.053; // Tendon strain at F0
  K1 = 10; // Factor for determining shortening speed at optimum length
  K2 = 0; // Factor for determining shortening speed at optimum length
  Fcfast = 0.4; // Factor for determining shortening speed at optimum length
  Jt = 3.0; // Shape parameter for the tendon stiffness
  Jpe = 3.0; // Shape parameter for the parallel stiffness
  PEFactor = 5.0; // Parameter for influence of parallel stiffness
AnyVar MusLengthUnScaled=0.236952425;
AnyVar LengthDifference=MusLengthUnScaled-Lt0-Lfbar*cos(Gammabar);
};
AnyMuscleModel3E IliacusMedialis2Par = {
  F0 = .StrengthScalePelvis*.PCSAfactor*7.6/3; // Maximum force output at optimum fiber length
 AnyVar LfbarTemp = .FiberLengthScaleThigh*(8.9/100); // Optimum fiber length
Lfbar=LfbarTemp;
  Lt0 = (15.5/100); // Tendon slack length
  Gammabar = 0*(3.14/180); // Pennation angle in radian
  Epsilonbar = 0.053; // Tendon strain at F0
  K1 = 10; // Factor for determining shortening speed at optimum length
  K2 = 0; // Factor for determining shortening speed at optimum length
  Fcfast = 0.4; // Factor for determining shortening speed at optimum length
  Jt = 3.0; // Shape parameter for the tendon stiffness
  Jpe = 3.0; // Shape parameter for the parallel stiffness
  PEFactor = 5.0; // Parameter for influence of parallel stiffness
AnyVar MusLengthUnScaled=0.217907881;
AnyVar LengthDifference=MusLengthUnScaled-Lt0-Lfbar*cos(Gammabar);
};
AnyMuscleModel3E IliacusMedialis3Par = {
  F0 = .StrengthScalePelvis*.PCSAfactor*7.6/3; // Maximum force output at optimum fiber length
 AnyVar LfbarTemp = .FiberLengthScaleThigh*(8.9/100); // Optimum fiber length
Lfbar=LfbarTemp;
  Lt0 = (15.5/100); // Tendon slack length
  Gammabar = 0*(3.14/180); // Pennation angle in radian
  Epsilonbar = 0.053; // Tendon strain at F0
  K1 = 10; // Factor for determining shortening speed at optimum length
  K2 = 0; // Factor for determining shortening speed at optimum length
  Fcfast = 0.4; // Factor for determining shortening speed at optimum length
  Jt = 3.0; // Shape parameter for the tendon stiffness
  Jpe = 3.0; // Shape parameter for the parallel stiffness
  PEFactor = 5.0; // Parameter for influence of parallel stiffness
AnyVar MusLengthUnScaled=0.194414178;
AnyVar LengthDifference=MusLengthUnScaled-Lt0-Lfbar*cos(Gammabar);
};

AnyMuscleModel3E GluteusMinimusAnterior1Par = {
  F0 = .StrengthScalePelvis*.PCSAfactor*10; // Maximum force output at optimum fiber length
 AnyVar LfbarTemp = .FiberLengthScalePelvis*(2.8/100); // Optimum fiber length
Lfbar=LfbarTemp;
  Lt0 = (7.3/100); // Tendon slack length
  Gammabar = 0*(3.14/180); // Pennation angle in radian
  Epsilonbar = 0.053; // Tendon strain at F0
  K1 = 10; // Factor for determining shortening speed at optimum length
  K2 = 0; // Factor for determining shortening speed at optimum length
  Fcfast = 0.4; // Factor for determining shortening speed at optimum length
  Jt = 3.0; // Shape parameter for the tendon stiffness
  Jpe = 3.0; // Shape parameter for the parallel stiffness
  PEFactor = 2.0; // Parameter for influence of parallel stiffness
AnyVar MusLengthUnScaled=0.097369727;
AnyVar LengthDifference=MusLengthUnScaled-Lt0-Lfbar*cos(Gammabar);
};

AnyMuscleModel3E GluteusMinimusMid1Par = {
  F0 = .StrengthScalePelvis*.PCSAfactor*8.1; // Maximum force output at optimum fiber length
 AnyVar LfbarTemp = .FiberLengthScalePelvis*(3.4/100); // Optimum fiber length
Lfbar=LfbarTemp;
  Lt0 = (7.3/100); // Tendon slack length
  Gammabar = 0*(3.14/180); // Pennation angle in radian
  Epsilonbar = 0.053; // Tendon strain at F0
  K1 = 10; // Factor for determining shortening speed at optimum length
  K2 = 0; // Factor for determining shortening speed at optimum length
  Fcfast = 0.4; // Factor for determining shortening speed at optimum length
  Jt = 3.0; // Shape parameter for the tendon stiffness
  Jpe = 3.0; // Shape parameter for the parallel stiffness
  PEFactor = 2.0; // Parameter for influence of parallel stiffness
AnyVar MusLengthUnScaled=0.107707429;
AnyVar LengthDifference=MusLengthUnScaled-Lt0-Lfbar*cos(Gammabar);
};

AnyMuscleModel3E GluteusMinimusPosterior1Par = {
  F0 = .StrengthScalePelvis*.PCSAfactor*7.4; // Maximum force output at optimum fiber length
 AnyVar LfbarTemp = .FiberLengthScalePelvis*(3.7/100); // Optimum fiber length
Lfbar=LfbarTemp;
  Lt0 = (7.3/100); // Tendon slack length
  Gammabar = 0*(3.14/180); // Pennation angle in radian
  Epsilonbar = 0.053; // Tendon strain at F0
  K1 = 10; // Factor for determining shortening speed at optimum length
  K2 = 0; // Factor for determining shortening speed at optimum length
  Fcfast = 0.4; // Factor for determining shortening speed at optimum length
  Jt = 3.0; // Shape parameter for the tendon stiffness
  Jpe = 3.0; // Shape parameter for the parallel stiffness
  PEFactor = 2.0; // Parameter for influence of parallel stiffness
AnyVar MusLengthUnScaled=0.116777942;
AnyVar LengthDifference=MusLengthUnScaled-Lt0-Lfbar*cos(Gammabar);
};

AnyMuscleModel3E GluteusMediusAnterior1Par = {
  F0 = .StrengthScalePelvis*.PCSAfactor*37.9/6; // Maximum force output at optimum fiber length
 AnyVar LfbarTemp = .FiberLengthScalePelvis*(3.8/100); // Optimum fiber length
Lfbar=LfbarTemp;
  Lt0 = (0.001); // Tendon slack length
  Gammabar = 0*(3.14/180); // Pennation angle in radian
  Epsilonbar = 0.053; // Tendon strain at F0
  K1 = 10; // Factor for determining shortening speed at optimum length
  K2 = 0; // Factor for determining shortening speed at optimum length
  Fcfast = 0.4; // Factor for determining shortening speed at optimum length
  Jt = 3.0; // Shape parameter for the tendon stiffness
  Jpe = 3.0; // Shape parameter for the parallel stiffness
  PEFactor = 2.0; // Parameter for influence of parallel stiffness
AnyVar MusLengthUnScaled=0.09291635;
AnyVar LengthDifference=MusLengthUnScaled-Lt0-Lfbar*cos(Gammabar);
};

AnyMuscleModel3E GluteusMediusAnterior2Par = {
  F0 = .StrengthScalePelvis*.PCSAfactor*37.9/6; // Maximum force output at optimum fiber length
 AnyVar LfbarTemp = .FiberLengthScalePelvis*(3.8/100); // Optimum fiber length
Lfbar=LfbarTemp;
  Lt0 = (0.001); // Tendon slack length
  Gammabar = 0*(3.14/180); // Pennation angle in radian
  Epsilonbar = 0.053; // Tendon strain at F0
  K1 = 10; // Factor for determining shortening speed at optimum length
  K2 = 0; // Factor for determining shortening speed at optimum length
  Fcfast = 0.4; // Factor for determining shortening speed at optimum length
  Jt = 3.0; // Shape parameter for the tendon stiffness
  Jpe = 3.0; // Shape parameter for the parallel stiffness
  PEFactor = 2.0; // Parameter for influence of parallel stiffness
AnyVar MusLengthUnScaled=0.087415744;
AnyVar LengthDifference=MusLengthUnScaled-Lt0-Lfbar*cos(Gammabar);
};

AnyMuscleModel3E GluteusMediusAnterior3Par = {
  F0 = .StrengthScalePelvis*.PCSAfactor*37.9/6; // Maximum force output at optimum fiber length
 AnyVar LfbarTemp = .FiberLengthScalePelvis*(3.8/100); // Optimum fiber length
Lfbar=LfbarTemp;
  Lt0 = (0.001); // Tendon slack length
  Gammabar = 0*(3.14/180); // Pennation angle in radian
  Epsilonbar = 0.053; // Tendon strain at F0
  K1 = 10; // Factor for determining shortening speed at optimum length
  K2 = 0; // Factor for determining shortening speed at optimum length
  Fcfast = 0.4; // Factor for determining shortening speed at optimum length
  Jt = 3.0; // Shape parameter for the tendon stiffness
  Jpe = 3.0; // Shape parameter for the parallel stiffness
  PEFactor = 2.0; // Parameter for influence of parallel stiffness
AnyVar MusLengthUnScaled=0.07856721;
AnyVar LengthDifference=MusLengthUnScaled-Lt0-Lfbar*cos(Gammabar);
};

AnyMuscleModel3E GluteusMediusAnterior4Par = {
  F0 = .StrengthScalePelvis*.PCSAfactor*37.9/6; // Maximum force output at optimum fiber length
 AnyVar LfbarTemp = .FiberLengthScalePelvis*(3.8/100); // Optimum fiber length
Lfbar=LfbarTemp;
  Lt0 = (0.001); // Tendon slack length
  Gammabar = 0*(3.14/180); // Pennation angle in radian
  Epsilonbar = 0.053; // Tendon strain at F0
  K1 = 10; // Factor for determining shortening speed at optimum length
  K2 = 0; // Factor for determining shortening speed at optimum length
  Fcfast = 0.4; // Factor for determining shortening speed at optimum length
  Jt = 3.0; // Shape parameter for the tendon stiffness
  Jpe = 3.0; // Shape parameter for the parallel stiffness
  PEFactor = 2.0; // Parameter for influence of parallel stiffness
AnyVar MusLengthUnScaled=0.104892881;
AnyVar LengthDifference=MusLengthUnScaled-Lt0-Lfbar*cos(Gammabar);
};

AnyMuscleModel3E GluteusMediusAnterior5Par = {
  F0 = .StrengthScalePelvis*.PCSAfactor*37.9/6; // Maximum force output at optimum fiber length
 AnyVar LfbarTemp = .FiberLengthScalePelvis*(3.8/100); // Optimum fiber length
Lfbar=LfbarTemp;
  Lt0 = (0.001); // Tendon slack length
  Gammabar = 0*(3.14/180); // Pennation angle in radian
  Epsilonbar = 0.053; // Tendon strain at F0
  K1 = 10; // Factor for determining shortening speed at optimum length
  K2 = 0; // Factor for determining shortening speed at optimum length
  Fcfast = 0.4; // Factor for determining shortening speed at optimum length
  Jt = 3.0; // Shape parameter for the tendon stiffness
  Jpe = 3.0; // Shape parameter for the parallel stiffness
  PEFactor = 2.0; // Parameter for influence of parallel stiffness
AnyVar MusLengthUnScaled=0.100840175;
AnyVar LengthDifference=MusLengthUnScaled-Lt0-Lfbar*cos(Gammabar);
};

AnyMuscleModel3E GluteusMediusAnterior6Par = {
  F0 = .StrengthScalePelvis*.PCSAfactor*37.9/6; // Maximum force output at optimum fiber length
 AnyVar LfbarTemp = .FiberLengthScalePelvis*(3.8/100); // Optimum fiber length
Lfbar=LfbarTemp;
  Lt0 = (0.001); // Tendon slack length
  Gammabar = 0*(3.14/180); // Pennation angle in radian
  Epsilonbar = 0.053; // Tendon strain at F0
  K1 = 10; // Factor for determining shortening speed at optimum length
  K2 = 0; // Factor for determining shortening speed at optimum length
  Fcfast = 0.4; // Factor for determining shortening speed at optimum length
  Jt = 3.0; // Shape parameter for the tendon stiffness
  Jpe = 3.0; // Shape parameter for the parallel stiffness
  PEFactor = 2.0; // Parameter for influence of parallel stiffness
AnyVar MusLengthUnScaled=0.091614211;
AnyVar LengthDifference=MusLengthUnScaled-Lt0-Lfbar*cos(Gammabar);
};

AnyMuscleModel3E GluteusMediusPosterior1Par = {
  F0 = .StrengthScalePelvis*.PCSAfactor*60.8/6; // Maximum force output at optimum fiber length
 AnyVar LfbarTemp = .FiberLengthScalePelvis*(4.5/100); // Optimum fiber length
Lfbar=LfbarTemp;
  Lt0 = (3/100); // Tendon slack length
  Gammabar = 15.9*(3.14/180); // Pennation angle in radian
  Epsilonbar = 0.053; // Tendon strain at F0
  K1 = 10; // Factor for determining shortening speed at optimum length
  K2 = 0; // Factor for determining shortening speed at optimum length
  Fcfast = 0.4; // Factor for determining shortening speed at optimum length
  Jt = 3.0; // Shape parameter for the tendon stiffness
  Jpe = 3.0; // Shape parameter for the parallel stiffness
  PEFactor = 2.0; // Parameter for influence of parallel stiffness
AnyVar MusLengthUnScaled=0.116264462;
AnyVar LengthDifference=MusLengthUnScaled-Lt0-Lfbar*cos(Gammabar);
};

AnyMuscleModel3E GluteusMediusPosterior2Par = {
  F0 = .StrengthScalePelvis*.PCSAfactor*60.8/6; // Maximum force output at optimum fiber length
 AnyVar LfbarTemp = .FiberLengthScalePelvis*(4.5/100); // Optimum fiber length
Lfbar=LfbarTemp;
  Lt0 = (3/100); // Tendon slack length
  Gammabar = 15.9*(3.14/180); // Pennation angle in radian
  Epsilonbar = 0.053; // Tendon strain at F0
  K1 = 10; // Factor for determining shortening speed at optimum length
  K2 = 0; // Factor for determining shortening speed at optimum length
  Fcfast = 0.4; // Factor for determining shortening speed at optimum length
  Jt = 3.0; // Shape parameter for the tendon stiffness
  Jpe = 3.0; // Shape parameter for the parallel stiffness
  PEFactor = 2.0; // Parameter for influence of parallel stiffness
AnyVar MusLengthUnScaled=0.118035318;
AnyVar LengthDifference=MusLengthUnScaled-Lt0-Lfbar*cos(Gammabar);
};

AnyMuscleModel3E GluteusMediusPosterior3Par = {
  F0 = .StrengthScalePelvis*.PCSAfactor*60.8/6; // Maximum force output at optimum fiber length
 AnyVar LfbarTemp = .FiberLengthScalePelvis*(4.5/100); // Optimum fiber length
  Lt0 = (3/100); // Tendon slack length
Lfbar=LfbarTemp;
  Gammabar = 15.9*(3.14/180); // Pennation angle in radian
  Epsilonbar = 0.053; // Tendon strain at F0
  K1 = 10; // Factor for determining shortening speed at optimum length
  K2 = 0; // Factor for determining shortening speed at optimum length
  Fcfast = 0.4; // Factor for determining shortening speed at optimum length
  Jt = 3.0; // Shape parameter for the tendon stiffness
  Jpe = 3.0; // Shape parameter for the parallel stiffness
  PEFactor = 2.0; // Parameter for influence of parallel stiffness
AnyVar MusLengthUnScaled=0.111148097;
AnyVar LengthDifference=MusLengthUnScaled-Lt0-Lfbar*cos(Gammabar);
};

AnyMuscleModel3E GluteusMediusPosterior4Par = {
  F0 = .StrengthScalePelvis*.PCSAfactor*60.8/6; // Maximum force output at optimum fiber length
 AnyVar LfbarTemp = .FiberLengthScalePelvis*(4.5/100); // Optimum fiber length
Lfbar=LfbarTemp;
  Lt0 = (3/100); // Tendon slack length
  Gammabar = 15.9*(3.14/180); // Pennation angle in radian
  Epsilonbar = 0.053; // Tendon strain at F0
  K1 = 10; // Factor for determining shortening speed at optimum length
  K2 = 0; // Factor for determining shortening speed at optimum length
  Fcfast = 0.4; // Factor for determining shortening speed at optimum length
  Jt = 3.0; // Shape parameter for the tendon stiffness
  Jpe = 3.0; // Shape parameter for the parallel stiffness
  PEFactor = 2.0; // Parameter for influence of parallel stiffness
AnyVar MusLengthUnScaled=0.134519008;
AnyVar LengthDifference=MusLengthUnScaled-Lt0-Lfbar*cos(Gammabar);
};

AnyMuscleModel3E GluteusMediusPosterior5Par = {
  F0 = .StrengthScalePelvis*.PCSAfactor*60.8/6; // Maximum force output at optimum fiber length
 AnyVar LfbarTemp = .FiberLengthScalePelvis*(4.5/100); // Optimum fiber length
Lfbar=LfbarTemp;
  Lt0 = (3/100); // Tendon slack length
  Gammabar = 15.9*(3.14/180); // Pennation angle in radian
  Epsilonbar = 0.053; // Tendon strain at F0
  K1 = 10; // Factor for determining shortening speed at optimum length
  K2 = 0; // Factor for determining shortening speed at optimum length
  Fcfast = 0.4; // Factor for determining shortening speed at optimum length
  Jt = 3.0; // Shape parameter for the tendon stiffness
  Jpe = 3.0; // Shape parameter for the parallel stiffness
  PEFactor = 2.0; // Parameter for influence of parallel stiffness
AnyVar MusLengthUnScaled=0.15151706;
AnyVar LengthDifference=MusLengthUnScaled-Lt0-Lfbar*cos(Gammabar);
};

AnyMuscleModel3E GluteusMediusPosterior6Par = {
  F0 = .StrengthScalePelvis*.PCSAfactor*60.8/6; // Maximum force output at optimum fiber length
 AnyVar LfbarTemp = .FiberLengthScalePelvis*(4.5/100); // Optimum fiber length
Lfbar=LfbarTemp;
  Lt0 = (3/100); // Tendon slack length
  Gammabar = 15.9*(3.14/180); // Pennation angle in radian
  Epsilonbar = 0.053; // Tendon strain at F0
  K1 = 10; // Factor for determining shortening speed at optimum length
  K2 = 0; // Factor for determining shortening speed at optimum length
  Fcfast = 0.4; // Factor for determining shortening speed at optimum length
  Jt = 3.0; // Shape parameter for the tendon stiffness
  Jpe = 3.0; // Shape parameter for the parallel stiffness
  PEFactor = 2.0; // Parameter for influence of parallel stiffness
AnyVar MusLengthUnScaled=0.148898927;
AnyVar LengthDifference=MusLengthUnScaled-Lt0-Lfbar*cos(Gammabar);
};

AnyMuscleModel3E GluteusMaximusInferior1Par = {
  F0 = .StrengthScaleThigh*.PCSAfactor*22.5/6; // Maximum force output at optimum fiber length
 AnyVar LfbarTemp = .FiberLengthScaleThigh*(15.1/100); // Optimum fiber length
Lfbar=LfbarTemp;
  Lt0 = (0.001); // Tendon slack length
  Gammabar = 0*(3.14/180); // Pennation angle in radian
  Epsilonbar = 0.053; // Tendon strain at F0
  K1 = 10; // Factor for determining shortening speed at optimum length
  K2 = 0; // Factor for determining shortening speed at optimum length
  Fcfast = 0.4; // Factor for determining shortening speed at optimum length
  Jt = 3.0; // Shape parameter for the tendon stiffness
  Jpe = 3.0; // Shape parameter for the parallel stiffness
  PEFactor = 5.0; // Parameter for influence of parallel stiffness
AnyVar MusLengthUnScaled=0.188376108;
AnyVar LengthDifference=MusLengthUnScaled-Lt0-Lfbar*cos(Gammabar);
};

AnyMuscleModel3E GluteusMaximusInferior2Par = {
  F0 = .StrengthScaleThigh*.PCSAfactor*22.5/6; // Maximum force output at optimum fiber length
 AnyVar LfbarTemp = .FiberLengthScaleThigh*(15.1/100); // Optimum fiber length
Lfbar=LfbarTemp;
  Lt0 = (0.001); // Tendon slack length
  Gammabar = 0*(3.14/180); // Pennation angle in radian
  Epsilonbar = 0.053; // Tendon strain at F0
  K1 = 10; // Factor for determining shortening speed at optimum length
  K2 = 0; // Factor for determining shortening speed at optimum length
  Fcfast = 0.4; // Factor for determining shortening speed at optimum length
  Jt = 3.0; // Shape parameter for the tendon stiffness
  Jpe = 3.0; // Shape parameter for the parallel stiffness
  PEFactor = 5.0; // Parameter for influence of parallel stiffness
AnyVar MusLengthUnScaled=0.184329324;
AnyVar LengthDifference=MusLengthUnScaled-Lt0-Lfbar*cos(Gammabar);
};

AnyMuscleModel3E GluteusMaximusInferior3Par = {
  F0 = .StrengthScaleThigh*.PCSAfactor*22.5/6; // Maximum force output at optimum fiber length
 AnyVar LfbarTemp = .FiberLengthScaleThigh*(15.1/100); // Optimum fiber length
Lfbar=LfbarTemp;
  Lt0 = (0.001); // Tendon slack length
  Gammabar = 0*(3.14/180); // Pennation angle in radian
  Epsilonbar = 0.053; // Tendon strain at F0
  K1 = 10; // Factor for determining shortening speed at optimum length
  K2 = 0; // Factor for determining shortening speed at optimum length
  Fcfast = 0.4; // Factor for determining shortening speed at optimum length
  Jt = 3.0; // Shape parameter for the tendon stiffness
  Jpe = 3.0; // Shape parameter for the parallel stiffness
  PEFactor = 5.0; // Parameter for influence of parallel stiffness
AnyVar MusLengthUnScaled=0.186872773;
AnyVar LengthDifference=MusLengthUnScaled-Lt0-Lfbar*cos(Gammabar);
};

AnyMuscleModel3E GluteusMaximusInferior4Par = {
  F0 = .StrengthScaleThigh*.PCSAfactor*22.5/6; // Maximum force output at optimum fiber length
 AnyVar LfbarTemp = .FiberLengthScaleThigh*(15.1/100); // Optimum fiber length
Lfbar=LfbarTemp;
  Lt0 = (0.001); // Tendon slack length
  Gammabar = 0*(3.14/180); // Pennation angle in radian
  Epsilonbar = 0.053; // Tendon strain at F0
  K1 = 10; // Factor for determining shortening speed at optimum length
  K2 = 0; // Factor for determining shortening speed at optimum length
  Fcfast = 0.4; // Factor for determining shortening speed at optimum length
  Jt = 3.0; // Shape parameter for the tendon stiffness
  Jpe = 3.0; // Shape parameter for the parallel stiffness
  PEFactor = 5.0; // Parameter for influence of parallel stiffness
AnyVar MusLengthUnScaled=0.183081371;
AnyVar LengthDifference=MusLengthUnScaled-Lt0-Lfbar*cos(Gammabar);
};

AnyMuscleModel3E GluteusMaximusInferior5Par = {
  F0 = .StrengthScaleThigh*.PCSAfactor*22.5/6; // Maximum force output at optimum fiber length
 AnyVar LfbarTemp = .FiberLengthScaleThigh*(15.1/100); // Optimum fiber length
Lfbar=LfbarTemp;
  Lt0 = (0.001); // Tendon slack length
  Gammabar = 0*(3.14/180); // Pennation angle in radian
  Epsilonbar = 0.053; // Tendon strain at F0
  K1 = 10; // Factor for determining shortening speed at optimum length
  K2 = 0; // Factor for determining shortening speed at optimum length
  Fcfast = 0.4; // Factor for determining shortening speed at optimum length
  Jt = 3.0; // Shape parameter for the tendon stiffness
  Jpe = 3.0; // Shape parameter for the parallel stiffness
  PEFactor = 5.0; // Parameter for influence of parallel stiffness
AnyVar MusLengthUnScaled=0.179403017;
AnyVar LengthDifference=MusLengthUnScaled-Lt0-Lfbar*cos(Gammabar);
};

AnyMuscleModel3E GluteusMaximusInferior6Par = {
  F0 = .StrengthScaleThigh*.PCSAfactor*22.5/6; // Maximum force output at optimum fiber length
 AnyVar LfbarTemp = .FiberLengthScaleThigh*(15.1/100); // Optimum fiber length
Lfbar=LfbarTemp;
  Lt0 = (0.001); // Tendon slack length
  Gammabar = 0*(3.14/180); // Pennation angle in radian
  Epsilonbar = 0.053; // Tendon strain at F0
  K1 = 10; // Factor for determining shortening speed at optimum length
  K2 = 0; // Factor for determining shortening speed at optimum length
  Fcfast = 0.4; // Factor for determining shortening speed at optimum length
  Jt = 3.0; // Shape parameter for the tendon stiffness
  Jpe = 3.0; // Shape parameter for the parallel stiffness
  PEFactor = 5.0; // Parameter for influence of parallel stiffness
AnyVar MusLengthUnScaled=0.183167714;
AnyVar LengthDifference=MusLengthUnScaled-Lt0-Lfbar*cos(Gammabar);
};

AnyMuscleModel3E GluteusMaximusSuperior1Par = {
  F0 = .StrengthScaleThigh*.PCSAfactor*49.7/6; // Maximum force output at optimum fiber length
 AnyVar LfbarTemp = .FiberLengthScaleThigh*(12/100); // Optimum fiber length
Lfbar=LfbarTemp;
  Lt0 = (0.001); // Tendon slack length
  Gammabar = 0*(3.14/180); // Pennation angle in radian
  Epsilonbar = 0.053; // Tendon strain at F0
  K1 = 10; // Factor for determining shortening speed at optimum length
  K2 = 0; // Factor for determining shortening speed at optimum length
  Fcfast = 0.4; // Factor for determining shortening speed at optimum length
  Jt = 3.0; // Shape parameter for the tendon stiffness
  Jpe = 3.0; // Shape parameter for the parallel stiffness
  PEFactor = 5.0; // Parameter for influence of parallel stiffness
AnyVar MusLengthUnScaled=0.190976227;
AnyVar LengthDifference=MusLengthUnScaled-Lt0-Lfbar*cos(Gammabar);
};

AnyMuscleModel3E GluteusMaximusSuperior2Par = {
  F0 = .StrengthScaleThigh*.PCSAfactor*49.7/6; // Maximum force output at optimum fiber length
 AnyVar LfbarTemp = .FiberLengthScaleThigh*(12/100); // Optimum fiber length
Lfbar=LfbarTemp;
  Lt0 = (0.001); // Tendon slack length
  Gammabar = 0*(3.14/180); // Pennation angle in radian
  Epsilonbar = 0.053; // Tendon strain at F0
  K1 = 10; // Factor for determining shortening speed at optimum length
  K2 = 0; // Factor for determining shortening speed at optimum length
  Fcfast = 0.4; // Factor for determining shortening speed at optimum length
  Jt = 3.0; // Shape parameter for the tendon stiffness
  Jpe = 3.0; // Shape parameter for the parallel stiffness
  PEFactor = 5.0; // Parameter for influence of parallel stiffness
AnyVar MusLengthUnScaled=0.196985275;
AnyVar LengthDifference=MusLengthUnScaled-Lt0-Lfbar*cos(Gammabar);
};

AnyMuscleModel3E GluteusMaximusSuperior3Par = {
  F0 = .StrengthScaleThigh*.PCSAfactor*49.7/6; // Maximum force output at optimum fiber length
 AnyVar LfbarTemp = .FiberLengthScaleThigh*(12/100); // Optimum fiber length
Lfbar=LfbarTemp;
  Lt0 = (0.001); // Tendon slack length
  Gammabar = 0*(3.14/180); // Pennation angle in radian
  Epsilonbar = 0.053; // Tendon strain at F0
  K1 = 10; // Factor for determining shortening speed at optimum length
  K2 = 0; // Factor for determining shortening speed at optimum length
  Fcfast = 0.4; // Factor for determining shortening speed at optimum length
  Jt = 3.0; // Shape parameter for the tendon stiffness
  Jpe = 3.0; // Shape parameter for the parallel stiffness
  PEFactor = 5.0; // Parameter for influence of parallel stiffness
AnyVar MusLengthUnScaled=0.199534055;
AnyVar LengthDifference=MusLengthUnScaled-Lt0-Lfbar*cos(Gammabar);
};

AnyMuscleModel3E GluteusMaximusSuperior4Par = {
  F0 = .StrengthScaleThigh*.PCSAfactor*49.7/6; // Maximum force output at optimum fiber length
 AnyVar LfbarTemp = .FiberLengthScaleThigh*(12/100); // Optimum fiber length
Lfbar=LfbarTemp;
  Lt0 = (0.001); // Tendon slack length
  Gammabar = 0*(3.14/180); // Pennation angle in radian
  Epsilonbar = 0.053; // Tendon strain at F0
  K1 = 10; // Factor for determining shortening speed at optimum length
  K2 = 0; // Factor for determining shortening speed at optimum length
  Fcfast = 0.4; // Factor for determining shortening speed at optimum length
  Jt = 3.0; // Shape parameter for the tendon stiffness
  Jpe = 3.0; // Shape parameter for the parallel stiffness
  PEFactor = 5.0; // Parameter for influence of parallel stiffness
AnyVar MusLengthUnScaled=0.246530947;
AnyVar LengthDifference=MusLengthUnScaled-Lt0-Lfbar*cos(Gammabar);
};

AnyMuscleModel3E GluteusMaximusSuperior5Par = {
  F0 = .StrengthScaleThigh*.PCSAfactor*49.7/6; // Maximum force output at optimum fiber length
 AnyVar LfbarTemp = .FiberLengthScaleThigh*(12/100); // Optimum fiber length
Lfbar=LfbarTemp;
  Lt0 = (0.001); // Tendon slack length
  Gammabar = 0*(3.14/180); // Pennation angle in radian
  Epsilonbar = 0.053; // Tendon strain at F0
  K1 = 10; // Factor for determining shortening speed at optimum length
  K2 = 0; // Factor for determining shortening speed at optimum length
  Fcfast = 0.4; // Factor for determining shortening speed at optimum length
  Jt = 3.0; // Shape parameter for the tendon stiffness
  Jpe = 3.0; // Shape parameter for the parallel stiffness
  PEFactor = 5.0; // Parameter for influence of parallel stiffness
AnyVar MusLengthUnScaled=0.254121026;
AnyVar LengthDifference=MusLengthUnScaled-Lt0-Lfbar*cos(Gammabar);
};
AnyMuscleModel3E GluteusMaximusSuperior6Par = {
  F0 = .StrengthScaleThigh*.PCSAfactor*49.7/6; // Maximum force output at optimum fiber length
 AnyVar LfbarTemp = .FiberLengthScaleThigh*(12/100); // Optimum fiber length
Lfbar=LfbarTemp;
  Lt0 = (0.001); // Tendon slack length
  Gammabar = 0*(3.14/180); // Pennation angle in radian
  Epsilonbar = 0.053; // Tendon strain at F0
  K1 = 10; // Factor for determining shortening speed at optimum length
  K2 = 0; // Factor for determining shortening speed at optimum length
  Fcfast = 0.4; // Factor for determining shortening speed at optimum length
  Jt = 3.0; // Shape parameter for the tendon stiffness
  Jpe = 3.0; // Shape parameter for the parallel stiffness
  PEFactor = 5.0; // Parameter for influence of parallel stiffness
AnyVar MusLengthUnScaled=0.253942821;
AnyVar LengthDifference=MusLengthUnScaled-Lt0-Lfbar*cos(Gammabar);
};

AnyMuscleModel3E TensorFasciaeLatae1Par = {
  F0 = .StrengthScaleThigh*.PCSAfactor*8.8/2; // Maximum force output at optimum fiber length
 AnyVar LfbarTemp = .FiberLengthScaleThigh*(9.5/100); // Optimum fiber length
Lfbar=LfbarTemp;
  Lt0 = (1/100); // Tendon slack length
  Gammabar = 0*(3.14/180); // Pennation angle in radian
  Epsilonbar = 0.053; // Tendon strain at F0
  K1 = 10; // Factor for determining shortening speed at optimum length
  K2 = 0; // Factor for determining shortening speed at optimum length
  Fcfast = 0.4; // Factor for determining shortening speed at optimum length
  Jt = 3.0; // Shape parameter for the tendon stiffness
  Jpe = 3.0; // Shape parameter for the parallel stiffness
  PEFactor = 5.0; // Parameter for influence of parallel stiffness
AnyVar MusLengthUnScaled=0.449514748;
AnyVar LengthDifference=MusLengthUnScaled-Lt0-Lfbar*cos(Gammabar);
};

AnyMuscleModel3E TensorFasciaeLatae2Par = {
  F0 = .StrengthScaleThigh*.PCSAfactor*8.8/2; // Maximum force output at optimum fiber length
 AnyVar LfbarTemp = .FiberLengthScaleThigh*(9.5/100); // Optimum fiber length
Lfbar=LfbarTemp;
  Lt0 = (1/100); // Tendon slack length
  Gammabar = 0*(3.14/180); // Pennation angle in radian
  Epsilonbar = 0.053; // Tendon strain at F0
  K1 = 10; // Factor for determining shortening speed at optimum length
  K2 = 0; // Factor for determining shortening speed at optimum length
  Fcfast = 0.4; // Factor for determining shortening speed at optimum length
  Jt = 3.0; // Shape parameter for the tendon stiffness
  Jpe = 3.0; // Shape parameter for the parallel stiffness
  PEFactor = 5.0; // Parameter for influence of parallel stiffness
AnyVar MusLengthUnScaled=0.460643469;
AnyVar LengthDifference=MusLengthUnScaled-Lt0-Lfbar*cos(Gammabar);
};

AnyMuscleModel3E Piriformis1Par = {
  F0 = .StrengthScalePelvis*.PCSAfactor*8.1; // Maximum force output at optimum fiber length
 AnyVar LfbarTemp = .FiberLengthScalePelvis*(3.9/100); // Optimum fiber length
Lfbar=LfbarTemp;
  Lt0 = (1.6/100); // Tendon slack length
  Gammabar = 0*(3.14/180); // Pennation angle in radian
  Epsilonbar = 0.053; // Tendon strain at F0
  K1 = 10; // Factor for determining shortening speed at optimum length
  K2 = 0; // Factor for determining shortening speed at optimum length
  Fcfast = 0.4; // Factor for determining shortening speed at optimum length
  Jt = 3.0; // Shape parameter for the tendon stiffness
  Jpe = 3.0; // Shape parameter for the parallel stiffness
  PEFactor = 5.0; // Parameter for influence of parallel stiffness
AnyVar MusLengthUnScaled=0.142279817;
AnyVar LengthDifference=MusLengthUnScaled-Lt0-Lfbar*cos(Gammabar);
};


AnyMuscleModel3E AdductorLongus1Par = {
  F0 = .StrengthScaleThigh*.PCSAfactor*15.1/6; // Maximum force output at optimum fiber length
 AnyVar LfbarTemp = .FiberLengthScaleThigh* (10.6/100); // Optimum fiber length
Lfbar=LfbarTemp;
  Lt0 = (0.001); // Tendon slack length
  Gammabar = 0*(3.14/180); // Pennation angle in radian
  Epsilonbar = 0.053; // Tendon strain at F0
  K1 = 10; // Factor for determining shortening speed at optimum length
  K2 = 0; // Factor for determining shortening speed at optimum length
  Fcfast = 0.4; // Factor for determining shortening speed at optimum length
  Jt = 3.0; // Shape parameter for the tendon stiffness
  Jpe = 3.0; // Shape parameter for the parallel stiffness
  PEFactor = 5.0; // Parameter for influence of parallel stiffness
AnyVar MusLengthUnScaled=0.173773369;
AnyVar LengthDifference=MusLengthUnScaled-Lt0-Lfbar*cos(Gammabar);
};

AnyMuscleModel3E AdductorLongus2Par = {
  F0 = .StrengthScaleThigh*.PCSAfactor*15.1/6; // Maximum force output at optimum fiber length
 AnyVar LfbarTemp =  .FiberLengthScaleThigh*(10.6/100); // Optimum fiber length
Lfbar=LfbarTemp;
  Lt0 = (0.001); // Tendon slack length
  Gammabar = 0*(3.14/180); // Pennation angle in radian
  Epsilonbar = 0.053; // Tendon strain at F0
  K1 = 10; // Factor for determining shortening speed at optimum length
  K2 = 0; // Factor for determining shortening speed at optimum length
  Fcfast = 0.4; // Factor for determining shortening speed at optimum length
  Jt = 3.0; // Shape parameter for the tendon stiffness
  Jpe = 3.0; // Shape parameter for the parallel stiffness
  PEFactor = 5.0; // Parameter for influence of parallel stiffness
AnyVar MusLengthUnScaled=0.181984194;
AnyVar LengthDifference=MusLengthUnScaled-Lt0-Lfbar*cos(Gammabar);
};

AnyMuscleModel3E AdductorLongus3Par = {
  F0 = .StrengthScaleThigh*.PCSAfactor*15.1/6; // Maximum force output at optimum fiber length
 AnyVar LfbarTemp =  .FiberLengthScaleThigh*(10.6/100); // Optimum fiber length
Lfbar=LfbarTemp;
  Lt0 = (0.001); // Tendon slack length
  Gammabar = 0*(3.14/180); // Pennation angle in radian
  Epsilonbar = 0.053; // Tendon strain at F0
  K1 = 10; // Factor for determining shortening speed at optimum length
  K2 = 0; // Factor for determining shortening speed at optimum length
  Fcfast = 0.4; // Factor for determining shortening speed at optimum length
  Jt = 3.0; // Shape parameter for the tendon stiffness
  Jpe = 3.0; // Shape parameter for the parallel stiffness
  PEFactor = 5.0; // Parameter for influence of parallel stiffness
AnyVar MusLengthUnScaled=0.191226043;
AnyVar LengthDifference=MusLengthUnScaled-Lt0-Lfbar*cos(Gammabar);
};

AnyMuscleModel3E AdductorLongus4Par = {
  F0 = .StrengthScaleThigh*.PCSAfactor*15.1/6; // Maximum force output at optimum fiber length
 AnyVar LfbarTemp =  .FiberLengthScaleThigh*(10.6/100); // Optimum fiber length
Lfbar=LfbarTemp;
  Lt0 = (0.001); // Tendon slack length
  Gammabar = 0*(3.14/180); // Pennation angle in radian
  Epsilonbar = 0.053; // Tendon strain at F0
  K1 = 10; // Factor for determining shortening speed at optimum length
  K2 = 0; // Factor for determining shortening speed at optimum length
  Fcfast = 0.4; // Factor for determining shortening speed at optimum length
  Jt = 3.0; // Shape parameter for the tendon stiffness
  Jpe = 3.0; // Shape parameter for the parallel stiffness
  PEFactor = 5.0; // Parameter for influence of parallel stiffness
AnyVar MusLengthUnScaled=0.201098094;
AnyVar LengthDifference=MusLengthUnScaled-Lt0-Lfbar*cos(Gammabar);
};

AnyMuscleModel3E AdductorLongus5Par = {
  F0 = .StrengthScaleThigh*.PCSAfactor*15.1/6; // Maximum force output at optimum fiber length
 AnyVar LfbarTemp =  .FiberLengthScaleThigh*(10.6/100); // Optimum fiber length
Lfbar=LfbarTemp;
  Lt0 = (0.001); // Tendon slack length
  Gammabar = 0*(3.14/180); // Pennation angle in radian
  Epsilonbar = 0.053; // Tendon strain at F0
  K1 = 10; // Factor for determining shortening speed at optimum length
  K2 = 0; // Factor for determining shortening speed at optimum length
  Fcfast = 0.4; // Factor for determining shortening speed at optimum length
  Jt = 3.0; // Shape parameter for the tendon stiffness
  Jpe = 3.0; // Shape parameter for the parallel stiffness
  PEFactor = 5.0; // Parameter for influence of parallel stiffness
AnyVar MusLengthUnScaled=0.211324022;
AnyVar LengthDifference=MusLengthUnScaled-Lt0-Lfbar*cos(Gammabar);
};

AnyMuscleModel3E AdductorLongus6Par = {
  F0 = .StrengthScaleThigh*.PCSAfactor*15.1/6; // Maximum force output at optimum fiber length
 AnyVar LfbarTemp =  .FiberLengthScaleThigh*(10.6/100); // Optimum fiber length
Lfbar=LfbarTemp;
  Lt0 = (0.001); // Tendon slack length
  Gammabar = 0*(3.14/180); // Pennation angle in radian
  Epsilonbar = 0.053; // Tendon strain at F0
  K1 = 10; // Factor for determining shortening speed at optimum length
  K2 = 0; // Factor for determining shortening speed at optimum length
  Fcfast = 0.4; // Factor for determining shortening speed at optimum length
  Jt = 3.0; // Shape parameter for the tendon stiffness
  Jpe = 3.0; // Shape parameter for the parallel stiffness
  PEFactor = 5.0; // Parameter for influence of parallel stiffness
AnyVar MusLengthUnScaled=0.221835563;
AnyVar LengthDifference=MusLengthUnScaled-Lt0-Lfbar*cos(Gammabar);
};

AnyMuscleModel3E AdductorMagnusDistal1Par = {
  F0 = .StrengthScaleThigh*.PCSAfactor*26.5/3; // Maximum force output at optimum fiber length
 AnyVar LfbarTemp = .FiberLengthScaleThigh* (10.8/100); // Optimum fiber length
Lfbar=LfbarTemp;
  Lt0 = (4.2/100); // Tendon slack length
  Gammabar = 0*(3.14/180); // Pennation angle in radian
  Epsilonbar = 0.053; // Tendon strain at F0
  K1 = 10; // Factor for determining shortening speed at optimum length
  K2 = 0; // Factor for determining shortening speed at optimum length
  Fcfast = 0.4; // Factor for determining shortening speed at optimum length
  Jt = 3.0; // Shape parameter for the tendon stiffness
  Jpe = 3.0; // Shape parameter for the parallel stiffness
  PEFactor = 5.0; // Parameter for influence of parallel stiffness
AnyVar MusLengthUnScaled=0.315859348;
AnyVar LengthDifference=MusLengthUnScaled-Lt0-Lfbar*cos(Gammabar);
};

AnyMuscleModel3E AdductorMagnusDistal2Par = {
  F0 = .StrengthScaleThigh*.PCSAfactor*26.5/3; // Maximum force output at optimum fiber length
 AnyVar LfbarTemp = .FiberLengthScaleThigh* (10.8/100); // Optimum fiber length
Lfbar=LfbarTemp;
  Lt0 = (4.2/100); // Tendon slack length
  Gammabar = 0*(3.14/180); // Pennation angle in radian
  Epsilonbar = 0.053; // Tendon strain at F0
  K1 = 10; // Factor for determining shortening speed at optimum length
  K2 = 0; // Factor for determining shortening speed at optimum length
  Fcfast = 0.4; // Factor for determining shortening speed at optimum length
  Jt = 3.0; // Shape parameter for the tendon stiffness
  Jpe = 3.0; // Shape parameter for the parallel stiffness
  PEFactor = 5.0; // Parameter for influence of parallel stiffness
AnyVar MusLengthUnScaled=0.316800114;
AnyVar LengthDifference=MusLengthUnScaled-Lt0-Lfbar*cos(Gammabar);
};

AnyMuscleModel3E AdductorMagnusDistal3Par = {
  F0 = .StrengthScaleThigh*.PCSAfactor*26.5/3; // Maximum force output at optimum fiber length
 AnyVar LfbarTemp =  .FiberLengthScaleThigh*(10.8/100); // Optimum fiber length
Lfbar=LfbarTemp;
  Lt0 = (4.2/100); // Tendon slack length
  Gammabar = 0*(3.14/180); // Pennation angle in radian
  Epsilonbar = 0.053; // Tendon strain at F0
  K1 = 10; // Factor for determining shortening speed at optimum length
  K2 = 0; // Factor for determining shortening speed at optimum length
  Fcfast = 0.4; // Factor for determining shortening speed at optimum length
  Jt = 3.0; // Shape parameter for the tendon stiffness
  Jpe = 3.0; // Shape parameter for the parallel stiffness
  PEFactor = 5.0; // Parameter for influence of parallel stiffness
AnyVar MusLengthUnScaled=0.318477974;
AnyVar LengthDifference=MusLengthUnScaled-Lt0-Lfbar*cos(Gammabar);
};

AnyMuscleModel3E AdductorMagnusMid1Par = {
  F0 =.StrengthScaleThigh* .PCSAfactor*22.1/6; // Maximum force output at optimum fiber length
 AnyVar LfbarTemp = .FiberLengthScaleThigh* (10.4/100); // Optimum fiber length
Lfbar=LfbarTemp;
  Lt0 = (0.001); // Tendon slack length
  Gammabar = 0*(3.14/180); // Pennation angle in radian
  Epsilonbar = 0.053; // Tendon strain at F0
  K1 = 10; // Factor for determining shortening speed at optimum length
  K2 = 0; // Factor for determining shortening speed at optimum length
  Fcfast = 0.4; // Factor for determining shortening speed at optimum length
  Jt = 3.0; // Shape parameter for the tendon stiffness
  Jpe = 3.0; // Shape parameter for the parallel stiffness
  PEFactor = 5.0; // Parameter for influence of parallel stiffness
AnyVar MusLengthUnScaled=0.177526476;
AnyVar LengthDifference=MusLengthUnScaled-Lt0-Lfbar*cos(Gammabar);
};

AnyMuscleModel3E AdductorMagnusMid2Par = {
  F0 = .StrengthScaleThigh*.PCSAfactor*22.1/6; // Maximum force output at optimum fiber length
 AnyVar LfbarTemp = .FiberLengthScaleThigh* (10.4/100); // Optimum fiber length
Lfbar=LfbarTemp;
  Lt0 = (0.001); // Tendon slack length
  Gammabar = 0*(3.14/180); // Pennation angle in radian
  Epsilonbar = 0.053; // Tendon strain at F0
  K1 = 10; // Factor for determining shortening speed at optimum length
  K2 = 0; // Factor for determining shortening speed at optimum length
  Fcfast = 0.4; // Factor for determining shortening speed at optimum length
  Jt = 3.0; // Shape parameter for the tendon stiffness
  Jpe = 3.0; // Shape parameter for the parallel stiffness
  PEFactor = 5.0; // Parameter for influence of parallel stiffness
AnyVar MusLengthUnScaled=0.175286735;
AnyVar LengthDifference=MusLengthUnScaled-Lt0-Lfbar*cos(Gammabar);
};

AnyMuscleModel3E AdductorMagnusMid3Par = {
  F0 = .StrengthScaleThigh*.PCSAfactor*22.1/6; // Maximum force output at optimum fiber length
 AnyVar LfbarTemp = .FiberLengthScaleThigh* (10.4/100); // Optimum fiber length
Lfbar=LfbarTemp;
  Lt0 = (0.001); // Tendon slack length
  Gammabar = 0*(3.14/180); // Pennation angle in radian
  Epsilonbar = 0.053; // Tendon strain at F0
  K1 = 10; // Factor for determining shortening speed at optimum length
  K2 = 0; // Factor for determining shortening speed at optimum length
  Fcfast = 0.4; // Factor for determining shortening speed at optimum length
  Jt = 3.0; // Shape parameter for the tendon stiffness
  Jpe = 3.0; // Shape parameter for the parallel stiffness
  PEFactor = 5.0; // Parameter for influence of parallel stiffness
AnyVar MusLengthUnScaled=0.203238132;
AnyVar LengthDifference=MusLengthUnScaled-Lt0-Lfbar*cos(Gammabar);
};

AnyMuscleModel3E AdductorMagnusMid4Par = {
  F0 = .StrengthScaleThigh*.PCSAfactor*22.1/6; // Maximum force output at optimum fiber length
 AnyVar LfbarTemp =  .FiberLengthScaleThigh*(10.4/100); // Optimum fiber length
Lfbar=LfbarTemp;
  Lt0 = (0.001); // Tendon slack length
  Gammabar = 0*(3.14/180); // Pennation angle in radian
  Epsilonbar = 0.053; // Tendon strain at F0
  K1 = 10; // Factor for determining shortening speed at optimum length
  K2 = 0; // Factor for determining shortening speed at optimum length
  Fcfast = 0.4; // Factor for determining shortening speed at optimum length
  Jt = 3.0; // Shape parameter for the tendon stiffness
  Jpe = 3.0; // Shape parameter for the parallel stiffness
  PEFactor = 5.0; // Parameter for influence of parallel stiffness
AnyVar MusLengthUnScaled=0.201684968;
AnyVar LengthDifference=MusLengthUnScaled-Lt0-Lfbar*cos(Gammabar);
};

AnyMuscleModel3E AdductorMagnusMid5Par = {
  F0 = .StrengthScaleThigh*.PCSAfactor*22.1/6; // Maximum force output at optimum fiber length
 AnyVar LfbarTemp =  .FiberLengthScaleThigh*(10.4/100); // Optimum fiber length
Lfbar=LfbarTemp;
  Lt0 = (0.001); // Tendon slack length
  Gammabar = 0*(3.14/180); // Pennation angle in radian
  Epsilonbar = 0.053; // Tendon strain at F0
  K1 = 10; // Factor for determining shortening speed at optimum length
  K2 = 0; // Factor for determining shortening speed at optimum length
  Fcfast = 0.4; // Factor for determining shortening speed at optimum length
  Jt = 3.0; // Shape parameter for the tendon stiffness
  Jpe = 3.0; // Shape parameter for the parallel stiffness
  PEFactor = 5.0; // Parameter for influence of parallel stiffness
AnyVar MusLengthUnScaled=0.23205258;
AnyVar LengthDifference=MusLengthUnScaled-Lt0-Lfbar*cos(Gammabar);
};

AnyMuscleModel3E AdductorMagnusMid6Par = {
  F0 = .StrengthScaleThigh*.PCSAfactor*22.1/6; // Maximum force output at optimum fiber length
 AnyVar LfbarTemp =  .FiberLengthScaleThigh*(10.4/100); // Optimum fiber length
Lfbar=LfbarTemp;
  Lt0 = (0.001); // Tendon slack length
  Gammabar = 0*(3.14/180); // Pennation angle in radian
  Epsilonbar = 0.053; // Tendon strain at F0
  K1 = 10; // Factor for determining shortening speed at optimum length
  K2 = 0; // Factor for determining shortening speed at optimum length
  Fcfast = 0.4; // Factor for determining shortening speed at optimum length
  Jt = 3.0; // Shape parameter for the tendon stiffness
  Jpe = 3.0; // Shape parameter for the parallel stiffness
  PEFactor = 5.0; // Parameter for influence of parallel stiffness
AnyVar MusLengthUnScaled=0.231133031;
AnyVar LengthDifference=MusLengthUnScaled-Lt0-Lfbar*cos(Gammabar);
};

AnyMuscleModel3E AdductorMagnusProximal1Par = {
  F0 = .StrengthScaleThigh*.PCSAfactor*5/4; // Maximum force output at optimum fiber length
 //AnyVar LfbarTemp = .FiberLengthScaleThigh* (10.7/100); // Optimum fiber length, ORIGINAL DATA
 AnyVar LfbarTemp = .FiberLengthScaleThigh* (8.7/100); // Optimum fiber length, reduced because too long compared to MusLengthUnScaled
Lfbar=LfbarTemp;
  Lt0 = (0.001); // Tendon slack length
  Gammabar = 0*(3.14/180); // Pennation angle in radian
  Epsilonbar = 0.053; // Tendon strain at F0
  K1 = 10; // Factor for determining shortening speed at optimum length
  K2 = 0; // Factor for determining shortening speed at optimum length
  Fcfast = 0.4; // Factor for determining shortening speed at optimum length
  Jt = 3.0; // Shape parameter for the tendon stiffness
  Jpe = 3.0; // Shape parameter for the parallel stiffness
  PEFactor = 5.0; // Parameter for influence of parallel stiffness
AnyVar MusLengthUnScaled=0.114782818;
AnyVar LengthDifference=MusLengthUnScaled-Lt0-Lfbar*cos(Gammabar);
};

AnyMuscleModel3E AdductorMagnusProximal2Par = {
  F0 = .StrengthScaleThigh*.PCSAfactor*5/4; // Maximum force output at optimum fiber length
 //AnyVar LfbarTemp = .FiberLengthScaleThigh* (10.7/100); // Optimum fiber length, ORIGINAL DATA
 AnyVar LfbarTemp = .FiberLengthScaleThigh* (8.7/100); // Optimum fiber length, reduced because too long compared to MusLengthUnScaled
Lfbar=LfbarTemp;
  Lt0 = (0.001); // Tendon slack length
  Gammabar = 0*(3.14/180); // Pennation angle in radian
  Epsilonbar = 0.053; // Tendon strain at F0
  K1 = 10; // Factor for determining shortening speed at optimum length
  K2 = 0; // Factor for determining shortening speed at optimum length
  Fcfast = 0.4; // Factor for determining shortening speed at optimum length
  Jt = 3.0; // Shape parameter for the tendon stiffness
  Jpe = 3.0; // Shape parameter for the parallel stiffness
  PEFactor = 5.0; // Parameter for influence of parallel stiffness
AnyVar MusLengthUnScaled=0.118273967;
AnyVar LengthDifference=MusLengthUnScaled-Lt0-Lfbar*cos(Gammabar);
};

AnyMuscleModel3E AdductorMagnusProximal3Par = {
  F0 = .StrengthScaleThigh*.PCSAfactor*5/4; // Maximum force output at optimum fiber length
 AnyVar LfbarTemp =  .FiberLengthScaleThigh*(10.7/100); // Optimum fiber length
Lfbar=LfbarTemp;
  Lt0 = (0.001); // Tendon slack length
  Gammabar = 0*(3.14/180); // Pennation angle in radian
  Epsilonbar = 0.053; // Tendon strain at F0
  K1 = 10; // Factor for determining shortening speed at optimum length
  K2 = 0; // Factor for determining shortening speed at optimum length
  Fcfast = 0.4; // Factor for determining shortening speed at optimum length
  Jt = 3.0; // Shape parameter for the tendon stiffness
  Jpe = 3.0; // Shape parameter for the parallel stiffness
  PEFactor = 5.0; // Parameter for influence of parallel stiffness
AnyVar MusLengthUnScaled=0.135080578;
AnyVar LengthDifference=MusLengthUnScaled-Lt0-Lfbar*cos(Gammabar);
};

AnyMuscleModel3E AdductorMagnusProximal4Par = {
  F0 = .StrengthScaleThigh*.PCSAfactor*5/4; // Maximum force output at optimum fiber length
 AnyVar LfbarTemp = .FiberLengthScaleThigh*(10.7/100); // Optimum fiber length
Lfbar=LfbarTemp;
  Lt0 = (0.001); // Tendon slack length
  Gammabar = 0*(3.14/180); // Pennation angle in radian
  Epsilonbar = 0.053; // Tendon strain at F0
  K1 = 10; // Factor for determining shortening speed at optimum length
  K2 = 0; // Factor for determining shortening speed at optimum length
  Fcfast = 0.4; // Factor for determining shortening speed at optimum length
  Jt = 3.0; // Shape parameter for the tendon stiffness
  Jpe = 3.0; // Shape parameter for the parallel stiffness
  PEFactor = 5.0; // Parameter for influence of parallel stiffness
AnyVar MusLengthUnScaled=0.153464025;
AnyVar LengthDifference=MusLengthUnScaled-Lt0-Lfbar*cos(Gammabar);
};


//Description of muscles that are new in the model:


AnyMuscleModel3E AdductorBrevisProximal1Par = {
  F0 = .StrengthScalePelvis*.PCSAfactor*3.8/2; // Maximum force output at optimum fiber length
 AnyVar LfbarTemp =.FiberLengthScalePelvis* (9.5/100); // Optimum fiber length
Lfbar=LfbarTemp;
  Lt0 = (0.001); // Tendon slack length
  Gammabar = 0*(3.14/180); // Pennation angle in radian
  Epsilonbar = 0.053; // Tendon strain at F0
  K1 = 10; // Factor for determining shortening speed at optimum length
  K2 = 0; // Factor for determining shortening speed at optimum length
  Fcfast = 0.4; // Factor for determining shortening speed at optimum length
  Jt = 3.0; // Shape parameter for the tendon stiffness
  Jpe = 3.0; // Shape parameter for the parallel stiffness
  PEFactor = 5.0; // Parameter for influence of parallel stiffness
AnyVar MusLengthUnScaled=0.123751007;
AnyVar LengthDifference=MusLengthUnScaled-Lt0-Lfbar*cos(Gammabar);
};

AnyMuscleModel3E AdductorBrevisProximal2Par = {
  F0 = .StrengthScalePelvis*.PCSAfactor*3.8/2; // Maximum force output at optimum fiber length
 AnyVar LfbarTemp = .FiberLengthScalePelvis*(9.5/100); // Optimum fiber length
Lfbar=LfbarTemp;
  Lt0 = (0.001); // Tendon slack length
  Gammabar = 0*(3.14/180); // Pennation angle in radian
  Epsilonbar = 0.053; // Tendon strain at F0
  K1 = 10; // Factor for determining shortening speed at optimum length
  K2 = 0; // Factor for determining shortening speed at optimum length
  Fcfast = 0.4; // Factor for determining shortening speed at optimum length
  Jt = 3.0; // Shape parameter for the tendon stiffness
  Jpe = 3.0; // Shape parameter for the parallel stiffness
  PEFactor = 5.0; // Parameter for influence of parallel stiffness
AnyVar MusLengthUnScaled=0.129216224;
AnyVar LengthDifference=MusLengthUnScaled-Lt0-Lfbar*cos(Gammabar);
};


AnyMuscleModel3E AdductorBrevisMid3Par = {
  F0 = .StrengthScalePelvis*.PCSAfactor*3.5/2; // Maximum force output at optimum fiber length
 AnyVar LfbarTemp = .FiberLengthScalePelvis*(10.4/100); // Optimum fiber length
Lfbar=LfbarTemp;
  Lt0 = (0.001); // Tendon slack length
  Gammabar = 0*(3.14/180); // Pennation angle in radian
  Epsilonbar = 0.053; // Tendon strain at F0
  K1 = 10; // Factor for determining shortening speed at optimum length
  K2 = 0; // Factor for determining shortening speed at optimum length
  Fcfast = 0.4; // Factor for determining shortening speed at optimum length
  Jt = 3.0; // Shape parameter for the tendon stiffness
  Jpe = 3.0; // Shape parameter for the parallel stiffness
  PEFactor = 5.0; // Parameter for influence of parallel stiffness
AnyVar MusLengthUnScaled=0.134714879;
AnyVar LengthDifference=MusLengthUnScaled-Lt0-Lfbar*cos(Gammabar);
};

AnyMuscleModel3E AdductorBrevisMid4Par = {
  F0 = .StrengthScalePelvis*.PCSAfactor*3.5/2; // Maximum force output at optimum fiber length
 AnyVar LfbarTemp = .FiberLengthScalePelvis*(10.4/100); // Optimum fiber length
Lfbar=LfbarTemp;
  Lt0 = (0.001); // Tendon slack length
  Gammabar = 0*(3.14/180); // Pennation angle in radian
  Epsilonbar = 0.053; // Tendon strain at F0
  K1 = 10; // Factor for determining shortening speed at optimum length
  K2 = 0; // Factor for determining shortening speed at optimum length
  Fcfast = 0.4; // Factor for determining shortening speed at optimum length
  Jt = 3.0; // Shape parameter for the tendon stiffness
  Jpe = 3.0; // Shape parameter for the parallel stiffness
  PEFactor = 5.0; // Parameter for influence of parallel stiffness
AnyVar MusLengthUnScaled=0.142649038;
AnyVar LengthDifference=MusLengthUnScaled-Lt0-Lfbar*cos(Gammabar);
};

AnyMuscleModel3E AdductorBrevisDistal5Par = {
  F0 = .StrengthScalePelvis*.PCSAfactor*3.2/2; // Maximum force output at optimum fiber length
 AnyVar LfbarTemp =.FiberLengthScalePelvis* (11.2/100); // Optimum fiber length
Lfbar=LfbarTemp;
  Lt0 = (0.001); // Tendon slack length
  Gammabar = 0*(3.14/180); // Pennation angle in radian
  Epsilonbar = 0.053; // Tendon strain at F0
  K1 = 10; // Factor for determining shortening speed at optimum length
  K2 = 0; // Factor for determining shortening speed at optimum length
  Fcfast = 0.4; // Factor for determining shortening speed at optimum length
  Jt = 3.0; // Shape parameter for the tendon stiffness
  Jpe = 3.0; // Shape parameter for the parallel stiffness
  PEFactor = 5.0; // Parameter for influence of parallel stiffness

AnyVar MusLengthUnScaled=0.148957127;
AnyVar LengthDifference=MusLengthUnScaled-Lt0-Lfbar*cos(Gammabar);
};
AnyMuscleModel3E AdductorBrevisDistal6Par = {
  F0 = .StrengthScalePelvis*.PCSAfactor*3.2/2; // Maximum force output at optimum fiber length
 AnyVar LfbarTemp =.FiberLengthScalePelvis* (11.2/100); // Optimum fiber length
Lfbar=LfbarTemp;
  Lt0 = (0.001); // Tendon slack length
  Gammabar = 0*(3.14/180); // Pennation angle in radian
  Epsilonbar = 0.053; // Tendon strain at F0
  K1 = 10; // Factor for determining shortening speed at optimum length
  K2 = 0; // Factor for determining shortening speed at optimum length
  Fcfast = 0.4; // Factor for determining shortening speed at optimum length
  Jt = 3.0; // Shape parameter for the tendon stiffness
  Jpe = 3.0; // Shape parameter for the parallel stiffness
  PEFactor = 5.0; // Parameter for influence of parallel stiffness
AnyVar MusLengthUnScaled=0.156151728;
AnyVar LengthDifference=MusLengthUnScaled-Lt0-Lfbar*cos(Gammabar);
};

AnyMuscleModel3E GemellusInferior1Par = {
  F0 = .StrengthScalePelvis*.PCSAfactor*4.1; // Maximum force output at optimum fiber length
 AnyVar LfbarTemp = .FiberLengthScalePelvis*(3.4/100); // Optimum fiber length
Lfbar=LfbarTemp;
  Lt0 = (0.001); // Tendon slack length
  Gammabar = 0*(3.14/180); // Pennation angle in radian
  Epsilonbar = 0.053; // Tendon strain at F0
  K1 = 10; // Factor for determining shortening speed at optimum length
  K2 = 0; // Factor for determining shortening speed at optimum length
  Fcfast = 0.4; // Factor for determining shortening speed at optimum length
  Jt = 3.0; // Shape parameter for the tendon stiffness
  Jpe = 3.0; // Shape parameter for the parallel stiffness
  PEFactor = 5.0; // Parameter for influence of parallel stiffness
AnyVar MusLengthUnScaled=0.110641801;
AnyVar LengthDifference=MusLengthUnScaled-Lt0-Lfbar*cos(Gammabar);
};

AnyMuscleModel3E GemellusSuperior1Par = {
  F0 = .StrengthScalePelvis*.PCSAfactor*4.1; // Maximum force output at optimum fiber length
 AnyVar LfbarTemp = .FiberLengthScalePelvis*(3.4/100); // Optimum fiber length
Lfbar=LfbarTemp;
  Lt0 = (0.001); // Tendon slack length
  Gammabar = 0*(3.14/180); // Pennation angle in radian
  Epsilonbar = 0.053; // Tendon strain at F0
  K1 = 10; // Factor for determining shortening speed at optimum length
  K2 = 0; // Factor for determining shortening speed at optimum length
  Fcfast = 0.4; // Factor for determining shortening speed at optimum length
  Jt = 3.0; // Shape parameter for the tendon stiffness
  Jpe = 3.0; // Shape parameter for the parallel stiffness
  PEFactor = 5.0; // Parameter for influence of parallel stiffness
AnyVar MusLengthUnScaled=0.108774321;
AnyVar LengthDifference=MusLengthUnScaled-Lt0-Lfbar*cos(Gammabar);
};

AnyMuscleModel3E ObturatorExternusInferior1Par = {
  F0 = .StrengthScalePelvis*.PCSAfactor*5.5/2; // Maximum force output at optimum fiber length
 AnyVar LfbarTemp = .FiberLengthScalePelvis*(6.9/100); // Optimum fiber length
Lfbar=LfbarTemp;
  Lt0 = (3.5/100); // Tendon slack length
  Gammabar = 0*(3.14/180); // Pennation angle in radian
  Epsilonbar = 0.053; // Tendon strain at F0
  K1 = 10; // Factor for determining shortening speed at optimum length
  K2 = 0; // Factor for determining shortening speed at optimum length
  Fcfast = 0.4; // Factor for determining shortening speed at optimum length
  Jt = 3.0; // Shape parameter for the tendon stiffness
  Jpe = 3.0; // Shape parameter for the parallel stiffness
  PEFactor = 5.0; // Parameter for influence of parallel stiffness
AnyVar MusLengthUnScaled=0.119510432;
AnyVar LengthDifference=MusLengthUnScaled-Lt0-Lfbar*cos(Gammabar);
};

AnyMuscleModel3E ObturatorExternusInferior2Par = {
  F0 = .StrengthScalePelvis*.PCSAfactor*5.5/2; // Maximum force output at optimum fiber length
 AnyVar LfbarTemp = .FiberLengthScalePelvis*(6.9/100); // Optimum fiber length
Lfbar=LfbarTemp;
  Lt0 = (3.5/100); // Tendon slack length
  Gammabar = 0*(3.14/180); // Pennation angle in radian
  Epsilonbar = 0.053; // Tendon strain at F0
  K1 = 10; // Factor for determining shortening speed at optimum length
  K2 = 0; // Factor for determining shortening speed at optimum length
  Fcfast = 0.4; // Factor for determining shortening speed at optimum length
  Jt = 3.0; // Shape parameter for the tendon stiffness
  Jpe = 3.0; // Shape parameter for the parallel stiffness
  PEFactor = 5.0; // Parameter for influence of parallel stiffness
AnyVar MusLengthUnScaled=0.134899279;
AnyVar LengthDifference=MusLengthUnScaled-Lt0-Lfbar*cos(Gammabar);
};

AnyMuscleModel3E ObturatorExternusSuperior1Par = {
  F0 = .StrengthScalePelvis*.PCSAfactor*24.6/3; // Maximum force output at optimum fiber length
 AnyVar LfbarTemp = .FiberLengthScalePelvis*(2.8/100); // Optimum fiber length
Lfbar=LfbarTemp;
  Lt0 = (3/100); // Tendon slack length
  Gammabar = 0*(3.14/180); // Pennation angle in radian
  Epsilonbar = 0.053; // Tendon strain at F0
  K1 = 10; // Factor for determining shortening speed at optimum length
  K2 = 0; // Factor for determining shortening speed at optimum length
  Fcfast = 0.4; // Factor for determining shortening speed at optimum length
  Jt = 3.0; // Shape parameter for the tendon stiffness
  Jpe = 3.0; // Shape parameter for the parallel stiffness
  PEFactor = 5.0; // Parameter for influence of parallel stiffness
AnyVar MusLengthUnScaled=0.141959671;
AnyVar LengthDifference=MusLengthUnScaled-Lt0-Lfbar*cos(Gammabar);
};

AnyMuscleModel3E ObturatorExternusSuperior2Par = {
  F0 =.StrengthScalePelvis* .PCSAfactor*24.6/3; // Maximum force output at optimum fiber length
 AnyVar LfbarTemp =.FiberLengthScalePelvis* (2.8/100); // Optimum fiber length
Lfbar=LfbarTemp;
  Lt0 = (3/100); // Tendon slack length
  Gammabar = 0*(3.14/180); // Pennation angle in radian
  Epsilonbar = 0.053; // Tendon strain at F0
  K1 = 10; // Factor for determining shortening speed at optimum length
  K2 = 0; // Factor for determining shortening speed at optimum length
  Fcfast = 0.4; // Factor for determining shortening speed at optimum length
  Jt = 3.0; // Shape parameter for the tendon stiffness
  Jpe = 3.0; // Shape parameter for the parallel stiffness
  PEFactor = 5.0; // Parameter for influence of parallel stiffness
AnyVar MusLengthUnScaled=0.128997509;
AnyVar LengthDifference=MusLengthUnScaled-Lt0-Lfbar*cos(Gammabar);
};

AnyMuscleModel3E ObturatorExternusSuperior3Par = {
  F0 = .StrengthScalePelvis*.PCSAfactor*24.6/3; // Maximum force output at optimum fiber length
 AnyVar LfbarTemp = .FiberLengthScalePelvis*(2.8/100); // Optimum fiber length
Lfbar=LfbarTemp;
  Lt0 = (3/100); // Tendon slack length
  Gammabar = 0*(3.14/180); // Pennation angle in radian
  Epsilonbar = 0.053; // Tendon strain at F0
  K1 = 10; // Factor for determining shortening speed at optimum length
  K2 = 0; // Factor for determining shortening speed at optimum length
  Fcfast = 0.4; // Factor for determining shortening speed at optimum length
  Jt = 3.0; // Shape parameter for the tendon stiffness
  Jpe = 3.0; // Shape parameter for the parallel stiffness
  PEFactor = 5.0; // Parameter for influence of parallel stiffness
AnyVar MusLengthUnScaled=0.114594363;
AnyVar LengthDifference=MusLengthUnScaled-Lt0-Lfbar*cos(Gammabar);
};

AnyMuscleModel3E ObturatorInternus1Par = {
  F0 = .StrengthScalePelvis*.PCSAfactor*25.4/3; // Maximum force output at optimum fiber length
 AnyVar LfbarTemp = (2.1/100); // Optimum fiber length
Lfbar=LfbarTemp;
  Lt0 = (8.2/100); // Tendon slack length
  Gammabar = 0*(3.14/180); // Pennation angle in radian
  Epsilonbar = 0.053; // Tendon strain at F0
  K1 = 10; // Factor for determining shortening speed at optimum length
  K2 = 0; // Factor for determining shortening speed at optimum length
  Fcfast = 0.4; // Factor for determining shortening speed at optimum length
  Jt = 3.0; // Shape parameter for the tendon stiffness
  Jpe = 3.0; // Shape parameter for the parallel stiffness
  PEFactor = 5.0; // Parameter for influence of parallel stiffness
AnyVar MusLengthUnScaled=0.167819438;
AnyVar LengthDifference=MusLengthUnScaled-Lt0-Lfbar*cos(Gammabar);
};

AnyMuscleModel3E ObturatorInternus2Par = {
  F0 = .StrengthScalePelvis*.PCSAfactor*25.4/3; // Maximum force output at optimum fiber length
 AnyVar LfbarTemp = .FiberLengthScalePelvis*(2.1/100); // Optimum fiber length
Lfbar=LfbarTemp;
  Lt0 = (8.2/100); // Tendon slack length
  Gammabar = 0*(3.14/180); // Pennation angle in radian
  Epsilonbar = 0.053; // Tendon strain at F0
  K1 = 10; // Factor for determining shortening speed at optimum length
  K2 = 0; // Factor for determining shortening speed at optimum length
  Fcfast = 0.4; // Factor for determining shortening speed at optimum length
  Jt = 3.0; // Shape parameter for the tendon stiffness
  Jpe = 3.0; // Shape parameter for the parallel stiffness
  PEFactor = 5.0; // Parameter for influence of parallel stiffness
AnyVar MusLengthUnScaled=0.156679125;
AnyVar LengthDifference=MusLengthUnScaled-Lt0-Lfbar*cos(Gammabar);
};

  AnyMuscleModel3E ObturatorInternus3Par = {
  F0 = .StrengthScalePelvis*.PCSAfactor*25.4/3; // Maximum force output at optimum fiber length
 AnyVar LfbarTemp = .FiberLengthScalePelvis*(2.1/100); // Optimum fiber length
Lfbar=LfbarTemp;
  Lt0 = (8.2/100); // Tendon slack length
  Gammabar = 0*(3.14/180); // Pennation angle in radian
  Epsilonbar = 0.053; // Tendon strain at F0
  K1 = 10; // Factor for determining shortening speed at optimum length
  K2 = 0; // Factor for determining shortening speed at optimum length
  Fcfast = 0.4; // Factor for determining shortening speed at optimum length
  Jt = 3.0; // Shape parameter for the tendon stiffness
  Jpe = 3.0; // Shape parameter for the parallel stiffness
  PEFactor = 5.0; // Parameter for influence of parallel stiffness
AnyVar MusLengthUnScaled=0.161178281;
AnyVar LengthDifference=MusLengthUnScaled-Lt0-Lfbar*cos(Gammabar);
};

AnyMuscleModel3E Pectineus1Par = {
  F0 = .StrengthScaleThigh*.PCSAfactor*6.8/4; // Maximum force output at optimum fiber length
 //AnyVar LfbarTemp =.FiberLengthScaleThigh* (11.5/100); // Optimum fiber length, ORIGINAL DATA
 AnyVar LfbarTemp =.FiberLengthScaleThigh* (9.5/100); // Optimum fiber length, reduced because too long compared to MusLengthUnScaled
Lfbar=LfbarTemp;
  Lt0 = (0.001); // Tendon slack length
  Gammabar = 0*(3.14/180); // Pennation angle in radian
  Epsilonbar = 0.053; // Tendon strain at F0
  K1 = 10; // Factor for determining shortening speed at optimum length
  K2 = 0; // Factor for determining shortening speed at optimum length
  Fcfast = 0.4; // Factor for determining shortening speed at optimum length
  Jt = 3.0; // Shape parameter for the tendon stiffness
  Jpe = 3.0; // Shape parameter for the parallel stiffness
  PEFactor = 5.0; // Parameter for influence of parallel stiffness
AnyVar MusLengthUnScaled=0.119934635;
AnyVar LengthDifference=MusLengthUnScaled-Lt0-Lfbar*cos(Gammabar);
};

AnyMuscleModel3E Pectineus2Par = {
  F0 = .StrengthScaleThigh*.PCSAfactor*6.8/4; // Maximum force output at optimum fiber length
 //AnyVar LfbarTemp =.FiberLengthScaleThigh* (11.5/100); // Optimum fiber length, ORIGINAL DATA
 AnyVar LfbarTemp =.FiberLengthScaleThigh* (9.5/100); // Optimum fiber length, reduced because too long compared to MusLengthUnScaled
Lfbar=LfbarTemp;
  Lt0 = (0.001); // Tendon slack length
  Gammabar = 0*(3.14/180); // Pennation angle in radian
  Epsilonbar = 0.053; // Tendon strain at F0
  K1 = 10; // Factor for determining shortening speed at optimum length
  K2 = 0; // Factor for determining shortening speed at optimum length
  Fcfast = 0.4; // Factor for determining shortening speed at optimum length
  Jt = 3.0; // Shape parameter for the tendon stiffness
  Jpe = 3.0; // Shape parameter for the parallel stiffness
  PEFactor = 5.0; // Parameter for influence of parallel stiffness
AnyVar MusLengthUnScaled=0.125574608;
AnyVar LengthDifference=MusLengthUnScaled-Lt0-Lfbar*cos(Gammabar);
};

AnyMuscleModel3E Pectineus3Par = {
  F0 = .StrengthScaleThigh*.PCSAfactor*6.8/4; // Maximum force output at optimum fiber length
 //AnyVar LfbarTemp =.FiberLengthScaleThigh* (11.5/100); // Optimum fiber length, ORIGINAL DATA
 AnyVar LfbarTemp =.FiberLengthScaleThigh* (9.5/100); // Optimum fiber length, reduced because too long compared to MusLengthUnScaled
Lfbar=LfbarTemp;
  Lt0 = (0.001); // Tendon slack length
  Gammabar = 0*(3.14/180); // Pennation angle in radian
  Epsilonbar = 0.053; // Tendon strain at F0
  K1 = 10; // Factor for determining shortening speed at optimum length
  K2 = 0; // Factor for determining shortening speed at optimum length
  Fcfast = 0.4; // Factor for determining shortening speed at optimum length
  Jt = 3.0; // Shape parameter for the tendon stiffness
  Jpe = 3.0; // Shape parameter for the parallel stiffness
  PEFactor = 5.0; // Parameter for influence of parallel stiffness
AnyVar MusLengthUnScaled=0.131143049;
AnyVar LengthDifference=MusLengthUnScaled-Lt0-Lfbar*cos(Gammabar);
};

AnyMuscleModel3E Pectineus4Par = {
  F0 = .StrengthScaleThigh*.PCSAfactor*6.8/4; // Maximum force output at optimum fiber length
 //AnyVar LfbarTemp =.FiberLengthScaleThigh* (11.5/100); // Optimum fiber length, ORIGINAL DATA
 AnyVar LfbarTemp =.FiberLengthScaleThigh* (9.5/100); // Optimum fiber length, reduced because too long compared to MusLengthUnScaled
Lfbar=LfbarTemp;
  Lt0 = (0.001); // Tendon slack length
  Gammabar = 0*(3.14/180); // Pennation angle in radian
  Epsilonbar = 0.053; // Tendon strain at F0
  K1 = 10; // Factor for determining shortening speed at optimum length
  K2 = 0; // Factor for determining shortening speed at optimum length
  Fcfast = 0.4; // Factor for determining shortening speed at optimum length
  Jt = 3.0; // Shape parameter for the tendon stiffness
  Jpe = 3.0; // Shape parameter for the parallel stiffness
  PEFactor = 5.0; // Parameter for influence of parallel stiffness
AnyVar MusLengthUnScaled=0.123433089;
AnyVar LengthDifference=MusLengthUnScaled-Lt0-Lfbar*cos(Gammabar);
};

AnyMuscleModel3E Plantaris1Par = {
  F0 = .StrengthScaleShank*.PCSAfactor*2.4; // Maximum force output at optimum fiber length
 AnyVar LfbarTemp =.FiberLengthScaleShank* (4.8/100); // Optimum fiber length
Lfbar=LfbarTemp;
  Lt0 = (12/100); // Tendon slack length
  Gammabar = 0*(3.14/180); // Pennation angle in radian
  Epsilonbar = 0.053; // Tendon strain at F0
  K1 = 10; // Factor for determining shortening speed at optimum length
  K2 = 0; // Factor for determining shortening speed at optimum length
  Fcfast = 0.4; // Factor for determining shortening speed at optimum length
  Jt = 3.0; // Shape parameter for the tendon stiffness
  Jpe = 3.0; // Shape parameter for the parallel stiffness
  PEFactor = 5.0; // Parameter for influence of parallel stiffness
AnyVar MusLengthUnScaled=0.473876514;
AnyVar LengthDifference=MusLengthUnScaled-Lt0-Lfbar*cos(Gammabar);
};

AnyMuscleModel3E Popliteus1Par = {
  F0 = .StrengthScaleShank*.PCSAfactor*10.7/2; // Maximum force output at optimum fiber length
 AnyVar LfbarTemp =.FiberLengthScaleShank* (2.4/100); // Optimum fiber length
Lfbar=LfbarTemp;
  Lt0 = (1/100); // Tendon slack length
  Gammabar = 0*(3.14/180); // Pennation angle in radian
  Epsilonbar = 0.053; // Tendon strain at F0
  K1 = 10; // Factor for determining shortening speed at optimum length
  K2 = 0; // Factor for determining shortening speed at optimum length
  Fcfast = 0.4; // Factor for determining shortening speed at optimum length
  Jt = 3.0; // Shape parameter for the tendon stiffness
  Jpe = 3.0; // Shape parameter for the parallel stiffness
  PEFactor = 5.0; // Parameter for influence of parallel stiffness
AnyVar MusLengthUnScaled=0.155596046;
AnyVar LengthDifference=MusLengthUnScaled-Lt0-Lfbar*cos(Gammabar);
};

AnyMuscleModel3E Popliteus2Par = {
  F0 = .StrengthScaleShank*.PCSAfactor*10.7/2; // Maximum force output at optimum fiber length
 AnyVar LfbarTemp = .FiberLengthScaleShank*(2.4/100); // Optimum fiber length
Lfbar=LfbarTemp;
  Lt0 = (1/100); // Tendon slack length
  Gammabar = 0*(3.14/180); // Pennation angle in radian
  Epsilonbar = 0.053; // Tendon strain at F0
  K1 = 10; // Factor for determining shortening speed at optimum length
  K2 = 0; // Factor for determining shortening speed at optimum length
  Fcfast = 0.4; // Factor for determining shortening speed at optimum length
  Jt = 3.0; // Shape parameter for the tendon stiffness
  Jpe = 3.0; // Shape parameter for the parallel stiffness
  PEFactor = 5.0; // Parameter for influence of parallel stiffness
AnyVar MusLengthUnScaled=0.116902659;
AnyVar LengthDifference=MusLengthUnScaled-Lt0-Lfbar*cos(Gammabar);
};

AnyMuscleModel3E PsoasMinor1Par = {
  F0 =.StrengthScalePelvis* .PCSAfactor*1.1; // Maximum force output at optimum fiber length
 AnyVar LfbarTemp =.FiberLengthScalePelvis* (5.9/100); // Optimum fiber length
Lfbar=LfbarTemp;
  Lt0 = (15.2/100); // Tendon slack length
  Gammabar = 0*(3.14/180); // Pennation angle in radian
  Epsilonbar = 0.053; // Tendon strain at F0
  K1 = 10; // Factor for determining shortening speed at optimum length
  K2 = 0; // Factor for determining shortening speed at optimum length
  Fcfast = 0.4; // Factor for determining shortening speed at optimum length
  Jt = 3.0; // Shape parameter for the tendon stiffness
  Jpe = 3.0; // Shape parameter for the parallel stiffness
  PEFactor = 5.0; // Parameter for influence of parallel stiffness
//AnyVar MusLengthUnScaled=
};

AnyMuscleModel3E PsoasMajor1Par = {
  F0 =.StrengthScalePelvis* .PCSAfactor*19.5/3; // Maximum force output at optimum fiber length
 AnyVar LfbarTemp =.FiberLengthScalePelvis* (9.9/100); // Optimum fiber length
Lfbar=LfbarTemp;
  Lt0 = (11.3/100); // Tendon slack length
  Gammabar = 13.4*(3.14/180); // Pennation angle in radian
  Epsilonbar = 0.053; // Tendon strain at F0
  K1 = 10; // Factor for determining shortening speed at optimum length
  K2 = 0; // Factor for determining shortening speed at optimum length
  Fcfast = 0.4; // Factor for determining shortening speed at optimum length
  Jt = 3.0; // Shape parameter for the tendon stiffness
  Jpe = 3.0; // Shape parameter for the parallel stiffness
  PEFactor = 5.0; // Parameter for influence of parallel stiffness
//AnyVar MusLengthUnScaled=
};
AnyMuscleModel3E PsoasMajor2Par = {
  F0 = .StrengthScalePelvis*.PCSAfactor*19.5/3; // Maximum force output at optimum fiber length
 AnyVar LfbarTemp =.FiberLengthScalePelvis* (9.9/100); // Optimum fiber length
Lfbar=LfbarTemp;
  Lt0 = (11.3/100); // Tendon slack length
  Gammabar = 13.4*(3.14/180); // Pennation angle in radian
  Epsilonbar = 0.053; // Tendon strain at F0
  K1 = 10; // Factor for determining shortening speed at optimum length
  K2 = 0; // Factor for determining shortening speed at optimum length
  Fcfast = 0.4; // Factor for determining shortening speed at optimum length
  Jt = 3.0; // Shape parameter for the tendon stiffness
  Jpe = 3.0; // Shape parameter for the parallel stiffness
  PEFactor = 5.0; // Parameter for influence of parallel stiffness
//AnyVar MusLengthUnScaled=
};
AnyMuscleModel3E PsoasMajor3Par = {
  F0 =.StrengthScalePelvis* .PCSAfactor*19.5/3; // Maximum force output at optimum fiber length
 AnyVar LfbarTemp = .FiberLengthScalePelvis*(9.9/100); // Optimum fiber length
Lfbar=LfbarTemp;
  Lt0 = (11.3/100); // Tendon slack length
  Gammabar = 13.4*(3.14/180); // Pennation angle in radian
  Epsilonbar = 0.053; // Tendon strain at F0
  K1 = 10; // Factor for determining shortening speed at optimum length
  K2 = 0; // Factor for determining shortening speed at optimum length
  Fcfast = 0.4; // Factor for determining shortening speed at optimum length
  Jt = 3.0; // Shape parameter for the tendon stiffness
  Jpe = 3.0; // Shape parameter for the parallel stiffness
  PEFactor = 5.0; // Parameter for influence of parallel stiffne
//AnyVar MusLengthUnScaled=
};

AnyMuscleModel3E QuadratusFemoris1Par = {
  F0 = .StrengthScalePelvis*.PCSAfactor*14.6/4; // Maximum force output at optimum fiber length
 AnyVar LfbarTemp =.FiberLengthScalePelvis* (3.4/100); // Optimum fiber length
Lfbar=LfbarTemp;
  Lt0 = (0.001); // Tendon slack length
  Gammabar = 0*(3.14/180); // Pennation angle in radian
  Epsilonbar = 0.053; // Tendon strain at F0
  K1 = 10; // Factor for determining shortening speed at optimum length
  K2 = 0; // Factor for determining shortening speed at optimum length
  Fcfast = 0.4; // Factor for determining shortening speed at optimum length
  Jt = 3.0; // Shape parameter for the tendon stiffness
  Jpe = 3.0; // Shape parameter for the parallel stiffness
  PEFactor = 5.0; // Parameter for influence of parallel stiffness
AnyVar MusLengthUnScaled=0.115717196;
AnyVar LengthDifference=MusLengthUnScaled-Lt0-Lfbar*cos(Gammabar);
};

AnyMuscleModel3E QuadratusFemoris2Par = {
  F0 = .StrengthScalePelvis*.PCSAfactor*14.6/4; // Maximum force output at optimum fiber length
 AnyVar LfbarTemp =.FiberLengthScalePelvis* (3.4/100); // Optimum fiber length
Lfbar=LfbarTemp;
  Lt0 = (0.001); // Tendon slack length
  Gammabar = 0*(3.14/180); // Pennation angle in radian
  Epsilonbar = 0.053; // Tendon strain at F0
  K1 = 10; // Factor for determining shortening speed at optimum length
  K2 = 0; // Factor for determining shortening speed at optimum length
  Fcfast = 0.4; // Factor for determining shortening speed at optimum length
  Jt = 3.0; // Shape parameter for the tendon stiffness
  Jpe = 3.0; // Shape parameter for the parallel stiffness
  PEFactor = 5.0; // Parameter for influence of parallel stiffness
AnyVar MusLengthUnScaled=0.107587686;
AnyVar LengthDifference=MusLengthUnScaled-Lt0-Lfbar*cos(Gammabar);
};
AnyMuscleModel3E QuadratusFemoris3Par = {
  F0 = .StrengthScalePelvis*.PCSAfactor*14.6/4; // Maximum force output at optimum fiber length
 AnyVar LfbarTemp =.FiberLengthScalePelvis* (3.4/100); // Optimum fiber length
Lfbar=LfbarTemp;
  Lt0 = (0.001); // Tendon slack length
  Gammabar = 0*(3.14/180); // Pennation angle in radian
  Epsilonbar = 0.053; // Tendon strain at F0
  K1 = 10; // Factor for determining shortening speed at optimum length
  K2 = 0; // Factor for determining shortening speed at optimum length
  Fcfast = 0.4; // Factor for determining shortening speed at optimum length
  Jt = 3.0; // Shape parameter for the tendon stiffness
  Jpe = 3.0; // Shape parameter for the parallel stiffness
  PEFactor = 5.0; // Parameter for influence of parallel stiffness
AnyVar MusLengthUnScaled=0.100277395;
AnyVar LengthDifference=MusLengthUnScaled-Lt0-Lfbar*cos(Gammabar);
};
AnyMuscleModel3E QuadratusFemoris4Par = {
  F0 = .StrengthScalePelvis*.PCSAfactor*14.6/4; // Maximum force output at optimum fiber length
  AnyVar LfbarTemp =.FiberLengthScalePelvis* (3.4/100); // Optimum fiber length
  Lfbar=LfbarTemp;
  Lt0 = (0.001); // Tendon slack length
  Gammabar = 0*(3.14/180); // Pennation angle in radian
  Epsilonbar = 0.053; // Tendon strain at F0
  K1 = 10; // Factor for determining shortening speed at optimum length
  K2 = 0; // Factor for determining shortening speed at optimum length
  Fcfast = 0.4; // Factor for determining shortening speed at optimum length
  Jt = 3.0; // Shape parameter for the tendon stiffness
  Jpe = 3.0; // Shape parameter for the parallel stiffness
  PEFactor = 5.0; // Parameter for influence of parallel stiffness
  AnyVar MusLengthUnScaled=0.094251006;
  AnyVar LengthDifference=MusLengthUnScaled-Lt0-Lfbar*cos(Gammabar);

};
