AnyFolder LeftHipMuscleCal={
  AnyFolder &SideHumanFolderRef=..HumanFolderRef.Left;
  AnyFolder &SideInterfaceFolderRef=..HumanFolderRef.Interface.Left;
  AnyFolder &SidePsoasRef = ..HumanFolderRef.Trunk.MusclesSpineLeft.PsoasMajor;
  #include "HipMuscleCal.any"
};

AnyFolder LeftKneeMuscleCal={
  AnyFolder &SideHumanFolderRef=..HumanFolderRef.Left;
  AnyFolder &SideInterfaceFolderRef=..HumanFolderRef.Interface.Left;
  #include "KneeMuscleCal.any"
};

AnyFolder LeftAnkleMuscleCal={
  AnyFolder &SideHumanFolderRef=..HumanFolderRef.Left;
  AnyFolder &SideInterfaceFolderRef=..HumanFolderRef.Interface.Left;
  #include "AnkleMuscleCal.any"
};


CalibrationSequence = {
  AnyOperation &CalHipLegLeft2Par = .LeftHipMuscleCal.LegCalibrationStudyHip.FiberAndTendonLengthAdjustment;
  AnyOperation &CalkneeLegLeft2Par = .LeftKneeMuscleCal.LegCalibrationStudyKnee.FiberAndTendonLengthAdjustment;
  AnyOperation &CalAnkleLegLeft2Par = .LeftAnkleMuscleCal.LegCalibrationStudyAnkle.FiberAndTendonLengthAdjustment;
};
