#define CALIBRATION_STUDY_REF(num) RightLegCalibration##num.LegCalibrationStudy##num

AnyFolder RightLegCalibration1={
  AnyFolder &SideHumanFolderRef=..BodyModel.Right;
  AnyFolder &SideInterfaceFolderRef=..BodyModel.Interface.Right;
  #if INCLUDE_MODIFIED_HILL_TYPE_CALIBRATION == ON
  #include "LegCal1Mod.any"
  #else
  #include "LegCal1.any"
  #endif
};

AnyFolder RightLegCalibration2={
  AnyFolder &SideHumanFolderRef=..BodyModel.Right;
  AnyFolder &SideInterfaceFolderRef=..BodyModel.Interface.Right;
  #if INCLUDE_MODIFIED_HILL_TYPE_CALIBRATION == ON
  #include "LegCal2Mod.any"
  #else
  #include "LegCal2.any"
  #endif
};

AnyFolder RightLegCalibration3={
  AnyFolder &SideHumanFolderRef=..BodyModel.Right;
  AnyFolder &SideInterfaceFolderRef=..BodyModel.Interface.Right;
  #include "LegCal3.any"
};

// Calibration 4 is not used because GluteusMedius is calibrated in LegCal6.any

AnyFolder RightLegCalibration5={
  AnyFolder &SideHumanFolderRef=..BodyModel.Right;
  AnyFolder &SideInterfaceFolderRef=..BodyModel.Interface.Right;
  #include "LegCal5.any"
};

AnyFolder RightLegCalibration6={
  AnyFolder &SideHumanFolderRef=..BodyModel.Right;
  AnyFolder &SideInterfaceFolderRef=..BodyModel.Interface.Right;
  #if INCLUDE_MODIFIED_HILL_TYPE_CALIBRATION == ON
  #include "LegCal6Mod.any"
  #else
  #include "LegCal6.any"
  #endif
};
AnyFolder RightLegCalibration7={
  AnyFolder &SideHumanFolderRef=..BodyModel.Right;
  AnyFolder &SideInterfaceFolderRef=..BodyModel.Interface.Right;
  #include "LegCal7.any"
};

AnyFolder RightLegCalibration8={
  AnyFolder &SideHumanFolderRef=..BodyModel.Right;
  AnyFolder &SideInterfaceFolderRef=..BodyModel.Interface.Right;
  #include "LegCal8.any"
};

#if INCLUDE_MODIFIED_HILL_TYPE_CALIBRATION == ON
AnyFolder RightLegCalibration10={
  AnyFolder &SideHumanFolderRef=..BodyModel.Right;
  AnyFolder &SideInterfaceFolderRef=..BodyModel.Interface.Right;
  #include "LegCal10.any"
};

AnyFolder RightLegCalibration11={
  AnyFolder &SideHumanFolderRef=..BodyModel.Right;
  AnyFolder &SideInterfaceFolderRef=..BodyModel.Interface.Right;
  #include "LegCal11.any"
};
#endif
#undef CALIBRATION_STUDY_REF


CalibrationSequence ={
  AnyOperation &Cal1LegRight = .RightLegCalibration1.LegCalibrationStudy1.TendonLengthAdjustment;
  AnyOperation &Cal2LegRight = .RightLegCalibration2.LegCalibrationStudy2.TendonLengthAdjustment;
  AnyOperation &Cal3LegRight = .RightLegCalibration3.LegCalibrationStudy3.TendonLengthAdjustment;
  AnyOperation &Cal5LegRight = .RightLegCalibration5.LegCalibrationStudy5.TendonLengthAdjustment;
  AnyOperation &Cal6LegRight = .RightLegCalibration6.LegCalibrationStudy6.TendonLengthAdjustment;
  AnyOperation &Cal7LegRight = .RightLegCalibration7.LegCalibrationStudy7.TendonLengthAdjustment;
  AnyOperation &Cal8LegRight = .RightLegCalibration8.LegCalibrationStudy8.TendonLengthAdjustment;
  #if INCLUDE_MODIFIED_HILL_TYPE_CALIBRATION == ON
  AnyOperation &Cal10LegRight = .RightLegCalibration10.LegCalibrationStudy10.TendonLengthAdjustment;
  AnyOperation &Cal11LegRight = .RightLegCalibration11.LegCalibrationStudy11.TendonLengthAdjustment;
  #endif
};
