   #ifdef JOINT_TYPE_HIP
   #undef JOINT_TYPE_HIP
   #undef JOINT_TYPE_KNEE
   #undef JOINT_TYPE_ANKLE
   #undef JOINT_TYPE_PATELLOFEMORAL
   #undef JOINT_TYPE_SUBTALAR
   #undef JOINT_TYPE_PATELLATENDON
   #endif

   #if _LEFT_RIGHT_ == "Right"
   #define JOINT_TYPE_HIP            BM_JOINT_TYPE_HIP_RIGHT
   #define JOINT_TYPE_KNEE           BM_JOINT_TYPE_KNEE_RIGHT
   #define JOINT_TYPE_ANKLE          BM_JOINT_TYPE_ANKLE_RIGHT
   #define JOINT_TYPE_PATELLOFEMORAL BM_JOINT_TYPE_PATELLOFEMORAL_RIGHT
   #define JOINT_TYPE_SUBTALAR       BM_JOINT_TYPE_SUBTALAR_RIGHT
   #define JOINT_TYPE_PATELLATENDON  BM_JOINT_TYPE_PATELLATENDON_RIGHT
   #endif

   #if _LEFT_RIGHT_ == "Left"
   #define JOINT_TYPE_HIP            BM_JOINT_TYPE_HIP_LEFT
   #define JOINT_TYPE_KNEE           BM_JOINT_TYPE_KNEE_LEFT
   #define JOINT_TYPE_ANKLE          BM_JOINT_TYPE_ANKLE_LEFT
   #define JOINT_TYPE_PATELLOFEMORAL BM_JOINT_TYPE_PATELLOFEMORAL_LEFT
   #define JOINT_TYPE_SUBTALAR       BM_JOINT_TYPE_SUBTALAR_LEFT
   #define JOINT_TYPE_PATELLATENDON  BM_JOINT_TYPE_PATELLATENDON_LEFT
   #endif
