/**^This folder implements the muscle models for the TLEM model.
Anatomical muscles from the TLEM data set are in many cases split into
several branches (elements). Strength parameters are split between the branches,
typically by uniform split.

Different morphologies of TLEM model are implemented in this file,
please refer to the file for details.
*/


SubjectMusclePar_template SubjectMusPar = {
    //SpecificStrength = 90; // (N/cm^2)
    //Klein Horsman used a PCSAfactor of 27 N/cm^2 this is now changed to 90 N/cm^2
    AnyVar PCSAfactor = SpecificStrength * ......HumanModel.StrengthParameters.StrengthIndexLeg; // = PCSAfactor in N/cm^2 , the PCSA itself is given in cm^2 so F0 is in Newton`s.
    #include "SubjectMusPar_2.any"
};


/////////////////////////////////////////////////
//     AdductorBrevisProximal (2 elements)     //
/////////////////////////////////////////////////
AnyMuscleModel AdductorBrevisProximal1Par =
{
 AnyFolder &MuscleParameters = .SubjectMusPar.AdductorBrevisProximal;
 AnyIntVar MuscleElemNo = 1; ///< The number of this element of the muscle
 AnyIntVar MuscleElemAmount = MuscleParameters.MuscleElemAmount; ///< The total amount of elements for this muscle
 F0 = .SubjectMusPar.PCSAfactor*PCSA; ///< Maximum force output at optimum fiber length
 Lf0 = MuscleParameters.OptimalFiberlength
       / cos(pi/180*MuscleParameters.Pennationangle);
 // New experimental method of splitting volume and pcsa across mus elem.
 AnyVar PCSA = 1e-2*MuscleParameters.MuscleVolume/(.AdductorBrevisProximal1Par.Lf0 +.AdductorBrevisProximal2Par.Lf0 );///< PCSA (cm2) is calculated as muscle volume divided between muscle branches and divided by fiber length
 Vol0 = PCSA * Lf0; ///< Muscle volume in (m3)
};

AnyMuscleModel AdductorBrevisProximal2Par =
{
 AnyFolder &MuscleParameters = .SubjectMusPar.AdductorBrevisProximal;
 AnyIntVar MuscleElemNo = 2; ///< The number of this element of the muscle
 AnyIntVar MuscleElemAmount = MuscleParameters.MuscleElemAmount; ///< The total amount of elements for this muscle
 F0 = .SubjectMusPar.PCSAfactor*PCSA; ///< Maximum force output at optimum fiber length
 Lf0 = MuscleParameters.OptimalFiberlength
       / cos(pi/180*MuscleParameters.Pennationangle);
 // New experimental method of splitting volume and pcsa across mus elem.
 AnyVar PCSA = 1e-2*MuscleParameters.MuscleVolume/(.AdductorBrevisProximal1Par.Lf0 +.AdductorBrevisProximal2Par.Lf0 );///< PCSA (cm2) is calculated as muscle volume divided between muscle branches and divided by fiber length
 Vol0 = PCSA * Lf0; ///< Muscle volume in (m3)
};


////////////////////////////////////////////
//     AdductorBrevisMid (2 elements)     //
////////////////////////////////////////////
AnyMuscleModel AdductorBrevisMid1Par =
{
 AnyFolder &MuscleParameters = .SubjectMusPar.AdductorBrevisMid;
 AnyIntVar MuscleElemNo = 1; ///< The number of this element of the muscle
 AnyIntVar MuscleElemAmount = MuscleParameters.MuscleElemAmount; ///< The total amount of elements for this muscle
 F0 = .SubjectMusPar.PCSAfactor*PCSA; ///< Maximum force output at optimum fiber length
 Lf0 = MuscleParameters.OptimalFiberlength
       / cos(pi/180*MuscleParameters.Pennationangle);
 // New experimental method of splitting volume and pcsa across mus elem.
 AnyVar PCSA = 1e-2*MuscleParameters.MuscleVolume/(.AdductorBrevisMid1Par.Lf0 +.AdductorBrevisMid2Par.Lf0 );///< PCSA (cm2) is calculated as muscle volume divided between muscle branches and divided by fiber length
 Vol0 = PCSA * Lf0; ///< Muscle volume in (m3)
};

AnyMuscleModel AdductorBrevisMid2Par =
{
 AnyFolder &MuscleParameters = .SubjectMusPar.AdductorBrevisMid;
 AnyIntVar MuscleElemNo = 2; ///< The number of this element of the muscle
 AnyIntVar MuscleElemAmount = MuscleParameters.MuscleElemAmount; ///< The total amount of elements for this muscle
 F0 = .SubjectMusPar.PCSAfactor*PCSA; ///< Maximum force output at optimum fiber length
 Lf0 = MuscleParameters.OptimalFiberlength
       / cos(pi/180*MuscleParameters.Pennationangle);
 // New experimental method of splitting volume and pcsa across mus elem.
 AnyVar PCSA = 1e-2*MuscleParameters.MuscleVolume/(.AdductorBrevisMid1Par.Lf0 +.AdductorBrevisMid2Par.Lf0 );///< PCSA (cm2) is calculated as muscle volume divided between muscle branches and divided by fiber length
 Vol0 = PCSA * Lf0; ///< Muscle volume in (m3)
};


///////////////////////////////////////////////
//     AdductorBrevisDistal (2 elements)     //
///////////////////////////////////////////////
AnyMuscleModel AdductorBrevisDistal1Par =
{
 AnyFolder &MuscleParameters = .SubjectMusPar.AdductorBrevisDistal;
 AnyIntVar MuscleElemNo = 1; ///< The number of this element of the muscle
 AnyIntVar MuscleElemAmount = MuscleParameters.MuscleElemAmount; ///< The total amount of elements for this muscle
 F0 = .SubjectMusPar.PCSAfactor*PCSA; ///< Maximum force output at optimum fiber length
 Lf0 = MuscleParameters.OptimalFiberlength
       / cos(pi/180*MuscleParameters.Pennationangle);
 // New experimental method of splitting volume and pcsa across mus elem.
 AnyVar PCSA = 1e-2*MuscleParameters.MuscleVolume/(.AdductorBrevisDistal1Par.Lf0 +.AdductorBrevisDistal2Par.Lf0 );///< PCSA (cm2) is calculated as muscle volume divided between muscle branches and divided by fiber length
 Vol0 = PCSA * Lf0; ///< Muscle volume in (m3)
};

AnyMuscleModel AdductorBrevisDistal2Par =
{
 AnyFolder &MuscleParameters = .SubjectMusPar.AdductorBrevisDistal;
 AnyIntVar MuscleElemNo = 2; ///< The number of this element of the muscle
 AnyIntVar MuscleElemAmount = MuscleParameters.MuscleElemAmount; ///< The total amount of elements for this muscle
 F0 = .SubjectMusPar.PCSAfactor*PCSA; ///< Maximum force output at optimum fiber length
 Lf0 = MuscleParameters.OptimalFiberlength
       / cos(pi/180*MuscleParameters.Pennationangle);
 // New experimental method of splitting volume and pcsa across mus elem.
 AnyVar PCSA = 1e-2*MuscleParameters.MuscleVolume/(.AdductorBrevisDistal1Par.Lf0 +.AdductorBrevisDistal2Par.Lf0 );///< PCSA (cm2) is calculated as muscle volume divided between muscle branches and divided by fiber length
 Vol0 = PCSA * Lf0; ///< Muscle volume in (m3)
};


/////////////////////////////////////////
//     AdductorLongus (6 elements)     //
/////////////////////////////////////////
AnyMuscleModel AdductorLongus1Par =
{
 AnyFolder &MuscleParameters = .SubjectMusPar.AdductorLongus;
 AnyIntVar MuscleElemNo = 1; ///< The number of this element of the muscle
 AnyIntVar MuscleElemAmount = MuscleParameters.MuscleElemAmount; ///< The total amount of elements for this muscle
 F0 = .SubjectMusPar.PCSAfactor*PCSA; ///< Maximum force output at optimum fiber length
 Lf0 = MuscleParameters.OptimalFiberlength
       / cos(pi/180*MuscleParameters.Pennationangle);
 // New experimental method of splitting volume and pcsa across mus elem.
 AnyVar PCSA = 1e-2*MuscleParameters.MuscleVolume/(.AdductorLongus1Par.Lf0 +.AdductorLongus2Par.Lf0 +.AdductorLongus3Par.Lf0 +.AdductorLongus4Par.Lf0 +.AdductorLongus5Par.Lf0 +.AdductorLongus6Par.Lf0 );///< PCSA (cm2) is calculated as muscle volume divided between muscle branches and divided by fiber length
 Vol0 = PCSA * Lf0; ///< Muscle volume in (m3)
};

AnyMuscleModel AdductorLongus2Par =
{
 AnyFolder &MuscleParameters = .SubjectMusPar.AdductorLongus;
 AnyIntVar MuscleElemNo = 2; ///< The number of this element of the muscle
 AnyIntVar MuscleElemAmount = MuscleParameters.MuscleElemAmount; ///< The total amount of elements for this muscle
 F0 = .SubjectMusPar.PCSAfactor*PCSA; ///< Maximum force output at optimum fiber length
 Lf0 = MuscleParameters.OptimalFiberlength
       / cos(pi/180*MuscleParameters.Pennationangle);
 // New experimental method of splitting volume and pcsa across mus elem.
 AnyVar PCSA = 1e-2*MuscleParameters.MuscleVolume/(.AdductorLongus1Par.Lf0 +.AdductorLongus2Par.Lf0 +.AdductorLongus3Par.Lf0 +.AdductorLongus4Par.Lf0 +.AdductorLongus5Par.Lf0 +.AdductorLongus6Par.Lf0 );///< PCSA (cm2) is calculated as muscle volume divided between muscle branches and divided by fiber length
 Vol0 = PCSA * Lf0; ///< Muscle volume in (m3)
};

AnyMuscleModel AdductorLongus3Par =
{
 AnyFolder &MuscleParameters = .SubjectMusPar.AdductorLongus;
 AnyIntVar MuscleElemNo = 3; ///< The number of this element of the muscle
 AnyIntVar MuscleElemAmount = MuscleParameters.MuscleElemAmount; ///< The total amount of elements for this muscle
 F0 = .SubjectMusPar.PCSAfactor*PCSA; ///< Maximum force output at optimum fiber length
 Lf0 = MuscleParameters.OptimalFiberlength
       / cos(pi/180*MuscleParameters.Pennationangle);
 // New experimental method of splitting volume and pcsa across mus elem.
 AnyVar PCSA = 1e-2*MuscleParameters.MuscleVolume/(.AdductorLongus1Par.Lf0 +.AdductorLongus2Par.Lf0 +.AdductorLongus3Par.Lf0 +.AdductorLongus4Par.Lf0 +.AdductorLongus5Par.Lf0 +.AdductorLongus6Par.Lf0 );///< PCSA (cm2) is calculated as muscle volume divided between muscle branches and divided by fiber length
 Vol0 = PCSA * Lf0; ///< Muscle volume in (m3)
};

AnyMuscleModel AdductorLongus4Par =
{
 AnyFolder &MuscleParameters = .SubjectMusPar.AdductorLongus;
 AnyIntVar MuscleElemNo = 4; ///< The number of this element of the muscle
 AnyIntVar MuscleElemAmount = MuscleParameters.MuscleElemAmount; ///< The total amount of elements for this muscle
 F0 = .SubjectMusPar.PCSAfactor*PCSA; ///< Maximum force output at optimum fiber length
 Lf0 = MuscleParameters.OptimalFiberlength
       / cos(pi/180*MuscleParameters.Pennationangle);
 // New experimental method of splitting volume and pcsa across mus elem.
 AnyVar PCSA = 1e-2*MuscleParameters.MuscleVolume/(.AdductorLongus1Par.Lf0 +.AdductorLongus2Par.Lf0 +.AdductorLongus3Par.Lf0 +.AdductorLongus4Par.Lf0 +.AdductorLongus5Par.Lf0 +.AdductorLongus6Par.Lf0 );///< PCSA (cm2) is calculated as muscle volume divided between muscle branches and divided by fiber length
 Vol0 = PCSA * Lf0; ///< Muscle volume in (m3)
};

AnyMuscleModel AdductorLongus5Par =
{
 AnyFolder &MuscleParameters = .SubjectMusPar.AdductorLongus;
 AnyIntVar MuscleElemNo = 5; ///< The number of this element of the muscle
 AnyIntVar MuscleElemAmount = MuscleParameters.MuscleElemAmount; ///< The total amount of elements for this muscle
 F0 = .SubjectMusPar.PCSAfactor*PCSA; ///< Maximum force output at optimum fiber length
 Lf0 = MuscleParameters.OptimalFiberlength
       / cos(pi/180*MuscleParameters.Pennationangle);
 // New experimental method of splitting volume and pcsa across mus elem.
 AnyVar PCSA = 1e-2*MuscleParameters.MuscleVolume/(.AdductorLongus1Par.Lf0 +.AdductorLongus2Par.Lf0 +.AdductorLongus3Par.Lf0 +.AdductorLongus4Par.Lf0 +.AdductorLongus5Par.Lf0 +.AdductorLongus6Par.Lf0 );///< PCSA (cm2) is calculated as muscle volume divided between muscle branches and divided by fiber length
 Vol0 = PCSA * Lf0; ///< Muscle volume in (m3)
};

AnyMuscleModel AdductorLongus6Par =
{
 AnyFolder &MuscleParameters = .SubjectMusPar.AdductorLongus;
 AnyIntVar MuscleElemNo = 6; ///< The number of this element of the muscle
 AnyIntVar MuscleElemAmount = MuscleParameters.MuscleElemAmount; ///< The total amount of elements for this muscle
 F0 = .SubjectMusPar.PCSAfactor*PCSA; ///< Maximum force output at optimum fiber length
 Lf0 = MuscleParameters.OptimalFiberlength
       / cos(pi/180*MuscleParameters.Pennationangle);
 // New experimental method of splitting volume and pcsa across mus elem.
 AnyVar PCSA = 1e-2*MuscleParameters.MuscleVolume/(.AdductorLongus1Par.Lf0 +.AdductorLongus2Par.Lf0 +.AdductorLongus3Par.Lf0 +.AdductorLongus4Par.Lf0 +.AdductorLongus5Par.Lf0 +.AdductorLongus6Par.Lf0 );///< PCSA (cm2) is calculated as muscle volume divided between muscle branches and divided by fiber length
 Vol0 = PCSA * Lf0; ///< Muscle volume in (m3)
};


///////////////////////////////////////////////
//     AdductorMagnusDistal (3 elements)     //
///////////////////////////////////////////////
AnyMuscleModel AdductorMagnusDistal1Par =
{
 AnyFolder &MuscleParameters = .SubjectMusPar.AdductorMagnusDistal;
 AnyIntVar MuscleElemNo = 1; ///< The number of this element of the muscle
 AnyIntVar MuscleElemAmount = MuscleParameters.MuscleElemAmount; ///< The total amount of elements for this muscle
 F0 = .SubjectMusPar.PCSAfactor*PCSA; ///< Maximum force output at optimum fiber length
 Lf0 = MuscleParameters.OptimalFiberlength
       / cos(pi/180*MuscleParameters.Pennationangle);
 // New experimental method of splitting volume and pcsa across mus elem.
 AnyVar PCSA = 1e-2*MuscleParameters.MuscleVolume/(.AdductorMagnusDistal1Par.Lf0 +.AdductorMagnusDistal2Par.Lf0 +.AdductorMagnusDistal3Par.Lf0 );///< PCSA (cm2) is calculated as muscle volume divided between muscle branches and divided by fiber length
 Vol0 = PCSA * Lf0; ///< Muscle volume in (m3)
};

AnyMuscleModel AdductorMagnusDistal2Par =
{
 AnyFolder &MuscleParameters = .SubjectMusPar.AdductorMagnusDistal;
 AnyIntVar MuscleElemNo = 2; ///< The number of this element of the muscle
 AnyIntVar MuscleElemAmount = MuscleParameters.MuscleElemAmount; ///< The total amount of elements for this muscle
 F0 = .SubjectMusPar.PCSAfactor*PCSA; ///< Maximum force output at optimum fiber length
 Lf0 = MuscleParameters.OptimalFiberlength
       / cos(pi/180*MuscleParameters.Pennationangle);
 // New experimental method of splitting volume and pcsa across mus elem.
 AnyVar PCSA = 1e-2*MuscleParameters.MuscleVolume/(.AdductorMagnusDistal1Par.Lf0 +.AdductorMagnusDistal2Par.Lf0 +.AdductorMagnusDistal3Par.Lf0 );///< PCSA (cm2) is calculated as muscle volume divided between muscle branches and divided by fiber length
 Vol0 = PCSA * Lf0; ///< Muscle volume in (m3)
};

AnyMuscleModel AdductorMagnusDistal3Par =
{
 AnyFolder &MuscleParameters = .SubjectMusPar.AdductorMagnusDistal;
 AnyIntVar MuscleElemNo = 3; ///< The number of this element of the muscle
 AnyIntVar MuscleElemAmount = MuscleParameters.MuscleElemAmount; ///< The total amount of elements for this muscle
 F0 = .SubjectMusPar.PCSAfactor*PCSA; ///< Maximum force output at optimum fiber length
 Lf0 = MuscleParameters.OptimalFiberlength
       / cos(pi/180*MuscleParameters.Pennationangle);
 // New experimental method of splitting volume and pcsa across mus elem.
 AnyVar PCSA = 1e-2*MuscleParameters.MuscleVolume/(.AdductorMagnusDistal1Par.Lf0 +.AdductorMagnusDistal2Par.Lf0 +.AdductorMagnusDistal3Par.Lf0 );///< PCSA (cm2) is calculated as muscle volume divided between muscle branches and divided by fiber length
 Vol0 = PCSA * Lf0; ///< Muscle volume in (m3)
};


////////////////////////////////////////////
//     AdductorMagnusMid (6 elements)     //
////////////////////////////////////////////
AnyMuscleModel AdductorMagnusMid1Par =
{
 AnyFolder &MuscleParameters = .SubjectMusPar.AdductorMagnusMid;
 AnyIntVar MuscleElemNo = 1; ///< The number of this element of the muscle
 AnyIntVar MuscleElemAmount = MuscleParameters.MuscleElemAmount; ///< The total amount of elements for this muscle
 F0 = .SubjectMusPar.PCSAfactor*PCSA; ///< Maximum force output at optimum fiber length
 Lf0 = MuscleParameters.OptimalFiberlength
       / cos(pi/180*MuscleParameters.Pennationangle);
 // New experimental method of splitting volume and pcsa across mus elem.
 AnyVar PCSA = 1e-2*MuscleParameters.MuscleVolume/(.AdductorMagnusMid1Par.Lf0 +.AdductorMagnusMid2Par.Lf0 +.AdductorMagnusMid3Par.Lf0 +.AdductorMagnusMid4Par.Lf0 +.AdductorMagnusMid5Par.Lf0 +.AdductorMagnusMid6Par.Lf0 );///< PCSA (cm2) is calculated as muscle volume divided between muscle branches and divided by fiber length
 Vol0 = PCSA * Lf0; ///< Muscle volume in (m3)
};

AnyMuscleModel AdductorMagnusMid2Par =
{
 AnyFolder &MuscleParameters = .SubjectMusPar.AdductorMagnusMid;
 AnyIntVar MuscleElemNo = 2; ///< The number of this element of the muscle
 AnyIntVar MuscleElemAmount = MuscleParameters.MuscleElemAmount; ///< The total amount of elements for this muscle
 F0 = .SubjectMusPar.PCSAfactor*PCSA; ///< Maximum force output at optimum fiber length
 Lf0 = MuscleParameters.OptimalFiberlength
       / cos(pi/180*MuscleParameters.Pennationangle);
 // New experimental method of splitting volume and pcsa across mus elem.
 AnyVar PCSA = 1e-2*MuscleParameters.MuscleVolume/(.AdductorMagnusMid1Par.Lf0 +.AdductorMagnusMid2Par.Lf0 +.AdductorMagnusMid3Par.Lf0 +.AdductorMagnusMid4Par.Lf0 +.AdductorMagnusMid5Par.Lf0 +.AdductorMagnusMid6Par.Lf0 );///< PCSA (cm2) is calculated as muscle volume divided between muscle branches and divided by fiber length
 Vol0 = PCSA * Lf0; ///< Muscle volume in (m3)
};

AnyMuscleModel AdductorMagnusMid3Par =
{
 AnyFolder &MuscleParameters = .SubjectMusPar.AdductorMagnusMid;
 AnyIntVar MuscleElemNo = 3; ///< The number of this element of the muscle
 AnyIntVar MuscleElemAmount = MuscleParameters.MuscleElemAmount; ///< The total amount of elements for this muscle
 F0 = .SubjectMusPar.PCSAfactor*PCSA; ///< Maximum force output at optimum fiber length
 Lf0 = MuscleParameters.OptimalFiberlength
       / cos(pi/180*MuscleParameters.Pennationangle);
 // New experimental method of splitting volume and pcsa across mus elem.
 AnyVar PCSA = 1e-2*MuscleParameters.MuscleVolume/(.AdductorMagnusMid1Par.Lf0 +.AdductorMagnusMid2Par.Lf0 +.AdductorMagnusMid3Par.Lf0 +.AdductorMagnusMid4Par.Lf0 +.AdductorMagnusMid5Par.Lf0 +.AdductorMagnusMid6Par.Lf0 );///< PCSA (cm2) is calculated as muscle volume divided between muscle branches and divided by fiber length
 Vol0 = PCSA * Lf0; ///< Muscle volume in (m3)
};

AnyMuscleModel AdductorMagnusMid4Par =
{
 AnyFolder &MuscleParameters = .SubjectMusPar.AdductorMagnusMid;
 AnyIntVar MuscleElemNo = 4; ///< The number of this element of the muscle
 AnyIntVar MuscleElemAmount = MuscleParameters.MuscleElemAmount; ///< The total amount of elements for this muscle
 F0 = .SubjectMusPar.PCSAfactor*PCSA; ///< Maximum force output at optimum fiber length
 Lf0 = MuscleParameters.OptimalFiberlength
       / cos(pi/180*MuscleParameters.Pennationangle);
 // New experimental method of splitting volume and pcsa across mus elem.
 AnyVar PCSA = 1e-2*MuscleParameters.MuscleVolume/(.AdductorMagnusMid1Par.Lf0 +.AdductorMagnusMid2Par.Lf0 +.AdductorMagnusMid3Par.Lf0 +.AdductorMagnusMid4Par.Lf0 +.AdductorMagnusMid5Par.Lf0 +.AdductorMagnusMid6Par.Lf0 );///< PCSA (cm2) is calculated as muscle volume divided between muscle branches and divided by fiber length
 Vol0 = PCSA * Lf0; ///< Muscle volume in (m3)
};

AnyMuscleModel AdductorMagnusMid5Par =
{
 AnyFolder &MuscleParameters = .SubjectMusPar.AdductorMagnusMid;
 AnyIntVar MuscleElemNo = 5; ///< The number of this element of the muscle
 AnyIntVar MuscleElemAmount = MuscleParameters.MuscleElemAmount; ///< The total amount of elements for this muscle
 F0 = .SubjectMusPar.PCSAfactor*PCSA; ///< Maximum force output at optimum fiber length
 Lf0 = MuscleParameters.OptimalFiberlength
       / cos(pi/180*MuscleParameters.Pennationangle);
 // New experimental method of splitting volume and pcsa across mus elem.
 AnyVar PCSA = 1e-2*MuscleParameters.MuscleVolume/(.AdductorMagnusMid1Par.Lf0 +.AdductorMagnusMid2Par.Lf0 +.AdductorMagnusMid3Par.Lf0 +.AdductorMagnusMid4Par.Lf0 +.AdductorMagnusMid5Par.Lf0 +.AdductorMagnusMid6Par.Lf0 );///< PCSA (cm2) is calculated as muscle volume divided between muscle branches and divided by fiber length
 Vol0 = PCSA * Lf0; ///< Muscle volume in (m3)
};

AnyMuscleModel AdductorMagnusMid6Par =
{
 AnyFolder &MuscleParameters = .SubjectMusPar.AdductorMagnusMid;
 AnyIntVar MuscleElemNo = 6; ///< The number of this element of the muscle
 AnyIntVar MuscleElemAmount = MuscleParameters.MuscleElemAmount; ///< The total amount of elements for this muscle
 F0 = .SubjectMusPar.PCSAfactor*PCSA; ///< Maximum force output at optimum fiber length
 Lf0 = MuscleParameters.OptimalFiberlength
       / cos(pi/180*MuscleParameters.Pennationangle);
 // New experimental method of splitting volume and pcsa across mus elem.
 AnyVar PCSA = 1e-2*MuscleParameters.MuscleVolume/(.AdductorMagnusMid1Par.Lf0 +.AdductorMagnusMid2Par.Lf0 +.AdductorMagnusMid3Par.Lf0 +.AdductorMagnusMid4Par.Lf0 +.AdductorMagnusMid5Par.Lf0 +.AdductorMagnusMid6Par.Lf0 );///< PCSA (cm2) is calculated as muscle volume divided between muscle branches and divided by fiber length
 Vol0 = PCSA * Lf0; ///< Muscle volume in (m3)
};


/////////////////////////////////////////////////
//     AdductorMagnusProximal (4 elements)     //
/////////////////////////////////////////////////
AnyMuscleModel AdductorMagnusProximal1Par =
{
 AnyFolder &MuscleParameters = .SubjectMusPar.AdductorMagnusProximal;
 AnyIntVar MuscleElemNo = 1; ///< The number of this element of the muscle
 AnyIntVar MuscleElemAmount = MuscleParameters.MuscleElemAmount; ///< The total amount of elements for this muscle
 F0 = .SubjectMusPar.PCSAfactor*PCSA; ///< Maximum force output at optimum fiber length
 Lf0 = MuscleParameters.OptimalFiberlength
       / cos(pi/180*MuscleParameters.Pennationangle);
 // New experimental method of splitting volume and pcsa across mus elem.
 AnyVar PCSA = 1e-2*MuscleParameters.MuscleVolume/(.AdductorMagnusProximal1Par.Lf0 +.AdductorMagnusProximal2Par.Lf0 +.AdductorMagnusProximal3Par.Lf0 +.AdductorMagnusProximal4Par.Lf0 );///< PCSA (cm2) is calculated as muscle volume divided between muscle branches and divided by fiber length
 Vol0 = PCSA * Lf0; ///< Muscle volume in (m3)
};

AnyMuscleModel AdductorMagnusProximal2Par =
{
 AnyFolder &MuscleParameters = .SubjectMusPar.AdductorMagnusProximal;
 AnyIntVar MuscleElemNo = 2; ///< The number of this element of the muscle
 AnyIntVar MuscleElemAmount = MuscleParameters.MuscleElemAmount; ///< The total amount of elements for this muscle
 F0 = .SubjectMusPar.PCSAfactor*PCSA; ///< Maximum force output at optimum fiber length
 Lf0 = MuscleParameters.OptimalFiberlength
       / cos(pi/180*MuscleParameters.Pennationangle);
 // New experimental method of splitting volume and pcsa across mus elem.
 AnyVar PCSA = 1e-2*MuscleParameters.MuscleVolume/(.AdductorMagnusProximal1Par.Lf0 +.AdductorMagnusProximal2Par.Lf0 +.AdductorMagnusProximal3Par.Lf0 +.AdductorMagnusProximal4Par.Lf0 );///< PCSA (cm2) is calculated as muscle volume divided between muscle branches and divided by fiber length
 Vol0 = PCSA * Lf0; ///< Muscle volume in (m3)
};

AnyMuscleModel AdductorMagnusProximal3Par =
{
 AnyFolder &MuscleParameters = .SubjectMusPar.AdductorMagnusProximal;
 AnyIntVar MuscleElemNo = 3; ///< The number of this element of the muscle
 AnyIntVar MuscleElemAmount = MuscleParameters.MuscleElemAmount; ///< The total amount of elements for this muscle
 F0 = .SubjectMusPar.PCSAfactor*PCSA; ///< Maximum force output at optimum fiber length
 Lf0 = MuscleParameters.OptimalFiberlength
       / cos(pi/180*MuscleParameters.Pennationangle);
 // New experimental method of splitting volume and pcsa across mus elem.
 AnyVar PCSA = 1e-2*MuscleParameters.MuscleVolume/(.AdductorMagnusProximal1Par.Lf0 +.AdductorMagnusProximal2Par.Lf0 +.AdductorMagnusProximal3Par.Lf0 +.AdductorMagnusProximal4Par.Lf0 );///< PCSA (cm2) is calculated as muscle volume divided between muscle branches and divided by fiber length
 Vol0 = PCSA * Lf0; ///< Muscle volume in (m3)
};

AnyMuscleModel AdductorMagnusProximal4Par =
{
 AnyFolder &MuscleParameters = .SubjectMusPar.AdductorMagnusProximal;
 AnyIntVar MuscleElemNo = 4; ///< The number of this element of the muscle
 AnyIntVar MuscleElemAmount = MuscleParameters.MuscleElemAmount; ///< The total amount of elements for this muscle
 F0 = .SubjectMusPar.PCSAfactor*PCSA; ///< Maximum force output at optimum fiber length
 Lf0 = MuscleParameters.OptimalFiberlength
       / cos(pi/180*MuscleParameters.Pennationangle);
 // New experimental method of splitting volume and pcsa across mus elem.
 AnyVar PCSA = 1e-2*MuscleParameters.MuscleVolume/(.AdductorMagnusProximal1Par.Lf0 +.AdductorMagnusProximal2Par.Lf0 +.AdductorMagnusProximal3Par.Lf0 +.AdductorMagnusProximal4Par.Lf0 );///< PCSA (cm2) is calculated as muscle volume divided between muscle branches and divided by fiber length
 Vol0 = PCSA * Lf0; ///< Muscle volume in (m3)
};


///////////////////////////////////////////////////
//     BicepsFemorisCaputLongum (1 element )     //
///////////////////////////////////////////////////
AnyMuscleModel BicepsFemorisCaputLongum1Par =
{
 AnyFolder &MuscleParameters = .SubjectMusPar.BicepsFemorisCaputLongum;
 AnyIntVar MuscleElemNo = 1; ///< The number of this element of the muscle
 AnyIntVar MuscleElemAmount = MuscleParameters.MuscleElemAmount; ///< The total amount of elements for this muscle
 F0 = .SubjectMusPar.PCSAfactor*PCSA; ///< Maximum force output at optimum fiber length
 Lf0 = MuscleParameters.OptimalFiberlength
       / cos(pi/180*MuscleParameters.Pennationangle);
 // New experimental method of splitting volume and pcsa across mus elem.
 AnyVar PCSA = 1e-2*MuscleParameters.MuscleVolume/(Lf0);///< PCSA (cm2) is calculated as muscle volume divided between muscle branches and divided by fiber length
 Vol0 = PCSA * Lf0; ///< Muscle volume in (m3)
};


//////////////////////////////////////////////////
//     BicepsFemorisCaputBreve (3 elements)     //
//////////////////////////////////////////////////
AnyMuscleModel BicepsFemorisCaputBreve1Par =
{
 AnyFolder &MuscleParameters = .SubjectMusPar.BicepsFemorisCaputBreve;
 AnyIntVar MuscleElemNo = 1; ///< The number of this element of the muscle
 AnyIntVar MuscleElemAmount = MuscleParameters.MuscleElemAmount; ///< The total amount of elements for this muscle
 F0 = .SubjectMusPar.PCSAfactor*PCSA; ///< Maximum force output at optimum fiber length
 Lf0 = MuscleParameters.OptimalFiberlength
       / cos(pi/180*MuscleParameters.Pennationangle);
 // New experimental method of splitting volume and pcsa across mus elem.
 AnyVar PCSA = 1e-2*MuscleParameters.MuscleVolume/(.BicepsFemorisCaputBreve1Par.Lf0 +.BicepsFemorisCaputBreve2Par.Lf0 +.BicepsFemorisCaputBreve3Par.Lf0 );///< PCSA (cm2) is calculated as muscle volume divided between muscle branches and divided by fiber length
 Vol0 = PCSA * Lf0; ///< Muscle volume in (m3)
};

AnyMuscleModel BicepsFemorisCaputBreve2Par =
{
 AnyFolder &MuscleParameters = .SubjectMusPar.BicepsFemorisCaputBreve;
 AnyIntVar MuscleElemNo = 2; ///< The number of this element of the muscle
 AnyIntVar MuscleElemAmount = MuscleParameters.MuscleElemAmount; ///< The total amount of elements for this muscle
 F0 = .SubjectMusPar.PCSAfactor*PCSA; ///< Maximum force output at optimum fiber length
 Lf0 = MuscleParameters.OptimalFiberlength
       / cos(pi/180*MuscleParameters.Pennationangle);
 // New experimental method of splitting volume and pcsa across mus elem.
 AnyVar PCSA = 1e-2*MuscleParameters.MuscleVolume/(.BicepsFemorisCaputBreve1Par.Lf0 +.BicepsFemorisCaputBreve2Par.Lf0 +.BicepsFemorisCaputBreve3Par.Lf0 );///< PCSA (cm2) is calculated as muscle volume divided between muscle branches and divided by fiber length
 Vol0 = PCSA * Lf0; ///< Muscle volume in (m3)
};

AnyMuscleModel BicepsFemorisCaputBreve3Par =
{
 AnyFolder &MuscleParameters = .SubjectMusPar.BicepsFemorisCaputBreve;
 AnyIntVar MuscleElemNo = 3; ///< The number of this element of the muscle
 AnyIntVar MuscleElemAmount = MuscleParameters.MuscleElemAmount; ///< The total amount of elements for this muscle
 F0 = .SubjectMusPar.PCSAfactor*PCSA; ///< Maximum force output at optimum fiber length
 Lf0 = MuscleParameters.OptimalFiberlength
       / cos(pi/180*MuscleParameters.Pennationangle);
 // New experimental method of splitting volume and pcsa across mus elem.
 AnyVar PCSA = 1e-2*MuscleParameters.MuscleVolume/(.BicepsFemorisCaputBreve1Par.Lf0 +.BicepsFemorisCaputBreve2Par.Lf0 +.BicepsFemorisCaputBreve3Par.Lf0 );///< PCSA (cm2) is calculated as muscle volume divided between muscle branches and divided by fiber length
 Vol0 = PCSA * Lf0; ///< Muscle volume in (m3)
};


//////////////////////////////////////////////////
//     ExtensorDigitorumLongus (4 elements)     //
//////////////////////////////////////////////////
AnyMuscleModel ExtensorDigitorumLongus1Par =
{
 AnyFolder &MuscleParameters = .SubjectMusPar.ExtensorDigitorumLongus;
 AnyIntVar MuscleElemNo = 1; ///< The number of this element of the muscle
 AnyIntVar MuscleElemAmount = MuscleParameters.MuscleElemAmount; ///< The total amount of elements for this muscle
 F0 = .SubjectMusPar.PCSAfactor*PCSA; ///< Maximum force output at optimum fiber length
 Lf0 = MuscleParameters.OptimalFiberlength
       / cos(pi/180*MuscleParameters.Pennationangle);
 // New experimental method of splitting volume and pcsa across mus elem.
 AnyVar PCSA = 1e-2*MuscleParameters.MuscleVolume/(.ExtensorDigitorumLongus1Par.Lf0 +.ExtensorDigitorumLongus2Par.Lf0 +.ExtensorDigitorumLongus3Par.Lf0 +.ExtensorDigitorumLongus4Par.Lf0 );///< PCSA (cm2) is calculated as muscle volume divided between muscle branches and divided by fiber length
 Vol0 = PCSA * Lf0; ///< Muscle volume in (m3)
};

AnyMuscleModel ExtensorDigitorumLongus2Par =
{
 AnyFolder &MuscleParameters = .SubjectMusPar.ExtensorDigitorumLongus;
 AnyIntVar MuscleElemNo = 2; ///< The number of this element of the muscle
 AnyIntVar MuscleElemAmount = MuscleParameters.MuscleElemAmount; ///< The total amount of elements for this muscle
 F0 = .SubjectMusPar.PCSAfactor*PCSA; ///< Maximum force output at optimum fiber length
 Lf0 = MuscleParameters.OptimalFiberlength
       / cos(pi/180*MuscleParameters.Pennationangle);
 // New experimental method of splitting volume and pcsa across mus elem.
 AnyVar PCSA = 1e-2*MuscleParameters.MuscleVolume/(.ExtensorDigitorumLongus1Par.Lf0 +.ExtensorDigitorumLongus2Par.Lf0 +.ExtensorDigitorumLongus3Par.Lf0 +.ExtensorDigitorumLongus4Par.Lf0 );///< PCSA (cm2) is calculated as muscle volume divided between muscle branches and divided by fiber length
 Vol0 = PCSA * Lf0; ///< Muscle volume in (m3)
};

AnyMuscleModel ExtensorDigitorumLongus3Par =
{
 AnyFolder &MuscleParameters = .SubjectMusPar.ExtensorDigitorumLongus;
 AnyIntVar MuscleElemNo = 3; ///< The number of this element of the muscle
 AnyIntVar MuscleElemAmount = MuscleParameters.MuscleElemAmount; ///< The total amount of elements for this muscle
 F0 = .SubjectMusPar.PCSAfactor*PCSA; ///< Maximum force output at optimum fiber length
 Lf0 = MuscleParameters.OptimalFiberlength
       / cos(pi/180*MuscleParameters.Pennationangle);
 // New experimental method of splitting volume and pcsa across mus elem.
 AnyVar PCSA = 1e-2*MuscleParameters.MuscleVolume/(.ExtensorDigitorumLongus1Par.Lf0 +.ExtensorDigitorumLongus2Par.Lf0 +.ExtensorDigitorumLongus3Par.Lf0 +.ExtensorDigitorumLongus4Par.Lf0 );///< PCSA (cm2) is calculated as muscle volume divided between muscle branches and divided by fiber length
 Vol0 = PCSA * Lf0; ///< Muscle volume in (m3)
};

AnyMuscleModel ExtensorDigitorumLongus4Par =
{
 AnyFolder &MuscleParameters = .SubjectMusPar.ExtensorDigitorumLongus;
 AnyIntVar MuscleElemNo = 4; ///< The number of this element of the muscle
 AnyIntVar MuscleElemAmount = MuscleParameters.MuscleElemAmount; ///< The total amount of elements for this muscle
 F0 = .SubjectMusPar.PCSAfactor*PCSA; ///< Maximum force output at optimum fiber length
 Lf0 = MuscleParameters.OptimalFiberlength
       / cos(pi/180*MuscleParameters.Pennationangle);
 // New experimental method of splitting volume and pcsa across mus elem.
 AnyVar PCSA = 1e-2*MuscleParameters.MuscleVolume/(.ExtensorDigitorumLongus1Par.Lf0 +.ExtensorDigitorumLongus2Par.Lf0 +.ExtensorDigitorumLongus3Par.Lf0 +.ExtensorDigitorumLongus4Par.Lf0 );///< PCSA (cm2) is calculated as muscle volume divided between muscle branches and divided by fiber length
 Vol0 = PCSA * Lf0; ///< Muscle volume in (m3)
};


/////////////////////////////////////////////////
//     ExtensorHallucisLongus (3 elements)     //
/////////////////////////////////////////////////
AnyMuscleModel ExtensorHallucisLongus1Par =
{
 AnyFolder &MuscleParameters = .SubjectMusPar.ExtensorHallucisLongus;
 AnyIntVar MuscleElemNo = 1; ///< The number of this element of the muscle
 AnyIntVar MuscleElemAmount = MuscleParameters.MuscleElemAmount; ///< The total amount of elements for this muscle
 F0 = .SubjectMusPar.PCSAfactor*PCSA; ///< Maximum force output at optimum fiber length
 Lf0 = MuscleParameters.OptimalFiberlength
       / cos(pi/180*MuscleParameters.Pennationangle);
 // New experimental method of splitting volume and pcsa across mus elem.
 AnyVar PCSA = 1e-2*MuscleParameters.MuscleVolume/(.ExtensorHallucisLongus1Par.Lf0 +.ExtensorHallucisLongus2Par.Lf0 +.ExtensorHallucisLongus3Par.Lf0 );///< PCSA (cm2) is calculated as muscle volume divided between muscle branches and divided by fiber length
 Vol0 = PCSA * Lf0; ///< Muscle volume in (m3)
};

AnyMuscleModel ExtensorHallucisLongus2Par =
{
 AnyFolder &MuscleParameters = .SubjectMusPar.ExtensorHallucisLongus;
 AnyIntVar MuscleElemNo = 2; ///< The number of this element of the muscle
 AnyIntVar MuscleElemAmount = MuscleParameters.MuscleElemAmount; ///< The total amount of elements for this muscle
 F0 = .SubjectMusPar.PCSAfactor*PCSA; ///< Maximum force output at optimum fiber length
 Lf0 = MuscleParameters.OptimalFiberlength
       / cos(pi/180*MuscleParameters.Pennationangle);
 // New experimental method of splitting volume and pcsa across mus elem.
 AnyVar PCSA = 1e-2*MuscleParameters.MuscleVolume/(.ExtensorHallucisLongus1Par.Lf0 +.ExtensorHallucisLongus2Par.Lf0 +.ExtensorHallucisLongus3Par.Lf0 );///< PCSA (cm2) is calculated as muscle volume divided between muscle branches and divided by fiber length
 Vol0 = PCSA * Lf0; ///< Muscle volume in (m3)
};

AnyMuscleModel ExtensorHallucisLongus3Par =
{
 AnyFolder &MuscleParameters = .SubjectMusPar.ExtensorHallucisLongus;
 AnyIntVar MuscleElemNo = 3; ///< The number of this element of the muscle
 AnyIntVar MuscleElemAmount = MuscleParameters.MuscleElemAmount; ///< The total amount of elements for this muscle
 F0 = .SubjectMusPar.PCSAfactor*PCSA; ///< Maximum force output at optimum fiber length
 Lf0 = MuscleParameters.OptimalFiberlength
       / cos(pi/180*MuscleParameters.Pennationangle);
 // New experimental method of splitting volume and pcsa across mus elem.
 AnyVar PCSA = 1e-2*MuscleParameters.MuscleVolume/(.ExtensorHallucisLongus1Par.Lf0 +.ExtensorHallucisLongus2Par.Lf0 +.ExtensorHallucisLongus3Par.Lf0 );///< PCSA (cm2) is calculated as muscle volume divided between muscle branches and divided by fiber length
 Vol0 = PCSA * Lf0; ///< Muscle volume in (m3)
};


////////////////////////////////////////////////
//     FlexorDigitorumLongus (4 elements)     //
////////////////////////////////////////////////
AnyMuscleModel FlexorDigitorumLongus1Par =
{
 AnyFolder &MuscleParameters = .SubjectMusPar.FlexorDigitorumLongus;
 AnyIntVar MuscleElemNo = 1; ///< The number of this element of the muscle
 AnyIntVar MuscleElemAmount = MuscleParameters.MuscleElemAmount; ///< The total amount of elements for this muscle
 F0 = .SubjectMusPar.PCSAfactor*PCSA; ///< Maximum force output at optimum fiber length
 Lf0 = MuscleParameters.OptimalFiberlength
       / cos(pi/180*MuscleParameters.Pennationangle);
 // New experimental method of splitting volume and pcsa across mus elem.
 AnyVar PCSA = 1e-2*MuscleParameters.MuscleVolume/(.FlexorDigitorumLongus1Par.Lf0 +.FlexorDigitorumLongus2Par.Lf0 +.FlexorDigitorumLongus3Par.Lf0 +.FlexorDigitorumLongus4Par.Lf0 );///< PCSA (cm2) is calculated as muscle volume divided between muscle branches and divided by fiber length
 Vol0 = PCSA * Lf0; ///< Muscle volume in (m3)
};

AnyMuscleModel FlexorDigitorumLongus2Par =
{
 AnyFolder &MuscleParameters = .SubjectMusPar.FlexorDigitorumLongus;
 AnyIntVar MuscleElemNo = 2; ///< The number of this element of the muscle
 AnyIntVar MuscleElemAmount = MuscleParameters.MuscleElemAmount; ///< The total amount of elements for this muscle
 F0 = .SubjectMusPar.PCSAfactor*PCSA; ///< Maximum force output at optimum fiber length
 Lf0 = MuscleParameters.OptimalFiberlength
       / cos(pi/180*MuscleParameters.Pennationangle);
 // New experimental method of splitting volume and pcsa across mus elem.
 AnyVar PCSA = 1e-2*MuscleParameters.MuscleVolume/(.FlexorDigitorumLongus1Par.Lf0 +.FlexorDigitorumLongus2Par.Lf0 +.FlexorDigitorumLongus3Par.Lf0 +.FlexorDigitorumLongus4Par.Lf0 );///< PCSA (cm2) is calculated as muscle volume divided between muscle branches and divided by fiber length
 Vol0 = PCSA * Lf0; ///< Muscle volume in (m3)
};

AnyMuscleModel FlexorDigitorumLongus3Par =
{
 AnyFolder &MuscleParameters = .SubjectMusPar.FlexorDigitorumLongus;
 AnyIntVar MuscleElemNo = 3; ///< The number of this element of the muscle
 AnyIntVar MuscleElemAmount = MuscleParameters.MuscleElemAmount; ///< The total amount of elements for this muscle
 F0 = .SubjectMusPar.PCSAfactor*PCSA; ///< Maximum force output at optimum fiber length
 Lf0 = MuscleParameters.OptimalFiberlength
       / cos(pi/180*MuscleParameters.Pennationangle);
 // New experimental method of splitting volume and pcsa across mus elem.
 AnyVar PCSA = 1e-2*MuscleParameters.MuscleVolume/(.FlexorDigitorumLongus1Par.Lf0 +.FlexorDigitorumLongus2Par.Lf0 +.FlexorDigitorumLongus3Par.Lf0 +.FlexorDigitorumLongus4Par.Lf0 );///< PCSA (cm2) is calculated as muscle volume divided between muscle branches and divided by fiber length
 Vol0 = PCSA * Lf0; ///< Muscle volume in (m3)
};

AnyMuscleModel FlexorDigitorumLongus4Par =
{
 AnyFolder &MuscleParameters = .SubjectMusPar.FlexorDigitorumLongus;
 AnyIntVar MuscleElemNo = 4; ///< The number of this element of the muscle
 AnyIntVar MuscleElemAmount = MuscleParameters.MuscleElemAmount; ///< The total amount of elements for this muscle
 F0 = .SubjectMusPar.PCSAfactor*PCSA; ///< Maximum force output at optimum fiber length
 Lf0 = MuscleParameters.OptimalFiberlength
       / cos(pi/180*MuscleParameters.Pennationangle);
 // New experimental method of splitting volume and pcsa across mus elem.
 AnyVar PCSA = 1e-2*MuscleParameters.MuscleVolume/(.FlexorDigitorumLongus1Par.Lf0 +.FlexorDigitorumLongus2Par.Lf0 +.FlexorDigitorumLongus3Par.Lf0 +.FlexorDigitorumLongus4Par.Lf0 );///< PCSA (cm2) is calculated as muscle volume divided between muscle branches and divided by fiber length
 Vol0 = PCSA * Lf0; ///< Muscle volume in (m3)
};


///////////////////////////////////////////////
//     FlexorHallucisLongus (3 elements)     //
///////////////////////////////////////////////
AnyMuscleModel FlexorHallucisLongus1Par =
{
 AnyFolder &MuscleParameters = .SubjectMusPar.FlexorHallucisLongus;
 AnyIntVar MuscleElemNo = 1; ///< The number of this element of the muscle
 AnyIntVar MuscleElemAmount = MuscleParameters.MuscleElemAmount; ///< The total amount of elements for this muscle
 F0 = .SubjectMusPar.PCSAfactor*PCSA; ///< Maximum force output at optimum fiber length
 Lf0 = MuscleParameters.OptimalFiberlength
       / cos(pi/180*MuscleParameters.Pennationangle);
 // New experimental method of splitting volume and pcsa across mus elem.
 AnyVar PCSA = 1e-2*MuscleParameters.MuscleVolume/(.FlexorHallucisLongus1Par.Lf0 +.FlexorHallucisLongus2Par.Lf0 +.FlexorHallucisLongus3Par.Lf0 );///< PCSA (cm2) is calculated as muscle volume divided between muscle branches and divided by fiber length
 Vol0 = PCSA * Lf0; ///< Muscle volume in (m3)
};

AnyMuscleModel FlexorHallucisLongus2Par =
{
 AnyFolder &MuscleParameters = .SubjectMusPar.FlexorHallucisLongus;
 AnyIntVar MuscleElemNo = 2; ///< The number of this element of the muscle
 AnyIntVar MuscleElemAmount = MuscleParameters.MuscleElemAmount; ///< The total amount of elements for this muscle
 F0 = .SubjectMusPar.PCSAfactor*PCSA; ///< Maximum force output at optimum fiber length
 Lf0 = MuscleParameters.OptimalFiberlength
       / cos(pi/180*MuscleParameters.Pennationangle);
 // New experimental method of splitting volume and pcsa across mus elem.
 AnyVar PCSA = 1e-2*MuscleParameters.MuscleVolume/(.FlexorHallucisLongus1Par.Lf0 +.FlexorHallucisLongus2Par.Lf0 +.FlexorHallucisLongus3Par.Lf0 );///< PCSA (cm2) is calculated as muscle volume divided between muscle branches and divided by fiber length
 Vol0 = PCSA * Lf0; ///< Muscle volume in (m3)
};

AnyMuscleModel FlexorHallucisLongus3Par =
{
 AnyFolder &MuscleParameters = .SubjectMusPar.FlexorHallucisLongus;
 AnyIntVar MuscleElemNo = 3; ///< The number of this element of the muscle
 AnyIntVar MuscleElemAmount = MuscleParameters.MuscleElemAmount; ///< The total amount of elements for this muscle
 F0 = .SubjectMusPar.PCSAfactor*PCSA; ///< Maximum force output at optimum fiber length
 Lf0 = MuscleParameters.OptimalFiberlength
       / cos(pi/180*MuscleParameters.Pennationangle);
 // New experimental method of splitting volume and pcsa across mus elem.
 AnyVar PCSA = 1e-2*MuscleParameters.MuscleVolume/(.FlexorHallucisLongus1Par.Lf0 +.FlexorHallucisLongus2Par.Lf0 +.FlexorHallucisLongus3Par.Lf0 );///< PCSA (cm2) is calculated as muscle volume divided between muscle branches and divided by fiber length
 Vol0 = PCSA * Lf0; ///< Muscle volume in (m3)
};


/////////////////////////////////////////////////
//     GastrocnemiusLateralis (1 element )     //
/////////////////////////////////////////////////
AnyMuscleModel GastrocnemiusLateralis1Par =
{
 AnyFolder &MuscleParameters = .SubjectMusPar.GastrocnemiusLateralis;
 AnyIntVar MuscleElemNo = 1; ///< The number of this element of the muscle
 AnyIntVar MuscleElemAmount = MuscleParameters.MuscleElemAmount; ///< The total amount of elements for this muscle
 F0 = .SubjectMusPar.PCSAfactor*PCSA; ///< Maximum force output at optimum fiber length
 Lf0 = MuscleParameters.OptimalFiberlength
       / cos(pi/180*MuscleParameters.Pennationangle);
 // New experimental method of splitting volume and pcsa across mus elem.
 AnyVar PCSA = 1e-2*MuscleParameters.MuscleVolume/(Lf0);///< PCSA (cm2) is calculated as muscle volume divided between muscle branches and divided by fiber length
 Vol0 = PCSA * Lf0; ///< Muscle volume in (m3)
};


////////////////////////////////////////////////
//     GastrocnemiusMedialis (1 element )     //
////////////////////////////////////////////////
AnyMuscleModel GastrocnemiusMedialis1Par =
{
 AnyFolder &MuscleParameters = .SubjectMusPar.GastrocnemiusMedialis;
 AnyIntVar MuscleElemNo = 1; ///< The number of this element of the muscle
 AnyIntVar MuscleElemAmount = MuscleParameters.MuscleElemAmount; ///< The total amount of elements for this muscle
 F0 = .SubjectMusPar.PCSAfactor*PCSA; ///< Maximum force output at optimum fiber length
 Lf0 = MuscleParameters.OptimalFiberlength
       / cos(pi/180*MuscleParameters.Pennationangle);
 // New experimental method of splitting volume and pcsa across mus elem.
 AnyVar PCSA = 1e-2*MuscleParameters.MuscleVolume/(Lf0);///< PCSA (cm2) is calculated as muscle volume divided between muscle branches and divided by fiber length
 Vol0 = PCSA * Lf0; ///< Muscle volume in (m3)
};


///////////////////////////////////////////
//     GemellusInferior (1 element )     //
///////////////////////////////////////////
AnyMuscleModel GemellusInferior1Par =
{
 AnyFolder &MuscleParameters = .SubjectMusPar.GemellusInferior;
 AnyIntVar MuscleElemNo = 1; ///< The number of this element of the muscle
 AnyIntVar MuscleElemAmount = MuscleParameters.MuscleElemAmount; ///< The total amount of elements for this muscle
 F0 = .SubjectMusPar.PCSAfactor*PCSA; ///< Maximum force output at optimum fiber length
 Lf0 = MuscleParameters.OptimalFiberlength
       / cos(pi/180*MuscleParameters.Pennationangle);
 // New experimental method of splitting volume and pcsa across mus elem.
 AnyVar PCSA = 1e-2*MuscleParameters.MuscleVolume/(Lf0);///< PCSA (cm2) is calculated as muscle volume divided between muscle branches and divided by fiber length
 Vol0 = PCSA * Lf0; ///< Muscle volume in (m3)
};


///////////////////////////////////////////
//     GemellusSuperior (1 element )     //
///////////////////////////////////////////
AnyMuscleModel GemellusSuperior1Par =
{
 AnyFolder &MuscleParameters = .SubjectMusPar.GemellusSuperior;
 AnyIntVar MuscleElemNo = 1; ///< The number of this element of the muscle
 AnyIntVar MuscleElemAmount = MuscleParameters.MuscleElemAmount; ///< The total amount of elements for this muscle
 F0 = .SubjectMusPar.PCSAfactor*PCSA; ///< Maximum force output at optimum fiber length
 Lf0 = MuscleParameters.OptimalFiberlength
       / cos(pi/180*MuscleParameters.Pennationangle);
 // New experimental method of splitting volume and pcsa across mus elem.
 AnyVar PCSA = 1e-2*MuscleParameters.MuscleVolume/(Lf0);///< PCSA (cm2) is calculated as muscle volume divided between muscle branches and divided by fiber length
 Vol0 = PCSA * Lf0; ///< Muscle volume in (m3)
};


/////////////////////////////////////////////////
//     GluteusMaximusSuperior (6 elements)     //
/////////////////////////////////////////////////
AnyMuscleModel GluteusMaximusSuperior1Par =
{
 AnyFolder &MuscleParameters = .SubjectMusPar.GluteusMaximusSuperior;
 AnyIntVar MuscleElemNo = 1; ///< The number of this element of the muscle
 AnyIntVar MuscleElemAmount = MuscleParameters.MuscleElemAmount; ///< The total amount of elements for this muscle
 F0 = .SubjectMusPar.PCSAfactor*PCSA; ///< Maximum force output at optimum fiber length
 Lf0 = MuscleParameters.OptimalFiberlength
       / cos(pi/180*MuscleParameters.Pennationangle);
 // New experimental method of splitting volume and pcsa across mus elem.
 AnyVar PCSA = 1e-2*MuscleParameters.MuscleVolume/(.GluteusMaximusSuperior1Par.Lf0 +.GluteusMaximusSuperior2Par.Lf0 +.GluteusMaximusSuperior3Par.Lf0 +.GluteusMaximusSuperior4Par.Lf0 +.GluteusMaximusSuperior5Par.Lf0 +.GluteusMaximusSuperior6Par.Lf0 );///< PCSA (cm2) is calculated as muscle volume divided between muscle branches and divided by fiber length
 Vol0 = PCSA * Lf0; ///< Muscle volume in (m3)
};

AnyMuscleModel GluteusMaximusSuperior2Par =
{
 AnyFolder &MuscleParameters = .SubjectMusPar.GluteusMaximusSuperior;
 AnyIntVar MuscleElemNo = 2; ///< The number of this element of the muscle
 AnyIntVar MuscleElemAmount = MuscleParameters.MuscleElemAmount; ///< The total amount of elements for this muscle
 F0 = .SubjectMusPar.PCSAfactor*PCSA; ///< Maximum force output at optimum fiber length
 Lf0 = MuscleParameters.OptimalFiberlength
       / cos(pi/180*MuscleParameters.Pennationangle);
 // New experimental method of splitting volume and pcsa across mus elem.
 AnyVar PCSA = 1e-2*MuscleParameters.MuscleVolume/(.GluteusMaximusSuperior1Par.Lf0 +.GluteusMaximusSuperior2Par.Lf0 +.GluteusMaximusSuperior3Par.Lf0 +.GluteusMaximusSuperior4Par.Lf0 +.GluteusMaximusSuperior5Par.Lf0 +.GluteusMaximusSuperior6Par.Lf0 );///< PCSA (cm2) is calculated as muscle volume divided between muscle branches and divided by fiber length
 Vol0 = PCSA * Lf0; ///< Muscle volume in (m3)
};

AnyMuscleModel GluteusMaximusSuperior3Par =
{
 AnyFolder &MuscleParameters = .SubjectMusPar.GluteusMaximusSuperior;
 AnyIntVar MuscleElemNo = 3; ///< The number of this element of the muscle
 AnyIntVar MuscleElemAmount = MuscleParameters.MuscleElemAmount; ///< The total amount of elements for this muscle
 F0 = .SubjectMusPar.PCSAfactor*PCSA; ///< Maximum force output at optimum fiber length
 Lf0 = MuscleParameters.OptimalFiberlength
       / cos(pi/180*MuscleParameters.Pennationangle);
 // New experimental method of splitting volume and pcsa across mus elem.
 AnyVar PCSA = 1e-2*MuscleParameters.MuscleVolume/(.GluteusMaximusSuperior1Par.Lf0 +.GluteusMaximusSuperior2Par.Lf0 +.GluteusMaximusSuperior3Par.Lf0 +.GluteusMaximusSuperior4Par.Lf0 +.GluteusMaximusSuperior5Par.Lf0 +.GluteusMaximusSuperior6Par.Lf0 );///< PCSA (cm2) is calculated as muscle volume divided between muscle branches and divided by fiber length
 Vol0 = PCSA * Lf0; ///< Muscle volume in (m3)
};

AnyMuscleModel GluteusMaximusSuperior4Par =
{
 AnyFolder &MuscleParameters = .SubjectMusPar.GluteusMaximusSuperior;
 AnyIntVar MuscleElemNo = 4; ///< The number of this element of the muscle
 AnyIntVar MuscleElemAmount = MuscleParameters.MuscleElemAmount; ///< The total amount of elements for this muscle
 F0 = .SubjectMusPar.PCSAfactor*PCSA; ///< Maximum force output at optimum fiber length
 Lf0 = MuscleParameters.OptimalFiberlength
       / cos(pi/180*MuscleParameters.Pennationangle);
 // New experimental method of splitting volume and pcsa across mus elem.
 AnyVar PCSA = 1e-2*MuscleParameters.MuscleVolume/(.GluteusMaximusSuperior1Par.Lf0 +.GluteusMaximusSuperior2Par.Lf0 +.GluteusMaximusSuperior3Par.Lf0 +.GluteusMaximusSuperior4Par.Lf0 +.GluteusMaximusSuperior5Par.Lf0 +.GluteusMaximusSuperior6Par.Lf0 );///< PCSA (cm2) is calculated as muscle volume divided between muscle branches and divided by fiber length
 Vol0 = PCSA * Lf0; ///< Muscle volume in (m3)
};

AnyMuscleModel GluteusMaximusSuperior5Par =
{
 AnyFolder &MuscleParameters = .SubjectMusPar.GluteusMaximusSuperior;
 AnyIntVar MuscleElemNo = 5; ///< The number of this element of the muscle
 AnyIntVar MuscleElemAmount = MuscleParameters.MuscleElemAmount; ///< The total amount of elements for this muscle
 F0 = .SubjectMusPar.PCSAfactor*PCSA; ///< Maximum force output at optimum fiber length
 Lf0 = MuscleParameters.OptimalFiberlength
       / cos(pi/180*MuscleParameters.Pennationangle);
 // New experimental method of splitting volume and pcsa across mus elem.
 AnyVar PCSA = 1e-2*MuscleParameters.MuscleVolume/(.GluteusMaximusSuperior1Par.Lf0 +.GluteusMaximusSuperior2Par.Lf0 +.GluteusMaximusSuperior3Par.Lf0 +.GluteusMaximusSuperior4Par.Lf0 +.GluteusMaximusSuperior5Par.Lf0 +.GluteusMaximusSuperior6Par.Lf0 );///< PCSA (cm2) is calculated as muscle volume divided between muscle branches and divided by fiber length
 Vol0 = PCSA * Lf0; ///< Muscle volume in (m3)
};

AnyMuscleModel GluteusMaximusSuperior6Par =
{
 AnyFolder &MuscleParameters = .SubjectMusPar.GluteusMaximusSuperior;
 AnyIntVar MuscleElemNo = 6; ///< The number of this element of the muscle
 AnyIntVar MuscleElemAmount = MuscleParameters.MuscleElemAmount; ///< The total amount of elements for this muscle
 F0 = .SubjectMusPar.PCSAfactor*PCSA; ///< Maximum force output at optimum fiber length
 Lf0 = MuscleParameters.OptimalFiberlength
       / cos(pi/180*MuscleParameters.Pennationangle);
 // New experimental method of splitting volume and pcsa across mus elem.
 AnyVar PCSA = 1e-2*MuscleParameters.MuscleVolume/(.GluteusMaximusSuperior1Par.Lf0 +.GluteusMaximusSuperior2Par.Lf0 +.GluteusMaximusSuperior3Par.Lf0 +.GluteusMaximusSuperior4Par.Lf0 +.GluteusMaximusSuperior5Par.Lf0 +.GluteusMaximusSuperior6Par.Lf0 );///< PCSA (cm2) is calculated as muscle volume divided between muscle branches and divided by fiber length
 Vol0 = PCSA * Lf0; ///< Muscle volume in (m3)
};


/////////////////////////////////////////////////
//     GluteusMaximusInferior (6 elements)     //
/////////////////////////////////////////////////
AnyMuscleModel GluteusMaximusInferior1Par =
{
 AnyFolder &MuscleParameters = .SubjectMusPar.GluteusMaximusInferior;
 AnyIntVar MuscleElemNo = 1; ///< The number of this element of the muscle
 AnyIntVar MuscleElemAmount = MuscleParameters.MuscleElemAmount; ///< The total amount of elements for this muscle
 F0 = .SubjectMusPar.PCSAfactor*PCSA; ///< Maximum force output at optimum fiber length
 Lf0 = MuscleParameters.OptimalFiberlength
       / cos(pi/180*MuscleParameters.Pennationangle);
 // New experimental method of splitting volume and pcsa across mus elem.
 AnyVar PCSA = 1e-2*MuscleParameters.MuscleVolume/(.GluteusMaximusInferior1Par.Lf0 +.GluteusMaximusInferior2Par.Lf0 +.GluteusMaximusInferior3Par.Lf0 +.GluteusMaximusInferior4Par.Lf0 +.GluteusMaximusInferior5Par.Lf0 +.GluteusMaximusInferior6Par.Lf0 );///< PCSA (cm2) is calculated as muscle volume divided between muscle branches and divided by fiber length
 Vol0 = PCSA * Lf0; ///< Muscle volume in (m3)
};

AnyMuscleModel GluteusMaximusInferior2Par =
{
 AnyFolder &MuscleParameters = .SubjectMusPar.GluteusMaximusInferior;
 AnyIntVar MuscleElemNo = 2; ///< The number of this element of the muscle
 AnyIntVar MuscleElemAmount = MuscleParameters.MuscleElemAmount; ///< The total amount of elements for this muscle
 F0 = .SubjectMusPar.PCSAfactor*PCSA; ///< Maximum force output at optimum fiber length
 Lf0 = MuscleParameters.OptimalFiberlength
       / cos(pi/180*MuscleParameters.Pennationangle);
 // New experimental method of splitting volume and pcsa across mus elem.
 AnyVar PCSA = 1e-2*MuscleParameters.MuscleVolume/(.GluteusMaximusInferior1Par.Lf0 +.GluteusMaximusInferior2Par.Lf0 +.GluteusMaximusInferior3Par.Lf0 +.GluteusMaximusInferior4Par.Lf0 +.GluteusMaximusInferior5Par.Lf0 +.GluteusMaximusInferior6Par.Lf0 );///< PCSA (cm2) is calculated as muscle volume divided between muscle branches and divided by fiber length
 Vol0 = PCSA * Lf0; ///< Muscle volume in (m3)
};

AnyMuscleModel GluteusMaximusInferior3Par =
{
 AnyFolder &MuscleParameters = .SubjectMusPar.GluteusMaximusInferior;
 AnyIntVar MuscleElemNo = 3; ///< The number of this element of the muscle
 AnyIntVar MuscleElemAmount = MuscleParameters.MuscleElemAmount; ///< The total amount of elements for this muscle
 F0 = .SubjectMusPar.PCSAfactor*PCSA; ///< Maximum force output at optimum fiber length
 Lf0 = MuscleParameters.OptimalFiberlength
       / cos(pi/180*MuscleParameters.Pennationangle);
 // New experimental method of splitting volume and pcsa across mus elem.
 AnyVar PCSA = 1e-2*MuscleParameters.MuscleVolume/(.GluteusMaximusInferior1Par.Lf0 +.GluteusMaximusInferior2Par.Lf0 +.GluteusMaximusInferior3Par.Lf0 +.GluteusMaximusInferior4Par.Lf0 +.GluteusMaximusInferior5Par.Lf0 +.GluteusMaximusInferior6Par.Lf0 );///< PCSA (cm2) is calculated as muscle volume divided between muscle branches and divided by fiber length
 Vol0 = PCSA * Lf0; ///< Muscle volume in (m3)
};

AnyMuscleModel GluteusMaximusInferior4Par =
{
 AnyFolder &MuscleParameters = .SubjectMusPar.GluteusMaximusInferior;
 AnyIntVar MuscleElemNo = 4; ///< The number of this element of the muscle
 AnyIntVar MuscleElemAmount = MuscleParameters.MuscleElemAmount; ///< The total amount of elements for this muscle
 F0 = .SubjectMusPar.PCSAfactor*PCSA; ///< Maximum force output at optimum fiber length
 Lf0 = MuscleParameters.OptimalFiberlength
       / cos(pi/180*MuscleParameters.Pennationangle);
 // New experimental method of splitting volume and pcsa across mus elem.
 AnyVar PCSA = 1e-2*MuscleParameters.MuscleVolume/(.GluteusMaximusInferior1Par.Lf0 +.GluteusMaximusInferior2Par.Lf0 +.GluteusMaximusInferior3Par.Lf0 +.GluteusMaximusInferior4Par.Lf0 +.GluteusMaximusInferior5Par.Lf0 +.GluteusMaximusInferior6Par.Lf0 );///< PCSA (cm2) is calculated as muscle volume divided between muscle branches and divided by fiber length
 Vol0 = PCSA * Lf0; ///< Muscle volume in (m3)
};

AnyMuscleModel GluteusMaximusInferior5Par =
{
 AnyFolder &MuscleParameters = .SubjectMusPar.GluteusMaximusInferior;
 AnyIntVar MuscleElemNo = 5; ///< The number of this element of the muscle
 AnyIntVar MuscleElemAmount = MuscleParameters.MuscleElemAmount; ///< The total amount of elements for this muscle
 F0 = .SubjectMusPar.PCSAfactor*PCSA; ///< Maximum force output at optimum fiber length
 Lf0 = MuscleParameters.OptimalFiberlength
       / cos(pi/180*MuscleParameters.Pennationangle);
 // New experimental method of splitting volume and pcsa across mus elem.
 AnyVar PCSA = 1e-2*MuscleParameters.MuscleVolume/(.GluteusMaximusInferior1Par.Lf0 +.GluteusMaximusInferior2Par.Lf0 +.GluteusMaximusInferior3Par.Lf0 +.GluteusMaximusInferior4Par.Lf0 +.GluteusMaximusInferior5Par.Lf0 +.GluteusMaximusInferior6Par.Lf0 );///< PCSA (cm2) is calculated as muscle volume divided between muscle branches and divided by fiber length
 Vol0 = PCSA * Lf0; ///< Muscle volume in (m3)
};

AnyMuscleModel GluteusMaximusInferior6Par =
{
 AnyFolder &MuscleParameters = .SubjectMusPar.GluteusMaximusInferior;
 AnyIntVar MuscleElemNo = 6; ///< The number of this element of the muscle
 AnyIntVar MuscleElemAmount = MuscleParameters.MuscleElemAmount; ///< The total amount of elements for this muscle
 F0 = .SubjectMusPar.PCSAfactor*PCSA; ///< Maximum force output at optimum fiber length
 Lf0 = MuscleParameters.OptimalFiberlength
       / cos(pi/180*MuscleParameters.Pennationangle);
 // New experimental method of splitting volume and pcsa across mus elem.
 AnyVar PCSA = 1e-2*MuscleParameters.MuscleVolume/(.GluteusMaximusInferior1Par.Lf0 +.GluteusMaximusInferior2Par.Lf0 +.GluteusMaximusInferior3Par.Lf0 +.GluteusMaximusInferior4Par.Lf0 +.GluteusMaximusInferior5Par.Lf0 +.GluteusMaximusInferior6Par.Lf0 );///< PCSA (cm2) is calculated as muscle volume divided between muscle branches and divided by fiber length
 Vol0 = PCSA * Lf0; ///< Muscle volume in (m3)
};


////////////////////////////////////////////////
//     GluteusMediusAnterior (6 elements)     //
////////////////////////////////////////////////
AnyMuscleModel GluteusMediusAnterior1Par =
{
 AnyFolder &MuscleParameters = .SubjectMusPar.GluteusMediusAnterior;
 AnyIntVar MuscleElemNo = 1; ///< The number of this element of the muscle
 AnyIntVar MuscleElemAmount = MuscleParameters.MuscleElemAmount; ///< The total amount of elements for this muscle
 F0 = .SubjectMusPar.PCSAfactor*PCSA; ///< Maximum force output at optimum fiber length
 Lf0 = MuscleParameters.OptimalFiberlength
       / cos(pi/180*MuscleParameters.Pennationangle);
 // New experimental method of splitting volume and pcsa across mus elem.
 AnyVar PCSA = 1e-2*MuscleParameters.MuscleVolume/(.GluteusMediusAnterior1Par.Lf0 +.GluteusMediusAnterior2Par.Lf0 +.GluteusMediusAnterior3Par.Lf0 +.GluteusMediusAnterior4Par.Lf0 +.GluteusMediusAnterior5Par.Lf0 +.GluteusMediusAnterior6Par.Lf0 );///< PCSA (cm2) is calculated as muscle volume divided between muscle branches and divided by fiber length
 Vol0 = PCSA * Lf0; ///< Muscle volume in (m3)
};

AnyMuscleModel GluteusMediusAnterior2Par =
{
 AnyFolder &MuscleParameters = .SubjectMusPar.GluteusMediusAnterior;
 AnyIntVar MuscleElemNo = 2; ///< The number of this element of the muscle
 AnyIntVar MuscleElemAmount = MuscleParameters.MuscleElemAmount; ///< The total amount of elements for this muscle
 F0 = .SubjectMusPar.PCSAfactor*PCSA; ///< Maximum force output at optimum fiber length
 Lf0 = MuscleParameters.OptimalFiberlength
       / cos(pi/180*MuscleParameters.Pennationangle);
 // New experimental method of splitting volume and pcsa across mus elem.
 AnyVar PCSA = 1e-2*MuscleParameters.MuscleVolume/(.GluteusMediusAnterior1Par.Lf0 +.GluteusMediusAnterior2Par.Lf0 +.GluteusMediusAnterior3Par.Lf0 +.GluteusMediusAnterior4Par.Lf0 +.GluteusMediusAnterior5Par.Lf0 +.GluteusMediusAnterior6Par.Lf0 );///< PCSA (cm2) is calculated as muscle volume divided between muscle branches and divided by fiber length
 Vol0 = PCSA * Lf0; ///< Muscle volume in (m3)
};

AnyMuscleModel GluteusMediusAnterior3Par =
{
 AnyFolder &MuscleParameters = .SubjectMusPar.GluteusMediusAnterior;
 AnyIntVar MuscleElemNo = 3; ///< The number of this element of the muscle
 AnyIntVar MuscleElemAmount = MuscleParameters.MuscleElemAmount; ///< The total amount of elements for this muscle
 F0 = .SubjectMusPar.PCSAfactor*PCSA; ///< Maximum force output at optimum fiber length
 Lf0 = MuscleParameters.OptimalFiberlength
       / cos(pi/180*MuscleParameters.Pennationangle);
 // New experimental method of splitting volume and pcsa across mus elem.
 AnyVar PCSA = 1e-2*MuscleParameters.MuscleVolume/(.GluteusMediusAnterior1Par.Lf0 +.GluteusMediusAnterior2Par.Lf0 +.GluteusMediusAnterior3Par.Lf0 +.GluteusMediusAnterior4Par.Lf0 +.GluteusMediusAnterior5Par.Lf0 +.GluteusMediusAnterior6Par.Lf0 );///< PCSA (cm2) is calculated as muscle volume divided between muscle branches and divided by fiber length
 Vol0 = PCSA * Lf0; ///< Muscle volume in (m3)
};

AnyMuscleModel GluteusMediusAnterior4Par =
{
 AnyFolder &MuscleParameters = .SubjectMusPar.GluteusMediusAnterior;
 AnyIntVar MuscleElemNo = 4; ///< The number of this element of the muscle
 AnyIntVar MuscleElemAmount = MuscleParameters.MuscleElemAmount; ///< The total amount of elements for this muscle
 F0 = .SubjectMusPar.PCSAfactor*PCSA; ///< Maximum force output at optimum fiber length
 Lf0 = MuscleParameters.OptimalFiberlength
       / cos(pi/180*MuscleParameters.Pennationangle);
 // New experimental method of splitting volume and pcsa across mus elem.
 AnyVar PCSA = 1e-2*MuscleParameters.MuscleVolume/(.GluteusMediusAnterior1Par.Lf0 +.GluteusMediusAnterior2Par.Lf0 +.GluteusMediusAnterior3Par.Lf0 +.GluteusMediusAnterior4Par.Lf0 +.GluteusMediusAnterior5Par.Lf0 +.GluteusMediusAnterior6Par.Lf0 );///< PCSA (cm2) is calculated as muscle volume divided between muscle branches and divided by fiber length
 Vol0 = PCSA * Lf0; ///< Muscle volume in (m3)
};

AnyMuscleModel GluteusMediusAnterior5Par =
{
 AnyFolder &MuscleParameters = .SubjectMusPar.GluteusMediusAnterior;
 AnyIntVar MuscleElemNo = 5; ///< The number of this element of the muscle
 AnyIntVar MuscleElemAmount = MuscleParameters.MuscleElemAmount; ///< The total amount of elements for this muscle
 F0 = .SubjectMusPar.PCSAfactor*PCSA; ///< Maximum force output at optimum fiber length
 Lf0 = MuscleParameters.OptimalFiberlength
       / cos(pi/180*MuscleParameters.Pennationangle);
 // New experimental method of splitting volume and pcsa across mus elem.
 AnyVar PCSA = 1e-2*MuscleParameters.MuscleVolume/(.GluteusMediusAnterior1Par.Lf0 +.GluteusMediusAnterior2Par.Lf0 +.GluteusMediusAnterior3Par.Lf0 +.GluteusMediusAnterior4Par.Lf0 +.GluteusMediusAnterior5Par.Lf0 +.GluteusMediusAnterior6Par.Lf0 );///< PCSA (cm2) is calculated as muscle volume divided between muscle branches and divided by fiber length
 Vol0 = PCSA * Lf0; ///< Muscle volume in (m3)
};

AnyMuscleModel GluteusMediusAnterior6Par =
{
 AnyFolder &MuscleParameters = .SubjectMusPar.GluteusMediusAnterior;
 AnyIntVar MuscleElemNo = 6; ///< The number of this element of the muscle
 AnyIntVar MuscleElemAmount = MuscleParameters.MuscleElemAmount; ///< The total amount of elements for this muscle
 F0 = .SubjectMusPar.PCSAfactor*PCSA; ///< Maximum force output at optimum fiber length
 Lf0 = MuscleParameters.OptimalFiberlength
       / cos(pi/180*MuscleParameters.Pennationangle);
 // New experimental method of splitting volume and pcsa across mus elem.
 AnyVar PCSA = 1e-2*MuscleParameters.MuscleVolume/(.GluteusMediusAnterior1Par.Lf0 +.GluteusMediusAnterior2Par.Lf0 +.GluteusMediusAnterior3Par.Lf0 +.GluteusMediusAnterior4Par.Lf0 +.GluteusMediusAnterior5Par.Lf0 +.GluteusMediusAnterior6Par.Lf0 );///< PCSA (cm2) is calculated as muscle volume divided between muscle branches and divided by fiber length
 Vol0 = PCSA * Lf0; ///< Muscle volume in (m3)
};


/////////////////////////////////////////////////
//     GluteusMediusPosterior (6 elements)     //
/////////////////////////////////////////////////
AnyMuscleModel GluteusMediusPosterior1Par =
{
 AnyFolder &MuscleParameters = .SubjectMusPar.GluteusMediusPosterior;
 AnyIntVar MuscleElemNo = 1; ///< The number of this element of the muscle
 AnyIntVar MuscleElemAmount = MuscleParameters.MuscleElemAmount; ///< The total amount of elements for this muscle
 F0 = .SubjectMusPar.PCSAfactor*PCSA; ///< Maximum force output at optimum fiber length
 Lf0 = MuscleParameters.OptimalFiberlength
       / cos(pi/180*MuscleParameters.Pennationangle);
 // New experimental method of splitting volume and pcsa across mus elem.
 AnyVar PCSA = 1e-2*MuscleParameters.MuscleVolume/(.GluteusMediusPosterior1Par.Lf0 +.GluteusMediusPosterior2Par.Lf0 +.GluteusMediusPosterior3Par.Lf0 +.GluteusMediusPosterior4Par.Lf0 +.GluteusMediusPosterior5Par.Lf0 +.GluteusMediusPosterior6Par.Lf0 );///< PCSA (cm2) is calculated as muscle volume divided between muscle branches and divided by fiber length
 Vol0 = PCSA * Lf0; ///< Muscle volume in (m3)
};

AnyMuscleModel GluteusMediusPosterior2Par =
{
 AnyFolder &MuscleParameters = .SubjectMusPar.GluteusMediusPosterior;
 AnyIntVar MuscleElemNo = 2; ///< The number of this element of the muscle
 AnyIntVar MuscleElemAmount = MuscleParameters.MuscleElemAmount; ///< The total amount of elements for this muscle
 F0 = .SubjectMusPar.PCSAfactor*PCSA; ///< Maximum force output at optimum fiber length
 Lf0 = MuscleParameters.OptimalFiberlength
       / cos(pi/180*MuscleParameters.Pennationangle);
 // New experimental method of splitting volume and pcsa across mus elem.
 AnyVar PCSA = 1e-2*MuscleParameters.MuscleVolume/(.GluteusMediusPosterior1Par.Lf0 +.GluteusMediusPosterior2Par.Lf0 +.GluteusMediusPosterior3Par.Lf0 +.GluteusMediusPosterior4Par.Lf0 +.GluteusMediusPosterior5Par.Lf0 +.GluteusMediusPosterior6Par.Lf0 );///< PCSA (cm2) is calculated as muscle volume divided between muscle branches and divided by fiber length
 Vol0 = PCSA * Lf0; ///< Muscle volume in (m3)
};

AnyMuscleModel GluteusMediusPosterior3Par =
{
 AnyFolder &MuscleParameters = .SubjectMusPar.GluteusMediusPosterior;
 AnyIntVar MuscleElemNo = 3; ///< The number of this element of the muscle
 AnyIntVar MuscleElemAmount = MuscleParameters.MuscleElemAmount; ///< The total amount of elements for this muscle
 F0 = .SubjectMusPar.PCSAfactor*PCSA; ///< Maximum force output at optimum fiber length
 Lf0 = MuscleParameters.OptimalFiberlength
       / cos(pi/180*MuscleParameters.Pennationangle);
 // New experimental method of splitting volume and pcsa across mus elem.
 AnyVar PCSA = 1e-2*MuscleParameters.MuscleVolume/(.GluteusMediusPosterior1Par.Lf0 +.GluteusMediusPosterior2Par.Lf0 +.GluteusMediusPosterior3Par.Lf0 +.GluteusMediusPosterior4Par.Lf0 +.GluteusMediusPosterior5Par.Lf0 +.GluteusMediusPosterior6Par.Lf0 );///< PCSA (cm2) is calculated as muscle volume divided between muscle branches and divided by fiber length
 Vol0 = PCSA * Lf0; ///< Muscle volume in (m3)
};

AnyMuscleModel GluteusMediusPosterior4Par =
{
 AnyFolder &MuscleParameters = .SubjectMusPar.GluteusMediusPosterior;
 AnyIntVar MuscleElemNo = 4; ///< The number of this element of the muscle
 AnyIntVar MuscleElemAmount = MuscleParameters.MuscleElemAmount; ///< The total amount of elements for this muscle
 F0 = .SubjectMusPar.PCSAfactor*PCSA; ///< Maximum force output at optimum fiber length
 Lf0 = MuscleParameters.OptimalFiberlength
       / cos(pi/180*MuscleParameters.Pennationangle);
 // New experimental method of splitting volume and pcsa across mus elem.
 AnyVar PCSA = 1e-2*MuscleParameters.MuscleVolume/(.GluteusMediusPosterior1Par.Lf0 +.GluteusMediusPosterior2Par.Lf0 +.GluteusMediusPosterior3Par.Lf0 +.GluteusMediusPosterior4Par.Lf0 +.GluteusMediusPosterior5Par.Lf0 +.GluteusMediusPosterior6Par.Lf0 );///< PCSA (cm2) is calculated as muscle volume divided between muscle branches and divided by fiber length
 Vol0 = PCSA * Lf0; ///< Muscle volume in (m3)
};

AnyMuscleModel GluteusMediusPosterior5Par =
{
 AnyFolder &MuscleParameters = .SubjectMusPar.GluteusMediusPosterior;
 AnyIntVar MuscleElemNo = 5; ///< The number of this element of the muscle
 AnyIntVar MuscleElemAmount = MuscleParameters.MuscleElemAmount; ///< The total amount of elements for this muscle
 F0 = .SubjectMusPar.PCSAfactor*PCSA; ///< Maximum force output at optimum fiber length
 Lf0 = MuscleParameters.OptimalFiberlength
       / cos(pi/180*MuscleParameters.Pennationangle);
 // New experimental method of splitting volume and pcsa across mus elem.
 AnyVar PCSA = 1e-2*MuscleParameters.MuscleVolume/(.GluteusMediusPosterior1Par.Lf0 +.GluteusMediusPosterior2Par.Lf0 +.GluteusMediusPosterior3Par.Lf0 +.GluteusMediusPosterior4Par.Lf0 +.GluteusMediusPosterior5Par.Lf0 +.GluteusMediusPosterior6Par.Lf0 );///< PCSA (cm2) is calculated as muscle volume divided between muscle branches and divided by fiber length
 Vol0 = PCSA * Lf0; ///< Muscle volume in (m3)
};

AnyMuscleModel GluteusMediusPosterior6Par =
{
 AnyFolder &MuscleParameters = .SubjectMusPar.GluteusMediusPosterior;
 AnyIntVar MuscleElemNo = 6; ///< The number of this element of the muscle
 AnyIntVar MuscleElemAmount = MuscleParameters.MuscleElemAmount; ///< The total amount of elements for this muscle
 F0 = .SubjectMusPar.PCSAfactor*PCSA; ///< Maximum force output at optimum fiber length
 Lf0 = MuscleParameters.OptimalFiberlength
       / cos(pi/180*MuscleParameters.Pennationangle);
 // New experimental method of splitting volume and pcsa across mus elem.
 AnyVar PCSA = 1e-2*MuscleParameters.MuscleVolume/(.GluteusMediusPosterior1Par.Lf0 +.GluteusMediusPosterior2Par.Lf0 +.GluteusMediusPosterior3Par.Lf0 +.GluteusMediusPosterior4Par.Lf0 +.GluteusMediusPosterior5Par.Lf0 +.GluteusMediusPosterior6Par.Lf0 );///< PCSA (cm2) is calculated as muscle volume divided between muscle branches and divided by fiber length
 Vol0 = PCSA * Lf0; ///< Muscle volume in (m3)
};


/////////////////////////////////////////////////
//     GluteusMinimusAnterior (1 element )     //
/////////////////////////////////////////////////
AnyMuscleModel GluteusMinimusAnterior1Par =
{
 AnyFolder &MuscleParameters = .SubjectMusPar.GluteusMinimusAnterior;
 AnyIntVar MuscleElemNo = 1; ///< The number of this element of the muscle
 AnyIntVar MuscleElemAmount = MuscleParameters.MuscleElemAmount; ///< The total amount of elements for this muscle
 F0 = .SubjectMusPar.PCSAfactor*PCSA; ///< Maximum force output at optimum fiber length
 Lf0 = MuscleParameters.OptimalFiberlength
       / cos(pi/180*MuscleParameters.Pennationangle);
 // New experimental method of splitting volume and pcsa across mus elem.
 AnyVar PCSA = 1e-2*MuscleParameters.MuscleVolume/(Lf0);///< PCSA (cm2) is calculated as muscle volume divided between muscle branches and divided by fiber length
 Vol0 = PCSA * Lf0; ///< Muscle volume in (m3)
};


////////////////////////////////////////////
//     GluteusMinimusMid (1 element )     //
////////////////////////////////////////////
AnyMuscleModel GluteusMinimusMid1Par =
{
 AnyFolder &MuscleParameters = .SubjectMusPar.GluteusMinimusMid;
 AnyIntVar MuscleElemNo = 1; ///< The number of this element of the muscle
 AnyIntVar MuscleElemAmount = MuscleParameters.MuscleElemAmount; ///< The total amount of elements for this muscle
 F0 = .SubjectMusPar.PCSAfactor*PCSA; ///< Maximum force output at optimum fiber length
 Lf0 = MuscleParameters.OptimalFiberlength
       / cos(pi/180*MuscleParameters.Pennationangle);
 // New experimental method of splitting volume and pcsa across mus elem.
 AnyVar PCSA = 1e-2*MuscleParameters.MuscleVolume/(Lf0);///< PCSA (cm2) is calculated as muscle volume divided between muscle branches and divided by fiber length
 Vol0 = PCSA * Lf0; ///< Muscle volume in (m3)
};


//////////////////////////////////////////////////
//     GluteusMinimusPosterior (1 element )     //
//////////////////////////////////////////////////
AnyMuscleModel GluteusMinimusPosterior1Par =
{
 AnyFolder &MuscleParameters = .SubjectMusPar.GluteusMinimusPosterior;
 AnyIntVar MuscleElemNo = 1; ///< The number of this element of the muscle
 AnyIntVar MuscleElemAmount = MuscleParameters.MuscleElemAmount; ///< The total amount of elements for this muscle
 F0 = .SubjectMusPar.PCSAfactor*PCSA; ///< Maximum force output at optimum fiber length
 Lf0 = MuscleParameters.OptimalFiberlength
       / cos(pi/180*MuscleParameters.Pennationangle);
 // New experimental method of splitting volume and pcsa across mus elem.
 AnyVar PCSA = 1e-2*MuscleParameters.MuscleVolume/(Lf0);///< PCSA (cm2) is calculated as muscle volume divided between muscle branches and divided by fiber length
 Vol0 = PCSA * Lf0; ///< Muscle volume in (m3)
};


///////////////////////////////////
//     Gracilis (2 elements)     //
///////////////////////////////////
AnyMuscleModel Gracilis1Par =
{
 AnyFolder &MuscleParameters = .SubjectMusPar.Gracilis;
 AnyIntVar MuscleElemNo = 1; ///< The number of this element of the muscle
 AnyIntVar MuscleElemAmount = MuscleParameters.MuscleElemAmount; ///< The total amount of elements for this muscle
 F0 = .SubjectMusPar.PCSAfactor*PCSA; ///< Maximum force output at optimum fiber length
 Lf0 = MuscleParameters.OptimalFiberlength
       / cos(pi/180*MuscleParameters.Pennationangle);
 // New experimental method of splitting volume and pcsa across mus elem.
 AnyVar PCSA = 1e-2*MuscleParameters.MuscleVolume/(.Gracilis1Par.Lf0 +.Gracilis2Par.Lf0 );///< PCSA (cm2) is calculated as muscle volume divided between muscle branches and divided by fiber length
 Vol0 = PCSA * Lf0; ///< Muscle volume in (m3)
};

AnyMuscleModel Gracilis2Par =
{
 AnyFolder &MuscleParameters = .SubjectMusPar.Gracilis;
 AnyIntVar MuscleElemNo = 2; ///< The number of this element of the muscle
 AnyIntVar MuscleElemAmount = MuscleParameters.MuscleElemAmount; ///< The total amount of elements for this muscle
 F0 = .SubjectMusPar.PCSAfactor*PCSA; ///< Maximum force output at optimum fiber length
 Lf0 = MuscleParameters.OptimalFiberlength
       / cos(pi/180*MuscleParameters.Pennationangle);
 // New experimental method of splitting volume and pcsa across mus elem.
 AnyVar PCSA = 1e-2*MuscleParameters.MuscleVolume/(.Gracilis1Par.Lf0 +.Gracilis2Par.Lf0 );///< PCSA (cm2) is calculated as muscle volume divided between muscle branches and divided by fiber length
 Vol0 = PCSA * Lf0; ///< Muscle volume in (m3)
};


///////////////////////////////////////////
//     IliacusLateralis (2 elements)     //
///////////////////////////////////////////
AnyMuscleModel IliacusLateralis1Par =
{
 AnyFolder &MuscleParameters = .SubjectMusPar.IliacusLateralis;
 AnyIntVar MuscleElemNo = 1; ///< The number of this element of the muscle
 AnyIntVar MuscleElemAmount = MuscleParameters.MuscleElemAmount; ///< The total amount of elements for this muscle
 F0 = .SubjectMusPar.PCSAfactor*PCSA; ///< Maximum force output at optimum fiber length
 Lf0 = MuscleParameters.OptimalFiberlength
       / cos(pi/180*MuscleParameters.Pennationangle);
 // New experimental method of splitting volume and pcsa across mus elem.
 AnyVar PCSA = 1e-2*MuscleParameters.MuscleVolume/(.IliacusLateralis1Par.Lf0 +.IliacusLateralis2Par.Lf0 );///< PCSA (cm2) is calculated as muscle volume divided between muscle branches and divided by fiber length
 Vol0 = PCSA * Lf0; ///< Muscle volume in (m3)
};

AnyMuscleModel IliacusLateralis2Par =
{
 AnyFolder &MuscleParameters = .SubjectMusPar.IliacusLateralis;
 AnyIntVar MuscleElemNo = 2; ///< The number of this element of the muscle
 AnyIntVar MuscleElemAmount = MuscleParameters.MuscleElemAmount; ///< The total amount of elements for this muscle
 F0 = .SubjectMusPar.PCSAfactor*PCSA; ///< Maximum force output at optimum fiber length
 Lf0 = MuscleParameters.OptimalFiberlength
       / cos(pi/180*MuscleParameters.Pennationangle);
 // New experimental method of splitting volume and pcsa across mus elem.
 AnyVar PCSA = 1e-2*MuscleParameters.MuscleVolume/(.IliacusLateralis1Par.Lf0 +.IliacusLateralis2Par.Lf0 );///< PCSA (cm2) is calculated as muscle volume divided between muscle branches and divided by fiber length
 Vol0 = PCSA * Lf0; ///< Muscle volume in (m3)
};


/////////////////////////////////////
//     IliacusMid (2 elements)     //
/////////////////////////////////////
AnyMuscleModel IliacusMid1Par =
{
 AnyFolder &MuscleParameters = .SubjectMusPar.IliacusMid;
 AnyIntVar MuscleElemNo = 1; ///< The number of this element of the muscle
 AnyIntVar MuscleElemAmount = MuscleParameters.MuscleElemAmount; ///< The total amount of elements for this muscle
 F0 = .SubjectMusPar.PCSAfactor*PCSA; ///< Maximum force output at optimum fiber length
 Lf0 = MuscleParameters.OptimalFiberlength
       / cos(pi/180*MuscleParameters.Pennationangle);
 // New experimental method of splitting volume and pcsa across mus elem.
 AnyVar PCSA = 1e-2*MuscleParameters.MuscleVolume/(.IliacusMid1Par.Lf0 +.IliacusMid2Par.Lf0 );///< PCSA (cm2) is calculated as muscle volume divided between muscle branches and divided by fiber length
 Vol0 = PCSA * Lf0; ///< Muscle volume in (m3)
};

AnyMuscleModel IliacusMid2Par =
{
 AnyFolder &MuscleParameters = .SubjectMusPar.IliacusMid;
 AnyIntVar MuscleElemNo = 2; ///< The number of this element of the muscle
 AnyIntVar MuscleElemAmount = MuscleParameters.MuscleElemAmount; ///< The total amount of elements for this muscle
 F0 = .SubjectMusPar.PCSAfactor*PCSA; ///< Maximum force output at optimum fiber length
 Lf0 = MuscleParameters.OptimalFiberlength
       / cos(pi/180*MuscleParameters.Pennationangle);
 // New experimental method of splitting volume and pcsa across mus elem.
 AnyVar PCSA = 1e-2*MuscleParameters.MuscleVolume/(.IliacusMid1Par.Lf0 +.IliacusMid2Par.Lf0 );///< PCSA (cm2) is calculated as muscle volume divided between muscle branches and divided by fiber length
 Vol0 = PCSA * Lf0; ///< Muscle volume in (m3)
};


//////////////////////////////////////////
//     IliacusMedialis (2 elements)     //
//////////////////////////////////////////
AnyMuscleModel IliacusMedialis1Par =
{
 AnyFolder &MuscleParameters = .SubjectMusPar.IliacusMedialis;
 AnyIntVar MuscleElemNo = 1; ///< The number of this element of the muscle
 AnyIntVar MuscleElemAmount = MuscleParameters.MuscleElemAmount; ///< The total amount of elements for this muscle
 F0 = .SubjectMusPar.PCSAfactor*PCSA; ///< Maximum force output at optimum fiber length
 Lf0 = MuscleParameters.OptimalFiberlength
       / cos(pi/180*MuscleParameters.Pennationangle);
 // New experimental method of splitting volume and pcsa across mus elem.
 AnyVar PCSA = 1e-2*MuscleParameters.MuscleVolume/(.IliacusMedialis1Par.Lf0 +.IliacusMedialis2Par.Lf0 );///< PCSA (cm2) is calculated as muscle volume divided between muscle branches and divided by fiber length
 Vol0 = PCSA * Lf0; ///< Muscle volume in (m3)
};

AnyMuscleModel IliacusMedialis2Par =
{
 AnyFolder &MuscleParameters = .SubjectMusPar.IliacusMedialis;
 AnyIntVar MuscleElemNo = 2; ///< The number of this element of the muscle
 AnyIntVar MuscleElemAmount = MuscleParameters.MuscleElemAmount; ///< The total amount of elements for this muscle
 F0 = .SubjectMusPar.PCSAfactor*PCSA; ///< Maximum force output at optimum fiber length
 Lf0 = MuscleParameters.OptimalFiberlength
       / cos(pi/180*MuscleParameters.Pennationangle);
 // New experimental method of splitting volume and pcsa across mus elem.
 AnyVar PCSA = 1e-2*MuscleParameters.MuscleVolume/(.IliacusMedialis1Par.Lf0 +.IliacusMedialis2Par.Lf0 );///< PCSA (cm2) is calculated as muscle volume divided between muscle branches and divided by fiber length
 Vol0 = PCSA * Lf0; ///< Muscle volume in (m3)
};


////////////////////////////////////////////////////
//     ObturatorExternusInferior (2 elements)     //
////////////////////////////////////////////////////
AnyMuscleModel ObturatorExternusInferior1Par =
{
 AnyFolder &MuscleParameters = .SubjectMusPar.ObturatorExternusInferior;
 AnyIntVar MuscleElemNo = 1; ///< The number of this element of the muscle
 AnyIntVar MuscleElemAmount = MuscleParameters.MuscleElemAmount; ///< The total amount of elements for this muscle
 F0 = .SubjectMusPar.PCSAfactor*PCSA; ///< Maximum force output at optimum fiber length
 Lf0 = MuscleParameters.OptimalFiberlength
       / cos(pi/180*MuscleParameters.Pennationangle);
 // New experimental method of splitting volume and pcsa across mus elem.
 AnyVar PCSA = 1e-2*MuscleParameters.MuscleVolume/(.ObturatorExternusInferior1Par.Lf0 +.ObturatorExternusInferior2Par.Lf0 );///< PCSA (cm2) is calculated as muscle volume divided between muscle branches and divided by fiber length
 Vol0 = PCSA * Lf0; ///< Muscle volume in (m3)
};

AnyMuscleModel ObturatorExternusInferior2Par =
{
 AnyFolder &MuscleParameters = .SubjectMusPar.ObturatorExternusInferior;
 AnyIntVar MuscleElemNo = 2; ///< The number of this element of the muscle
 AnyIntVar MuscleElemAmount = MuscleParameters.MuscleElemAmount; ///< The total amount of elements for this muscle
 F0 = .SubjectMusPar.PCSAfactor*PCSA; ///< Maximum force output at optimum fiber length
 Lf0 = MuscleParameters.OptimalFiberlength
       / cos(pi/180*MuscleParameters.Pennationangle);
 // New experimental method of splitting volume and pcsa across mus elem.
 AnyVar PCSA = 1e-2*MuscleParameters.MuscleVolume/(.ObturatorExternusInferior1Par.Lf0 +.ObturatorExternusInferior2Par.Lf0 );///< PCSA (cm2) is calculated as muscle volume divided between muscle branches and divided by fiber length
 Vol0 = PCSA * Lf0; ///< Muscle volume in (m3)
};


////////////////////////////////////////////////////
//     ObturatorExternusSuperior (3 elements)     //
////////////////////////////////////////////////////
AnyMuscleModel ObturatorExternusSuperior1Par =
{
 AnyFolder &MuscleParameters = .SubjectMusPar.ObturatorExternusSuperior;
 AnyIntVar MuscleElemNo = 1; ///< The number of this element of the muscle
 AnyIntVar MuscleElemAmount = MuscleParameters.MuscleElemAmount; ///< The total amount of elements for this muscle
 F0 = .SubjectMusPar.PCSAfactor*PCSA; ///< Maximum force output at optimum fiber length
 Lf0 = MuscleParameters.OptimalFiberlength
       / cos(pi/180*MuscleParameters.Pennationangle);
 // New experimental method of splitting volume and pcsa across mus elem.
 AnyVar PCSA = 1e-2*MuscleParameters.MuscleVolume/(.ObturatorExternusSuperior1Par.Lf0 +.ObturatorExternusSuperior2Par.Lf0 +.ObturatorExternusSuperior3Par.Lf0 );///< PCSA (cm2) is calculated as muscle volume divided between muscle branches and divided by fiber length
 Vol0 = PCSA * Lf0; ///< Muscle volume in (m3)
};

AnyMuscleModel ObturatorExternusSuperior2Par =
{
 AnyFolder &MuscleParameters = .SubjectMusPar.ObturatorExternusSuperior;
 AnyIntVar MuscleElemNo = 2; ///< The number of this element of the muscle
 AnyIntVar MuscleElemAmount = MuscleParameters.MuscleElemAmount; ///< The total amount of elements for this muscle
 F0 = .SubjectMusPar.PCSAfactor*PCSA; ///< Maximum force output at optimum fiber length
 Lf0 = MuscleParameters.OptimalFiberlength
       / cos(pi/180*MuscleParameters.Pennationangle);
 // New experimental method of splitting volume and pcsa across mus elem.
 AnyVar PCSA = 1e-2*MuscleParameters.MuscleVolume/(.ObturatorExternusSuperior1Par.Lf0 +.ObturatorExternusSuperior2Par.Lf0 +.ObturatorExternusSuperior3Par.Lf0 );///< PCSA (cm2) is calculated as muscle volume divided between muscle branches and divided by fiber length
 Vol0 = PCSA * Lf0; ///< Muscle volume in (m3)
};

AnyMuscleModel ObturatorExternusSuperior3Par =
{
 AnyFolder &MuscleParameters = .SubjectMusPar.ObturatorExternusSuperior;
 AnyIntVar MuscleElemNo = 3; ///< The number of this element of the muscle
 AnyIntVar MuscleElemAmount = MuscleParameters.MuscleElemAmount; ///< The total amount of elements for this muscle
 F0 = .SubjectMusPar.PCSAfactor*PCSA; ///< Maximum force output at optimum fiber length
 Lf0 = MuscleParameters.OptimalFiberlength
       / cos(pi/180*MuscleParameters.Pennationangle);
 // New experimental method of splitting volume and pcsa across mus elem.
 AnyVar PCSA = 1e-2*MuscleParameters.MuscleVolume/(.ObturatorExternusSuperior1Par.Lf0 +.ObturatorExternusSuperior2Par.Lf0 +.ObturatorExternusSuperior3Par.Lf0 );///< PCSA (cm2) is calculated as muscle volume divided between muscle branches and divided by fiber length
 Vol0 = PCSA * Lf0; ///< Muscle volume in (m3)
};


////////////////////////////////////////////
//     ObturatorInternus (6 elements)     //
////////////////////////////////////////////
AnyMuscleModel ObturatorInternus1Par =
{
 AnyFolder &MuscleParameters = .SubjectMusPar.ObturatorInternus;
 AnyIntVar MuscleElemNo = 1; ///< The number of this element of the muscle
 AnyIntVar MuscleElemAmount = MuscleParameters.MuscleElemAmount; ///< The total amount of elements for this muscle
 F0 = .SubjectMusPar.PCSAfactor*PCSA; ///< Maximum force output at optimum fiber length
 Lf0 = MuscleParameters.OptimalFiberlength
       / cos(pi/180*MuscleParameters.Pennationangle);
 // New experimental method of splitting volume and pcsa across mus elem.
 AnyVar PCSA = 1e-2*MuscleParameters.MuscleVolume/(.ObturatorInternus1Par.Lf0 +.ObturatorInternus2Par.Lf0 +.ObturatorInternus3Par.Lf0 +.ObturatorInternus4Par.Lf0 +.ObturatorInternus5Par.Lf0 +.ObturatorInternus6Par.Lf0 );///< PCSA (cm2) is calculated as muscle volume divided between muscle branches and divided by fiber length
 Vol0 = PCSA * Lf0; ///< Muscle volume in (m3)
};

AnyMuscleModel ObturatorInternus2Par =
{
 AnyFolder &MuscleParameters = .SubjectMusPar.ObturatorInternus;
 AnyIntVar MuscleElemNo = 2; ///< The number of this element of the muscle
 AnyIntVar MuscleElemAmount = MuscleParameters.MuscleElemAmount; ///< The total amount of elements for this muscle
 F0 = .SubjectMusPar.PCSAfactor*PCSA; ///< Maximum force output at optimum fiber length
 Lf0 = MuscleParameters.OptimalFiberlength
       / cos(pi/180*MuscleParameters.Pennationangle);
 // New experimental method of splitting volume and pcsa across mus elem.
 AnyVar PCSA = 1e-2*MuscleParameters.MuscleVolume/(.ObturatorInternus1Par.Lf0 +.ObturatorInternus2Par.Lf0 +.ObturatorInternus3Par.Lf0 +.ObturatorInternus4Par.Lf0 +.ObturatorInternus5Par.Lf0 +.ObturatorInternus6Par.Lf0 );///< PCSA (cm2) is calculated as muscle volume divided between muscle branches and divided by fiber length
 Vol0 = PCSA * Lf0; ///< Muscle volume in (m3)
};

AnyMuscleModel ObturatorInternus3Par =
{
 AnyFolder &MuscleParameters = .SubjectMusPar.ObturatorInternus;
 AnyIntVar MuscleElemNo = 3; ///< The number of this element of the muscle
 AnyIntVar MuscleElemAmount = MuscleParameters.MuscleElemAmount; ///< The total amount of elements for this muscle
 F0 = .SubjectMusPar.PCSAfactor*PCSA; ///< Maximum force output at optimum fiber length
 Lf0 = MuscleParameters.OptimalFiberlength
       / cos(pi/180*MuscleParameters.Pennationangle);
 // New experimental method of splitting volume and pcsa across mus elem.
 AnyVar PCSA = 1e-2*MuscleParameters.MuscleVolume/(.ObturatorInternus1Par.Lf0 +.ObturatorInternus2Par.Lf0 +.ObturatorInternus3Par.Lf0 +.ObturatorInternus4Par.Lf0 +.ObturatorInternus5Par.Lf0 +.ObturatorInternus6Par.Lf0 );///< PCSA (cm2) is calculated as muscle volume divided between muscle branches and divided by fiber length
 Vol0 = PCSA * Lf0; ///< Muscle volume in (m3)
};

AnyMuscleModel ObturatorInternus4Par =
{
 AnyFolder &MuscleParameters = .SubjectMusPar.ObturatorInternus;
 AnyIntVar MuscleElemNo = 4; ///< The number of this element of the muscle
 AnyIntVar MuscleElemAmount = MuscleParameters.MuscleElemAmount; ///< The total amount of elements for this muscle
 F0 = .SubjectMusPar.PCSAfactor*PCSA; ///< Maximum force output at optimum fiber length
 Lf0 = MuscleParameters.OptimalFiberlength
       / cos(pi/180*MuscleParameters.Pennationangle);
 // New experimental method of splitting volume and pcsa across mus elem.
 AnyVar PCSA = 1e-2*MuscleParameters.MuscleVolume/(.ObturatorInternus1Par.Lf0 +.ObturatorInternus2Par.Lf0 +.ObturatorInternus3Par.Lf0 +.ObturatorInternus4Par.Lf0 +.ObturatorInternus5Par.Lf0 +.ObturatorInternus6Par.Lf0 );///< PCSA (cm2) is calculated as muscle volume divided between muscle branches and divided by fiber length
 Vol0 = PCSA * Lf0; ///< Muscle volume in (m3)
};

AnyMuscleModel ObturatorInternus5Par =
{
 AnyFolder &MuscleParameters = .SubjectMusPar.ObturatorInternus;
 AnyIntVar MuscleElemNo = 5; ///< The number of this element of the muscle
 AnyIntVar MuscleElemAmount = MuscleParameters.MuscleElemAmount; ///< The total amount of elements for this muscle
 F0 = .SubjectMusPar.PCSAfactor*PCSA; ///< Maximum force output at optimum fiber length
 Lf0 = MuscleParameters.OptimalFiberlength
       / cos(pi/180*MuscleParameters.Pennationangle);
 // New experimental method of splitting volume and pcsa across mus elem.
 AnyVar PCSA = 1e-2*MuscleParameters.MuscleVolume/(.ObturatorInternus1Par.Lf0 +.ObturatorInternus2Par.Lf0 +.ObturatorInternus3Par.Lf0 +.ObturatorInternus4Par.Lf0 +.ObturatorInternus5Par.Lf0 +.ObturatorInternus6Par.Lf0 );///< PCSA (cm2) is calculated as muscle volume divided between muscle branches and divided by fiber length
 Vol0 = PCSA * Lf0; ///< Muscle volume in (m3)
};

AnyMuscleModel ObturatorInternus6Par =
{
 AnyFolder &MuscleParameters = .SubjectMusPar.ObturatorInternus;
 AnyIntVar MuscleElemNo = 6; ///< The number of this element of the muscle
 AnyIntVar MuscleElemAmount = MuscleParameters.MuscleElemAmount; ///< The total amount of elements for this muscle
 F0 = .SubjectMusPar.PCSAfactor*PCSA; ///< Maximum force output at optimum fiber length
 Lf0 = MuscleParameters.OptimalFiberlength
       / cos(pi/180*MuscleParameters.Pennationangle);
 // New experimental method of splitting volume and pcsa across mus elem.
 AnyVar PCSA = 1e-2*MuscleParameters.MuscleVolume/(.ObturatorInternus1Par.Lf0 +.ObturatorInternus2Par.Lf0 +.ObturatorInternus3Par.Lf0 +.ObturatorInternus4Par.Lf0 +.ObturatorInternus5Par.Lf0 +.ObturatorInternus6Par.Lf0 );///< PCSA (cm2) is calculated as muscle volume divided between muscle branches and divided by fiber length
 Vol0 = PCSA * Lf0; ///< Muscle volume in (m3)
};


////////////////////////////////////
//     Pectineus (4 elements)     //
////////////////////////////////////
AnyMuscleModel Pectineus1Par =
{
 AnyFolder &MuscleParameters = .SubjectMusPar.Pectineus;
 AnyIntVar MuscleElemNo = 1; ///< The number of this element of the muscle
 AnyIntVar MuscleElemAmount = MuscleParameters.MuscleElemAmount; ///< The total amount of elements for this muscle
 F0 = .SubjectMusPar.PCSAfactor*PCSA; ///< Maximum force output at optimum fiber length
 Lf0 = MuscleParameters.OptimalFiberlength
       / cos(pi/180*MuscleParameters.Pennationangle);
 // New experimental method of splitting volume and pcsa across mus elem.
 AnyVar PCSA = 1e-2*MuscleParameters.MuscleVolume/(.Pectineus1Par.Lf0 +.Pectineus2Par.Lf0 +.Pectineus3Par.Lf0 +.Pectineus4Par.Lf0 );///< PCSA (cm2) is calculated as muscle volume divided between muscle branches and divided by fiber length
 Vol0 = PCSA * Lf0; ///< Muscle volume in (m3)
};

AnyMuscleModel Pectineus2Par =
{
 AnyFolder &MuscleParameters = .SubjectMusPar.Pectineus;
 AnyIntVar MuscleElemNo = 2; ///< The number of this element of the muscle
 AnyIntVar MuscleElemAmount = MuscleParameters.MuscleElemAmount; ///< The total amount of elements for this muscle
 F0 = .SubjectMusPar.PCSAfactor*PCSA; ///< Maximum force output at optimum fiber length
 Lf0 = MuscleParameters.OptimalFiberlength
       / cos(pi/180*MuscleParameters.Pennationangle);
 // New experimental method of splitting volume and pcsa across mus elem.
 AnyVar PCSA = 1e-2*MuscleParameters.MuscleVolume/(.Pectineus1Par.Lf0 +.Pectineus2Par.Lf0 +.Pectineus3Par.Lf0 +.Pectineus4Par.Lf0 );///< PCSA (cm2) is calculated as muscle volume divided between muscle branches and divided by fiber length
 Vol0 = PCSA * Lf0; ///< Muscle volume in (m3)
};

AnyMuscleModel Pectineus3Par =
{
 AnyFolder &MuscleParameters = .SubjectMusPar.Pectineus;
 AnyIntVar MuscleElemNo = 3; ///< The number of this element of the muscle
 AnyIntVar MuscleElemAmount = MuscleParameters.MuscleElemAmount; ///< The total amount of elements for this muscle
 F0 = .SubjectMusPar.PCSAfactor*PCSA; ///< Maximum force output at optimum fiber length
 Lf0 = MuscleParameters.OptimalFiberlength
       / cos(pi/180*MuscleParameters.Pennationangle);
 // New experimental method of splitting volume and pcsa across mus elem.
 AnyVar PCSA = 1e-2*MuscleParameters.MuscleVolume/(.Pectineus1Par.Lf0 +.Pectineus2Par.Lf0 +.Pectineus3Par.Lf0 +.Pectineus4Par.Lf0 );///< PCSA (cm2) is calculated as muscle volume divided between muscle branches and divided by fiber length
 Vol0 = PCSA * Lf0; ///< Muscle volume in (m3)
};

AnyMuscleModel Pectineus4Par =
{
 AnyFolder &MuscleParameters = .SubjectMusPar.Pectineus;
 AnyIntVar MuscleElemNo = 4; ///< The number of this element of the muscle
 AnyIntVar MuscleElemAmount = MuscleParameters.MuscleElemAmount; ///< The total amount of elements for this muscle
 F0 = .SubjectMusPar.PCSAfactor*PCSA; ///< Maximum force output at optimum fiber length
 Lf0 = MuscleParameters.OptimalFiberlength
       / cos(pi/180*MuscleParameters.Pennationangle);
 // New experimental method of splitting volume and pcsa across mus elem.
 AnyVar PCSA = 1e-2*MuscleParameters.MuscleVolume/(.Pectineus1Par.Lf0 +.Pectineus2Par.Lf0 +.Pectineus3Par.Lf0 +.Pectineus4Par.Lf0 );///< PCSA (cm2) is calculated as muscle volume divided between muscle branches and divided by fiber length
 Vol0 = PCSA * Lf0; ///< Muscle volume in (m3)
};


/////////////////////////////////////////
//     PeroneusBrevis (3 elements)     //
/////////////////////////////////////////
AnyMuscleModel PeroneusBrevis1Par =
{
 AnyFolder &MuscleParameters = .SubjectMusPar.PeroneusBrevis;
 AnyIntVar MuscleElemNo = 1; ///< The number of this element of the muscle
 AnyIntVar MuscleElemAmount = MuscleParameters.MuscleElemAmount; ///< The total amount of elements for this muscle
 F0 = .SubjectMusPar.PCSAfactor*PCSA; ///< Maximum force output at optimum fiber length
 Lf0 = MuscleParameters.OptimalFiberlength
       / cos(pi/180*MuscleParameters.Pennationangle);
 // New experimental method of splitting volume and pcsa across mus elem.
 AnyVar PCSA = 1e-2*MuscleParameters.MuscleVolume/(.PeroneusBrevis1Par.Lf0 +.PeroneusBrevis2Par.Lf0 +.PeroneusBrevis3Par.Lf0 );///< PCSA (cm2) is calculated as muscle volume divided between muscle branches and divided by fiber length
 Vol0 = PCSA * Lf0; ///< Muscle volume in (m3)
};

AnyMuscleModel PeroneusBrevis2Par =
{
 AnyFolder &MuscleParameters = .SubjectMusPar.PeroneusBrevis;
 AnyIntVar MuscleElemNo = 2; ///< The number of this element of the muscle
 AnyIntVar MuscleElemAmount = MuscleParameters.MuscleElemAmount; ///< The total amount of elements for this muscle
 F0 = .SubjectMusPar.PCSAfactor*PCSA; ///< Maximum force output at optimum fiber length
 Lf0 = MuscleParameters.OptimalFiberlength
       / cos(pi/180*MuscleParameters.Pennationangle);
 // New experimental method of splitting volume and pcsa across mus elem.
 AnyVar PCSA = 1e-2*MuscleParameters.MuscleVolume/(.PeroneusBrevis1Par.Lf0 +.PeroneusBrevis2Par.Lf0 +.PeroneusBrevis3Par.Lf0 );///< PCSA (cm2) is calculated as muscle volume divided between muscle branches and divided by fiber length
 Vol0 = PCSA * Lf0; ///< Muscle volume in (m3)
};

AnyMuscleModel PeroneusBrevis3Par =
{
 AnyFolder &MuscleParameters = .SubjectMusPar.PeroneusBrevis;
 AnyIntVar MuscleElemNo = 3; ///< The number of this element of the muscle
 AnyIntVar MuscleElemAmount = MuscleParameters.MuscleElemAmount; ///< The total amount of elements for this muscle
 F0 = .SubjectMusPar.PCSAfactor*PCSA; ///< Maximum force output at optimum fiber length
 Lf0 = MuscleParameters.OptimalFiberlength
       / cos(pi/180*MuscleParameters.Pennationangle);
 // New experimental method of splitting volume and pcsa across mus elem.
 AnyVar PCSA = 1e-2*MuscleParameters.MuscleVolume/(.PeroneusBrevis1Par.Lf0 +.PeroneusBrevis2Par.Lf0 +.PeroneusBrevis3Par.Lf0 );///< PCSA (cm2) is calculated as muscle volume divided between muscle branches and divided by fiber length
 Vol0 = PCSA * Lf0; ///< Muscle volume in (m3)
};


/////////////////////////////////////////
//     PeroneusLongus (3 elements)     //
/////////////////////////////////////////
AnyMuscleModel PeroneusLongus1Par =
{
 AnyFolder &MuscleParameters = .SubjectMusPar.PeroneusLongus;
 AnyIntVar MuscleElemNo = 1; ///< The number of this element of the muscle
 AnyIntVar MuscleElemAmount = MuscleParameters.MuscleElemAmount; ///< The total amount of elements for this muscle
 F0 = .SubjectMusPar.PCSAfactor*PCSA; ///< Maximum force output at optimum fiber length
 Lf0 = MuscleParameters.OptimalFiberlength
       / cos(pi/180*MuscleParameters.Pennationangle);
 // New experimental method of splitting volume and pcsa across mus elem.
 AnyVar PCSA = 1e-2*MuscleParameters.MuscleVolume/(.PeroneusLongus1Par.Lf0 +.PeroneusLongus2Par.Lf0 +.PeroneusLongus3Par.Lf0 );///< PCSA (cm2) is calculated as muscle volume divided between muscle branches and divided by fiber length
 Vol0 = PCSA * Lf0; ///< Muscle volume in (m3)
};

AnyMuscleModel PeroneusLongus2Par =
{
 AnyFolder &MuscleParameters = .SubjectMusPar.PeroneusLongus;
 AnyIntVar MuscleElemNo = 2; ///< The number of this element of the muscle
 AnyIntVar MuscleElemAmount = MuscleParameters.MuscleElemAmount; ///< The total amount of elements for this muscle
 F0 = .SubjectMusPar.PCSAfactor*PCSA; ///< Maximum force output at optimum fiber length
 Lf0 = MuscleParameters.OptimalFiberlength
       / cos(pi/180*MuscleParameters.Pennationangle);
 // New experimental method of splitting volume and pcsa across mus elem.
 AnyVar PCSA = 1e-2*MuscleParameters.MuscleVolume/(.PeroneusLongus1Par.Lf0 +.PeroneusLongus2Par.Lf0 +.PeroneusLongus3Par.Lf0 );///< PCSA (cm2) is calculated as muscle volume divided between muscle branches and divided by fiber length
 Vol0 = PCSA * Lf0; ///< Muscle volume in (m3)
};

AnyMuscleModel PeroneusLongus3Par =
{
 AnyFolder &MuscleParameters = .SubjectMusPar.PeroneusLongus;
 AnyIntVar MuscleElemNo = 3; ///< The number of this element of the muscle
 AnyIntVar MuscleElemAmount = MuscleParameters.MuscleElemAmount; ///< The total amount of elements for this muscle
 F0 = .SubjectMusPar.PCSAfactor*PCSA; ///< Maximum force output at optimum fiber length
 Lf0 = MuscleParameters.OptimalFiberlength
       / cos(pi/180*MuscleParameters.Pennationangle);
 // New experimental method of splitting volume and pcsa across mus elem.
 AnyVar PCSA = 1e-2*MuscleParameters.MuscleVolume/(.PeroneusLongus1Par.Lf0 +.PeroneusLongus2Par.Lf0 +.PeroneusLongus3Par.Lf0 );///< PCSA (cm2) is calculated as muscle volume divided between muscle branches and divided by fiber length
 Vol0 = PCSA * Lf0; ///< Muscle volume in (m3)
};


//////////////////////////////////////////
//     PeroneusTertius (3 elements)     //
//////////////////////////////////////////
AnyMuscleModel PeroneusTertius1Par =
{
 AnyFolder &MuscleParameters = .SubjectMusPar.PeroneusTertius;
 AnyIntVar MuscleElemNo = 1; ///< The number of this element of the muscle
 AnyIntVar MuscleElemAmount = MuscleParameters.MuscleElemAmount; ///< The total amount of elements for this muscle
 F0 = .SubjectMusPar.PCSAfactor*PCSA; ///< Maximum force output at optimum fiber length
 Lf0 = MuscleParameters.OptimalFiberlength
       / cos(pi/180*MuscleParameters.Pennationangle);
 // New experimental method of splitting volume and pcsa across mus elem.
 AnyVar PCSA = 1e-2*MuscleParameters.MuscleVolume/(.PeroneusTertius1Par.Lf0 +.PeroneusTertius2Par.Lf0 +.PeroneusTertius3Par.Lf0 );///< PCSA (cm2) is calculated as muscle volume divided between muscle branches and divided by fiber length
 Vol0 = PCSA * Lf0; ///< Muscle volume in (m3)
};

AnyMuscleModel PeroneusTertius2Par =
{
 AnyFolder &MuscleParameters = .SubjectMusPar.PeroneusTertius;
 AnyIntVar MuscleElemNo = 2; ///< The number of this element of the muscle
 AnyIntVar MuscleElemAmount = MuscleParameters.MuscleElemAmount; ///< The total amount of elements for this muscle
 F0 = .SubjectMusPar.PCSAfactor*PCSA; ///< Maximum force output at optimum fiber length
 Lf0 = MuscleParameters.OptimalFiberlength
       / cos(pi/180*MuscleParameters.Pennationangle);
 // New experimental method of splitting volume and pcsa across mus elem.
 AnyVar PCSA = 1e-2*MuscleParameters.MuscleVolume/(.PeroneusTertius1Par.Lf0 +.PeroneusTertius2Par.Lf0 +.PeroneusTertius3Par.Lf0 );///< PCSA (cm2) is calculated as muscle volume divided between muscle branches and divided by fiber length
 Vol0 = PCSA * Lf0; ///< Muscle volume in (m3)
};

AnyMuscleModel PeroneusTertius3Par =
{
 AnyFolder &MuscleParameters = .SubjectMusPar.PeroneusTertius;
 AnyIntVar MuscleElemNo = 3; ///< The number of this element of the muscle
 AnyIntVar MuscleElemAmount = MuscleParameters.MuscleElemAmount; ///< The total amount of elements for this muscle
 F0 = .SubjectMusPar.PCSAfactor*PCSA; ///< Maximum force output at optimum fiber length
 Lf0 = MuscleParameters.OptimalFiberlength
       / cos(pi/180*MuscleParameters.Pennationangle);
 // New experimental method of splitting volume and pcsa across mus elem.
 AnyVar PCSA = 1e-2*MuscleParameters.MuscleVolume/(.PeroneusTertius1Par.Lf0 +.PeroneusTertius2Par.Lf0 +.PeroneusTertius3Par.Lf0 );///< PCSA (cm2) is calculated as muscle volume divided between muscle branches and divided by fiber length
 Vol0 = PCSA * Lf0; ///< Muscle volume in (m3)
};
/////////////////////////////////////
//     Piriformis (1 element )     //
/////////////////////////////////////
AnyMuscleModel Piriformis1Par =
{
 AnyFolder &MuscleParameters = .SubjectMusPar.Piriformis;
 AnyIntVar MuscleElemNo = 1; ///< The number of this element of the muscle
 AnyIntVar MuscleElemAmount = MuscleParameters.MuscleElemAmount; ///< The total amount of elements for this muscle
 F0 = .SubjectMusPar.PCSAfactor*PCSA; ///< Maximum force output at optimum fiber length
 Lf0 = MuscleParameters.OptimalFiberlength
       / cos(pi/180*MuscleParameters.Pennationangle);
 // New experimental method of splitting volume and pcsa across mus elem.
 AnyVar PCSA = 1e-2*MuscleParameters.MuscleVolume/(Lf0);///< PCSA (cm2) is calculated as muscle volume divided between muscle branches and divided by fiber length
 Vol0 = PCSA * Lf0; ///< Muscle volume in (m3)
};


////////////////////////////////////
//     Plantaris (1 element )     //
////////////////////////////////////
AnyMuscleModel Plantaris1Par =
{
 AnyFolder &MuscleParameters = .SubjectMusPar.Plantaris;
 AnyIntVar MuscleElemNo = 1; ///< The number of this element of the muscle
 AnyIntVar MuscleElemAmount = MuscleParameters.MuscleElemAmount; ///< The total amount of elements for this muscle
 F0 = .SubjectMusPar.PCSAfactor*PCSA; ///< Maximum force output at optimum fiber length
 Lf0 = MuscleParameters.OptimalFiberlength
       / cos(pi/180*MuscleParameters.Pennationangle);
 // New experimental method of splitting volume and pcsa across mus elem.
 AnyVar PCSA = 1e-2*MuscleParameters.MuscleVolume/(Lf0);///< PCSA (cm2) is calculated as muscle volume divided between muscle branches and divided by fiber length
 Vol0 = PCSA * Lf0; ///< Muscle volume in (m3)
};


////////////////////////////////////
//     Popliteus (3 elements)     //
////////////////////////////////////
AnyMuscleModel Popliteus1Par =
{
 AnyFolder &MuscleParameters = .SubjectMusPar.Popliteus;
 AnyIntVar MuscleElemNo = 1; ///< The number of this element of the muscle
 AnyIntVar MuscleElemAmount = MuscleParameters.MuscleElemAmount; ///< The total amount of elements for this muscle
 F0 = .SubjectMusPar.PCSAfactor*PCSA; ///< Maximum force output at optimum fiber length
 Lf0 = MuscleParameters.OptimalFiberlength
       / cos(pi/180*MuscleParameters.Pennationangle);
 // New experimental method of splitting volume and pcsa across mus elem.
 AnyVar PCSA = 1e-2*MuscleParameters.MuscleVolume/(.Popliteus1Par.Lf0 +.Popliteus2Par.Lf0 +.Popliteus3Par.Lf0 );///< PCSA (cm2) is calculated as muscle volume divided between muscle branches and divided by fiber length
 Vol0 = PCSA * Lf0; ///< Muscle volume in (m3)
};

AnyMuscleModel Popliteus2Par =
{
 AnyFolder &MuscleParameters = .SubjectMusPar.Popliteus;
 AnyIntVar MuscleElemNo = 2; ///< The number of this element of the muscle
 AnyIntVar MuscleElemAmount = MuscleParameters.MuscleElemAmount; ///< The total amount of elements for this muscle
 F0 = .SubjectMusPar.PCSAfactor*PCSA; ///< Maximum force output at optimum fiber length
 Lf0 = MuscleParameters.OptimalFiberlength
       / cos(pi/180*MuscleParameters.Pennationangle);
 // New experimental method of splitting volume and pcsa across mus elem.
 AnyVar PCSA = 1e-2*MuscleParameters.MuscleVolume/(.Popliteus1Par.Lf0 +.Popliteus2Par.Lf0 +.Popliteus3Par.Lf0 );///< PCSA (cm2) is calculated as muscle volume divided between muscle branches and divided by fiber length
 Vol0 = PCSA * Lf0; ///< Muscle volume in (m3)
};

AnyMuscleModel Popliteus3Par =
{
 AnyFolder &MuscleParameters = .SubjectMusPar.Popliteus;
 AnyIntVar MuscleElemNo = 3; ///< The number of this element of the muscle
 AnyIntVar MuscleElemAmount = MuscleParameters.MuscleElemAmount; ///< The total amount of elements for this muscle
 F0 = .SubjectMusPar.PCSAfactor*PCSA; ///< Maximum force output at optimum fiber length
 Lf0 = MuscleParameters.OptimalFiberlength
       / cos(pi/180*MuscleParameters.Pennationangle);
 // New experimental method of splitting volume and pcsa across mus elem.
 AnyVar PCSA = 1e-2*MuscleParameters.MuscleVolume/(.Popliteus1Par.Lf0 +.Popliteus2Par.Lf0 +.Popliteus3Par.Lf0 );///< PCSA (cm2) is calculated as muscle volume divided between muscle branches and divided by fiber length
 Vol0 = PCSA * Lf0; ///< Muscle volume in (m3)
};


/////////////////////////////////////
//     PsoasMinor (1 element )     //
/////////////////////////////////////
AnyMuscleModel PsoasMinor1Par =
{
 AnyFolder &MuscleParameters = .SubjectMusPar.PsoasMinor;
 AnyIntVar MuscleElemNo = 1; ///< The number of this element of the muscle
 AnyIntVar MuscleElemAmount = MuscleParameters.MuscleElemAmount; ///< The total amount of elements for this muscle
 F0 = .SubjectMusPar.PCSAfactor*PCSA; ///< Maximum force output at optimum fiber length
 Lf0 = MuscleParameters.OptimalFiberlength
       / cos(pi/180*MuscleParameters.Pennationangle);
 // New experimental method of splitting volume and pcsa across mus elem.
 AnyVar PCSA = 1e-2*MuscleParameters.MuscleVolume/(Lf0);///< PCSA (cm2) is calculated as muscle volume divided between muscle branches and divided by fiber length
 Vol0 = PCSA * Lf0; ///< Muscle volume in (m3)
};


/////////////////////////////////////
//     PsoasMajor (11 elements)     //
/////////////////////////////////////
AnyMuscleModel PsoasMajor1Par =
{
 AnyFolder &MuscleParameters = .SubjectMusPar.PsoasMajor;
 AnyIntVar MuscleElemNo = 1; ///< The number of this element of the muscle
 AnyIntVar MuscleElemAmount = MuscleParameters.MuscleElemAmount; ///< The total amount of elements for this muscle
 F0 = .SubjectMusPar.PCSAfactor*PCSA; ///< Maximum force output at optimum fiber length
 Lf0 = MuscleParameters.OptimalFiberlength
       / cos(pi/180*MuscleParameters.Pennationangle);
 // New experimental method of splitting volume and pcsa across mus elem.
 AnyVar PCSA = 1e-2*MuscleParameters.MuscleVolume/(.PsoasMajor1Par.Lf0 +.PsoasMajor2Par.Lf0 +.PsoasMajor3Par.Lf0 +.PsoasMajor4Par.Lf0 +.PsoasMajor5Par.Lf0 +.PsoasMajor6Par.Lf0 +.PsoasMajor7Par.Lf0 +.PsoasMajor8Par.Lf0 +.PsoasMajor9Par.Lf0 +.PsoasMajor10Par.Lf0 +.PsoasMajor11Par.Lf0 );///< PCSA (cm2) is calculated as muscle volume divided between muscle branches and divided by fiber length
 Vol0 = PCSA * Lf0; ///< Muscle volume in (m3)
};

AnyMuscleModel PsoasMajor2Par =
{
 AnyFolder &MuscleParameters = .SubjectMusPar.PsoasMajor;
 AnyIntVar MuscleElemNo = 2; ///< The number of this element of the muscle
 AnyIntVar MuscleElemAmount = MuscleParameters.MuscleElemAmount; ///< The total amount of elements for this muscle
 F0 = .SubjectMusPar.PCSAfactor*PCSA; ///< Maximum force output at optimum fiber length
 Lf0 = MuscleParameters.OptimalFiberlength
       / cos(pi/180*MuscleParameters.Pennationangle);
 // New experimental method of splitting volume and pcsa across mus elem.
 AnyVar PCSA = 1e-2*MuscleParameters.MuscleVolume/(.PsoasMajor1Par.Lf0 +.PsoasMajor2Par.Lf0 +.PsoasMajor3Par.Lf0 +.PsoasMajor4Par.Lf0 +.PsoasMajor5Par.Lf0 +.PsoasMajor6Par.Lf0 +.PsoasMajor7Par.Lf0 +.PsoasMajor8Par.Lf0 +.PsoasMajor9Par.Lf0 +.PsoasMajor10Par.Lf0 +.PsoasMajor11Par.Lf0 );///< PCSA (cm2) is calculated as muscle volume divided between muscle branches and divided by fiber length
 Vol0 = PCSA * Lf0; ///< Muscle volume in (m3)
};

AnyMuscleModel PsoasMajor3Par =
{
 AnyFolder &MuscleParameters = .SubjectMusPar.PsoasMajor;
 AnyIntVar MuscleElemNo = 3; ///< The number of this element of the muscle
 AnyIntVar MuscleElemAmount = MuscleParameters.MuscleElemAmount; ///< The total amount of elements for this muscle
 F0 = .SubjectMusPar.PCSAfactor*PCSA; ///< Maximum force output at optimum fiber length
 Lf0 = MuscleParameters.OptimalFiberlength
       / cos(pi/180*MuscleParameters.Pennationangle);
 // New experimental method of splitting volume and pcsa across mus elem.
 AnyVar PCSA = 1e-2*MuscleParameters.MuscleVolume/(.PsoasMajor1Par.Lf0 +.PsoasMajor2Par.Lf0 +.PsoasMajor3Par.Lf0 +.PsoasMajor4Par.Lf0 +.PsoasMajor5Par.Lf0 +.PsoasMajor6Par.Lf0 +.PsoasMajor7Par.Lf0 +.PsoasMajor8Par.Lf0 +.PsoasMajor9Par.Lf0 +.PsoasMajor10Par.Lf0 +.PsoasMajor11Par.Lf0 );///< PCSA (cm2) is calculated as muscle volume divided between muscle branches and divided by fiber length
 Vol0 = PCSA * Lf0; ///< Muscle volume in (m3)
};

AnyMuscleModel PsoasMajor4Par =
{
 AnyFolder &MuscleParameters = .SubjectMusPar.PsoasMajor;
 AnyIntVar MuscleElemNo = 4; ///< The number of this element of the muscle
 AnyIntVar MuscleElemAmount = MuscleParameters.MuscleElemAmount; ///< The total amount of elements for this muscle
 F0 = .SubjectMusPar.PCSAfactor*PCSA; ///< Maximum force output at optimum fiber length
 Lf0 = MuscleParameters.OptimalFiberlength
       / cos(pi/180*MuscleParameters.Pennationangle);
 // New experimental method of splitting volume and pcsa across mus elem.
 AnyVar PCSA = 1e-2*MuscleParameters.MuscleVolume/(.PsoasMajor1Par.Lf0 +.PsoasMajor2Par.Lf0 +.PsoasMajor3Par.Lf0 +.PsoasMajor4Par.Lf0 +.PsoasMajor5Par.Lf0 +.PsoasMajor6Par.Lf0 +.PsoasMajor7Par.Lf0 +.PsoasMajor8Par.Lf0 +.PsoasMajor9Par.Lf0 +.PsoasMajor10Par.Lf0 +.PsoasMajor11Par.Lf0 );///< PCSA (cm2) is calculated as muscle volume divided between muscle branches and divided by fiber length
 Vol0 = PCSA * Lf0; ///< Muscle volume in (m3)
};

AnyMuscleModel PsoasMajor5Par =
{
 AnyFolder &MuscleParameters = .SubjectMusPar.PsoasMajor;
 AnyIntVar MuscleElemNo = 5; ///< The number of this element of the muscle
 AnyIntVar MuscleElemAmount = MuscleParameters.MuscleElemAmount; ///< The total amount of elements for this muscle
 F0 = .SubjectMusPar.PCSAfactor*PCSA; ///< Maximum force output at optimum fiber length
 Lf0 = MuscleParameters.OptimalFiberlength
       / cos(pi/180*MuscleParameters.Pennationangle);
 // New experimental method of splitting volume and pcsa across mus elem.
 AnyVar PCSA = 1e-2*MuscleParameters.MuscleVolume/(.PsoasMajor1Par.Lf0 +.PsoasMajor2Par.Lf0 +.PsoasMajor3Par.Lf0 +.PsoasMajor4Par.Lf0 +.PsoasMajor5Par.Lf0 +.PsoasMajor6Par.Lf0 +.PsoasMajor7Par.Lf0 +.PsoasMajor8Par.Lf0 +.PsoasMajor9Par.Lf0 +.PsoasMajor10Par.Lf0 +.PsoasMajor11Par.Lf0 );///< PCSA (cm2) is calculated as muscle volume divided between muscle branches and divided by fiber length
 Vol0 = PCSA * Lf0; ///< Muscle volume in (m3)
};

AnyMuscleModel PsoasMajor6Par =
{
 AnyFolder &MuscleParameters = .SubjectMusPar.PsoasMajor;
 AnyIntVar MuscleElemNo = 6; ///< The number of this element of the muscle
 AnyIntVar MuscleElemAmount = MuscleParameters.MuscleElemAmount; ///< The total amount of elements for this muscle
 F0 = .SubjectMusPar.PCSAfactor*PCSA; ///< Maximum force output at optimum fiber length
 Lf0 = MuscleParameters.OptimalFiberlength
       / cos(pi/180*MuscleParameters.Pennationangle);
 // New experimental method of splitting volume and pcsa across mus elem.
 AnyVar PCSA = 1e-2*MuscleParameters.MuscleVolume/(.PsoasMajor1Par.Lf0 +.PsoasMajor2Par.Lf0 +.PsoasMajor3Par.Lf0 +.PsoasMajor4Par.Lf0 +.PsoasMajor5Par.Lf0 +.PsoasMajor6Par.Lf0 +.PsoasMajor7Par.Lf0 +.PsoasMajor8Par.Lf0 +.PsoasMajor9Par.Lf0 +.PsoasMajor10Par.Lf0 +.PsoasMajor11Par.Lf0 );///< PCSA (cm2) is calculated as muscle volume divided between muscle branches and divided by fiber length
 Vol0 = PCSA * Lf0; ///< Muscle volume in (m3)
};

AnyMuscleModel PsoasMajor7Par =
{
 AnyFolder &MuscleParameters = .SubjectMusPar.PsoasMajor;
 AnyIntVar MuscleElemNo = 7; ///< The number of this element of the muscle
 AnyIntVar MuscleElemAmount = MuscleParameters.MuscleElemAmount; ///< The total amount of elements for this muscle
 F0 = .SubjectMusPar.PCSAfactor*PCSA; ///< Maximum force output at optimum fiber length
 Lf0 = MuscleParameters.OptimalFiberlength
       / cos(pi/180*MuscleParameters.Pennationangle);
 // New experimental method of splitting volume and pcsa across mus elem.
 AnyVar PCSA = 1e-2*MuscleParameters.MuscleVolume/(.PsoasMajor1Par.Lf0 +.PsoasMajor2Par.Lf0 +.PsoasMajor3Par.Lf0 +.PsoasMajor4Par.Lf0 +.PsoasMajor5Par.Lf0 +.PsoasMajor6Par.Lf0 +.PsoasMajor7Par.Lf0 +.PsoasMajor8Par.Lf0 +.PsoasMajor9Par.Lf0 +.PsoasMajor10Par.Lf0 +.PsoasMajor11Par.Lf0 );///< PCSA (cm2) is calculated as muscle volume divided between muscle branches and divided by fiber length
 Vol0 = PCSA * Lf0; ///< Muscle volume in (m3)
};

AnyMuscleModel PsoasMajor8Par =
{
 AnyFolder &MuscleParameters = .SubjectMusPar.PsoasMajor;
 AnyIntVar MuscleElemNo = 8; ///< The number of this element of the muscle
 AnyIntVar MuscleElemAmount = MuscleParameters.MuscleElemAmount; ///< The total amount of elements for this muscle
 F0 = .SubjectMusPar.PCSAfactor*PCSA; ///< Maximum force output at optimum fiber length
 Lf0 = MuscleParameters.OptimalFiberlength
       / cos(pi/180*MuscleParameters.Pennationangle);
 // New experimental method of splitting volume and pcsa across mus elem.
 AnyVar PCSA = 1e-2*MuscleParameters.MuscleVolume/(.PsoasMajor1Par.Lf0 +.PsoasMajor2Par.Lf0 +.PsoasMajor3Par.Lf0 +.PsoasMajor4Par.Lf0 +.PsoasMajor5Par.Lf0 +.PsoasMajor6Par.Lf0 +.PsoasMajor7Par.Lf0 +.PsoasMajor8Par.Lf0 +.PsoasMajor9Par.Lf0 +.PsoasMajor10Par.Lf0 +.PsoasMajor11Par.Lf0 );///< PCSA (cm2) is calculated as muscle volume divided between muscle branches and divided by fiber length
 Vol0 = PCSA * Lf0; ///< Muscle volume in (m3)
};

AnyMuscleModel PsoasMajor9Par =
{
 AnyFolder &MuscleParameters = .SubjectMusPar.PsoasMajor;
 AnyIntVar MuscleElemNo = 9; ///< The number of this element of the muscle
 AnyIntVar MuscleElemAmount = MuscleParameters.MuscleElemAmount; ///< The total amount of elements for this muscle
 F0 = .SubjectMusPar.PCSAfactor*PCSA; ///< Maximum force output at optimum fiber length
 Lf0 = MuscleParameters.OptimalFiberlength
       / cos(pi/180*MuscleParameters.Pennationangle);
 // New experimental method of splitting volume and pcsa across mus elem.
 AnyVar PCSA = 1e-2*MuscleParameters.MuscleVolume/(.PsoasMajor1Par.Lf0 +.PsoasMajor2Par.Lf0 +.PsoasMajor3Par.Lf0 +.PsoasMajor4Par.Lf0 +.PsoasMajor5Par.Lf0 +.PsoasMajor6Par.Lf0 +.PsoasMajor7Par.Lf0 +.PsoasMajor8Par.Lf0 +.PsoasMajor9Par.Lf0 +.PsoasMajor10Par.Lf0 +.PsoasMajor11Par.Lf0 );///< PCSA (cm2) is calculated as muscle volume divided between muscle branches and divided by fiber length
 Vol0 = PCSA * Lf0; ///< Muscle volume in (m3)
};

AnyMuscleModel PsoasMajor10Par =
{
 AnyFolder &MuscleParameters = .SubjectMusPar.PsoasMajor;
 AnyIntVar MuscleElemNo = 10; ///< The number of this element of the muscle
 AnyIntVar MuscleElemAmount = MuscleParameters.MuscleElemAmount; ///< The total amount of elements for this muscle
 F0 = .SubjectMusPar.PCSAfactor*PCSA; ///< Maximum force output at optimum fiber length
 Lf0 = MuscleParameters.OptimalFiberlength
       / cos(pi/180*MuscleParameters.Pennationangle);
 // New experimental method of splitting volume and pcsa across mus elem.
 AnyVar PCSA = 1e-2*MuscleParameters.MuscleVolume/(.PsoasMajor1Par.Lf0 +.PsoasMajor2Par.Lf0 +.PsoasMajor3Par.Lf0 +.PsoasMajor4Par.Lf0 +.PsoasMajor5Par.Lf0 +.PsoasMajor6Par.Lf0 +.PsoasMajor7Par.Lf0 +.PsoasMajor8Par.Lf0 +.PsoasMajor9Par.Lf0 +.PsoasMajor10Par.Lf0 +.PsoasMajor11Par.Lf0 );///< PCSA (cm2) is calculated as muscle volume divided between muscle branches and divided by fiber length
 Vol0 = PCSA * Lf0; ///< Muscle volume in (m3)
};

AnyMuscleModel PsoasMajor11Par =
{
 AnyFolder &MuscleParameters = .SubjectMusPar.PsoasMajor;
 AnyIntVar MuscleElemNo = 11; ///< The number of this element of the muscle
 AnyIntVar MuscleElemAmount = MuscleParameters.MuscleElemAmount; ///< The total amount of elements for this muscle
 F0 = .SubjectMusPar.PCSAfactor*PCSA; ///< Maximum force output at optimum fiber length
 Lf0 = MuscleParameters.OptimalFiberlength
       / cos(pi/180*MuscleParameters.Pennationangle);
 // New experimental method of splitting volume and pcsa across mus elem.
 AnyVar PCSA = 1e-2*MuscleParameters.MuscleVolume/(.PsoasMajor1Par.Lf0 +.PsoasMajor2Par.Lf0 +.PsoasMajor3Par.Lf0 +.PsoasMajor4Par.Lf0 +.PsoasMajor5Par.Lf0 +.PsoasMajor6Par.Lf0 +.PsoasMajor7Par.Lf0 +.PsoasMajor8Par.Lf0 +.PsoasMajor9Par.Lf0 +.PsoasMajor10Par.Lf0 +.PsoasMajor11Par.Lf0 );///< PCSA (cm2) is calculated as muscle volume divided between muscle branches and divided by fiber length
 Vol0 = PCSA * Lf0; ///< Muscle volume in (m3)
};


///////////////////////////////////////////
//     QuadratusFemoris (4 elements)     //
///////////////////////////////////////////
AnyMuscleModel QuadratusFemoris1Par =
{
 AnyFolder &MuscleParameters = .SubjectMusPar.QuadratusFemoris;
 AnyIntVar MuscleElemNo = 1; ///< The number of this element of the muscle
 AnyIntVar MuscleElemAmount = MuscleParameters.MuscleElemAmount; ///< The total amount of elements for this muscle
 F0 = .SubjectMusPar.PCSAfactor*PCSA; ///< Maximum force output at optimum fiber length
 Lf0 = MuscleParameters.OptimalFiberlength
       / cos(pi/180*MuscleParameters.Pennationangle);
 // New experimental method of splitting volume and pcsa across mus elem.
 AnyVar PCSA = 1e-2*MuscleParameters.MuscleVolume/(.QuadratusFemoris1Par.Lf0 +.QuadratusFemoris2Par.Lf0 +.QuadratusFemoris3Par.Lf0 +.QuadratusFemoris4Par.Lf0 );///< PCSA (cm2) is calculated as muscle volume divided between muscle branches and divided by fiber length
 Vol0 = PCSA * Lf0; ///< Muscle volume in (m3)
};

AnyMuscleModel QuadratusFemoris2Par =
{
 AnyFolder &MuscleParameters = .SubjectMusPar.QuadratusFemoris;
 AnyIntVar MuscleElemNo = 2; ///< The number of this element of the muscle
 AnyIntVar MuscleElemAmount = MuscleParameters.MuscleElemAmount; ///< The total amount of elements for this muscle
 F0 = .SubjectMusPar.PCSAfactor*PCSA; ///< Maximum force output at optimum fiber length
 Lf0 = MuscleParameters.OptimalFiberlength
       / cos(pi/180*MuscleParameters.Pennationangle);
 // New experimental method of splitting volume and pcsa across mus elem.
 AnyVar PCSA = 1e-2*MuscleParameters.MuscleVolume/(.QuadratusFemoris1Par.Lf0 +.QuadratusFemoris2Par.Lf0 +.QuadratusFemoris3Par.Lf0 +.QuadratusFemoris4Par.Lf0 );///< PCSA (cm2) is calculated as muscle volume divided between muscle branches and divided by fiber length
 Vol0 = PCSA * Lf0; ///< Muscle volume in (m3)
};

AnyMuscleModel QuadratusFemoris3Par =
{
 AnyFolder &MuscleParameters = .SubjectMusPar.QuadratusFemoris;
 AnyIntVar MuscleElemNo = 3; ///< The number of this element of the muscle
 AnyIntVar MuscleElemAmount = MuscleParameters.MuscleElemAmount; ///< The total amount of elements for this muscle
 F0 = .SubjectMusPar.PCSAfactor*PCSA; ///< Maximum force output at optimum fiber length
 Lf0 = MuscleParameters.OptimalFiberlength
       / cos(pi/180*MuscleParameters.Pennationangle);
 // New experimental method of splitting volume and pcsa across mus elem.
 AnyVar PCSA = 1e-2*MuscleParameters.MuscleVolume/(.QuadratusFemoris1Par.Lf0 +.QuadratusFemoris2Par.Lf0 +.QuadratusFemoris3Par.Lf0 +.QuadratusFemoris4Par.Lf0 );///< PCSA (cm2) is calculated as muscle volume divided between muscle branches and divided by fiber length
 Vol0 = PCSA * Lf0; ///< Muscle volume in (m3)
};

AnyMuscleModel QuadratusFemoris4Par =
{
 AnyFolder &MuscleParameters = .SubjectMusPar.QuadratusFemoris;
 AnyIntVar MuscleElemNo = 4; ///< The number of this element of the muscle
 AnyIntVar MuscleElemAmount = MuscleParameters.MuscleElemAmount; ///< The total amount of elements for this muscle
 F0 = .SubjectMusPar.PCSAfactor*PCSA; ///< Maximum force output at optimum fiber length
 Lf0 = MuscleParameters.OptimalFiberlength
       / cos(pi/180*MuscleParameters.Pennationangle);
 // New experimental method of splitting volume and pcsa across mus elem.
 AnyVar PCSA = 1e-2*MuscleParameters.MuscleVolume/(.QuadratusFemoris1Par.Lf0 +.QuadratusFemoris2Par.Lf0 +.QuadratusFemoris3Par.Lf0 +.QuadratusFemoris4Par.Lf0 );///< PCSA (cm2) is calculated as muscle volume divided between muscle branches and divided by fiber length
 Vol0 = PCSA * Lf0; ///< Muscle volume in (m3)
};


////////////////////////////////////////
//     RectusFemoris (2 elements)     //
////////////////////////////////////////
AnyMuscleModel RectusFemoris1Par =
{
 AnyFolder &MuscleParameters = .SubjectMusPar.RectusFemoris;
 AnyIntVar MuscleElemNo = 1; ///< The number of this element of the muscle
 AnyIntVar MuscleElemAmount = MuscleParameters.MuscleElemAmount; ///< The total amount of elements for this muscle
 F0 = .SubjectMusPar.PCSAfactor*PCSA; ///< Maximum force output at optimum fiber length
 Lf0 = MuscleParameters.OptimalFiberlength
       / cos(pi/180*MuscleParameters.Pennationangle);
 // New experimental method of splitting volume and pcsa across mus elem.
 AnyVar PCSA = 1e-2*MuscleParameters.MuscleVolume/(.RectusFemoris1Par.Lf0 +.RectusFemoris2Par.Lf0 );///< PCSA (cm2) is calculated as muscle volume divided between muscle branches and divided by fiber length
 Vol0 = PCSA * Lf0; ///< Muscle volume in (m3)
};

AnyMuscleModel RectusFemoris2Par =
{
 AnyFolder &MuscleParameters = .SubjectMusPar.RectusFemoris;
 AnyIntVar MuscleElemNo = 2; ///< The number of this element of the muscle
 AnyIntVar MuscleElemAmount = MuscleParameters.MuscleElemAmount; ///< The total amount of elements for this muscle
 F0 = .SubjectMusPar.PCSAfactor*PCSA; ///< Maximum force output at optimum fiber length
 Lf0 = MuscleParameters.OptimalFiberlength
       / cos(pi/180*MuscleParameters.Pennationangle);
 // New experimental method of splitting volume and pcsa across mus elem.
 AnyVar PCSA = 1e-2*MuscleParameters.MuscleVolume/(.RectusFemoris1Par.Lf0 +.RectusFemoris2Par.Lf0 );///< PCSA (cm2) is calculated as muscle volume divided between muscle branches and divided by fiber length
 Vol0 = PCSA * Lf0; ///< Muscle volume in (m3)
};


////////////////////////////////////
//     Sartorius (1 element )     //
////////////////////////////////////
AnyMuscleModel Sartorius1Par =
{
 AnyFolder &MuscleParameters = .SubjectMusPar.Sartorius;
 AnyIntVar MuscleElemNo = 1; ///< The number of this element of the muscle
 AnyIntVar MuscleElemAmount = MuscleParameters.MuscleElemAmount; ///< The total amount of elements for this muscle
 F0 = .SubjectMusPar.PCSAfactor*PCSA; ///< Maximum force output at optimum fiber length
 Lf0 = MuscleParameters.OptimalFiberlength
       / cos(pi/180*MuscleParameters.Pennationangle);
 // New experimental method of splitting volume and pcsa across mus elem.
 AnyVar PCSA = 1e-2*MuscleParameters.MuscleVolume/(Lf0);///< PCSA (cm2) is calculated as muscle volume divided between muscle branches and divided by fiber length
 Vol0 = PCSA * Lf0; ///< Muscle volume in (m3)
};


//////////////////////////////////////////
//     Semimembranosus (3 elements)     //
//////////////////////////////////////////
AnyMuscleModel Semimembranosus1Par =
{
 AnyFolder &MuscleParameters = .SubjectMusPar.Semimembranosus;
 AnyIntVar MuscleElemNo = 1; ///< The number of this element of the muscle
 AnyIntVar MuscleElemAmount = MuscleParameters.MuscleElemAmount; ///< The total amount of elements for this muscle
 F0 = .SubjectMusPar.PCSAfactor*PCSA; ///< Maximum force output at optimum fiber length
 Lf0 = MuscleParameters.OptimalFiberlength
       / cos(pi/180*MuscleParameters.Pennationangle);
 // New experimental method of splitting volume and pcsa across mus elem.
 AnyVar PCSA = 1e-2*MuscleParameters.MuscleVolume/(.Semimembranosus1Par.Lf0 +.Semimembranosus2Par.Lf0 +.Semimembranosus3Par.Lf0 );///< PCSA (cm2) is calculated as muscle volume divided between muscle branches and divided by fiber length
 Vol0 = PCSA * Lf0; ///< Muscle volume in (m3)
};

AnyMuscleModel Semimembranosus2Par =
{
 AnyFolder &MuscleParameters = .SubjectMusPar.Semimembranosus;
 AnyIntVar MuscleElemNo = 2; ///< The number of this element of the muscle
 AnyIntVar MuscleElemAmount = MuscleParameters.MuscleElemAmount; ///< The total amount of elements for this muscle
 F0 = .SubjectMusPar.PCSAfactor*PCSA; ///< Maximum force output at optimum fiber length
 Lf0 = MuscleParameters.OptimalFiberlength
       / cos(pi/180*MuscleParameters.Pennationangle);
 // New experimental method of splitting volume and pcsa across mus elem.
 AnyVar PCSA = 1e-2*MuscleParameters.MuscleVolume/(.Semimembranosus1Par.Lf0 +.Semimembranosus2Par.Lf0 +.Semimembranosus3Par.Lf0 );///< PCSA (cm2) is calculated as muscle volume divided between muscle branches and divided by fiber length
 Vol0 = PCSA * Lf0; ///< Muscle volume in (m3)
};

AnyMuscleModel Semimembranosus3Par =
{
 AnyFolder &MuscleParameters = .SubjectMusPar.Semimembranosus;
 AnyIntVar MuscleElemNo = 3; ///< The number of this element of the muscle
 AnyIntVar MuscleElemAmount = MuscleParameters.MuscleElemAmount; ///< The total amount of elements for this muscle
 F0 = .SubjectMusPar.PCSAfactor*PCSA; ///< Maximum force output at optimum fiber length
 Lf0 = MuscleParameters.OptimalFiberlength
       / cos(pi/180*MuscleParameters.Pennationangle);
 // New experimental method of splitting volume and pcsa across mus elem.
 AnyVar PCSA = 1e-2*MuscleParameters.MuscleVolume/(.Semimembranosus1Par.Lf0 +.Semimembranosus2Par.Lf0 +.Semimembranosus3Par.Lf0 );///< PCSA (cm2) is calculated as muscle volume divided between muscle branches and divided by fiber length
 Vol0 = PCSA * Lf0; ///< Muscle volume in (m3)
};


/////////////////////////////////////////
//     Semitendinosus (1 element )     //
/////////////////////////////////////////
AnyMuscleModel Semitendinosus1Par =
{
 AnyFolder &MuscleParameters = .SubjectMusPar.Semitendinosus;
 AnyIntVar MuscleElemNo = 1; ///< The number of this element of the muscle
 AnyIntVar MuscleElemAmount = MuscleParameters.MuscleElemAmount; ///< The total amount of elements for this muscle
 F0 = .SubjectMusPar.PCSAfactor*PCSA; ///< Maximum force output at optimum fiber length
 Lf0 = MuscleParameters.OptimalFiberlength
       / cos(pi/180*MuscleParameters.Pennationangle);
 // New experimental method of splitting volume and pcsa across mus elem.
 AnyVar PCSA = 1e-2*MuscleParameters.MuscleVolume/(Lf0);///< PCSA (cm2) is calculated as muscle volume divided between muscle branches and divided by fiber length
 Vol0 = PCSA * Lf0; ///< Muscle volume in (m3)
};


/////////////////////////////////////////
//     SoleusMedialis (3 elements)     //
/////////////////////////////////////////
AnyMuscleModel SoleusMedialis1Par =
{
 AnyFolder &MuscleParameters = .SubjectMusPar.SoleusMedialis;
 AnyIntVar MuscleElemNo = 1; ///< The number of this element of the muscle
 AnyIntVar MuscleElemAmount = MuscleParameters.MuscleElemAmount; ///< The total amount of elements for this muscle
 F0 = .SubjectMusPar.PCSAfactor*PCSA; ///< Maximum force output at optimum fiber length
 Lf0 = MuscleParameters.OptimalFiberlength
       / cos(pi/180*MuscleParameters.Pennationangle);
 // New experimental method of splitting volume and pcsa across mus elem.
 AnyVar PCSA = 1e-2*MuscleParameters.MuscleVolume/(.SoleusMedialis1Par.Lf0 +.SoleusMedialis2Par.Lf0 +.SoleusMedialis3Par.Lf0 );///< PCSA (cm2) is calculated as muscle volume divided between muscle branches and divided by fiber length
 Vol0 = PCSA * Lf0; ///< Muscle volume in (m3)
};

AnyMuscleModel SoleusMedialis2Par =
{
 AnyFolder &MuscleParameters = .SubjectMusPar.SoleusMedialis;
 AnyIntVar MuscleElemNo = 2; ///< The number of this element of the muscle
 AnyIntVar MuscleElemAmount = MuscleParameters.MuscleElemAmount; ///< The total amount of elements for this muscle
 F0 = .SubjectMusPar.PCSAfactor*PCSA; ///< Maximum force output at optimum fiber length
 Lf0 = MuscleParameters.OptimalFiberlength
       / cos(pi/180*MuscleParameters.Pennationangle);
 // New experimental method of splitting volume and pcsa across mus elem.
 AnyVar PCSA = 1e-2*MuscleParameters.MuscleVolume/(.SoleusMedialis1Par.Lf0 +.SoleusMedialis2Par.Lf0 +.SoleusMedialis3Par.Lf0 );///< PCSA (cm2) is calculated as muscle volume divided between muscle branches and divided by fiber length
 Vol0 = PCSA * Lf0; ///< Muscle volume in (m3)
};

AnyMuscleModel SoleusMedialis3Par =
{
 AnyFolder &MuscleParameters = .SubjectMusPar.SoleusMedialis;
 AnyIntVar MuscleElemNo = 3; ///< The number of this element of the muscle
 AnyIntVar MuscleElemAmount = MuscleParameters.MuscleElemAmount; ///< The total amount of elements for this muscle
 F0 = .SubjectMusPar.PCSAfactor*PCSA; ///< Maximum force output at optimum fiber length
 Lf0 = MuscleParameters.OptimalFiberlength
       / cos(pi/180*MuscleParameters.Pennationangle);
 // New experimental method of splitting volume and pcsa across mus elem.
 AnyVar PCSA = 1e-2*MuscleParameters.MuscleVolume/(.SoleusMedialis1Par.Lf0 +.SoleusMedialis2Par.Lf0 +.SoleusMedialis3Par.Lf0 );///< PCSA (cm2) is calculated as muscle volume divided between muscle branches and divided by fiber length
 Vol0 = PCSA * Lf0; ///< Muscle volume in (m3)
};


//////////////////////////////////////////
//     SoleusLateralis (3 elements)     //
//////////////////////////////////////////
AnyMuscleModel SoleusLateralis1Par =
{
 AnyFolder &MuscleParameters = .SubjectMusPar.SoleusLateralis;
 AnyIntVar MuscleElemNo = 1; ///< The number of this element of the muscle
 AnyIntVar MuscleElemAmount = MuscleParameters.MuscleElemAmount; ///< The total amount of elements for this muscle
 F0 = .SubjectMusPar.PCSAfactor*PCSA; ///< Maximum force output at optimum fiber length
 Lf0 = MuscleParameters.OptimalFiberlength
       / cos(pi/180*MuscleParameters.Pennationangle);
 // New experimental method of splitting volume and pcsa across mus elem.
 AnyVar PCSA = 1e-2*MuscleParameters.MuscleVolume/(.SoleusLateralis1Par.Lf0 +.SoleusLateralis2Par.Lf0 +.SoleusLateralis3Par.Lf0 );///< PCSA (cm2) is calculated as muscle volume divided between muscle branches and divided by fiber length
 Vol0 = PCSA * Lf0; ///< Muscle volume in (m3)
};

AnyMuscleModel SoleusLateralis2Par =
{
 AnyFolder &MuscleParameters = .SubjectMusPar.SoleusLateralis;
 AnyIntVar MuscleElemNo = 2; ///< The number of this element of the muscle
 AnyIntVar MuscleElemAmount = MuscleParameters.MuscleElemAmount; ///< The total amount of elements for this muscle
 F0 = .SubjectMusPar.PCSAfactor*PCSA; ///< Maximum force output at optimum fiber length
 Lf0 = MuscleParameters.OptimalFiberlength
       / cos(pi/180*MuscleParameters.Pennationangle);
 // New experimental method of splitting volume and pcsa across mus elem.
 AnyVar PCSA = 1e-2*MuscleParameters.MuscleVolume/(.SoleusLateralis1Par.Lf0 +.SoleusLateralis2Par.Lf0 +.SoleusLateralis3Par.Lf0 );///< PCSA (cm2) is calculated as muscle volume divided between muscle branches and divided by fiber length
 Vol0 = PCSA * Lf0; ///< Muscle volume in (m3)
};

AnyMuscleModel SoleusLateralis3Par =
{
 AnyFolder &MuscleParameters = .SubjectMusPar.SoleusLateralis;
 AnyIntVar MuscleElemNo = 3; ///< The number of this element of the muscle
 AnyIntVar MuscleElemAmount = MuscleParameters.MuscleElemAmount; ///< The total amount of elements for this muscle
 F0 = .SubjectMusPar.PCSAfactor*PCSA; ///< Maximum force output at optimum fiber length
 Lf0 = MuscleParameters.OptimalFiberlength
       / cos(pi/180*MuscleParameters.Pennationangle);
 // New experimental method of splitting volume and pcsa across mus elem.
 AnyVar PCSA = 1e-2*MuscleParameters.MuscleVolume/(.SoleusLateralis1Par.Lf0 +.SoleusLateralis2Par.Lf0 +.SoleusLateralis3Par.Lf0 );///< PCSA (cm2) is calculated as muscle volume divided between muscle branches and divided by fiber length
 Vol0 = PCSA * Lf0; ///< Muscle volume in (m3)
};


/////////////////////////////////////////////
//     TensorFasciaeLatae (2 elements)     //
/////////////////////////////////////////////
AnyMuscleModel TensorFasciaeLatae1Par =
{
 AnyFolder &MuscleParameters = .SubjectMusPar.TensorFasciaeLatae;
 AnyIntVar MuscleElemNo = 1; ///< The number of this element of the muscle
 AnyIntVar MuscleElemAmount = MuscleParameters.MuscleElemAmount; ///< The total amount of elements for this muscle
 F0 = .SubjectMusPar.PCSAfactor*PCSA; ///< Maximum force output at optimum fiber length
 Lf0 = MuscleParameters.OptimalFiberlength
       / cos(pi/180*MuscleParameters.Pennationangle);
 // New experimental method of splitting volume and pcsa across mus elem.
 AnyVar PCSA = 1e-2*MuscleParameters.MuscleVolume/(.TensorFasciaeLatae1Par.Lf0 +.TensorFasciaeLatae2Par.Lf0 );///< PCSA (cm2) is calculated as muscle volume divided between muscle branches and divided by fiber length
 Vol0 = PCSA * Lf0; ///< Muscle volume in (m3)
};

AnyMuscleModel TensorFasciaeLatae2Par =
{
 AnyFolder &MuscleParameters = .SubjectMusPar.TensorFasciaeLatae;
 AnyIntVar MuscleElemNo = 2; ///< The number of this element of the muscle
 AnyIntVar MuscleElemAmount = MuscleParameters.MuscleElemAmount; ///< The total amount of elements for this muscle
 F0 = .SubjectMusPar.PCSAfactor*PCSA; ///< Maximum force output at optimum fiber length
 Lf0 = MuscleParameters.OptimalFiberlength
       / cos(pi/180*MuscleParameters.Pennationangle);
 // New experimental method of splitting volume and pcsa across mus elem.
 AnyVar PCSA = 1e-2*MuscleParameters.MuscleVolume/(.TensorFasciaeLatae1Par.Lf0 +.TensorFasciaeLatae2Par.Lf0 );///< PCSA (cm2) is calculated as muscle volume divided between muscle branches and divided by fiber length
 Vol0 = PCSA * Lf0; ///< Muscle volume in (m3)
};


///////////////////////////////////////////
//     TibialisAnterior (3 elements)     //
///////////////////////////////////////////
AnyMuscleModel TibialisAnterior1Par =
{
 AnyFolder &MuscleParameters = .SubjectMusPar.TibialisAnterior;
 AnyIntVar MuscleElemNo = 1; ///< The number of this element of the muscle
 AnyIntVar MuscleElemAmount = MuscleParameters.MuscleElemAmount; ///< The total amount of elements for this muscle
 F0 = .SubjectMusPar.PCSAfactor*PCSA; ///< Maximum force output at optimum fiber length
 Lf0 = MuscleParameters.OptimalFiberlength
       / cos(pi/180*MuscleParameters.Pennationangle);
 // New experimental method of splitting volume and pcsa across mus elem.
 AnyVar PCSA = 1e-2*MuscleParameters.MuscleVolume/(.TibialisAnterior1Par.Lf0 +.TibialisAnterior2Par.Lf0 +.TibialisAnterior3Par.Lf0 );///< PCSA (cm2) is calculated as muscle volume divided between muscle branches and divided by fiber length
 Vol0 = PCSA * Lf0; ///< Muscle volume in (m3)
};

AnyMuscleModel TibialisAnterior2Par =
{
 AnyFolder &MuscleParameters = .SubjectMusPar.TibialisAnterior;
 AnyIntVar MuscleElemNo = 2; ///< The number of this element of the muscle
 AnyIntVar MuscleElemAmount = MuscleParameters.MuscleElemAmount; ///< The total amount of elements for this muscle
 F0 = .SubjectMusPar.PCSAfactor*PCSA; ///< Maximum force output at optimum fiber length
 Lf0 = MuscleParameters.OptimalFiberlength
       / cos(pi/180*MuscleParameters.Pennationangle);
 // New experimental method of splitting volume and pcsa across mus elem.
 AnyVar PCSA = 1e-2*MuscleParameters.MuscleVolume/(.TibialisAnterior1Par.Lf0 +.TibialisAnterior2Par.Lf0 +.TibialisAnterior3Par.Lf0 );///< PCSA (cm2) is calculated as muscle volume divided between muscle branches and divided by fiber length
 Vol0 = PCSA * Lf0; ///< Muscle volume in (m3)
};

AnyMuscleModel TibialisAnterior3Par =
{
 AnyFolder &MuscleParameters = .SubjectMusPar.TibialisAnterior;
 AnyIntVar MuscleElemNo = 3; ///< The number of this element of the muscle
 AnyIntVar MuscleElemAmount = MuscleParameters.MuscleElemAmount; ///< The total amount of elements for this muscle
 F0 = .SubjectMusPar.PCSAfactor*PCSA; ///< Maximum force output at optimum fiber length
 Lf0 = MuscleParameters.OptimalFiberlength
       / cos(pi/180*MuscleParameters.Pennationangle);
 // New experimental method of splitting volume and pcsa across mus elem.
 AnyVar PCSA = 1e-2*MuscleParameters.MuscleVolume/(.TibialisAnterior1Par.Lf0 +.TibialisAnterior2Par.Lf0 +.TibialisAnterior3Par.Lf0 );///< PCSA (cm2) is calculated as muscle volume divided between muscle branches and divided by fiber length
 Vol0 = PCSA * Lf0; ///< Muscle volume in (m3)
};


////////////////////////////////////////////////////
//     TibialisPosteriorMedialis (3 elements)     //
////////////////////////////////////////////////////
AnyMuscleModel TibialisPosteriorMedialis1Par =
{
 AnyFolder &MuscleParameters = .SubjectMusPar.TibialisPosteriorMedialis;
 AnyIntVar MuscleElemNo = 1; ///< The number of this element of the muscle
 AnyIntVar MuscleElemAmount = MuscleParameters.MuscleElemAmount; ///< The total amount of elements for this muscle
 F0 = .SubjectMusPar.PCSAfactor*PCSA; ///< Maximum force output at optimum fiber length
 Lf0 = MuscleParameters.OptimalFiberlength
       / cos(pi/180*MuscleParameters.Pennationangle);
 // New experimental method of splitting volume and pcsa across mus elem.
 AnyVar PCSA = 1e-2*MuscleParameters.MuscleVolume/(.TibialisPosteriorMedialis1Par.Lf0 +.TibialisPosteriorMedialis2Par.Lf0 +.TibialisPosteriorMedialis3Par.Lf0 );///< PCSA (cm2) is calculated as muscle volume divided between muscle branches and divided by fiber length
 Vol0 = PCSA * Lf0; ///< Muscle volume in (m3)
};

AnyMuscleModel TibialisPosteriorMedialis2Par =
{
 AnyFolder &MuscleParameters = .SubjectMusPar.TibialisPosteriorMedialis;
 AnyIntVar MuscleElemNo = 2; ///< The number of this element of the muscle
 AnyIntVar MuscleElemAmount = MuscleParameters.MuscleElemAmount; ///< The total amount of elements for this muscle
 F0 = .SubjectMusPar.PCSAfactor*PCSA; ///< Maximum force output at optimum fiber length
 Lf0 = MuscleParameters.OptimalFiberlength
       / cos(pi/180*MuscleParameters.Pennationangle);
 // New experimental method of splitting volume and pcsa across mus elem.
 AnyVar PCSA = 1e-2*MuscleParameters.MuscleVolume/(.TibialisPosteriorMedialis1Par.Lf0 +.TibialisPosteriorMedialis2Par.Lf0 +.TibialisPosteriorMedialis3Par.Lf0 );///< PCSA (cm2) is calculated as muscle volume divided between muscle branches and divided by fiber length
 Vol0 = PCSA * Lf0; ///< Muscle volume in (m3)
};

AnyMuscleModel TibialisPosteriorMedialis3Par =
{
 AnyFolder &MuscleParameters = .SubjectMusPar.TibialisPosteriorMedialis;
 AnyIntVar MuscleElemNo = 3; ///< The number of this element of the muscle
 AnyIntVar MuscleElemAmount = MuscleParameters.MuscleElemAmount; ///< The total amount of elements for this muscle
 F0 = .SubjectMusPar.PCSAfactor*PCSA; ///< Maximum force output at optimum fiber length
 Lf0 = MuscleParameters.OptimalFiberlength
       / cos(pi/180*MuscleParameters.Pennationangle);
 // New experimental method of splitting volume and pcsa across mus elem.
 AnyVar PCSA = 1e-2*MuscleParameters.MuscleVolume/(.TibialisPosteriorMedialis1Par.Lf0 +.TibialisPosteriorMedialis2Par.Lf0 +.TibialisPosteriorMedialis3Par.Lf0 );///< PCSA (cm2) is calculated as muscle volume divided between muscle branches and divided by fiber length
 Vol0 = PCSA * Lf0; ///< Muscle volume in (m3)
};


/////////////////////////////////////////////////////
//     TibialisPosteriorLateralis (3 elements)     //
/////////////////////////////////////////////////////
AnyMuscleModel TibialisPosteriorLateralis1Par =
{
 AnyFolder &MuscleParameters = .SubjectMusPar.TibialisPosteriorLateralis;
 AnyIntVar MuscleElemNo = 1; ///< The number of this element of the muscle
 AnyIntVar MuscleElemAmount = MuscleParameters.MuscleElemAmount; ///< The total amount of elements for this muscle
 F0 = .SubjectMusPar.PCSAfactor*PCSA; ///< Maximum force output at optimum fiber length
 Lf0 = MuscleParameters.OptimalFiberlength
       / cos(pi/180*MuscleParameters.Pennationangle);
 // New experimental method of splitting volume and pcsa across mus elem.
 AnyVar PCSA = 1e-2*MuscleParameters.MuscleVolume/(.TibialisPosteriorLateralis1Par.Lf0 +.TibialisPosteriorLateralis2Par.Lf0 +.TibialisPosteriorLateralis3Par.Lf0 );///< PCSA (cm2) is calculated as muscle volume divided between muscle branches and divided by fiber length
 Vol0 = PCSA * Lf0; ///< Muscle volume in (m3)
};

AnyMuscleModel TibialisPosteriorLateralis2Par =
{
 AnyFolder &MuscleParameters = .SubjectMusPar.TibialisPosteriorLateralis;
 AnyIntVar MuscleElemNo = 2; ///< The number of this element of the muscle
 AnyIntVar MuscleElemAmount = MuscleParameters.MuscleElemAmount; ///< The total amount of elements for this muscle
 F0 = .SubjectMusPar.PCSAfactor*PCSA; ///< Maximum force output at optimum fiber length
 Lf0 = MuscleParameters.OptimalFiberlength
       / cos(pi/180*MuscleParameters.Pennationangle);
 // New experimental method of splitting volume and pcsa across mus elem.
 AnyVar PCSA = 1e-2*MuscleParameters.MuscleVolume/(.TibialisPosteriorLateralis1Par.Lf0 +.TibialisPosteriorLateralis2Par.Lf0 +.TibialisPosteriorLateralis3Par.Lf0 );///< PCSA (cm2) is calculated as muscle volume divided between muscle branches and divided by fiber length
 Vol0 = PCSA * Lf0; ///< Muscle volume in (m3)
};

AnyMuscleModel TibialisPosteriorLateralis3Par =
{
 AnyFolder &MuscleParameters = .SubjectMusPar.TibialisPosteriorLateralis;
 AnyIntVar MuscleElemNo = 3; ///< The number of this element of the muscle
 AnyIntVar MuscleElemAmount = MuscleParameters.MuscleElemAmount; ///< The total amount of elements for this muscle
 F0 = .SubjectMusPar.PCSAfactor*PCSA; ///< Maximum force output at optimum fiber length
 Lf0 = MuscleParameters.OptimalFiberlength
       / cos(pi/180*MuscleParameters.Pennationangle);
 // New experimental method of splitting volume and pcsa across mus elem.
 AnyVar PCSA = 1e-2*MuscleParameters.MuscleVolume/(.TibialisPosteriorLateralis1Par.Lf0 +.TibialisPosteriorLateralis2Par.Lf0 +.TibialisPosteriorLateralis3Par.Lf0 );///< PCSA (cm2) is calculated as muscle volume divided between muscle branches and divided by fiber length
 Vol0 = PCSA * Lf0; ///< Muscle volume in (m3)
};


////////////////////////////////////////////
//     VastusIntermedius (6 elements)     //
////////////////////////////////////////////
AnyMuscleModel VastusIntermedius1Par =
{
 AnyFolder &MuscleParameters = .SubjectMusPar.VastusIntermedius;
 AnyIntVar MuscleElemNo = 1; ///< The number of this element of the muscle
 AnyIntVar MuscleElemAmount = MuscleParameters.MuscleElemAmount; ///< The total amount of elements for this muscle
 F0 = .SubjectMusPar.PCSAfactor*PCSA; ///< Maximum force output at optimum fiber length
 Lf0 = MuscleParameters.OptimalFiberlength
       / cos(pi/180*MuscleParameters.Pennationangle);
 // New experimental method of splitting volume and pcsa across mus elem.
 AnyVar PCSA = 1e-2*MuscleParameters.MuscleVolume/(.VastusIntermedius1Par.Lf0 +.VastusIntermedius2Par.Lf0 +.VastusIntermedius3Par.Lf0 +.VastusIntermedius4Par.Lf0 +.VastusIntermedius5Par.Lf0 +.VastusIntermedius6Par.Lf0 );///< PCSA (cm2) is calculated as muscle volume divided between muscle branches and divided by fiber length
 Vol0 = PCSA * Lf0; ///< Muscle volume in (m3)
};

AnyMuscleModel VastusIntermedius2Par =
{
 AnyFolder &MuscleParameters = .SubjectMusPar.VastusIntermedius;
 AnyIntVar MuscleElemNo = 2; ///< The number of this element of the muscle
 AnyIntVar MuscleElemAmount = MuscleParameters.MuscleElemAmount; ///< The total amount of elements for this muscle
 F0 = .SubjectMusPar.PCSAfactor*PCSA; ///< Maximum force output at optimum fiber length
 Lf0 = MuscleParameters.OptimalFiberlength
       / cos(pi/180*MuscleParameters.Pennationangle);
 // New experimental method of splitting volume and pcsa across mus elem.
 AnyVar PCSA = 1e-2*MuscleParameters.MuscleVolume/(.VastusIntermedius1Par.Lf0 +.VastusIntermedius2Par.Lf0 +.VastusIntermedius3Par.Lf0 +.VastusIntermedius4Par.Lf0 +.VastusIntermedius5Par.Lf0 +.VastusIntermedius6Par.Lf0 );///< PCSA (cm2) is calculated as muscle volume divided between muscle branches and divided by fiber length
 Vol0 = PCSA * Lf0; ///< Muscle volume in (m3)
};

AnyMuscleModel VastusIntermedius3Par =
{
 AnyFolder &MuscleParameters = .SubjectMusPar.VastusIntermedius;
 AnyIntVar MuscleElemNo = 3; ///< The number of this element of the muscle
 AnyIntVar MuscleElemAmount = MuscleParameters.MuscleElemAmount; ///< The total amount of elements for this muscle
 F0 = .SubjectMusPar.PCSAfactor*PCSA; ///< Maximum force output at optimum fiber length
 Lf0 = MuscleParameters.OptimalFiberlength
       / cos(pi/180*MuscleParameters.Pennationangle);
 // New experimental method of splitting volume and pcsa across mus elem.
 AnyVar PCSA = 1e-2*MuscleParameters.MuscleVolume/(.VastusIntermedius1Par.Lf0 +.VastusIntermedius2Par.Lf0 +.VastusIntermedius3Par.Lf0 +.VastusIntermedius4Par.Lf0 +.VastusIntermedius5Par.Lf0 +.VastusIntermedius6Par.Lf0 );///< PCSA (cm2) is calculated as muscle volume divided between muscle branches and divided by fiber length
 Vol0 = PCSA * Lf0; ///< Muscle volume in (m3)
};

AnyMuscleModel VastusIntermedius4Par =
{
 AnyFolder &MuscleParameters = .SubjectMusPar.VastusIntermedius;
 AnyIntVar MuscleElemNo = 4; ///< The number of this element of the muscle
 AnyIntVar MuscleElemAmount = MuscleParameters.MuscleElemAmount; ///< The total amount of elements for this muscle
 F0 = .SubjectMusPar.PCSAfactor*PCSA; ///< Maximum force output at optimum fiber length
 Lf0 = MuscleParameters.OptimalFiberlength
       / cos(pi/180*MuscleParameters.Pennationangle);
 // New experimental method of splitting volume and pcsa across mus elem.
 AnyVar PCSA = 1e-2*MuscleParameters.MuscleVolume/(.VastusIntermedius1Par.Lf0 +.VastusIntermedius2Par.Lf0 +.VastusIntermedius3Par.Lf0 +.VastusIntermedius4Par.Lf0 +.VastusIntermedius5Par.Lf0 +.VastusIntermedius6Par.Lf0 );///< PCSA (cm2) is calculated as muscle volume divided between muscle branches and divided by fiber length
 Vol0 = PCSA * Lf0; ///< Muscle volume in (m3)
};

AnyMuscleModel VastusIntermedius5Par =
{
 AnyFolder &MuscleParameters = .SubjectMusPar.VastusIntermedius;
 AnyIntVar MuscleElemNo = 5; ///< The number of this element of the muscle
 AnyIntVar MuscleElemAmount = MuscleParameters.MuscleElemAmount; ///< The total amount of elements for this muscle
 F0 = .SubjectMusPar.PCSAfactor*PCSA; ///< Maximum force output at optimum fiber length
 Lf0 = MuscleParameters.OptimalFiberlength
       / cos(pi/180*MuscleParameters.Pennationangle);
 // New experimental method of splitting volume and pcsa across mus elem.
 AnyVar PCSA = 1e-2*MuscleParameters.MuscleVolume/(.VastusIntermedius1Par.Lf0 +.VastusIntermedius2Par.Lf0 +.VastusIntermedius3Par.Lf0 +.VastusIntermedius4Par.Lf0 +.VastusIntermedius5Par.Lf0 +.VastusIntermedius6Par.Lf0 );///< PCSA (cm2) is calculated as muscle volume divided between muscle branches and divided by fiber length
 Vol0 = PCSA * Lf0; ///< Muscle volume in (m3)
};

AnyMuscleModel VastusIntermedius6Par =
{
 AnyFolder &MuscleParameters = .SubjectMusPar.VastusIntermedius;
 AnyIntVar MuscleElemNo = 6; ///< The number of this element of the muscle
 AnyIntVar MuscleElemAmount = MuscleParameters.MuscleElemAmount; ///< The total amount of elements for this muscle
 F0 = .SubjectMusPar.PCSAfactor*PCSA; ///< Maximum force output at optimum fiber length
 Lf0 = MuscleParameters.OptimalFiberlength
       / cos(pi/180*MuscleParameters.Pennationangle);
 // New experimental method of splitting volume and pcsa across mus elem.
 AnyVar PCSA = 1e-2*MuscleParameters.MuscleVolume/(.VastusIntermedius1Par.Lf0 +.VastusIntermedius2Par.Lf0 +.VastusIntermedius3Par.Lf0 +.VastusIntermedius4Par.Lf0 +.VastusIntermedius5Par.Lf0 +.VastusIntermedius6Par.Lf0 );///< PCSA (cm2) is calculated as muscle volume divided between muscle branches and divided by fiber length
 Vol0 = PCSA * Lf0; ///< Muscle volume in (m3)
};


//////////////////////////////////////////////////
//     VastusLateralisInferior (6 elements)     //
//////////////////////////////////////////////////
AnyMuscleModel VastusLateralisInferior1Par =
{
 AnyFolder &MuscleParameters = .SubjectMusPar.VastusLateralisInferior;
 AnyIntVar MuscleElemNo = 1; ///< The number of this element of the muscle
 AnyIntVar MuscleElemAmount = MuscleParameters.MuscleElemAmount; ///< The total amount of elements for this muscle
 F0 = .SubjectMusPar.PCSAfactor*PCSA; ///< Maximum force output at optimum fiber length
 Lf0 = MuscleParameters.OptimalFiberlength
       / cos(pi/180*MuscleParameters.Pennationangle);
 // New experimental method of splitting volume and pcsa across mus elem.
 AnyVar PCSA = 1e-2*MuscleParameters.MuscleVolume/(.VastusLateralisInferior1Par.Lf0 +.VastusLateralisInferior2Par.Lf0 +.VastusLateralisInferior3Par.Lf0 +.VastusLateralisInferior4Par.Lf0 +.VastusLateralisInferior5Par.Lf0 +.VastusLateralisInferior6Par.Lf0 );///< PCSA (cm2) is calculated as muscle volume divided between muscle branches and divided by fiber length
 Vol0 = PCSA * Lf0; ///< Muscle volume in (m3)
};

AnyMuscleModel VastusLateralisInferior2Par =
{
 AnyFolder &MuscleParameters = .SubjectMusPar.VastusLateralisInferior;
 AnyIntVar MuscleElemNo = 2; ///< The number of this element of the muscle
 AnyIntVar MuscleElemAmount = MuscleParameters.MuscleElemAmount; ///< The total amount of elements for this muscle
 F0 = .SubjectMusPar.PCSAfactor*PCSA; ///< Maximum force output at optimum fiber length
 Lf0 = MuscleParameters.OptimalFiberlength
       / cos(pi/180*MuscleParameters.Pennationangle);
 // New experimental method of splitting volume and pcsa across mus elem.
 AnyVar PCSA = 1e-2*MuscleParameters.MuscleVolume/(.VastusLateralisInferior1Par.Lf0 +.VastusLateralisInferior2Par.Lf0 +.VastusLateralisInferior3Par.Lf0 +.VastusLateralisInferior4Par.Lf0 +.VastusLateralisInferior5Par.Lf0 +.VastusLateralisInferior6Par.Lf0 );///< PCSA (cm2) is calculated as muscle volume divided between muscle branches and divided by fiber length
 Vol0 = PCSA * Lf0; ///< Muscle volume in (m3)
};

AnyMuscleModel VastusLateralisInferior3Par =
{
 AnyFolder &MuscleParameters = .SubjectMusPar.VastusLateralisInferior;
 AnyIntVar MuscleElemNo = 3; ///< The number of this element of the muscle
 AnyIntVar MuscleElemAmount = MuscleParameters.MuscleElemAmount; ///< The total amount of elements for this muscle
 F0 = .SubjectMusPar.PCSAfactor*PCSA; ///< Maximum force output at optimum fiber length
 Lf0 = MuscleParameters.OptimalFiberlength
       / cos(pi/180*MuscleParameters.Pennationangle);
 // New experimental method of splitting volume and pcsa across mus elem.
 AnyVar PCSA = 1e-2*MuscleParameters.MuscleVolume/(.VastusLateralisInferior1Par.Lf0 +.VastusLateralisInferior2Par.Lf0 +.VastusLateralisInferior3Par.Lf0 +.VastusLateralisInferior4Par.Lf0 +.VastusLateralisInferior5Par.Lf0 +.VastusLateralisInferior6Par.Lf0 );///< PCSA (cm2) is calculated as muscle volume divided between muscle branches and divided by fiber length
 Vol0 = PCSA * Lf0; ///< Muscle volume in (m3)
};

AnyMuscleModel VastusLateralisInferior4Par =
{
 AnyFolder &MuscleParameters = .SubjectMusPar.VastusLateralisInferior;
 AnyIntVar MuscleElemNo = 4; ///< The number of this element of the muscle
 AnyIntVar MuscleElemAmount = MuscleParameters.MuscleElemAmount; ///< The total amount of elements for this muscle
 F0 = .SubjectMusPar.PCSAfactor*PCSA; ///< Maximum force output at optimum fiber length
 Lf0 = MuscleParameters.OptimalFiberlength
       / cos(pi/180*MuscleParameters.Pennationangle);
 // New experimental method of splitting volume and pcsa across mus elem.
 AnyVar PCSA = 1e-2*MuscleParameters.MuscleVolume/(.VastusLateralisInferior1Par.Lf0 +.VastusLateralisInferior2Par.Lf0 +.VastusLateralisInferior3Par.Lf0 +.VastusLateralisInferior4Par.Lf0 +.VastusLateralisInferior5Par.Lf0 +.VastusLateralisInferior6Par.Lf0 );///< PCSA (cm2) is calculated as muscle volume divided between muscle branches and divided by fiber length
 Vol0 = PCSA * Lf0; ///< Muscle volume in (m3)
};

AnyMuscleModel VastusLateralisInferior5Par =
{
 AnyFolder &MuscleParameters = .SubjectMusPar.VastusLateralisInferior;
 AnyIntVar MuscleElemNo = 5; ///< The number of this element of the muscle
 AnyIntVar MuscleElemAmount = MuscleParameters.MuscleElemAmount; ///< The total amount of elements for this muscle
 F0 = .SubjectMusPar.PCSAfactor*PCSA; ///< Maximum force output at optimum fiber length
 Lf0 = MuscleParameters.OptimalFiberlength
       / cos(pi/180*MuscleParameters.Pennationangle);
 // New experimental method of splitting volume and pcsa across mus elem.
 AnyVar PCSA = 1e-2*MuscleParameters.MuscleVolume/(.VastusLateralisInferior1Par.Lf0 +.VastusLateralisInferior2Par.Lf0 +.VastusLateralisInferior3Par.Lf0 +.VastusLateralisInferior4Par.Lf0 +.VastusLateralisInferior5Par.Lf0 +.VastusLateralisInferior6Par.Lf0 );///< PCSA (cm2) is calculated as muscle volume divided between muscle branches and divided by fiber length
 Vol0 = PCSA * Lf0; ///< Muscle volume in (m3)
};

AnyMuscleModel VastusLateralisInferior6Par =
{
 AnyFolder &MuscleParameters = .SubjectMusPar.VastusLateralisInferior;
 AnyIntVar MuscleElemNo = 6; ///< The number of this element of the muscle
 AnyIntVar MuscleElemAmount = MuscleParameters.MuscleElemAmount; ///< The total amount of elements for this muscle
 F0 = .SubjectMusPar.PCSAfactor*PCSA; ///< Maximum force output at optimum fiber length
 Lf0 = MuscleParameters.OptimalFiberlength
       / cos(pi/180*MuscleParameters.Pennationangle);
 // New experimental method of splitting volume and pcsa across mus elem.
 AnyVar PCSA = 1e-2*MuscleParameters.MuscleVolume/(.VastusLateralisInferior1Par.Lf0 +.VastusLateralisInferior2Par.Lf0 +.VastusLateralisInferior3Par.Lf0 +.VastusLateralisInferior4Par.Lf0 +.VastusLateralisInferior5Par.Lf0 +.VastusLateralisInferior6Par.Lf0 );///< PCSA (cm2) is calculated as muscle volume divided between muscle branches and divided by fiber length
 Vol0 = PCSA * Lf0; ///< Muscle volume in (m3)
};


//////////////////////////////////////////////////
//     VastusLateralisSuperior (2 elements)     //
//////////////////////////////////////////////////
AnyMuscleModel VastusLateralisSuperior1Par =
{
 AnyFolder &MuscleParameters = .SubjectMusPar.VastusLateralisSuperior;
 AnyIntVar MuscleElemNo = 1; ///< The number of this element of the muscle
 AnyIntVar MuscleElemAmount = MuscleParameters.MuscleElemAmount; ///< The total amount of elements for this muscle
 F0 = .SubjectMusPar.PCSAfactor*PCSA; ///< Maximum force output at optimum fiber length
 Lf0 = MuscleParameters.OptimalFiberlength
       / cos(pi/180*MuscleParameters.Pennationangle);
 // New experimental method of splitting volume and pcsa across mus elem.
 AnyVar PCSA = 1e-2*MuscleParameters.MuscleVolume/(.VastusLateralisSuperior1Par.Lf0 +.VastusLateralisSuperior2Par.Lf0 );///< PCSA (cm2) is calculated as muscle volume divided between muscle branches and divided by fiber length
 Vol0 = PCSA * Lf0; ///< Muscle volume in (m3)
};

AnyMuscleModel VastusLateralisSuperior2Par =
{
 AnyFolder &MuscleParameters = .SubjectMusPar.VastusLateralisSuperior;
 AnyIntVar MuscleElemNo = 2; ///< The number of this element of the muscle
 AnyIntVar MuscleElemAmount = MuscleParameters.MuscleElemAmount; ///< The total amount of elements for this muscle
 F0 = .SubjectMusPar.PCSAfactor*PCSA; ///< Maximum force output at optimum fiber length
 Lf0 = MuscleParameters.OptimalFiberlength
       / cos(pi/180*MuscleParameters.Pennationangle);
 // New experimental method of splitting volume and pcsa across mus elem.
 AnyVar PCSA = 1e-2*MuscleParameters.MuscleVolume/(.VastusLateralisSuperior1Par.Lf0 +.VastusLateralisSuperior2Par.Lf0 );///< PCSA (cm2) is calculated as muscle volume divided between muscle branches and divided by fiber length
 Vol0 = PCSA * Lf0; ///< Muscle volume in (m3)
};


/////////////////////////////////////////////////
//     VastusMedialisInferior (2 elements)     //
/////////////////////////////////////////////////
AnyMuscleModel VastusMedialisInferior1Par =
{
 AnyFolder &MuscleParameters = .SubjectMusPar.VastusMedialisInferior;
 AnyIntVar MuscleElemNo = 1; ///< The number of this element of the muscle
 AnyIntVar MuscleElemAmount = MuscleParameters.MuscleElemAmount; ///< The total amount of elements for this muscle
 F0 = .SubjectMusPar.PCSAfactor*PCSA; ///< Maximum force output at optimum fiber length
 Lf0 = MuscleParameters.OptimalFiberlength
       / cos(pi/180*MuscleParameters.Pennationangle);
 // New experimental method of splitting volume and pcsa across mus elem.
 AnyVar PCSA = 1e-2*MuscleParameters.MuscleVolume/(.VastusMedialisInferior1Par.Lf0 +.VastusMedialisInferior2Par.Lf0 );///< PCSA (cm2) is calculated as muscle volume divided between muscle branches and divided by fiber length
 Vol0 = PCSA * Lf0; ///< Muscle volume in (m3)
};

AnyMuscleModel VastusMedialisInferior2Par =
{
 AnyFolder &MuscleParameters = .SubjectMusPar.VastusMedialisInferior;
 AnyIntVar MuscleElemNo = 2; ///< The number of this element of the muscle
 AnyIntVar MuscleElemAmount = MuscleParameters.MuscleElemAmount; ///< The total amount of elements for this muscle
 F0 = .SubjectMusPar.PCSAfactor*PCSA; ///< Maximum force output at optimum fiber length
 Lf0 = MuscleParameters.OptimalFiberlength
       / cos(pi/180*MuscleParameters.Pennationangle);
 // New experimental method of splitting volume and pcsa across mus elem.
 AnyVar PCSA = 1e-2*MuscleParameters.MuscleVolume/(.VastusMedialisInferior1Par.Lf0 +.VastusMedialisInferior2Par.Lf0 );///< PCSA (cm2) is calculated as muscle volume divided between muscle branches and divided by fiber length
 Vol0 = PCSA * Lf0; ///< Muscle volume in (m3)
};


////////////////////////////////////////////
//     VastusMedialisMid (2 elements)     //
////////////////////////////////////////////
AnyMuscleModel VastusMedialisMid1Par =
{
 AnyFolder &MuscleParameters = .SubjectMusPar.VastusMedialisMid;
 AnyIntVar MuscleElemNo = 1; ///< The number of this element of the muscle
 AnyIntVar MuscleElemAmount = MuscleParameters.MuscleElemAmount; ///< The total amount of elements for this muscle
 F0 = .SubjectMusPar.PCSAfactor*PCSA; ///< Maximum force output at optimum fiber length
 Lf0 = MuscleParameters.OptimalFiberlength
       / cos(pi/180*MuscleParameters.Pennationangle);
 // New experimental method of splitting volume and pcsa across mus elem.
 AnyVar PCSA = 1e-2*MuscleParameters.MuscleVolume/(.VastusMedialisMid1Par.Lf0 +.VastusMedialisMid2Par.Lf0 );///< PCSA (cm2) is calculated as muscle volume divided between muscle branches and divided by fiber length
 Vol0 = PCSA * Lf0; ///< Muscle volume in (m3)
};

AnyMuscleModel VastusMedialisMid2Par =
{
 AnyFolder &MuscleParameters = .SubjectMusPar.VastusMedialisMid;
 AnyIntVar MuscleElemNo = 2; ///< The number of this element of the muscle
 AnyIntVar MuscleElemAmount = MuscleParameters.MuscleElemAmount; ///< The total amount of elements for this muscle
 F0 = .SubjectMusPar.PCSAfactor*PCSA; ///< Maximum force output at optimum fiber length
 Lf0 = MuscleParameters.OptimalFiberlength
       / cos(pi/180*MuscleParameters.Pennationangle);
 // New experimental method of splitting volume and pcsa across mus elem.
 AnyVar PCSA = 1e-2*MuscleParameters.MuscleVolume/(.VastusMedialisMid1Par.Lf0 +.VastusMedialisMid2Par.Lf0 );///< PCSA (cm2) is calculated as muscle volume divided between muscle branches and divided by fiber length
 Vol0 = PCSA * Lf0; ///< Muscle volume in (m3)
};


/////////////////////////////////////////////////
//     VastusMedialisSuperior (4 elements)     //
/////////////////////////////////////////////////
AnyMuscleModel VastusMedialisSuperior1Par =
{
 AnyFolder &MuscleParameters = .SubjectMusPar.VastusMedialisSuperior;
 AnyIntVar MuscleElemNo = 1; ///< The number of this element of the muscle
 AnyIntVar MuscleElemAmount = MuscleParameters.MuscleElemAmount; ///< The total amount of elements for this muscle
 F0 = .SubjectMusPar.PCSAfactor*PCSA; ///< Maximum force output at optimum fiber length
 Lf0 = MuscleParameters.OptimalFiberlength
       / cos(pi/180*MuscleParameters.Pennationangle);
 // New experimental method of splitting volume and pcsa across mus elem.
 AnyVar PCSA = 1e-2*MuscleParameters.MuscleVolume/(.VastusMedialisSuperior1Par.Lf0 +.VastusMedialisSuperior2Par.Lf0 +.VastusMedialisSuperior3Par.Lf0 +.VastusMedialisSuperior4Par.Lf0 );///< PCSA (cm2) is calculated as muscle volume divided between muscle branches and divided by fiber length
 Vol0 = PCSA * Lf0; ///< Muscle volume in (m3)
};

AnyMuscleModel VastusMedialisSuperior2Par =
{
 AnyFolder &MuscleParameters = .SubjectMusPar.VastusMedialisSuperior;
 AnyIntVar MuscleElemNo = 2; ///< The number of this element of the muscle
 AnyIntVar MuscleElemAmount = MuscleParameters.MuscleElemAmount; ///< The total amount of elements for this muscle
 F0 = .SubjectMusPar.PCSAfactor*PCSA; ///< Maximum force output at optimum fiber length
 Lf0 = MuscleParameters.OptimalFiberlength
       / cos(pi/180*MuscleParameters.Pennationangle);
 // New experimental method of splitting volume and pcsa across mus elem.
 AnyVar PCSA = 1e-2*MuscleParameters.MuscleVolume/(.VastusMedialisSuperior1Par.Lf0 +.VastusMedialisSuperior2Par.Lf0 +.VastusMedialisSuperior3Par.Lf0 +.VastusMedialisSuperior4Par.Lf0 );///< PCSA (cm2) is calculated as muscle volume divided between muscle branches and divided by fiber length
 Vol0 = PCSA * Lf0; ///< Muscle volume in (m3)
};

AnyMuscleModel VastusMedialisSuperior3Par =
{
 AnyFolder &MuscleParameters = .SubjectMusPar.VastusMedialisSuperior;
 AnyIntVar MuscleElemNo = 3; ///< The number of this element of the muscle
 AnyIntVar MuscleElemAmount = MuscleParameters.MuscleElemAmount; ///< The total amount of elements for this muscle
 F0 = .SubjectMusPar.PCSAfactor*PCSA; ///< Maximum force output at optimum fiber length
 Lf0 = MuscleParameters.OptimalFiberlength
       / cos(pi/180*MuscleParameters.Pennationangle);
 // New experimental method of splitting volume and pcsa across mus elem.
 AnyVar PCSA = 1e-2*MuscleParameters.MuscleVolume/(.VastusMedialisSuperior1Par.Lf0 +.VastusMedialisSuperior2Par.Lf0 +.VastusMedialisSuperior3Par.Lf0 +.VastusMedialisSuperior4Par.Lf0 );///< PCSA (cm2) is calculated as muscle volume divided between muscle branches and divided by fiber length
 Vol0 = PCSA * Lf0; ///< Muscle volume in (m3)
};

AnyMuscleModel VastusMedialisSuperior4Par =
{
 AnyFolder &MuscleParameters = .SubjectMusPar.VastusMedialisSuperior;
 AnyIntVar MuscleElemNo = 4; ///< The number of this element of the muscle
 AnyIntVar MuscleElemAmount = MuscleParameters.MuscleElemAmount; ///< The total amount of elements for this muscle
 F0 = .SubjectMusPar.PCSAfactor*PCSA; ///< Maximum force output at optimum fiber length
 Lf0 = MuscleParameters.OptimalFiberlength
       / cos(pi/180*MuscleParameters.Pennationangle);
 // New experimental method of splitting volume and pcsa across mus elem.
 AnyVar PCSA = 1e-2*MuscleParameters.MuscleVolume/(.VastusMedialisSuperior1Par.Lf0 +.VastusMedialisSuperior2Par.Lf0 +.VastusMedialisSuperior3Par.Lf0 +.VastusMedialisSuperior4Par.Lf0 );///< PCSA (cm2) is calculated as muscle volume divided between muscle branches and divided by fiber length
 Vol0 = PCSA * Lf0; ///< Muscle volume in (m3)
};
