//This is the standard parameters for the leg for the unscaled model
// Standard parameter for the foot
//These numbers has to be hardcoded because sometimes they are used for scaling without the leg being present in the model.
#ifdef CUSTOM_SCALING_ON
  #define BODY_MODEL .....BodyModel
#else
  #define BODY_MODEL ....BodyModel
#endif

#if (BM_LEG_RIGHT == _LEG_MODEL_OFF_)
  #define LEG_MODEL_PARAMETERS BODY_MODEL.Left.Leg.ModelParameters
#else
  #define LEG_MODEL_PARAMETERS BODY_MODEL.Right.Leg.ModelParameters
#endif

AnyFolder Talus = {
  AnyVar Mass = LEG_MODEL_PARAMETERS.Talus.MassStandard;
  AnyVar Length =  LEG_MODEL_PARAMETERS.Talus.LengthStandard;
  AnyVar Density = LEG_MODEL_PARAMETERS.Talus.Density;
};

AnyFolder Foot = {
  AnyVar Mass = LEG_MODEL_PARAMETERS.Foot.MassStandard;
  AnyVar Length =  LEG_MODEL_PARAMETERS.Foot.LengthStandard;
  AnyVar Density = LEG_MODEL_PARAMETERS.Foot.Density;
  #if TLEM_MORPHOLOGY == 1
  AnyVar HeelHeight = LEG_MODEL_PARAMETERS.Foot.HeelHeight;
  #endif
};


AnyFolder Shank = {
  AnyVar Mass = LEG_MODEL_PARAMETERS.Shank.MassStandard;
  AnyVar Length =  LEG_MODEL_PARAMETERS.Shank.LengthStandard;
  AnyVar Density = LEG_MODEL_PARAMETERS.Shank.Density;
};


AnyFolder Thigh = {
  AnyVar Mass = LEG_MODEL_PARAMETERS.Thigh.MassStandard;
  AnyVar Length =  LEG_MODEL_PARAMETERS.Thigh.LengthStandard;
  AnyVar Density = LEG_MODEL_PARAMETERS.Thigh.Density;
};

AnyFolder Patella = {
  AnyVar Mass = LEG_MODEL_PARAMETERS.Patella.MassStandard;
  AnyVar Length =  LEG_MODEL_PARAMETERS.Patella.LengthStandard;
  AnyVar Density = LEG_MODEL_PARAMETERS.Patella.Density;
};
#undef BODY_MODEL
#undef LEG_MODEL_PARAMETERS

AnyVar TotalMassLeg=Talus.Mass+Foot.Mass+Shank.Mass+Thigh.Mass+Patella.Mass;
#if TLEM_MORPHOLOGY == 1
AnyVar LengthLeg = Shank.Length+Thigh.Length+Foot.HeelHeight;
#else
AnyVar LengthLeg = Shank.Length+Thigh.Length;
#endif
