AnyFileVar FilenameThigh = "femur";
AnyFileVar FilenameShank = "tibia";
AnyFileVar FilenameFibula = "fibula";
AnyFileVar FilenamePelvis = "pelvis";
AnyFileVar FilenameSacrum = "SacrumSeg";
AnyFileVar FilenameFoot = "subtalar";
AnyFileVar FilenamePatella = "patella";
AnyFileVar FilenameTalus = "talus";
