AnyReacForce RotationalLayerReactions = {
  AnyJoint &Layer1_SphericalRotational = .Abdominal.Layer_L1.Joints.Vertebrate_Layer;
  AnyJoint &Layer2_SphericalRotational = .Abdominal.Layer_L2.Joints.Vertebrate_Layer;
  AnyJoint &Layer3_SphericalRotational = .Abdominal.Layer_L3.Joints.Vertebrate_Layer;
  AnyJoint &Layer4_SphericalRotational = .Abdominal.Layer_L4.Joints.Vertebrate_Layer;
  AnyJoint &Layer5_SphericalRotational = .Abdominal.Layer_L5.Joints.Vertebrate_Layer;

  AnyJoint &Layer1_YCavitySeg_Driver = .Abdominal.Layer_L1.Joints.BaseSegPosterior_CavitySegPosterior;
  AnyJoint &Layer2_YCavitySeg_Driver = .Abdominal.Layer_L2.Joints.BaseSegPosterior_CavitySegPosterior;
  AnyJoint &Layer3_YCavitySeg_Driver = .Abdominal.Layer_L3.Joints.BaseSegPosterior_CavitySegPosterior;
  AnyJoint &Layer4_YCavitySeg_Driver = .Abdominal.Layer_L4.Joints.BaseSegPosterior_CavitySegPosterior;
  AnyJoint &Layer5_YCavitySeg_Driver = .Abdominal.Layer_L5.Joints.BaseSegPosterior_CavitySegPosterior;

  AnyKinMeasure &Layer1_X_Driver = .Abdominal.Layer_Constraints_RectusLine.LayerDrivers.ref1;
  AnyKinMeasure &Layer2_X_Driver = .Abdominal.Layer_Constraints_RectusLine.LayerDrivers.ref2;
  AnyKinMeasure &Layer3_X_Driver = .Abdominal.Layer_Constraints_RectusLine.LayerDrivers.ref3;
  AnyKinMeasure &Layer4_X_Driver = .Abdominal.Layer_Constraints_RectusLine.LayerDrivers.ref4;
  AnyKinMeasure &Layer5_X_Driver = .Abdominal.Layer_Constraints_RectusLine.LayerDrivers.ref5;

  AnyKinMeasureOrg DiaphraghmSupport = {
    AnyKinMeasure &ref = ..Abdominal.Diaphragm.Joints.CavitySegConstraint.measure;
    MeasureOrganizer = {1};
  };
};
