AnySurfEllipsoid DiaphragmL2_1 =
{
  AnyRefNode &DiaphNode = .dn1;
  AnyRefNode &SegNode = .in1;
  #include "CalEllipsMembers.any"
  Rxy = vnorm( (DiaphNode.sRel - SegNode.sRel) )/3;
  AdjustorDirection = {0.7,1,0};
  DistanceRatio = 0.5;
  ARel = RotMat(SegNode.sRel, .DomeNodeLateral1.sRel, (.DomeNodeLateral1.ARel*{0,-0.01,0}')'+.DomeNodeLateral1.sRel);
};
AnySurfEllipsoid DiaphragmL1_1 =
{
  AnyRefNode &DiaphNode = .dn2;
  AnyRefNode &SegNode = .in2;
  #include "CalEllipsMembers.any"
  AdjustorDirection = {0.5,1,0};
  DistanceRatio = 0.5;
  ARel = RotMat(SegNode.sRel, .DomeNodeLateral2.sRel, (.DomeNodeLateral2.ARel*{0,-0.01,0}')'+.DomeNodeLateral2.sRel);
};
AnySurfEllipsoid DiaphragmL2_2 =
{
  AnyRefNode &DiaphNode = .dn3;
  AnyRefNode &SegNode = .in3;
  #include "CalEllipsMembers.any"
  Rxy = vnorm( (DiaphNode.sRel - SegNode.sRel) )/3;
  AdjustorDirection = {0.7,1,0};
  DistanceRatio = 0.5;
  ARel = RotMat(SegNode.sRel, .DomeNodeLateral3.sRel, (.DomeNodeLateral3.ARel*{0,-0.01,0}')'+.DomeNodeLateral3.sRel);
};
AnySurfEllipsoid DiaphragmL1_2 =
{
  AnyRefNode &DiaphNode = .dn4;
  AnyRefNode &SegNode = .in4;
  #include "CalEllipsMembers.any"
  AdjustorDirection = {0.5,1,0};
  DistanceRatio = 0.5;
  ARel = RotMat(SegNode.sRel, .DomeNodeLateral4.sRel, (.DomeNodeLateral4.ARel*{0,-0.01,0}')'+.DomeNodeLateral4.sRel);
};
AnySurfEllipsoid DiaphragmL1_3 =
{
  AnyRefNode &DiaphNode = .dn5;
  AnyRefNode &SegNode = .in5;
  #include "CalEllipsMembers.any"
  AdjustorDirection = {0.5,1,0};
  DistanceRatio = 0.5;
  ARel = RotMat(SegNode.sRel, .DomeNodeLateral5.sRel, (.DomeNodeLateral5.ARel*{0,-0.01,0}')'+.DomeNodeLateral5.sRel);
};
AnySurfEllipsoid DiaphragmR12_2 =
{
  AnyRefNode &DiaphNode = .dn6;
  AnyRefNode &SegNode = .in6;
  #include "CalEllipsMembers.any"
  Rxy = vnorm( (DiaphNode.sRel - SegNode.sRel) )/2.9;
  AdjustorDirection = {-0.4,1,0};
  DistanceRatio = 0.28;
};
AnySurfEllipsoid DiaphragmR12_1 =
{
  AnyRefNode &DiaphNode = .dn7;
  AnyRefNode &SegNode = .in7;
  #include "CalEllipsMembers.any"
  Rxy = vnorm( (DiaphNode.sRel - SegNode.sRel) )/2.8;
  AdjustorDirection = {-0.4,1,0};
  DistanceRatio = 0.3;
};
AnySurfEllipsoid DiaphragmR11_3 =
{
  AnyRefNode &DiaphNode = .dn8;
  AnyRefNode &SegNode = .in8;
  #include "CalEllipsMembers.any"
  Rxy = vnorm( (DiaphNode.sRel - SegNode.sRel) )/2.8;
  AdjustorDirection = {-0.4,1,0};
  DistanceRatio = 0.35;
};
AnySurfEllipsoid DiaphragmR11_2 =
{
  AnyRefNode &DiaphNode = .dn9;
  AnyRefNode &SegNode = .in9;
  #include "CalEllipsMembers.any"
  Rxy = vnorm( (DiaphNode.sRel - SegNode.sRel) )/3;
  AdjustorDirection = {-0.5,1,0};
  DistanceRatio = 0.28;
};
AnySurfEllipsoid DiaphragmR11_1 =
{
  AnyRefNode &DiaphNode = .dn10;
  AnyRefNode &SegNode = .in10;
  #include "CalEllipsMembers.any"
  Rxy = vnorm( (DiaphNode.sRel - SegNode.sRel) )/2.8;
};
AnySurfEllipsoid DiaphragmR10_1 =
{
  AnyRefNode &DiaphNode = .dn11;
  AnyRefNode &SegNode = .in11;
  #include "CalEllipsMembers.any"
  Rxy = vnorm( (DiaphNode.sRel - SegNode.sRel) )/2.8;
};
AnySurfEllipsoid DiaphragmR10_2 =
{
  AnyRefNode &DiaphNode = .dn12;
  AnyRefNode &SegNode = .in12;
  #include "CalEllipsMembers.any"
};
AnySurfEllipsoid DiaphragmR10_3 =
{
  AnyRefNode &DiaphNode = .dn13;
  AnyRefNode &SegNode = .in13;
  #include "CalEllipsMembers.any"
  AdjustorDirection = {0.35,1,0};
  DistanceRatio = 0.25;
};
AnySurfEllipsoid DiaphragmCC_7 =
{
  AnyRefNode &DiaphNode = .dn14;
  AnyRefNode &SegNode = .in14;
  #include "CalEllipsMembers.any"
  AdjustorDirection = {0.5,1,0};
  DistanceRatio = 0.3;
};
AnySurfEllipsoid DiaphragmCC_6 =
{
  AnyRefNode &DiaphNode = .dn15;
  AnyRefNode &SegNode = .in15;
  #include "CalEllipsMembers.any"
  AdjustorDirection = {0.5,1,0};
  DistanceRatio = 0.4;
};
AnySurfEllipsoid DiaphragmCC_5 =
{
  AnyRefNode &DiaphNode = .dn16;
  AnyRefNode &SegNode = .in16;
  #include "CalEllipsMembers.any"
  AdjustorDirection = {0.5,1,0};
  DistanceRatio = 0.5;
};
AnySurfEllipsoid DiaphragmCC_4 =
{
  AnyRefNode &DiaphNode = .dn17;
  AnyRefNode &SegNode = .in17;
  #include "CalEllipsMembers.any"
  AdjustorDirection = {0.5,1,0};
  DistanceRatio = 0.6;
  ARel = RotMat(SegNode.sRel, .DomeNodeLateral5.sRel, (.DomeNodeLateral5.ARel*{0,-0.01,0}')'+.DomeNodeLateral5.sRel);
};
AnySurfEllipsoid DiaphragmCC_3 =
{
  AnyRefNode &DiaphNode = .dn18;
  AnyRefNode &SegNode = .in18;
  #include "CalEllipsMembers.any"
  AdjustorDirection = {0.5,1,0};
  DistanceRatio = 0.7;
  ARel = RotMat(SegNode.sRel, .DomeNodeLateral4.sRel, (.DomeNodeLateral4.ARel*{0,-0.01,0}')'+.DomeNodeLateral4.sRel);
};
AnySurfEllipsoid DiaphragmCC_2 =
{
  AnyRefNode &DiaphNode = .dn19;
  AnyRefNode &SegNode = .in19;
  #include "CalEllipsMembers.any"
  AdjustorDirection = {0.5,1,0};
  DistanceRatio = 0.7;
  ARel = RotMat(SegNode.sRel, .DomeNodeLateral3.sRel, (.DomeNodeLateral3.ARel*{0,-0.01,0}')'+.DomeNodeLateral3.sRel);
};
AnySurfEllipsoid DiaphragmCC_1 =
{
  AnyRefNode &DiaphNode = .dn20;
  AnyRefNode &SegNode = .in20;
  #include "CalEllipsMembers.any"
  AdjustorDirection = {0.5,1,0};
  DistanceRatio = 0.7;
  ARel = RotMat(SegNode.sRel, .DomeNodeLateral2.sRel, (.DomeNodeLateral2.ARel*{0,-0.01,0}')'+.DomeNodeLateral2.sRel);
};
AnySurfEllipsoid DiaphragmXiphoid =
{
  AnyRefNode &DiaphNode = .dn21;
  AnyRefNode &SegNode = .in21;
  #include "CalEllipsMembers.any"
  AdjustorDirection = {0.5,1,0};
  DistanceRatio = 0.7;
  ARel = RotMat(SegNode.sRel, .DomeNodeLateral1.sRel, (.DomeNodeLateral1.ARel*{0,-0.01,0}')'+.DomeNodeLateral1.sRel);
};
