AnyFolder ContactPoints ={

  AnyFolder &refLumbar=.SegmentsLumbar;
  AnyFolder &refThorax=.SegmentsThorax;
  AnyFolder &refCervical=.SegmentsCervicalSpine;

  refLumbar.PelvisSeg={

    AnyRefNode PosteriorRContactNode = {sRel = .Scale(.StdPar.Right.PosteriorContactNode_pos);};
    AnyRefNode PosteriorLContactNode = {sRel = .Scale(.StdPar.Left.PosteriorContactNode_pos);};

    AnyRefNode Seat1RContactNode={sRel = .Scale(.StdPar.Right.Seat1ContactNode_pos);};
    AnyRefNode Seat1LContactNode={sRel = .Scale(.StdPar.Left.Seat1ContactNode_pos);};

    AnyRefNode Seat2RContactNode={sRel = .Scale(.StdPar.Right.Seat2ContactNode_pos);};
    AnyRefNode Seat2LContactNode={sRel = .Scale(.StdPar.Left.Seat2ContactNode_pos);};

    AnyRefNode Seat2MidContactNode={sRel=0.5*(.Seat2RContactNode.sRel+.Seat2LContactNode.sRel);};

    AnyRefNode Seat3RContactNode={sRel = .Scale(.StdPar.Right.Seat3ContactNode_pos);};
    AnyRefNode Seat3LContactNode={sRel = .Scale(.StdPar.Left.Seat3ContactNode_pos);};

    AnyRefNode Seat4RContactNode={sRel = .Scale(.StdPar.Right.Seat4ContactNode_pos);};
    AnyRefNode Seat4LContactNode={sRel = .Scale(.StdPar.Left.Seat4ContactNode_pos);};

  };


  refLumbar.SacrumSeg={
    AnyRefNode SacrumContactNode = {sRel= .Scale(.StdPar.SacrumContactNode_pos);};
    AnyRefNode SacrumRContactNode = {sRel= .Scale(.StdPar.Right.SacrumContactNode_pos);};
    AnyRefNode SacrumLContactNode = {sRel= .Scale(.StdPar.Left.SacrumContactNode_pos);};

  };

  refLumbar.L5Seg={
    AnyRefNode L5RContactNode = {sRel= .Scale(.StdPar.Right.L5ContactNode_pos);};
    AnyRefNode L5LContactNode = {sRel= .Scale(.StdPar.Left.L5ContactNode_pos);};
  };

  refLumbar.L4Seg={
    AnyRefNode L4RContactNode = {sRel= .Scale(.StdPar.Right.L4ContactNode_pos);};
    AnyRefNode L4LContactNode = {sRel= .Scale(.StdPar.Left.L4ContactNode_pos);};
  };


  refLumbar.L3Seg={
    AnyRefNode L3RContactNode = {sRel= .Scale(.StdPar.Right.L3ContactNode_pos);};
    AnyRefNode L3LContactNode = {sRel= .Scale(.StdPar.Left.L3ContactNode_pos);};
  };

  refLumbar.L2Seg={
    AnyRefNode L2RContactNode = {sRel= .Scale(.StdPar.Right.L2ContactNode_pos);};
    AnyRefNode L2LContactNode = {sRel= .Scale(.StdPar.Left.L2ContactNode_pos);};
  };

  refLumbar.L1Seg={
    AnyRefNode L1RContactNode = {sRel= .Scale(.StdPar.Right.L1ContactNode_pos);};
    AnyRefNode L1LContactNode = {sRel= .Scale(.StdPar.Left.L1ContactNode_pos);};
  };

  refCervical.SkullSeg={
    AnyRefNode SkullContactNode = {sRel= .Scale(.StdPar.SkullContactNode_pos);};
  };

};
