// Definition of lumbar ligament attachment points
SegmentsThorax.ThoraxSeg = {
//    AnyRefNode ALLNodeInferior        = {sRel = .Scale(.Data.ALLNodeInferior_pos);};
//    AnyRefNode PLLNodeInferior        = {sRel = .Scale(.Data.PLLNodeInferior_pos);};
//    AnyRefNode PLLViaNode             = {sRel = .Scale(.Data.PLLViaNode_pos);};
//    AnyRefNode PLLNodeSuperior        = {sRel = .Scale(.Data.PLLNodeSuperior_pos);};
    // inter/supraspinous
    AnyRefNode InterspinousInferior   = {sRel = .Scale(.Data.InterspinousInferior_pos);};
    AnyRefNode SupraspinousInferior   = {sRel = .Scale(.Data.SupraspinousInferior_pos);};
    // ligamenta flavia (right/left)
    AnyRefNode FlavumInferiorR        = {sRel = .Scale(.Data.FlavumInferiorR_pos);};
    AnyRefNode FlavumInferiorL        = {sRel = .Scale(.Data.FlavumInferiorL_pos);};

    AnyRefNode InterTransverseR       = {sRel = .Scale(.Data.InterTransverseR_pos);};
    AnyRefNode InterTransverseL       = {sRel = .Scale(.Data.InterTransverseL_pos);};

    AnyRefNode InterTransverseRmid    = {sRel = .Scale(.Data.InterTransverseRmid_pos);};
    AnyRefNode InterTransverseLmid    = {sRel = .Scale(.Data.InterTransverseLmid_pos);};
};
  // Ligament Nodes
SegmentsLumbar.L1Seg = {
    // anterior longitudinal
    AnyRefNode ALLNodeInferior      = {sRel = .Scale(.Data.ALLNodeInferior_pos);};
    AnyRefNode ALLNodeSuperior      = {sRel = .Scale(.Data.ALLNodeSuperior_pos);};
    // posterior longitudinal
    AnyRefNode PLLViaNode           = {sRel = .Scale(.Data.PLLViaNode_pos);};

    AnyRefNode PLLNodeSuperior      = {sRel = .Scale(.Data.PLLNodeSuperior_pos);};
    AnyRefNode PLLNodeInferior      = {sRel = .Scale(.Data.PLLNodeInferior_pos);};
    // inter/supraspinous
    AnyRefNode InterspinousInferior = {sRel = .Scale(.Data.InterspinousInferior_pos);};
    AnyRefNode InterspinousSuperior = {sRel = .Scale(.Data.InterspinousSuperior_pos);};
    AnyRefNode SupraspinousInferior = {sRel = .Scale(.Data.SupraspinousInferior_pos);};
    AnyRefNode SupraspinousSuperior = {sRel = .Scale(.Data.SupraspinousSuperior_pos);};
    // ligamenta flavia (right/left)
    AnyRefNode FlavumInferiorR      = {sRel = .Scale(.Data.FlavumInferiorR_pos);};
    AnyRefNode FlavumSuperiorR      = {sRel = .Scale(.Data.FlavumSuperiorR_pos);};
    AnyRefNode FlavumInferiorL      = {sRel = .Scale(.Data.FlavumInferiorL_pos);};
    AnyRefNode FlavumSuperiorL      = {sRel = .Scale(.Data.FlavumSuperiorL_pos);};

    AnyRefNode InterTransverseR     = {sRel = .Scale(.Data.InterTransverseR_pos);};
    AnyRefNode InterTransverseL     = {sRel = .Scale(.Data.InterTransverseL_pos);};

    AnyRefNode InterTransverseRmid  = {sRel = .Scale(.Data.InterTransverseRmid_pos);};
    AnyRefNode InterTransverseLmid  = {sRel = .Scale(.Data.InterTransverseLmid_pos);};
  };
SegmentsLumbar.L2Seg = {
    // anterior longitudinal
    AnyRefNode ALLNodeInferior       = {sRel = .Scale(.Data.ALLNodeInferior_pos);};
    AnyRefNode ALLNodeSuperior       = {sRel = .Scale(.Data.ALLNodeSuperior_pos);};
    // posterior longitudinal
    AnyRefNode PLLNodeInferior       = {sRel = .Scale(.Data.PLLNodeInferior_pos);};
    AnyRefNode PLLViaNode 		     = {sRel = .Scale(.Data.PLLViaNode_pos);};
    AnyRefNode PLLNodeSuperior 	     = {sRel = .Scale(.Data.PLLNodeSuperior_pos);};
    // inter/supraspinous ligaments
    AnyRefNode InterspinousInferior  = {sRel = .Scale(.Data.InterspinousInferior_pos);};
    AnyRefNode InterspinousSuperior  = {sRel = .Scale(.Data.InterspinousSuperior_pos);};
    AnyRefNode SupraspinousInferior  = {sRel = .Scale(.Data.SupraspinousInferior_pos);};
    AnyRefNode SupraspinousSuperior  = {sRel = .Scale(.Data.SupraspinousSuperior_pos);};
    // ligamenta flavia (right/left)
    AnyRefNode FlavumInferiorR       = {sRel = .Scale(.Data.FlavumInferiorR_pos);};
    AnyRefNode FlavumSuperiorR       = {sRel = .Scale(.Data.FlavumSuperiorR_pos);};
    AnyRefNode FlavumInferiorL       = {sRel = .Scale(.Data.FlavumInferiorL_pos);};
    AnyRefNode FlavumSuperiorL       = {sRel = .Scale(.Data.FlavumSuperiorL_pos);};

    AnyRefNode InterTransverseR      = {sRel = .Scale(.Data.InterTransverseR_pos);};
    AnyRefNode InterTransverseL      = {sRel = .Scale(.Data.InterTransverseL_pos);};

    AnyRefNode InterTransverseRmid   = {sRel = .Scale(.Data.InterTransverseRmid_pos);};
    AnyRefNode InterTransverseLmid   = {sRel = .Scale(.Data.InterTransverseLmid_pos);};

  };
SegmentsLumbar.L3Seg = {
    // anterior longitudional
    AnyRefNode ALLNodeInferior      = {sRel = .Scale(.Data.ALLNodeInferior_pos);};
    AnyRefNode ALLNodeSuperior      = {sRel = .Scale(.Data.ALLNodeSuperior_pos);};
    // posterior longitudional
    AnyRefNode PLLNodeInferior      = {sRel = .Scale(.Data.PLLNodeInferior_pos);};
    AnyRefNode PLLViaNode		    = {sRel = .Scale(.Data.PLLViaNode_pos);};
    AnyRefNode PLLNodeSuperior 	    = {sRel = .Scale(.Data.PLLNodeSuperior_pos);};
    // inter/supraspinous
    AnyRefNode InterspinousInferior = {sRel = .Scale(.Data.InterspinousInferior_pos);};
    AnyRefNode InterspinousSuperior = {sRel = .Scale(.Data.InterspinousSuperior_pos);};
    AnyRefNode SupraspinousInferior = {sRel = .Scale(.Data.SupraspinousInferior_pos);};
    AnyRefNode SupraspinousSuperior = {sRel = .Scale(.Data.SupraspinousSuperior_pos);};
    // ligamenta flavia (right/left)
    AnyRefNode FlavumInferiorR      = {sRel = .Scale(.Data.FlavumInferiorR_pos);};
    AnyRefNode FlavumSuperiorR      = {sRel = .Scale(.Data.FlavumSuperiorR_pos);};
    AnyRefNode FlavumInferiorL      = {sRel = .Scale(.Data.FlavumInferiorL_pos);};
    AnyRefNode FlavumSuperiorL      = {sRel = .Scale(.Data.FlavumSuperiorL_pos);};

    AnyRefNode InterTransverseR     = {sRel = .Scale(.Data.InterTransverseR_pos);};
    AnyRefNode InterTransverseL     = {sRel = .Scale(.Data.InterTransverseL_pos);};

    AnyRefNode InterTransverseRmid  = {sRel = .Scale(.Data.InterTransverseRmid_pos);};
    AnyRefNode InterTransverseLmid  = {sRel = .Scale(.Data.InterTransverseLmid_pos);};
  };
SegmentsLumbar.L4Seg = {
    // anterior longitudinal
    AnyRefNode ALLNodeInferior      = {sRel = .Scale(.Data.ALLNodeInferior_pos);};
    AnyRefNode ALLNodeSuperior      = {sRel = .Scale(.Data.ALLNodeSuperior_pos);};
    // posterior longitudinal
    AnyRefNode PLLNodeInferior      = {sRel = .Scale(.Data.PLLNodeInferior_pos);};
    AnyRefNode PLLViaNode           = {sRel = .Scale(.Data.PLLViaNode_pos);};
    AnyRefNode PLLNodeSuperior      = {sRel = .Scale(.Data.PLLNodeSuperior_pos);};
    // inter/supraspinous
    AnyRefNode InterspinousInferior = {sRel = .Scale(.Data.InterspinousInferior_pos);};
    AnyRefNode InterspinousSuperior = {sRel = .Scale(.Data.InterspinousSuperior_pos);};
    AnyRefNode SupraspinousInferior = {sRel = .Scale(.Data.SupraspinousInferior_pos);};
    AnyRefNode SupraspinousSuperior = {sRel = .Scale(.Data.SupraspinousSuperior_pos);};
    // ligamenta flavia (right/left)
    AnyRefNode FlavumInferiorR      = {sRel = .Scale(.Data.FlavumInferiorR_pos);};
    AnyRefNode FlavumSuperiorR      = {sRel = .Scale(.Data.FlavumSuperiorR_pos);};
    AnyRefNode FlavumInferiorL      = {sRel = .Scale(.Data.FlavumInferiorL_pos);};
    AnyRefNode FlavumSuperiorL      = {sRel = .Scale(.Data.FlavumSuperiorL_pos);};

    AnyRefNode InterTransverseR     = {sRel = .Scale(.Data.InterTransverseR_pos);};
    AnyRefNode InterTransverseL     = {sRel = .Scale(.Data.InterTransverseL_pos);};

    AnyRefNode InterTransverseRmid  = {sRel = .Scale(.Data.InterTransverseRmid_pos);};
    AnyRefNode InterTransverseLmid  = {sRel = .Scale(.Data.InterTransverseLmid_pos);};
  };
SegmentsLumbar.L5Seg = {
    // anterior longitudinal
    AnyRefNode ALLNodeInferior      = {sRel = .Scale(.Data.ALLNodeInferior_pos);};
    AnyRefNode ALLNodeSuperior      = {sRel = .Scale(.Data.ALLNodeSuperior_pos);};
    // posterior longitudinal
    AnyRefNode PLLViaNode           = {sRel = .Scale(.Data.PLLViaNode_pos);};
    AnyRefNode PLLNodeSuperior      = {sRel = .Scale(.Data.PLLNodeSuperior_pos);};
    AnyRefNode PLLNodeInferior      = {sRel = .Scale(.Data.PLLNodeInferior_pos);};
    // ligamenta flavia (right/left)
    AnyRefNode FlavumInferiorR      = {sRel = .Scale(.Data.FlavumInferiorR_pos);};
    AnyRefNode FlavumSuperiorR      = {sRel = .Scale(.Data.FlavumSuperiorR_pos);};
    AnyRefNode FlavumInferiorL      = {sRel = .Scale(.Data.FlavumInferiorL_pos);};
    AnyRefNode FlavumSuperiorL      = {sRel = .Scale(.Data.FlavumSuperiorL_pos);};
    // inter/supraspinous
    AnyRefNode InterspinousInferior = {sRel = .Scale(.Data.InterspinousInferior_pos);};
    AnyRefNode InterspinousSuperior = {sRel = .Scale(.Data.InterspinousSuperior_pos);};
    AnyRefNode SupraspinousInferior = {sRel = .Scale(.Data.SupraspinousInferior_pos);};
    AnyRefNode SupraspinousSuperior = {sRel = .Scale(.Data.SupraspinousSuperior_pos);};

    AnyRefNode InterTransverseR     = {sRel = .Scale(.Data.InterTransverseR_pos);};
    AnyRefNode InterTransverseL     = {sRel = .Scale(.Data.InterTransverseL_pos);};

    AnyRefNode InterTransverseRmid  = {sRel = .Scale(.Data.InterTransverseRmid_pos);};
    AnyRefNode InterTransverseLmid  = {sRel = .Scale(.Data.InterTransverseLmid_pos);};
  };
SegmentsLumbar.PelvisSeg = {
    // Sacrospinal ligament insertion
    AnyRefNode SpinaIschiadicaR = {sRel = .Scale(.Data.SpinaIschiadicaR_pos);};
    AnyRefNode SpinaIschiadicaL = {sRel = .Scale(.Data.SpinaIschiadicaL_pos);};
    // SacrosTuberal ligament insertion
    AnyRefNode TuberIschiadicumR = {sRel = .Scale(.Data.TuberIschiadicumR_pos);};
    AnyRefNode TuberIschiadicumL = {sRel = .Scale(.Data.TuberIschiadicumL_pos);};
    // Iliolumbar ligament inferior insertion
    AnyRefNode IlioLumbarInfR = {sRel = .Scale(.Data.IlioLumbarInfR_pos);};
    AnyRefNode IlioLumbarInfL = {sRel = .Scale(.Data.IlioLumbarInfL_pos);};
    // Illiolumbar ligament superior insertion
    AnyRefNode IlioLumbarSupR = {sRel = .Scale(.Data.IlioLumbarSupR_pos);};
    AnyRefNode IlioLumbarSupL = {sRel = .Scale(.Data.IlioLumbarSupL_pos);};

    // Anterior Sacroilliac ligament insertion
    AnyRefNode ASIL_1R = {sRel = .Scale(.Data.ASIL_1R_pos);};
    AnyRefNode ASIL_1L = {sRel = .Scale(.Data.ASIL_1L_pos);};
    AnyRefNode ASIL_2R = {sRel = .Scale(.Data.ASIL_2R_pos);};
    AnyRefNode ASIL_2L = {sRel = .Scale(.Data.ASIL_2L_pos);};
    AnyRefNode ASIL_3R = {sRel = .Scale(.Data.ASIL_3R_pos);};
    AnyRefNode ASIL_3L = {sRel = .Scale(.Data.ASIL_3L_pos);};

    // Posterior sacroiliac ligament insertion
    AnyRefNode PSIL_1R = {sRel = .Scale(.Data.PSIL_1R_pos);};
    AnyRefNode PSIL_1L = {sRel = .Scale(.Data.PSIL_1L_pos);};

    AnyRefNode PSIL_2R = {sRel = .Scale(.Data.PSIL_2R_pos);};
    AnyRefNode PSIL_2L = {sRel = .Scale(.Data.PSIL_2L_pos);};

    // sacral interosseous ligament
    AnyRefNode SIL_1R = {sRel = .Scale(.Data.SIL_1R_pos);};
    AnyRefNode SIL_1L = {sRel = .Scale(.Data.SIL_1L_pos);};
    AnyRefNode SIL_2R = {sRel = .Scale(.Data.SIL_2R_pos);};
    AnyRefNode SIL_2L = {sRel = .Scale(.Data.SIL_2L_pos);};
    AnyRefNode SIL_3R = {sRel = .Scale(.Data.SIL_3R_pos);};
    AnyRefNode SIL_3L = {sRel = .Scale(.Data.SIL_3L_pos);};
    AnyRefNode SIL_4R = {sRel = .Scale(.Data.SIL_4R_pos);};
    AnyRefNode SIL_4L = {sRel = .Scale(.Data.SIL_4L_pos);};

  };
SegmentsLumbar.SacrumSeg = {  // only superior nodes
    AnyRefNode ALLNodeSuperior      = {sRel = .Scale(.Data.ALLNodeSuperior_pos);};
    AnyRefNode PLLNodeSuperior      = {sRel = .Scale(.Data.PLLNodeSuperior_pos);};
    // ligamenta flavia (right/left)
    AnyRefNode FlavumSuperiorR      = {sRel = .Scale(.Data.FlavumSuperiorR_pos);};
    AnyRefNode FlavumSuperiorL      = {sRel = .Scale(.Data.FlavumSuperiorL_pos);};
    // inter/supraspinous
    AnyRefNode SupraspinousSuperior = {sRel = .Scale(.Data.SupraspinousSuperior_pos);};
    AnyRefNode InterspinousSuperior = {sRel = .Scale(.Data.InterspinousSuperior_pos);};

    AnyRefNode InterTransverseR     = {sRel = .Scale(.Data.InterTransverseR_pos);};
    AnyRefNode InterTransverseL     = {sRel = .Scale(.Data.InterTransverseL_pos);};

    AnyRefNode InterTransverseRmid  = {sRel = .Scale(.Data.InterTransverseRmid_pos);};
    AnyRefNode InterTransverseLmid  = {sRel = .Scale(.Data.InterTransverseLmid_pos);};
    // Sacrospinale ligament origin
    AnyRefNode SacrospinaleNodeR  = {sRel = .Scale(.Data.SacrospinaleNodeR_pos);};
    AnyRefNode SacrospinaleNodeL  = {sRel = .Scale(.Data.SacrospinaleNodeL_pos);};
    // Sacrotuberale ligament origin
    AnyRefNode SacrotuberaleNodeR  = {sRel = .Scale(.Data.SacrotuberaleNodeR_pos);};
    AnyRefNode SacrotuberaleNodeL  = {sRel = .Scale(.Data.SacrotuberaleNodeL_pos);};

    // Anterior Sacroilliac ligament insertion
    AnyRefNode ASIL_1R = {sRel = .Scale(.Data.ASIL_1R_pos);};
    AnyRefNode ASIL_1L = {sRel = .Scale(.Data.ASIL_1L_pos);};
    AnyRefNode ASIL_2R = {sRel = .Scale(.Data.ASIL_2R_pos);};
    AnyRefNode ASIL_2L = {sRel = .Scale(.Data.ASIL_2L_pos);};
    AnyRefNode ASIL_3R = {sRel = .Scale(.Data.ASIL_3R_pos);};
    AnyRefNode ASIL_3L = {sRel = .Scale(.Data.ASIL_3L_pos);};

    // Posterior sacroiliac ligament insertion
    AnyRefNode PSIL_1R = {sRel = .Scale(.Data.PSIL_1R_pos);};
    AnyRefNode PSIL_1L = {sRel = .Scale(.Data.PSIL_1L_pos);};

    AnyRefNode PSIL_2R = {sRel = .Scale(.Data.PSIL_2R_pos);};
    AnyRefNode PSIL_2L = {sRel = .Scale(.Data.PSIL_2L_pos);};

    // sacral interosseous ligament
    AnyRefNode SIL_1R = {sRel = .Scale(.Data.SIL_1R_pos);};
    AnyRefNode SIL_1L = {sRel = .Scale(.Data.SIL_1L_pos);};
    AnyRefNode SIL_2R = {sRel = .Scale(.Data.SIL_2R_pos);};
    AnyRefNode SIL_2L = {sRel = .Scale(.Data.SIL_2L_pos);};
    AnyRefNode SIL_3R = {sRel = .Scale(.Data.SIL_3R_pos);};
    AnyRefNode SIL_3L = {sRel = .Scale(.Data.SIL_3L_pos);};
    AnyRefNode SIL_4R = {sRel = .Scale(.Data.SIL_4R_pos);};
    AnyRefNode SIL_4L = {sRel = .Scale(.Data.SIL_4L_pos);};

  };
