AnyFolder MultifidusCervicis = {
  AnyMuscleViaPoint MultifidusCervicisC5C2 = {
    AnyMuscleModel &MusMdl = ...MuscleParametersCervicalSpineLeft.MultifidusCervicisC5C2Par;
    AnyRefNode &Org = ...SegmentsCervicalSpine.C5Seg.MultifidusCervicisC5C2NodeL;
    AnyRefNode &Ins = ...SegmentsCervicalSpine.C2Seg.MultifidusCervicisC2NodeL;
    viewMuscle = {#include "../drawSettings/MusDrawSettings.any"};
  };

  AnyMuscleViaPoint MultifidusCervicisC6C2 = {
    AnyMuscleModel &MusMdl = ...MuscleParametersCervicalSpineLeft.MultifidusCervicisC6C2Par;
    AnyRefNode &Org = ...SegmentsCervicalSpine.C6Seg.MultifidusCervicisC6C2NodeL;
    AnyRefNode &Ins = ...SegmentsCervicalSpine.C2Seg.MultifidusCervicisC2NodeL;
    viewMuscle = {#include "../drawSettings/MusDrawSettings.any"};
  };

  AnyMuscleViaPoint MultifidusCervicisC6C3 = {
    AnyMuscleModel &MusMdl = ...MuscleParametersCervicalSpineLeft.MultifidusCervicisC6C3Par;
    AnyRefNode &Org = ...SegmentsCervicalSpine.C6Seg.MultifidusCervicisC6C2NodeL;
    AnyRefNode &Ins = ...SegmentsCervicalSpine.C3Seg.MultifidusCervicisC3NodeL;
    viewMuscle = {#include "../drawSettings/MusDrawSettings.any"};
  };

  AnyMuscleViaPoint MultifidusCervicisC7C3 = {
    AnyMuscleModel &MusMdl = ...MuscleParametersCervicalSpineLeft.MultifidusCervicisC7C3Par;
    AnyRefNode &Org = ...SegmentsCervicalSpine.C7Seg.MultifidusCervicisC7C3NodeL;
    AnyRefNode &Ins = ...SegmentsCervicalSpine.C3Seg.MultifidusCervicisC3NodeL;
    viewMuscle = {#include "../drawSettings/MusDrawSettings.any"};
  };

  AnyMuscleViaPoint MultifidusCervicisC7C4 = {
    AnyMuscleModel &MusMdl = ...MuscleParametersCervicalSpineLeft.MultifidusCervicisC7C4Par;
    AnyRefNode &Org = ...SegmentsCervicalSpine.C7Seg.MultifidusCervicisC7C4NodeL;
    AnyRefNode &Ins = ...SegmentsCervicalSpine.C4Seg.MultifidusCervicisC4NodeL;
    viewMuscle = {#include "../drawSettings/MusDrawSettings.any"};
  };

  AnyMuscleViaPoint MultifidusCervicisT1C4 = {
    AnyMuscleModel &MusMdl = ...MuscleParametersCervicalSpineLeft.MultifidusCervicisT1C4Par;
    AnyRefNode &Org = ...SegmentsThorax.T1Seg.MultifidusCervicisT1C4NodeL;
    AnyRefNode &Ins = ...SegmentsCervicalSpine.C4Seg.MultifidusCervicisC4NodeL;
    viewMuscle = {#include "../drawSettings/MusDrawSettings.any"};
  };

  AnyMuscleViaPoint MultifidusCervicisT1C5 = {
    AnyMuscleModel &MusMdl = ...MuscleParametersCervicalSpineLeft.MultifidusCervicisT1C5Par;
    AnyRefNode &Org = ...SegmentsThorax.T1Seg.MultifidusCervicisT1C5NodeL;
    AnyRefNode &Ins = ...SegmentsCervicalSpine.C5Seg.MultifidusCervicisC5NodeL;
    viewMuscle = {#include "../drawSettings/MusDrawSettings.any"};
  };

  AnyMuscleViaPoint MultifidusCervicisT2C5 = {
    AnyMuscleModel &MusMdl = ...MuscleParametersCervicalSpineLeft.MultifidusCervicisT2C5Par;
    AnyRefNode &Org = ...SegmentsThorax.T2Seg.MultifidusCervicisT2C5NodeL;
    AnyRefNode &Ins = ...SegmentsCervicalSpine.C5Seg.MultifidusCervicisC5NodeL;
    viewMuscle = {#include "../drawSettings/MusDrawSettings.any"};
  };

  AnyMuscleViaPoint MultifidusCervicisT2C6 = {
    AnyMuscleModel &MusMdl = ...MuscleParametersCervicalSpineLeft.MultifidusCervicisT2C6Par;
    AnyRefNode &Org = ...SegmentsThorax.T2Seg.MultifidusCervicisT2C6NodeL;
    AnyRefNode &Ins = ...SegmentsCervicalSpine.C6Seg.MultifidusCervicisC6NodeL;
    viewMuscle = {#include "../drawSettings/MusDrawSettings.any"};
  };

  AnyMuscleViaPoint MultifidusCervicisT3C6 = {
    AnyMuscleModel &MusMdl = ...MuscleParametersCervicalSpineLeft.MultifidusCervicisT3C6Par;
    AnyRefNode &Org = ...SegmentsThorax.T3Seg.MultifidusCervicisT3C6NodeL;
    AnyRefNode &Ins = ...SegmentsCervicalSpine.C6Seg.MultifidusCervicisC6NodeL;
    viewMuscle = {#include "../drawSettings/MusDrawSettings.any"};
  };

  AnyMuscleViaPoint MultifidusCervicisT3C7 = {
    AnyMuscleModel &MusMdl = ...MuscleParametersCervicalSpineLeft.MultifidusCervicisT3C7Par;
    AnyRefNode &Org = ...SegmentsThorax.T3Seg.MultifidusCervicisT3C7NodeL;
    AnyRefNode &Ins = ...SegmentsCervicalSpine.C7Seg.MultifidusCervicisC7NodeL;
    viewMuscle = {#include "../drawSettings/MusDrawSettings.any"};
  };

  AnyMuscleViaPoint MultifidusCervicisT4C7 = {
    AnyMuscleModel &MusMdl = ...MuscleParametersCervicalSpineLeft.MultifidusCervicisT4C7Par;
    AnyRefNode &Org = ...SegmentsThorax.T4Seg.MultifidusCervicisT4C7NodeL;
    AnyRefNode &Ins = ...SegmentsCervicalSpine.C7Seg.MultifidusCervicisC7NodeL;
    viewMuscle = {#include "../drawSettings/MusDrawSettings.any"};
  };
};
