///Parameters of the muscles in the cervical spine
AnyFolder MuscleParametersCervicalSpineRight = {

  AnyVar StrengthScaleSpine = ...Scaling.StrengthScaling.Spine.StrengthScale;

  AnyMuscleModel LumpedHyoidT1C0Par = {
    AnyVar PCSA = 2.35*1.5; //Physiological Cross Sectional Area in cm2
    F0 = Main.Model.ke_1* Main.Model.ke_2*Main.Model.ke_3*Main.Model.ke_4*Main.Model.ke_5*Main.Model.ke_6*Main.Model.k_glb*Main.Model.k259*.StrengthScaleSpine*PCSA *..StrengthRef.SpecificMuscleTensionSpine; //Maximum force output at optimum fiber length
  };

  AnyMuscleModel LongusColliT1C6Par = {
    AnyVar PCSA = 0.3914; //Physiological Cross Sectional Area in cm2
    F0 = Main.Model.ke_1* Main.Model.ke_2*Main.Model.ke_3*Main.Model.ke_4*Main.Model.ke_5*Main.Model.ke_6*Main.Model.k_glb*Main.Model.k260*.StrengthScaleSpine*PCSA *..StrengthRef.SpecificMuscleTensionSpine; //Maximum force output at optimum fiber length
  };

  AnyMuscleModel LongusColliT1C5Par = {
    AnyVar PCSA = 0.3914; //Physiological Cross Sectional Area in cm2
    F0 = Main.Model.ke_1* Main.Model.ke_2*Main.Model.ke_3*Main.Model.ke_4*Main.Model.ke_5*Main.Model.ke_6*Main.Model.k_glb*Main.Model.k261*.StrengthScaleSpine*PCSA *..StrengthRef.SpecificMuscleTensionSpine; //Maximum force output at optimum fiber length
  };

  AnyMuscleModel LongusColliT1C4Par = {
    AnyVar PCSA = 0.3914; //Physiological Cross Sectional Area in cm2
    F0 = Main.Model.ke_1* Main.Model.ke_2*Main.Model.ke_3*Main.Model.ke_4*Main.Model.ke_5*Main.Model.ke_6*Main.Model.k_glb*Main.Model.k262*.StrengthScaleSpine*PCSA *..StrengthRef.SpecificMuscleTensionSpine; //Maximum force output at optimum fiber length
  };

  AnyMuscleModel LongusColliT1C3Par = {
    AnyVar PCSA = 0.3914; //Physiological Cross Sectional Area in cm2
    F0 = Main.Model.ke_1* Main.Model.ke_2*Main.Model.ke_3*Main.Model.ke_4*Main.Model.ke_5*Main.Model.ke_6*Main.Model.k_glb*Main.Model.k263*.StrengthScaleSpine*PCSA *..StrengthRef.SpecificMuscleTensionSpine; //Maximum force output at optimum fiber length
  };

  AnyMuscleModel LongusColliT1C2Par = {
    AnyVar PCSA = 0.3914; //Physiological Cross Sectional Area in cm2
    F0 = Main.Model.ke_1* Main.Model.ke_2*Main.Model.ke_3*Main.Model.ke_4*Main.Model.ke_5*Main.Model.ke_6*Main.Model.k_glb*Main.Model.k264*.StrengthScaleSpine*PCSA *..StrengthRef.SpecificMuscleTensionSpine; //Maximum force output at optimum fiber length
  };

  AnyMuscleModel LongusColliT1C1Par = {
    AnyVar PCSA = 0.3914; //Physiological Cross Sectional Area in cm2
    F0 = Main.Model.ke_1* Main.Model.ke_2*Main.Model.ke_3*Main.Model.ke_4*Main.Model.ke_5*Main.Model.ke_6*Main.Model.k_glb*Main.Model.k265*.StrengthScaleSpine*PCSA *..StrengthRef.SpecificMuscleTensionSpine; //Maximum force output at optimum fiber length
  };

  AnyMuscleModel LongusColliT1C0Par = {
    AnyVar PCSA = 0.3914; //Physiological Cross Sectional Area in cm2
    F0 = Main.Model.ke_1* Main.Model.ke_2*Main.Model.ke_3*Main.Model.ke_4*Main.Model.ke_5*Main.Model.ke_6*Main.Model.k_glb*Main.Model.k266*.StrengthScaleSpine*PCSA *..StrengthRef.SpecificMuscleTensionSpine; //Maximum force output at optimum fiber length
  };

  AnyMuscleModel LongusCapitisC6C0Par = {
    AnyVar PCSA = 0.3425; //Physiological Cross Sectional Area in cm2
    F0 = Main.Model.ke_1* Main.Model.ke_2*Main.Model.ke_3*Main.Model.ke_4*Main.Model.ke_5*Main.Model.ke_6*Main.Model.k_glb*Main.Model.k267*.StrengthScaleSpine*PCSA *..StrengthRef.SpecificMuscleTensionSpine; //Maximum force output at optimum fiber length
  };

  AnyMuscleModel LongusCapitisC5C0Par = {
    AnyVar PCSA = 0.3425; //Physiological Cross Sectional Area in cm2
    F0 = Main.Model.ke_1* Main.Model.ke_2*Main.Model.ke_3*Main.Model.ke_4*Main.Model.ke_5*Main.Model.ke_6*Main.Model.k_glb*Main.Model.k268*.StrengthScaleSpine*PCSA *..StrengthRef.SpecificMuscleTensionSpine; //Maximum force output at optimum fiber length
  };

  AnyMuscleModel LongusCapitisC4C0Par = {
    AnyVar PCSA = 0.3425; //Physiological Cross Sectional Area in cm2
    F0 = Main.Model.ke_1* Main.Model.ke_2*Main.Model.ke_3*Main.Model.ke_4*Main.Model.ke_5*Main.Model.ke_6*Main.Model.k_glb*Main.Model.k269*.StrengthScaleSpine*PCSA *..StrengthRef.SpecificMuscleTensionSpine; //Maximum force output at optimum fiber length
  };

  AnyMuscleModel LongusCapitisC3C0Par = {
    AnyVar PCSA = 0.3425; //Physiological Cross Sectional Area in cm2
    F0 = Main.Model.ke_1* Main.Model.ke_2*Main.Model.ke_3*Main.Model.ke_4*Main.Model.ke_5*Main.Model.ke_6*Main.Model.k_glb*Main.Model.k270*.StrengthScaleSpine*PCSA *..StrengthRef.SpecificMuscleTensionSpine; //Maximum force output at optimum fiber length
  };

  AnyMuscleModel ScalenusAnteriorT1C4Par = {
    AnyVar PCSA = 1.88; //Physiological Cross Sectional Area in cm2
    //F0 = .StrengthScaleSpine*PCSA *..StrengthRef.SpecificMuscleTensionSpine; //Maximum force output at optimum fiber length
    F0 = Main.Model.ke_1* Main.Model.ke_2*Main.Model.ke_3*Main.Model.ke_4*Main.Model.ke_5*Main.Model.ke_6*Main.Model.k_glb*Main.Model.k271*.StrengthScaleSpine*51;
  };

  AnyMuscleModel ScalenusMediusT1C3Par = {
    AnyVar PCSA = 1.36; //Physiological Cross Sectional Area in cm2
    //F0 = .StrengthScaleSpine*PCSA *..StrengthRef.SpecificMuscleTensionSpine; //Maximum force output at optimum fiber length
    F0 = Main.Model.ke_1* Main.Model.ke_2*Main.Model.ke_3*Main.Model.ke_4*Main.Model.ke_5*Main.Model.ke_6*Main.Model.k_glb*Main.Model.k272*.StrengthScaleSpine*72;
  };

  AnyMuscleModel ScalenusPosteriorT1C5Par = {
    AnyVar PCSA = 1.05; //Physiological Cross Sectional Area in cm2
    //F0 = .StrengthScaleSpine*PCSA *..StrengthRef.SpecificMuscleTensionSpine; //Maximum force output at optimum fiber length
    F0 = Main.Model.ke_1* Main.Model.ke_2*Main.Model.ke_3*Main.Model.ke_4*Main.Model.ke_5*Main.Model.ke_6*Main.Model.k_glb*Main.Model.k273*.StrengthScaleSpine*55;
  };

  //Moved to shoulder model
//  AnyMuscleModel SternocleidomastoidSternumC0Par = {
//    AnyVar PCSA = 4.92/2; //Physiological Cross Sectional Area in cm2
//    F0 = .StrengthScaleSpine*PCSA *..StrengthRef.SpecificMuscleTensionSpine; //Maximum force output at optimum fiber length
//  };

//  AnyMuscleModel SternocleidomastoidClavicleC0Par = {
//    AnyVar PCSA = 4.92/2; //Physiological Cross Sectional Area in cm2
//    F0 = Main.Model.ke_1* Main.Model.ke_2*Main.Model.ke_3*Main.Model.ke_4*Main.Model.ke_5*Main.Model.ke_6*Main.Model.k_glb*Main.Model.k270*.StrengthScaleSpine*PCSA *..StrengthRef.SpecificMuscleTensionSpine; //Maximum force output at optimum fiber length
//  };

  AnyMuscleModel SpleniusCapitisC7C0Par = {
    AnyVar PCSA = 1.545; //Physiological Cross Sectional Area in cm2
    F0 = Main.Model.ke_1* Main.Model.ke_2*Main.Model.ke_3*Main.Model.ke_4*Main.Model.ke_5*Main.Model.ke_6*Main.Model.k_glb*Main.Model.k274*.StrengthScaleSpine*PCSA *..StrengthRef.SpecificMuscleTensionSpine; //Maximum force output at optimum fiber length
  };

  AnyMuscleModel SpleniusCapitisT2C0Par = {
    AnyVar PCSA = 1.545; //Physiological Cross Sectional Area in cm2
    F0 = Main.Model.ke_1* Main.Model.ke_2*Main.Model.ke_3*Main.Model.ke_4*Main.Model.ke_5*Main.Model.ke_6*Main.Model.k_glb*Main.Model.k275*.StrengthScaleSpine*PCSA *..StrengthRef.SpecificMuscleTensionSpine; //Maximum force output at optimum fiber length
  };

  AnyMuscleModel SpleniusCervicisT3C1Par = {
    AnyVar PCSA = 0.833; //Physiological Cross Sectional Area in cm2
    F0 = Main.Model.ke_1* Main.Model.ke_2*Main.Model.ke_3*Main.Model.ke_4*Main.Model.ke_5*Main.Model.ke_6*Main.Model.k_glb*Main.Model.k276*.StrengthScaleSpine*PCSA *..StrengthRef.SpecificMuscleTensionSpine; //Maximum force output at optimum fiber length
  };

  AnyMuscleModel SpleniusCervicisT3C2Par = {
    AnyVar PCSA = 0.833; //Physiological Cross Sectional Area in cm2
    F0 = Main.Model.ke_1* Main.Model.ke_2*Main.Model.ke_3*Main.Model.ke_4*Main.Model.ke_5*Main.Model.ke_6*Main.Model.k_glb*Main.Model.k277*.StrengthScaleSpine*PCSA *..StrengthRef.SpecificMuscleTensionSpine; //Maximum force output at optimum fiber length
  };

  AnyMuscleModel SpleniusCervicisT3C3Par = {
    AnyVar PCSA = 0.833; //Physiological Cross Sectional Area in cm2
    F0 = Main.Model.ke_1* Main.Model.ke_2*Main.Model.ke_3*Main.Model.ke_4*Main.Model.ke_5*Main.Model.ke_6*Main.Model.k_glb*Main.Model.k278*.StrengthScaleSpine*PCSA *..StrengthRef.SpecificMuscleTensionSpine; //Maximum force output at optimum fiber length
  };

  AnyMuscleModel SemispinalisCapitisC4C0Par = {
    AnyVar PCSA = 0.9; //Physiological Cross Sectional Area in cm2
    F0 = Main.Model.ke_1* Main.Model.ke_2*Main.Model.ke_3*Main.Model.ke_4*Main.Model.ke_5*Main.Model.ke_6*Main.Model.k_glb*Main.Model.k279*.StrengthScaleSpine*PCSA *..StrengthRef.SpecificMuscleTensionSpine; //Maximum force output at optimum fiber length
  };

  AnyMuscleModel SemispinalisCapitisC5C0Par = {
    AnyVar PCSA = 0.9; //Physiological Cross Sectional Area in cm2
    F0 = Main.Model.ke_1* Main.Model.ke_2*Main.Model.ke_3*Main.Model.ke_4*Main.Model.ke_5*Main.Model.ke_6*Main.Model.k_glb*Main.Model.k280*.StrengthScaleSpine*PCSA *..StrengthRef.SpecificMuscleTensionSpine; //Maximum force output at optimum fiber length
  };

  AnyMuscleModel SemispinalisCapitisC6C0Par = {
    AnyVar PCSA = 0.9; //Physiological Cross Sectional Area in cm2
    F0 = Main.Model.ke_1* Main.Model.ke_2*Main.Model.ke_3*Main.Model.ke_4*Main.Model.ke_5*Main.Model.ke_6*Main.Model.k_glb*Main.Model.k281*.StrengthScaleSpine*PCSA *..StrengthRef.SpecificMuscleTensionSpine; //Maximum force output at optimum fiber length
  };

  AnyMuscleModel SemispinalisCapitisC7C0Par = {
    AnyVar PCSA = 0.9; //Physiological Cross Sectional Area in cm2
    F0 = Main.Model.ke_1* Main.Model.ke_2*Main.Model.ke_3*Main.Model.ke_4*Main.Model.ke_5*Main.Model.ke_6*Main.Model.k_glb*Main.Model.k282*.StrengthScaleSpine*PCSA *..StrengthRef.SpecificMuscleTensionSpine; //Maximum force output at optimum fiber length
  };

  AnyMuscleModel SemispinalisCapitisT3C0Par = {
    AnyVar PCSA = 0.9; //Physiological Cross Sectional Area in cm2
    F0 = Main.Model.ke_1* Main.Model.ke_2*Main.Model.ke_3*Main.Model.ke_4*Main.Model.ke_5*Main.Model.ke_6*Main.Model.k_glb*Main.Model.k283*.StrengthScaleSpine*PCSA *..StrengthRef.SpecificMuscleTensionSpine; //Maximum force output at optimum fiber length
  };

  AnyMuscleModel SemispinalisCervicisT1C2Par = {
    AnyVar PCSA = 0.1275; //Physiological Cross Sectional Area in cm2
    F0 = Main.Model.ke_1* Main.Model.ke_2*Main.Model.ke_3*Main.Model.ke_4*Main.Model.ke_5*Main.Model.ke_6*Main.Model.k_glb*Main.Model.k284*.StrengthScaleSpine*PCSA *..StrengthRef.SpecificMuscleTensionSpine; //Maximum force output at optimum fiber length
  };

  AnyMuscleModel SemispinalisCervicisT2C3Par = {
    AnyVar PCSA = 0.255; //Physiological Cross Sectional Area in cm2
    F0 = Main.Model.ke_1* Main.Model.ke_2*Main.Model.ke_3*Main.Model.ke_4*Main.Model.ke_5*Main.Model.ke_6*Main.Model.k_glb*Main.Model.k285*.StrengthScaleSpine*PCSA *..StrengthRef.SpecificMuscleTensionSpine; //Maximum force output at optimum fiber length
  };

  AnyMuscleModel SemispinalisCervicisT3C4Par = {
    AnyVar PCSA = 0.3825; //Physiological Cross Sectional Area in cm2
    F0 = Main.Model.ke_1* Main.Model.ke_2*Main.Model.ke_3*Main.Model.ke_4*Main.Model.ke_5*Main.Model.ke_6*Main.Model.k_glb*Main.Model.k286*.StrengthScaleSpine*PCSA *..StrengthRef.SpecificMuscleTensionSpine; //Maximum force output at optimum fiber length
  };

  AnyMuscleModel SemispinalisCervicisT4C5Par = {
    AnyVar PCSA = 0.8; //Physiological Cross Sectional Area in cm2
    F0 = Main.Model.ke_1* Main.Model.ke_2*Main.Model.ke_3*Main.Model.ke_4*Main.Model.ke_5*Main.Model.ke_6*Main.Model.k_glb*Main.Model.k287*.StrengthScaleSpine*PCSA *..StrengthRef.SpecificMuscleTensionSpine; //Maximum force output at optimum fiber length
  };

  AnyMuscleModel SemispinalisCervicisT5C6Par = {
    AnyVar PCSA = 1.0; //Physiological Cross Sectional Area in cm2
    F0 = Main.Model.ke_1* Main.Model.ke_2*Main.Model.ke_3*Main.Model.ke_4*Main.Model.ke_5*Main.Model.ke_6*Main.Model.k_glb*Main.Model.k288*.StrengthScaleSpine*PCSA *..StrengthRef.SpecificMuscleTensionSpine; //Maximum force output at optimum fiber length
  };

  AnyMuscleModel SemispinalisCervicisT6C7Par = {
    AnyVar PCSA = 1.1; //Physiological Cross Sectional Area in cm2
    F0 = Main.Model.ke_1* Main.Model.ke_2*Main.Model.ke_3*Main.Model.ke_4*Main.Model.ke_5*Main.Model.ke_6*Main.Model.k_glb*Main.Model.k289*.StrengthScaleSpine*PCSA *..StrengthRef.SpecificMuscleTensionSpine; //Maximum force output at optimum fiber length
  };

  AnyMuscleModel LongissimusCapitisC3C0Par = {
    AnyVar PCSA = 0.1633; //Physiological Cross Sectional Area in cm2
    F0 = Main.Model.ke_1* Main.Model.ke_2*Main.Model.ke_3*Main.Model.ke_4*Main.Model.ke_5*Main.Model.ke_6*Main.Model.k_glb*Main.Model.k290*.StrengthScaleSpine*PCSA *..StrengthRef.SpecificMuscleTensionSpine; //Maximum force output at optimum fiber length
  };

  AnyMuscleModel LongissimusCapitisC4C0Par = {
    AnyVar PCSA = 0.1633; //Physiological Cross Sectional Area in cm2
    F0 = Main.Model.ke_1* Main.Model.ke_2*Main.Model.ke_3*Main.Model.ke_4*Main.Model.ke_5*Main.Model.ke_6*Main.Model.k_glb*Main.Model.k291*.StrengthScaleSpine*PCSA *..StrengthRef.SpecificMuscleTensionSpine; //Maximum force output at optimum fiber length
  };

  AnyMuscleModel LongissimusCapitisC5C0Par = {
    AnyVar PCSA = 0.1633; //Physiological Cross Sectional Area in cm2
    F0 = Main.Model.ke_1* Main.Model.ke_2*Main.Model.ke_3*Main.Model.ke_4*Main.Model.ke_5*Main.Model.ke_6*Main.Model.k_glb*Main.Model.k292*.StrengthScaleSpine*PCSA *..StrengthRef.SpecificMuscleTensionSpine; //Maximum force output at optimum fiber length
  };

  AnyMuscleModel LongissimusCapitisC6C0Par = {
    AnyVar PCSA = 0.1633; //Physiological Cross Sectional Area in cm2
    F0 = Main.Model.ke_1* Main.Model.ke_2*Main.Model.ke_3*Main.Model.ke_4*Main.Model.ke_5*Main.Model.ke_6*Main.Model.k_glb*Main.Model.k293*.StrengthScaleSpine*PCSA *..StrengthRef.SpecificMuscleTensionSpine; //Maximum force output at optimum fiber length
  };

  AnyMuscleModel LongissimusCapitisC7C0Par = {
    AnyVar PCSA = 0.1633; //Physiological Cross Sectional Area in cm2
    F0 = Main.Model.ke_1* Main.Model.ke_2*Main.Model.ke_3*Main.Model.ke_4*Main.Model.ke_5*Main.Model.ke_6*Main.Model.k_glb*Main.Model.k294*.StrengthScaleSpine*PCSA *..StrengthRef.SpecificMuscleTensionSpine; //Maximum force output at optimum fiber length
  };

  AnyMuscleModel LongissimusCapitisT2C0Par = {
    AnyVar PCSA = 0.1633; //Physiological Cross Sectional Area in cm2
    F0 = Main.Model.ke_1* Main.Model.ke_2*Main.Model.ke_3*Main.Model.ke_4*Main.Model.ke_5*Main.Model.ke_6*Main.Model.k_glb*Main.Model.k295*.StrengthScaleSpine*PCSA *..StrengthRef.SpecificMuscleTensionSpine; //Maximum force output at optimum fiber length
  };

  AnyMuscleModel LongissimusCervicisT2C2Par = {
    AnyVar PCSA = 0.2483; //Physiological Cross Sectional Area in cm2
    F0 = Main.Model.ke_1* Main.Model.ke_2*Main.Model.ke_3*Main.Model.ke_4*Main.Model.ke_5*Main.Model.ke_6*Main.Model.k_glb*Main.Model.k296*.StrengthScaleSpine*PCSA *..StrengthRef.SpecificMuscleTensionSpine; //Maximum force output at optimum fiber length
  };

  AnyMuscleModel LongissimusCervicisT2C3Par = {
    AnyVar PCSA = 0.2483; //Physiological Cross Sectional Area in cm2
    F0 = Main.Model.ke_1* Main.Model.ke_2*Main.Model.ke_3*Main.Model.ke_4*Main.Model.ke_5*Main.Model.ke_6*Main.Model.k_glb*Main.Model.k297*.StrengthScaleSpine*PCSA *..StrengthRef.SpecificMuscleTensionSpine; //Maximum force output at optimum fiber length
  };

  AnyMuscleModel LongissimusCervicisT2C4Par = {
    AnyVar PCSA = 0.2483; //Physiological Cross Sectional Area in cm2
    F0 = Main.Model.ke_1* Main.Model.ke_2*Main.Model.ke_3*Main.Model.ke_4*Main.Model.ke_5*Main.Model.ke_6*Main.Model.k_glb*Main.Model.k298*.StrengthScaleSpine*PCSA *..StrengthRef.SpecificMuscleTensionSpine; //Maximum force output at optimum fiber length
  };

  AnyMuscleModel LongissimusCervicisT2C5Par = {
    AnyVar PCSA = 0.2483; //Physiological Cross Sectional Area in cm2
    F0 = Main.Model.ke_1* Main.Model.ke_2*Main.Model.ke_3*Main.Model.ke_4*Main.Model.ke_5*Main.Model.ke_6*Main.Model.k_glb*Main.Model.k299*.StrengthScaleSpine*PCSA *..StrengthRef.SpecificMuscleTensionSpine; //Maximum force output at optimum fiber length
  };

  AnyMuscleModel LongissimusCervicisT2C6Par = {
    AnyVar PCSA = 0.2483; //Physiological Cross Sectional Area in cm2
    F0 = Main.Model.ke_1* Main.Model.ke_2*Main.Model.ke_3*Main.Model.ke_4*Main.Model.ke_5*Main.Model.ke_6*Main.Model.k_glb*Main.Model.k300*.StrengthScaleSpine*PCSA *..StrengthRef.SpecificMuscleTensionSpine; //Maximum force output at optimum fiber length
  };

  AnyMuscleModel LongissimusCervicisT2C7Par = {
    AnyVar PCSA = 0.2483; //Physiological Cross Sectional Area in cm2
    F0 = Main.Model.ke_1* Main.Model.ke_2*Main.Model.ke_3*Main.Model.ke_4*Main.Model.ke_5*Main.Model.ke_6*Main.Model.k_glb*Main.Model.k301*.StrengthScaleSpine*PCSA *..StrengthRef.SpecificMuscleTensionSpine; //Maximum force output at optimum fiber length
  };

  AnyMuscleModel MultifidusCervicisC5C2Par = {
    AnyVar PCSA = 0.15; //Physiological Cross Sectional Area in cm2
    F0 = Main.Model.ke_1* Main.Model.ke_2*Main.Model.ke_3*Main.Model.ke_4*Main.Model.ke_5*Main.Model.ke_6*Main.Model.k_glb*Main.Model.k302*.StrengthScaleSpine*PCSA *..StrengthRef.SpecificMuscleTensionSpine; //Maximum force output at optimum fiber length
  };

  AnyMuscleModel MultifidusCervicisC6C2Par = {
    AnyVar PCSA = 0.15; //Physiological Cross Sectional Area in cm2
    F0 = Main.Model.ke_1* Main.Model.ke_2*Main.Model.ke_3*Main.Model.ke_4*Main.Model.ke_5*Main.Model.ke_6*Main.Model.k_glb*Main.Model.k303*.StrengthScaleSpine*PCSA *..StrengthRef.SpecificMuscleTensionSpine; //Maximum force output at optimum fiber length
  };

  AnyMuscleModel MultifidusCervicisC6C3Par = {
    AnyVar PCSA = 0.15; //Physiological Cross Sectional Area in cm2
    F0 = Main.Model.ke_1* Main.Model.ke_2*Main.Model.ke_3*Main.Model.ke_4*Main.Model.ke_5*Main.Model.ke_6*Main.Model.k_glb*Main.Model.k304*.StrengthScaleSpine*PCSA *..StrengthRef.SpecificMuscleTensionSpine; //Maximum force output at optimum fiber length
  };

  AnyMuscleModel MultifidusCervicisC7C3Par = {
    AnyVar PCSA = 0.15; //Physiological Cross Sectional Area in cm2
    F0 = Main.Model.ke_1* Main.Model.ke_2*Main.Model.ke_3*Main.Model.ke_4*Main.Model.ke_5*Main.Model.ke_6*Main.Model.k_glb*Main.Model.k305*.StrengthScaleSpine*PCSA *..StrengthRef.SpecificMuscleTensionSpine; //Maximum force output at optimum fiber length
  };

  AnyMuscleModel MultifidusCervicisC7C4Par = {
    AnyVar PCSA = 0.15; //Physiological Cross Sectional Area in cm2
    F0 = Main.Model.ke_1* Main.Model.ke_2*Main.Model.ke_3*Main.Model.ke_4*Main.Model.ke_5*Main.Model.ke_6*Main.Model.k_glb*Main.Model.k306*.StrengthScaleSpine*PCSA *..StrengthRef.SpecificMuscleTensionSpine; //Maximum force output at optimum fiber length
  };

  AnyMuscleModel MultifidusCervicisT1C4Par = {
    AnyVar PCSA = 0.15; //Physiological Cross Sectional Area in cm2
    F0 = Main.Model.ke_1* Main.Model.ke_2*Main.Model.ke_3*Main.Model.ke_4*Main.Model.ke_5*Main.Model.ke_6*Main.Model.k_glb*Main.Model.k307*.StrengthScaleSpine*PCSA *..StrengthRef.SpecificMuscleTensionSpine; //Maximum force output at optimum fiber length
  };

  AnyMuscleModel MultifidusCervicisT1C5Par = {
    AnyVar PCSA = 0.20; //Physiological Cross Sectional Area in cm2
    F0 = Main.Model.ke_1* Main.Model.ke_2*Main.Model.ke_3*Main.Model.ke_4*Main.Model.ke_5*Main.Model.ke_6*Main.Model.k_glb*Main.Model.k308*.StrengthScaleSpine*PCSA *..StrengthRef.SpecificMuscleTensionSpine; //Maximum force output at optimum fiber length
  };

  AnyMuscleModel MultifidusCervicisT2C5Par = {
    AnyVar PCSA = 0.20; //Physiological Cross Sectional Area in cm2
    F0 = Main.Model.ke_1* Main.Model.ke_2*Main.Model.ke_3*Main.Model.ke_4*Main.Model.ke_5*Main.Model.ke_6*Main.Model.k_glb*Main.Model.k309*.StrengthScaleSpine*PCSA *..StrengthRef.SpecificMuscleTensionSpine; //Maximum force output at optimum fiber length
  };

  AnyMuscleModel MultifidusCervicisT2C6Par = {
    AnyVar PCSA = 0.40; //Physiological Cross Sectional Area in cm2
    F0 = Main.Model.ke_1* Main.Model.ke_2*Main.Model.ke_3*Main.Model.ke_4*Main.Model.ke_5*Main.Model.ke_6*Main.Model.k_glb*Main.Model.k310*.StrengthScaleSpine*PCSA *..StrengthRef.SpecificMuscleTensionSpine; //Maximum force output at optimum fiber length
  };

  AnyMuscleModel MultifidusCervicisT3C6Par = {
    AnyVar PCSA = 0.40; //Physiological Cross Sectional Area in cm2
    F0 = Main.Model.ke_1* Main.Model.ke_2*Main.Model.ke_3*Main.Model.ke_4*Main.Model.ke_5*Main.Model.ke_6*Main.Model.k_glb*Main.Model.k311*.StrengthScaleSpine*PCSA *..StrengthRef.SpecificMuscleTensionSpine; //Maximum force output at optimum fiber length
  };

  AnyMuscleModel MultifidusCervicisT3C7Par = {
    AnyVar PCSA = 1.10; //Physiological Cross Sectional Area in cm2
    F0 = Main.Model.ke_1* Main.Model.ke_2*Main.Model.ke_3*Main.Model.ke_4*Main.Model.ke_5*Main.Model.ke_6*Main.Model.k_glb*Main.Model.k312*.StrengthScaleSpine*PCSA *..StrengthRef.SpecificMuscleTensionSpine; //Maximum force output at optimum fiber length
  };

  AnyMuscleModel MultifidusCervicisT4C7Par = {
    AnyVar PCSA = 1.30; //Physiological Cross Sectional Area in cm2
    F0 = Main.Model.ke_1* Main.Model.ke_2*Main.Model.ke_3*Main.Model.ke_4*Main.Model.ke_5*Main.Model.ke_6*Main.Model.k_glb*Main.Model.k313*.StrengthScaleSpine*PCSA *..StrengthRef.SpecificMuscleTensionSpine; //Maximum force output at optimum fiber length
  };

};
