#if BM_TRUNK_MUSCLES

#if BM_TRUNK_CAVITY_MODEL == _CAVITY_MODEL_VOLUME_
AnyFolder Diaphragm ={

  AnyMuscleShortestPath L1_Diaphragm1 = {
    AnyMuscleModel &MusMdl = ....MuscleModels.Left.DiaphragmMusMdl;
    AnyRefNode &Org = ....Segments.L1Seg.L1_DiaphragmNode1L;
    AnyRefNode &Ins = ....Abdominal.Diaphragm.BaseSegSuperior.Layer_T10.Left.L1_Diaphragm1;
    AnyParamSurf &Srf =....Abdominal.Diaphragm.CavitySeg.Layer_T12.MuscleWrappingPoints.Left.nn03.Translate.HorizontalCyl;
    SPLine = {
      StringMesh=35;
      AnyMatrix InitWrapPos = {transf3D({-2*.Srf.Radius,-2*.Srf.Radius,0.5*.Srf.Length}, &.Srf)};
      InitWrapPosVecArr = {&InitWrapPos};
    };
    viewMuscle = {#include "../drawSettings/MusDrawSettings.any"};
    viewForce.Visible ??= Off;
  };

  AnyMuscleShortestPath L1_Diaphragm2 = {
    AnyMuscleModel &MusMdl = ....MuscleModels.Left.DiaphragmMusMdl;
    AnyRefNode &Org = ....Segments.L1Seg.L1_DiaphragmNode2L;
    AnyRefNode &Ins = ....Abdominal.Diaphragm.BaseSegSuperior.Layer_T10.Left.L1_Diaphragm2;
    viewMuscle = {#include "../drawSettings/MusDrawSettings.any"};
    viewForce.Visible ??= Off;
    AnyParamSurf &Srf =....Abdominal.Diaphragm.CavitySeg.Layer_T12.MuscleWrappingPoints.Left.nn06.Translate.HorizontalCyl;
    SPLine = {
      StringMesh=35;
      AnyMatrix InitWrapPos = {transf3D({-2*.Srf.Radius,-2*.Srf.Radius,0.5*.Srf.Length}, &.Srf)};
      InitWrapPosVecArr = {&InitWrapPos};
    };
  };

  AnyMuscleShortestPath L2_Diaphragm1 = {
    AnyMuscleModel &MusMdl = ....MuscleModels.Left.DiaphragmMusMdl;
    AnyRefNode &Org = ....Segments.L2Seg.L2_DiaphragmNode1L;
    AnyRefNode &Ins = ....Abdominal.Diaphragm.BaseSegSuperior.Layer_T10.Left.L2_Diaphragm1;
    viewMuscle = {#include "../drawSettings/MusDrawSettings.any"};
    viewForce.Visible ??= Off;
    AnyParamSurf &Srf =....Abdominal.Diaphragm.CavitySeg.Layer_T12.MuscleWrappingPoints.Left.nn02.Translate.HorizontalCyl;
    SPLine = {
      StringMesh=35;
      AnyMatrix InitWrapPos = {transf3D({-2*.Srf.Radius,-2*.Srf.Radius,0.5*.Srf.Length}, &.Srf)};
      InitWrapPosVecArr = {&InitWrapPos};
    };
  };

  AnyMuscleShortestPath L2_Diaphragm2 = {
    AnyMuscleModel &MusMdl = ....MuscleModels.Left.DiaphragmMusMdl;
    AnyRefNode &Org = ....Segments.L2Seg.L2_DiaphragmNode2L;
    AnyRefNode &Ins = ....Abdominal.Diaphragm.BaseSegSuperior.Layer_T10.Left.L2_Diaphragm2;
    viewMuscle = {#include "../drawSettings/MusDrawSettings.any"};
    viewForce.Visible ??= Off;
    AnyParamSurf &Srf =....Abdominal.Diaphragm.CavitySeg.Layer_T12.MuscleWrappingPoints.Left.nn05.Translate.HorizontalCyl;
    SPLine = {
      StringMesh=35;
      AnyMatrix InitWrapPos = {transf3D({-2*.Srf.Radius,-2*.Srf.Radius,0.5*.Srf.Length}, &.Srf)};
      InitWrapPosVecArr = {&InitWrapPos};
    };
  };

  AnyMuscleShortestPath L1TransverseProcess_Diaphragm = {
    AnyMuscleModel &MusMdl = ....MuscleModels.Left.DiaphragmMusMdl;
    AnyRefNode &Org = ....Segments.L1Seg.L1TransversProcess_DiaphragmL;
    AnyRefNode &Ins = ....Abdominal.Diaphragm.BaseSegSuperior.Layer_T10.Left.L1TransversProcess_Diaphragm;
    viewMuscle = {#include "../drawSettings/MusDrawSettings.any"};
    viewForce.Visible ??= Off;
    AnyParamSurf &Srf =....Abdominal.Diaphragm.CavitySeg.Layer_T12.MuscleWrappingPoints.Left.nn07.Translate.HorizontalCyl;
    SPLine = {
      StringMesh=35;
      AnyMatrix InitWrapPos = {transf3D({-2*.Srf.Radius,-2*.Srf.Radius,0.5*.Srf.Length}, &.Srf)};
      InitWrapPosVecArr = {&InitWrapPos};
    };
  };
  AnyMuscleShortestPath R12_Diaphragm2 = {
    AnyMuscleModel &MusMdl = ....MuscleModels.Left.DiaphragmMusMdl;
    AnyRefNode &Org = ....Segments.Left.R12Seg.R12_DiaphragmNode2L;
    AnyRefNode &Ins = ....Abdominal.Diaphragm.BaseSegSuperior.Layer_T10.Left.R12_Diaphragm2;
    viewMuscle = {#include "../drawSettings/MusDrawSettings.any"};
    viewForce.Visible ??= Off;
    AnyParamSurf &Srf =....Abdominal.Diaphragm.CavitySeg.Layer_T12.MuscleWrappingPoints.Left.nn08.Translate.HorizontalCyl;
    SPLine = {
      StringMesh=35;
      AnyMatrix InitWrapPos = {transf3D({-2*.Srf.Radius,-2*.Srf.Radius,0.5*.Srf.Length}, &.Srf)};
      InitWrapPosVecArr = {&InitWrapPos};
    };
  };
  AnyMuscleShortestPath R12_Diaphragm1 = {
    AnyMuscleModel &MusMdl = ....MuscleModels.Left.DiaphragmMusMdl;
    AnyRefNode &Org = ....Segments.Left.R12Seg.R12_DiaphragmNode1L;
    AnyRefNode &Ins = ....Abdominal.Diaphragm.BaseSegSuperior.Layer_T10.Left.R12_Diaphragm1;
    viewMuscle = {#include "../drawSettings/MusDrawSettings.any"};
    viewForce.Visible ??= Off;
    AnyParamSurf &Srf =....Abdominal.Diaphragm.CavitySeg.Layer_T12.MuscleWrappingPoints.Left.nn10.Translate.HorizontalCyl;
    SPLine = {
      StringMesh=35;
      AnyMatrix InitWrapPos = {transf3D({-2*.Srf.Radius,-2*.Srf.Radius,0.5*.Srf.Length}, &.Srf)};
      InitWrapPosVecArr = {&InitWrapPos};
    };
  };
  AnyMuscleShortestPath R11_Diaphragm3 = {
    AnyMuscleModel &MusMdl = ....MuscleModels.Left.DiaphragmMusMdl;
    AnyRefNode &Org = ....Segments.Left.R11Seg.R11_DiaphragmNode3L;
    AnyRefNode &Ins = ....Abdominal.Diaphragm.BaseSegSuperior.Layer_T10.Left.R11_Diaphragm3;
    viewMuscle = {#include "../drawSettings/MusDrawSettings.any"};
    viewForce.Visible ??= Off;
    AnyParamSurf &Srf =....Abdominal.Diaphragm.CavitySeg.Layer_T12.MuscleWrappingPoints.Left.nn12.Translate.HorizontalCyl;
    SPLine = {
      StringMesh=35;
      AnyMatrix InitWrapPos = {transf3D({-2*.Srf.Radius,-2*.Srf.Radius,0.5*.Srf.Length}, &.Srf)};
      InitWrapPosVecArr = {&InitWrapPos};
    };
  };
  AnyMuscleShortestPath R11_Diaphragm2 = {
    AnyMuscleModel &MusMdl = ....MuscleModels.Left.DiaphragmMusMdl;
    AnyRefNode &Org = ....Segments.Left.R11Seg.R11_DiaphragmNode2L;
    AnyRefNode &Ins = ....Abdominal.Diaphragm.BaseSegSuperior.Layer_T10.Left.R11_Diaphragm2;
    viewMuscle = {#include "../drawSettings/MusDrawSettings.any"};
    viewForce.Visible ??= Off;
    AnyParamSurf &Srf =....Abdominal.Diaphragm.CavitySeg.Layer_T12.MuscleWrappingPoints.Left.nn14.Translate.HorizontalCyl;
    SPLine = {
      StringMesh=35;
      AnyMatrix InitWrapPos = {transf3D({-2*.Srf.Radius,-2*.Srf.Radius,0.5*.Srf.Length}, &.Srf)};
      InitWrapPosVecArr = {&InitWrapPos};
    };
  };
  AnyMuscleShortestPath R11_Diaphragm1 = {
    AnyMuscleModel &MusMdl = ....MuscleModels.Left.DiaphragmMusMdl;
    AnyRefNode &Org = ....Segments.Left.R11Seg.R11_DiaphragmNode1L;
    AnyRefNode &Ins = ....Abdominal.Diaphragm.BaseSegSuperior.Layer_T10.Left.R11_Diaphragm1;
    viewMuscle = {#include "../drawSettings/MusDrawSettings.any"};
    viewForce.Visible ??= Off;
    AnyParamSurf &Srf =....Abdominal.Diaphragm.CavitySeg.Layer_T12.MuscleWrappingPoints.Left.nn16.Translate.HorizontalCyl;
    SPLine = {
      StringMesh=35;
      AnyMatrix InitWrapPos = {transf3D({-2*.Srf.Radius,-2*.Srf.Radius,0.5*.Srf.Length}, &.Srf)};
      InitWrapPosVecArr = {&InitWrapPos};
    };
  };
  AnyMuscleShortestPath R10_Diaphragm1 = {
    AnyMuscleModel &MusMdl = ....MuscleModels.Left.DiaphragmMusMdl;
    AnyRefNode &Org = ....Segments.Left.R10Seg.R10_DiaphragmNode1L;
    AnyRefNode &Ins = ....Abdominal.Diaphragm.BaseSegSuperior.Layer_T10.Left.R10_Diaphragm1;
    viewMuscle = {#include "../drawSettings/MusDrawSettings.any"};
    viewForce.Visible ??= Off;
    AnyParamSurf &Srf =....Abdominal.Diaphragm.CavitySeg.Layer_T12.MuscleWrappingPoints.Left.nn18.Translate.HorizontalCyl;
    SPLine = {
      StringMesh=35;
      AnyMatrix InitWrapPos = {transf3D({-2*.Srf.Radius,-2*.Srf.Radius,0.5*.Srf.Length}, &.Srf)};
      InitWrapPosVecArr = {&InitWrapPos};
    };
  };
  AnyMuscleShortestPath R10_Diaphragm2 = {
    AnyMuscleModel &MusMdl = ....MuscleModels.Left.DiaphragmMusMdl;
    AnyRefNode &Org = ....Segments.Left.R10Seg.R10_DiaphragmNode2L;
    AnyRefNode &Ins = ....Abdominal.Diaphragm.BaseSegSuperior.Layer_T10.Left.R10_Diaphragm2;
    viewMuscle = {#include "../drawSettings/MusDrawSettings.any"};
    viewForce.Visible ??= Off;
    AnyParamSurf &Srf =....Abdominal.Diaphragm.CavitySeg.Layer_T12.MuscleWrappingPoints.Left.nn21.Translate.HorizontalCyl;
    SPLine = {
      StringMesh=35;
      AnyMatrix InitWrapPos = {transf3D({-2*.Srf.Radius,-2*.Srf.Radius,0.5*.Srf.Length}, &.Srf)};
      InitWrapPosVecArr = {&InitWrapPos};
    };
  };
  AnyMuscleShortestPath R10_Diaphragm3 = {
    AnyMuscleModel &MusMdl = ....MuscleModels.Left.DiaphragmMusMdl;
    AnyRefNode &Org = ....Segments.Left.R10Seg.R10_DiaphragmNode3L;
    AnyRefNode &Ins = ....Abdominal.Diaphragm.BaseSegSuperior.Layer_T10.Left.R10_Diaphragm3;
    viewMuscle = {#include "../drawSettings/MusDrawSettings.any"};
    viewForce.Visible ??= Off;
    AnyParamSurf &Srf =....Abdominal.Diaphragm.CavitySeg.Layer_T12.MuscleWrappingPoints.Left.nn23.Translate.HorizontalCyl;
    SPLine = {
      StringMesh=35;
      AnyMatrix InitWrapPos = {transf3D({-2*.Srf.Radius,-2*.Srf.Radius,0.5*.Srf.Length}, &.Srf)};
      InitWrapPosVecArr = {&InitWrapPos};
    };
  };
  AnyMuscleShortestPath CC_DiaphragmNode7 = {
    AnyMuscleModel &MusMdl = ....MuscleModels.Left.DiaphragmMusMdl;
    #if BM_TRUNK_THORACIC_STERNUM_TOPOLOGY == 4
      AnyRefNode &Org = ....Segments.Left.CostalCartilageSeg.CC_DiaphragmNode7L;
    #else
      AnyRefNode &Org = ....Segments.SternalBodySeg.CC_DiaphragmNode7L;
    #endif
    AnyRefNode &Ins = ....Abdominal.Diaphragm.BaseSegSuperior.Layer_T10.Left.CC_Diaphragm7;
    viewMuscle = {#include "../drawSettings/MusDrawSettings.any"};
    viewForce.Visible ??= Off;
    AnyParamSurf &Srf =....Abdominal.Diaphragm.CavitySeg.Layer_T12.MuscleWrappingPoints.Left.nn25.Translate.HorizontalCyl;
    SPLine = {
      StringMesh=35;
      AnyMatrix InitWrapPos = {transf3D({-2*.Srf.Radius,-2*.Srf.Radius,0.5*.Srf.Length}, &.Srf)};
      InitWrapPosVecArr = {&InitWrapPos};
    };
  };
  AnyMuscleShortestPath CC_DiaphragmNode6 = {
    AnyMuscleModel &MusMdl = ....MuscleModels.Left.DiaphragmMusMdl;
    #if BM_TRUNK_THORACIC_STERNUM_TOPOLOGY == 4
       AnyRefNode &Org = ....Segments.Left.CostalCartilageSeg.CC_DiaphragmNode6L;
    #else
      AnyRefNode &Org = ....Segments.SternalBodySeg.CC_DiaphragmNode6L;
    #endif
    AnyRefNode &Ins = ....Abdominal.Diaphragm.BaseSegSuperior.Layer_T10.Left.CC_Diaphragm6;
    viewMuscle = {#include "../drawSettings/MusDrawSettings.any"};
    viewForce.Visible ??= Off;
    AnyParamSurf &Srf =....Abdominal.Diaphragm.CavitySeg.Layer_T12.MuscleWrappingPoints.Left.nn28.Translate.HorizontalCyl;
    SPLine = {
      StringMesh=35;
      AnyMatrix InitWrapPos = {transf3D({-2*.Srf.Radius,-4*.Srf.Radius,0.5*.Srf.Length}, &.Srf)};
      InitWrapPosVecArr = {&InitWrapPos};
    };
  };
  AnyMuscleShortestPath CC_DiaphragmNode5 = {
    AnyMuscleModel &MusMdl = ....MuscleModels.Left.DiaphragmMusMdl;
    #if BM_TRUNK_THORACIC_STERNUM_TOPOLOGY == 4
       AnyRefNode &Org = ....Segments.Left.CostalCartilageSeg.CC_DiaphragmNode5L;
    #else
      AnyRefNode &Org = ....Segments.SternalBodySeg.CC_DiaphragmNode5L;
    #endif
    AnyRefNode &Ins = ....Abdominal.Diaphragm.BaseSegSuperior.Layer_T10.Left.CC_Diaphragm5;
    viewMuscle = {#include "../drawSettings/MusDrawSettings.any"};
    viewForce.Visible ??= Off;
    AnyParamSurf &Srf =....Abdominal.Diaphragm.CavitySeg.Layer_T12.MuscleWrappingPoints.Left.nn30.Translate.HorizontalCyl;
    SPLine = {
      StringMesh=35;
      AnyMatrix InitWrapPos = {transf3D({-2*.Srf.Radius,-4*.Srf.Radius,0.5*.Srf.Length}, &.Srf)};
      InitWrapPosVecArr = {&InitWrapPos};
    };
  };
  AnyMuscleViaPoint CC_DiaphragmNode4 = {
    AnyMuscleModel &MusMdl = ....MuscleModels.Left.DiaphragmMusMdl;
    #if BM_TRUNK_THORACIC_STERNUM_TOPOLOGY == 4
       AnyRefNode &Org = ....Segments.Left.CostalCartilageSeg.CC_DiaphragmNode4L;
    #else
      AnyRefNode &Org = ....Segments.SternalBodySeg.CC_DiaphragmNode4L;
    #endif
    AnyRefNode &Ins = ....Abdominal.Diaphragm.BaseSegSuperior.Layer_T10.Left.CC_Diaphragm4;
    viewMuscle = {#include "../drawSettings/MusDrawSettings.any"};
    viewForce.Visible ??= Off;
  };
  AnyMuscleViaPoint CC_DiaphragmNode3 = {
    AnyMuscleModel &MusMdl = ....MuscleModels.Left.DiaphragmMusMdl;
    #if BM_TRUNK_THORACIC_STERNUM_TOPOLOGY == 4
       AnyRefNode &Org = ....Segments.Left.CostalCartilageSeg.CC_DiaphragmNode3L;
    #else
      AnyRefNode &Org = ....Segments.SternalBodySeg.CC_DiaphragmNode3L;
    #endif
    AnyRefNode &Ins = ....Abdominal.Diaphragm.BaseSegSuperior.Layer_T10.Left.CC_Diaphragm3;
    viewMuscle = {#include "../drawSettings/MusDrawSettings.any"};
    viewForce.Visible ??= Off;
  };
  AnyMuscleViaPoint CC_DiaphragmNode2 = {
    AnyMuscleModel &MusMdl = ....MuscleModels.Left.DiaphragmMusMdl;
    #if BM_TRUNK_THORACIC_STERNUM_TOPOLOGY == 4
      AnyRefNode &Org = ....Segments.Left.CostalCartilageSeg.CC_DiaphragmNode2L;
    #else
      AnyRefNode &Org = ....Segments.SternalBodySeg.CC_DiaphragmNode2L;
    #endif
    AnyRefNode &Ins = ....Abdominal.Diaphragm.BaseSegSuperior.Layer_T10.Left.CC_Diaphragm2;
    viewMuscle = {#include "../drawSettings/MusDrawSettings.any"};
    viewForce.Visible ??= Off;
  };
  AnyMuscleViaPoint CC_DiaphragmNode1 = {
    AnyMuscleModel &MusMdl = ....MuscleModels.Left.DiaphragmMusMdl;
    #if BM_TRUNK_THORACIC_STERNUM_TOPOLOGY == 4
      AnyRefNode &Org = ....Segments.Left.CostalCartilageSeg.CC_DiaphragmNode1L;
    #else
      AnyRefNode &Org = ....Segments.SternalBodySeg.CC_DiaphragmNode1L;
    #endif
    AnyRefNode &Ins = ....Abdominal.Diaphragm.BaseSegSuperior.Layer_T10.Left.CC_Diaphragm1;
    viewMuscle = {#include "../drawSettings/MusDrawSettings.any"};
    viewForce.Visible ??= Off;
  };

  AnyMuscleViaPoint Xiphoid_Diaphragm = {
    AnyMuscleModel &MusMdl = ....MuscleModels.Left.DiaphragmMusMdl;
    AnyRefNode &Org = ....Segments.SternalBodySeg.Xiphoid_DiaphragmNodeL;
    AnyRefNode &Ins = ....Abdominal.Diaphragm.BaseSegSuperior.Layer_T10.Left.Xiphoid_Diaphragm;
    viewMuscle = {#include "../drawSettings/MusDrawSettings.any"};
    viewForce.Visible ??= Off;
  };
};
#endif

AnyFolder ErectorSpinae = {
  AnyMuscleViaPoint ILplL1CI = {
    AnyMuscleModel &MusMdl = ....MuscleModels.Left.ErectorSpinae.ILplL1CI;
    AnyRefNode &Org = ....Segments.L1Seg.ILplL1CINodeL;
    AnyRefNode &Via1 = ....Segments.L2Seg.ILplL1CIViaNodeL;
    AnyRefNode &Via2 = ....Segments.L3Seg.ILplL1CIViaNodeL;
    AnyRefNode &Via3 = ....Segments.L4Seg.ILplL1CIViaNodeL;
    AnyRefNode &Ins = ....Segments.PelvisSeg.ILplL1CINodeL;
    viewMuscle = {#include "../drawSettings/MusDrawSettings.any"};
    viewForce.Visible ??= Off;
  };
  AnyMuscleViaPoint ILplL2CI = {
    AnyMuscleModel &MusMdl = ....MuscleModels.Left.ErectorSpinae.ILplL2CI;
    AnyRefNode &Org = ....Segments.L2Seg.ILplL2CINodeL;
    AnyRefNode &Via1 = ....Segments.L3Seg.ILplL2CIViaNodeL;
    AnyRefNode &Via2 = ....Segments.L4Seg.ILplL2CIViaNodeL;
    AnyRefNode &Ins = ....Segments.PelvisSeg.ILplL2CINodeL;
    viewMuscle = {#include "../drawSettings/MusDrawSettings.any"};
    viewForce.Visible ??= Off;
  };
  AnyMuscleViaPoint ILplL3CI = {
    AnyMuscleModel &MusMdl = ....MuscleModels.Left.ErectorSpinae.ILplL3CI;
    AnyRefNode &Org = ....Segments.L3Seg.ILplL3CINodeL;
    AnyRefNode &Ins = ....Segments.PelvisSeg.ILplL3CINodeL;
    viewMuscle = {#include "../drawSettings/MusDrawSettings.any"};
    viewForce.Visible ??= Off;
  };
  AnyMuscleViaPoint ILplL4CI = {
    AnyMuscleModel &MusMdl = ....MuscleModels.Left.ErectorSpinae.ILplL4CI;
    AnyRefNode &Org = ....Segments.L4Seg.ILplL4CINodeL;
    AnyRefNode &Ins = ....Segments.PelvisSeg.ILplL4CINodeL;
    viewMuscle = {#include "../drawSettings/MusDrawSettings.any"};
    viewForce.Visible ??= Off;
  };
  AnyMuscleViaPoint LTplL1SIPS = {
    AnyMuscleModel &MusMdl = ....MuscleModels.Left.ErectorSpinae.LTplL1SIPS;
    AnyRefNode &Org = ....Segments.L1Seg.LTplL1SIPSNodeL;
    AnyRefNode &Via1 = ....Segments.L2Seg.LTplL1SIPSViaNodeL;
    AnyRefNode &Via2 = ....Segments.L3Seg.LTplL1SIPSViaNodeL;
    AnyRefNode &Ins = ....Segments.PelvisSeg.LTplL1SIPSNodeL;
    viewMuscle = {#include "../drawSettings/MusDrawSettings.any"};
    viewForce.Visible ??= Off;
  };
  AnyMuscleViaPoint LTplL2SIPS = {
    AnyMuscleModel &MusMdl = ....MuscleModels.Left.ErectorSpinae.LTplL2SIPS;
    AnyRefNode &Org = ....Segments.L2Seg.LTplL2SIPSNodeL;
    AnyRefNode &Via1 = ....Segments.L3Seg.LTplL2SIPSViaNodeL;
    AnyRefNode &Ins = ....Segments.PelvisSeg.LTplL2SIPSNodeL;
    viewMuscle = {#include "../drawSettings/MusDrawSettings.any"};
    viewForce.Visible ??= Off;
  };
  AnyMuscleViaPoint LTplL3SIPS = {
    AnyMuscleModel &MusMdl = ....MuscleModels.Left.ErectorSpinae.LTplL3SIPS;
    AnyRefNode &Org = ....Segments.L3Seg.LTplL3SIPSNodeL;
    AnyRefNode &Ins = ....Segments.PelvisSeg.LTplL3SIPSNodeL;
    viewMuscle = {#include "../drawSettings/MusDrawSettings.any"};
    viewForce.Visible ??= Off;
  };
  AnyMuscleViaPoint LTplL4SIPS = {
    AnyMuscleModel &MusMdl = ....MuscleModels.Left.ErectorSpinae.LTplL4SIPS;
    AnyRefNode &Org = ....Segments.L4Seg.LTplL4SIPSNodeL;
    AnyRefNode &Ins = ....Segments.PelvisSeg.LTplL4SIPSNodeL;
    viewMuscle = {#include "../drawSettings/MusDrawSettings.any"};
    viewForce.Visible ??= Off;
  };
  AnyMuscleViaPoint LTplL5Ilium = {
    AnyMuscleModel &MusMdl = ....MuscleModels.Left.ErectorSpinae.LTplL5Ilium;
    AnyRefNode &Org = ....Segments.L5Seg.LTplL5IliumNodeL;
    AnyRefNode &Ins = ....Segments.SacrumSeg.LTplL5IliumNodeL;
    viewMuscle = {#include "../drawSettings/MusDrawSettings.any"};
    viewForce.Visible ??= Off;
  };
  AnyMuscleViaPoint ILptC5SIPS = {
    AnyMuscleModel &MusMdl = ....MuscleModels.Left.ErectorSpinae.ILptC5SIPS;
    AnyRefNode &Org = ....Segments.Left.R5Seg.ILptC5SIPSNodeL;
    AnyRefNode &Via1 = ....Segments.Left.R6Seg.ILptC5SIPSVia1NodeL;
    AnyRefNode &Via2 = ....Segments.Left.R7Seg.ILptC5SIPSVia2NodeL;
    AnyRefNode &Via3 = ....Segments.Left.R8Seg.ILptC5SIPSVia3NodeL;
    AnyRefNode &Via4 = ....Segments.Left.R9Seg.ILptC5SIPSVia4NodeL;
    AnyRefNode &Via5 = ....Segments.Left.R10Seg.ILptC5SIPSVia5NodeL;
    AnyRefNode &Via6 = ....Segments.Left.R12Seg.ILptC5SIPSVia6NodeL;
    AnyRefNode &Via7 = ....Segments.L1Seg.ILptC5SIPSVia7NodeL;
    AnyRefNode &Via8 = ....Segments.L2Seg.ILptC5SIPSVia8NodeL;
    AnyRefNode &Via9 = ....Segments.L3Seg.ILptC5SIPSVia9NodeL;
    AnyRefNode &Ins = ....Segments.PelvisSeg.ILptC5SIPSNodeL;
    viewMuscle = {#include "../drawSettings/MusDrawSettings.any"};
    viewForce.Visible ??= Off;
  };
  AnyMuscleViaPoint ILptC6SIPS = {
    AnyMuscleModel &MusMdl = ....MuscleModels.Left.ErectorSpinae.ILptC6SIPS;
    AnyRefNode &Org = ....Segments.Left.R6Seg.ILptC6SIPSNodeL;
    AnyRefNode &Via1 = ....Segments.Left.R7Seg.ILptC6SIPSVia1NodeL;
    AnyRefNode &Via2 = ....Segments.Left.R8Seg.ILptC6SIPSVia2NodeL;
    AnyRefNode &Via3 = ....Segments.Left.R9Seg.ILptC6SIPSVia3NodeL;
    AnyRefNode &Via4 = ....Segments.Left.R10Seg.ILptC6SIPSVia4NodeL;
    AnyRefNode &Via5 = ....Segments.Left.R12Seg.ILptC6SIPSVia5NodeL;
    AnyRefNode &Via6 = ....Segments.L1Seg.ILptC6SIPSVia6NodeL;
    AnyRefNode &Via7 = ....Segments.L2Seg.ILptC6SIPSVia7NodeL;
    AnyRefNode &Via8 = ....Segments.L3Seg.ILptC6SIPSVia8NodeL;
    AnyRefNode &Ins = ....Segments.PelvisSeg.ILptC6SIPSNodeL;
    viewMuscle = {#include "../drawSettings/MusDrawSettings.any"};
    viewForce.Visible ??= Off;
  };
  AnyMuscleViaPoint ILptC7CI = {
    AnyMuscleModel &MusMdl = ....MuscleModels.Left.ErectorSpinae.ILptC7CI;
    AnyRefNode &Org = ....Segments.Left.R7Seg.ILptC7CINodeL;
    AnyRefNode &Via1 = ....Segments.Left.R8Seg.ILptC7CIVia1NodeL;
    AnyRefNode &Via2 = ....Segments.Left.R9Seg.ILptC7CIVia2NodeL;
    AnyRefNode &Via3 = ....Segments.Left.R10Seg.ILptC7CIVia3NodeL;
    AnyRefNode &Via4 = ....Segments.Left.R12Seg.ILptC7CIVia4NodeL;
    AnyRefNode &Via5 = ....Segments.L1Seg.ILptC7CIVia5NodeL;
    AnyRefNode &Via6 = ....Segments.L2Seg.ILptC7CIVia6NodeL;
    AnyRefNode &Via7 = ....Segments.L3Seg.ILptC7CIVia7NodeL;
    AnyRefNode &Ins = ....Segments.PelvisSeg.ILptC7CINodeL;
    viewMuscle = {#include "../drawSettings/MusDrawSettings.any"};
    viewForce.Visible ??= Off;
  };
  AnyMuscleViaPoint ILptC8CI = {
    AnyMuscleModel &MusMdl = ....MuscleModels.Left.ErectorSpinae.ILptC8CI;
    AnyRefNode &Org = ....Segments.Left.R8Seg.ILptC8CINodeL;
    AnyRefNode &Via1 = ....Segments.Left.R9Seg.ILptC8CIVia1NodeL;
    AnyRefNode &Via2 = ....Segments.Left.R10Seg.ILptC8CIVia2NodeL;
    AnyRefNode &Via3 = ....Segments.Left.R12Seg.ILptC8CIVia3NodeL;
    AnyRefNode &Via4 = ....Segments.L1Seg.ILptC8CIVia4NodeL;
    AnyRefNode &Via5 = ....Segments.L2Seg.ILptC8CIVia5NodeL;
    AnyRefNode &Via6 = ....Segments.L3Seg.ILptC8CIVia6NodeL;
    AnyRefNode &Ins = ....Segments.PelvisSeg.ILptC8CINodeL;
    viewMuscle = {#include "../drawSettings/MusDrawSettings.any"};
    viewForce.Visible ??= Off;
  };
  AnyMuscleViaPoint ILptC9CI = {
    AnyMuscleModel &MusMdl = ....MuscleModels.Left.ErectorSpinae.ILptC9CI;
    AnyRefNode &Org = ....Segments.Left.R9Seg.ILptC9CINodeL;
    AnyRefNode &Via1 = ....Segments.Left.R10Seg.ILptC9CIVia1NodeL;
    AnyRefNode &Via2 = ....Segments.Left.R12Seg.ILptC9CIVia2NodeL;
    AnyRefNode &Via3 = ....Segments.L1Seg.ILptC9CIVia3NodeL;
    AnyRefNode &Via4 = ....Segments.L2Seg.ILptC9CIVia4NodeL;
    AnyRefNode &Via5 = ....Segments.L3Seg.ILptC9CIVia5NodeL;
    AnyRefNode &Ins = ....Segments.PelvisSeg.ILptC9CINodeL;
    viewMuscle = {#include "../drawSettings/MusDrawSettings.any"};
    viewForce.Visible ??= Off;
  };
  AnyMuscleViaPoint ILptC10CI = {
    AnyMuscleModel &MusMdl = ....MuscleModels.Left.ErectorSpinae.ILptC10CI;
    AnyRefNode &Org = ....Segments.Left.R10Seg.ILptC10CINodeL;
    AnyRefNode &Via1 = ....Segments.Left.R12Seg.ILptC10CIVia1NodeL;
    AnyRefNode &Via2 = ....Segments.L1Seg.ILptC10CIVia2NodeL;
    AnyRefNode &Via3 = ....Segments.L2Seg.ILptC10CIVia3NodeL;
    AnyRefNode &Via4 = ....Segments.L3Seg.ILptC10CIVia4NodeL;
    AnyRefNode &Ins = ....Segments.PelvisSeg.ILptC10CINodeL;
    viewMuscle = {#include "../drawSettings/MusDrawSettings.any"};
    viewForce.Visible ??= Off;
  };
  AnyMuscleViaPoint ILptC11CI = {
    AnyMuscleModel &MusMdl = ....MuscleModels.Left.ErectorSpinae.ILptC11CI;
    AnyRefNode &Org = ....Segments.Left.R11Seg.ILptC11CINodeL;
    AnyRefNode &Via1 = ....Segments.L1Seg.ILptC11CIVia1NodeL;
    AnyRefNode &Via2 = ....Segments.L2Seg.ILptC11CIVia2NodeL;
    AnyRefNode &Via3 = ....Segments.L3Seg.ILptC11CIVia3NodeL;
    AnyRefNode &Ins = ....Segments.PelvisSeg.ILptC11CINodeL;
    viewMuscle = {#include "../drawSettings/MusDrawSettings.any"};
    viewForce.Visible ??= Off;
  };
  AnyMuscleViaPoint ILptC12CI = {
    AnyMuscleModel &MusMdl = ....MuscleModels.Left.ErectorSpinae.ILptC12CI;
    AnyRefNode &Org = ....Segments.Left.R12Seg.ILptC12CINodeL;
    AnyRefNode &Via1 = ....Segments.L1Seg.ILptC12CIVia1NodeL;
    AnyRefNode &Via2 = ....Segments.L2Seg.ILptC12CIVia2NodeL;
    AnyRefNode &Via3 = ....Segments.L3Seg.ILptC12CIVia3NodeL;
    AnyRefNode &Ins = ....Segments.PelvisSeg.ILptC12CINodeL;
    viewMuscle = {#include "../drawSettings/MusDrawSettings.any"};
    viewForce.Visible ??= Off;
  };
  AnyMuscleViaPoint LTptT1L1 = {
    AnyMuscleModel &MusMdl = ....MuscleModels.Left.ErectorSpinae.LTptT1L1;
    AnyRefNode &Org = ....Segments.T1Seg.LTptT1L1NodeL;
    AnyRefNode &Via1 = ....Segments.T2Seg.LTptT1L1Via1NodeL;
    AnyRefNode &Via2 = ....Segments.T3Seg.LTptT1L1Via2NodeL;
    AnyRefNode &Via3 = ....Segments.T4Seg.LTptT1L1Via3NodeL;
    AnyRefNode &Via4 = ....Segments.T5Seg.LTptT1L1Via4NodeL;
    AnyRefNode &Via5 = ....Segments.T6Seg.LTptT1L1Via5NodeL;
    AnyRefNode &Via6 = ....Segments.T7Seg.LTptT1L1Via6NodeL;
    AnyRefNode &Via7 = ....Segments.T8Seg.LTptT1L1Via7NodeL;
    AnyRefNode &Via8 = ....Segments.T9Seg.LTptT1L1Via8NodeL;
    AnyRefNode &Via9 = ....Segments.T10Seg.LTptT1L1Via9NodeL;
    AnyRefNode &Via10 = ....Segments.T11Seg.LTptT1L1Via10NodeL;
    AnyRefNode &Via11 = ....Segments.T12Seg.LTptT1L1Via11NodeL;
    AnyRefNode &Ins = ....Segments.L1Seg.LTptT1L1NodeL;
    viewMuscle = {#include "../drawSettings/MusDrawSettings.any"};
    viewForce.Visible ??= Off;
  };
  AnyMuscleViaPoint LTptT2L2 = {
    AnyMuscleModel &MusMdl = ....MuscleModels.Left.ErectorSpinae.LTptT2L2;
    AnyRefNode &Org = ....Segments.T2Seg.LTptT2L2NodeL;
    AnyRefNode &Via1 = ....Segments.T3Seg.LTptT2L2Via1NodeL;
    AnyRefNode &Via2 = ....Segments.T4Seg.LTptT2L2Via2NodeL;
    AnyRefNode &Via3 = ....Segments.T5Seg.LTptT2L2Via3NodeL;
    AnyRefNode &Via4 = ....Segments.T6Seg.LTptT2L2Via4NodeL;
    AnyRefNode &Via5 = ....Segments.T7Seg.LTptT2L2Via5NodeL;
    AnyRefNode &Via6 = ....Segments.T8Seg.LTptT2L2Via6NodeL;
    AnyRefNode &Via7 = ....Segments.T9Seg.LTptT2L2Via7NodeL;
    AnyRefNode &Via8 = ....Segments.T10Seg.LTptT2L2Via8NodeL;
    AnyRefNode &Via9 = ....Segments.T11Seg.LTptT2L2Via9NodeL;
    AnyRefNode &Via10 = ....Segments.T12Seg.LTptT2L2Via10NodeL;
    AnyRefNode &Via11 = ....Segments.L1Seg.LTptT2L2Via11NodeL;
    AnyRefNode &Ins = ....Segments.L2Seg.LTptT2L2NodeL;
    viewMuscle = {#include "../drawSettings/MusDrawSettings.any"};
    viewForce.Visible ??= Off;
  };
  AnyMuscleViaPoint LTptT3L3 = {
    AnyMuscleModel &MusMdl = ....MuscleModels.Left.ErectorSpinae.LTptT3L3;
    AnyRefNode &Org = ....Segments.Left.R3Seg.LTptT3L3NodeL;
    AnyRefNode &Via1 = ....Segments.Left.R4Seg.LTptT3L3Via1NodeL;
    AnyRefNode &Via2 = ....Segments.Left.R5Seg.LTptT3L3Via2NodeL;
    AnyRefNode &Via3 = ....Segments.Left.R6Seg.LTptT3L3Via3NodeL;
    AnyRefNode &Via4 = ....Segments.Left.R7Seg.LTptT3L3Via4NodeL;
    AnyRefNode &Via5 = ....Segments.Left.R8Seg.LTptT3L3Via5NodeL;
    AnyRefNode &Via6 = ....Segments.Left.R9Seg.LTptT3L3Via6NodeL;
    AnyRefNode &Via7 = ....Segments.Left.R10Seg.LTptT3L3Via7NodeL;
    AnyRefNode &Via8 = ....Segments.T11Seg.LTptT3L3Via8NodeL;
    AnyRefNode &Via9 = ....Segments.T12Seg.LTptT3L3Via9NodeL;
    AnyRefNode &Via10 = ....Segments.L1Seg.LTptT3L3Via10NodeL;
    AnyRefNode &Via11 = ....Segments.L2Seg.LTptT3L3Via11NodeL;
    AnyRefNode &Ins = ....Segments.L3Seg.LTptT3L3NodeL;
    viewMuscle = {#include "../drawSettings/MusDrawSettings.any"};
    viewForce.Visible ??= Off;
  };
  AnyMuscleViaPoint LTptT4L4 = {
    AnyMuscleModel &MusMdl = ....MuscleModels.Left.ErectorSpinae.LTptT4L4;
    AnyRefNode &Org = ....Segments.Left.R4Seg.LTptT4L4NodeL;
    AnyRefNode &Via1 = ....Segments.Left.R5Seg.LTptT4L4Via1NodeL;
    AnyRefNode &Via2 = ....Segments.Left.R6Seg.LTptT4L4Via2NodeL;
    AnyRefNode &Via3 = ....Segments.Left.R7Seg.LTptT4L4Via3NodeL;
    AnyRefNode &Via4 = ....Segments.Left.R8Seg.LTptT4L4Via4NodeL;
    AnyRefNode &Via5 = ....Segments.Left.R9Seg.LTptT4L4Via5NodeL;
    AnyRefNode &Via6 = ....Segments.Left.R10Seg.LTptT4L4Via6NodeL;
    AnyRefNode &Via7 = ....Segments.T11Seg.LTptT4L4Via7NodeL;
    AnyRefNode &Via8 = ....Segments.T12Seg.LTptT4L4Via8NodeL;
    AnyRefNode &Via9 = ....Segments.L1Seg.LTptT4L4Via9NodeL;
    AnyRefNode &Via10 = ....Segments.L2Seg.LTptT4L4Via10NodeL;
    AnyRefNode &Via11 = ....Segments.L3Seg.LTptT4L4Via11NodeL;
    AnyRefNode &Ins = ....Segments.L4Seg.LTptT4L4NodeL;
    viewMuscle = {#include "../drawSettings/MusDrawSettings.any"};
    viewForce.Visible ??= Off;
  };
  AnyMuscleViaPoint LTptT5L5 = {
    AnyMuscleModel &MusMdl = ....MuscleModels.Left.ErectorSpinae.LTptT5L5;
    AnyRefNode &Org = ....Segments.Left.R5Seg.LTptT5L5NodeL;
    AnyRefNode &Via1 = ....Segments.Left.R6Seg.LTptT5L5Via1NodeL;
    AnyRefNode &Via2 = ....Segments.Left.R7Seg.LTptT5L5Via2NodeL;
    AnyRefNode &Via3 = ....Segments.Left.R8Seg.LTptT5L5Via3NodeL;
    AnyRefNode &Via4 = ....Segments.Left.R9Seg.LTptT5L5Via4NodeL;
    AnyRefNode &Via5 = ....Segments.Left.R10Seg.LTptT5L5Via5NodeL;
    AnyRefNode &Via6 = ....Segments.T11Seg.LTptT5L5Via6NodeL;
    AnyRefNode &Via7 = ....Segments.T12Seg.LTptT5L5Via7NodeL;
    AnyRefNode &Via8 = ....Segments.L1Seg.LTptT5L5Via8NodeL;
    AnyRefNode &Via9 = ....Segments.L2Seg.LTptT5L5Via9NodeL;
    AnyRefNode &Via10 = ....Segments.L3Seg.LTptT5L5Via10NodeL;
    AnyRefNode &Via11 = ....Segments.L4Seg.LTptT5L5Via11NodeL;
    AnyRefNode &Ins = ....Segments.L5Seg.LTptT5L5NodeL;
    viewMuscle = {#include "../drawSettings/MusDrawSettings.any"};
    viewForce.Visible ??= Off;
  };
  AnyMuscleViaPoint LTptT6S1 = {
    AnyMuscleModel &MusMdl = ....MuscleModels.Left.ErectorSpinae.LTptT6S1;
    AnyRefNode &Org = ....Segments.Left.R6Seg.LTptT6S1NodeL;
    AnyRefNode &Via1 = ....Segments.Left.R7Seg.LTptT6S1Via1NodeL;
    AnyRefNode &Via2 = ....Segments.Left.R8Seg.LTptT6S1Via2NodeL;
    AnyRefNode &Via3 = ....Segments.Left.R9Seg.LTptT6S1Via3NodeL;
    AnyRefNode &Via4 = ....Segments.Left.R10Seg.LTptT6S1Via4NodeL;
    AnyRefNode &Via5 = ....Segments.T11Seg.LTptT6S1Via5NodeL;
    AnyRefNode &Via6 = ....Segments.T12Seg.LTptT6S1Via6NodeL;
    AnyRefNode &Via7 = ....Segments.L1Seg.LTptT6S1Via7NodeL;
    AnyRefNode &Via8 = ....Segments.L2Seg.LTptT6S1Via8NodeL;
    AnyRefNode &Via9 = ....Segments.L3Seg.LTptT6S1Via9NodeL;
    AnyRefNode &Via10 = ....Segments.L4Seg.LTptT6S1Via10NodeL;
    AnyRefNode &Via11 = ....Segments.L5Seg.LTptT6S1Via11NodeL;
    AnyRefNode &Ins = ....Segments.SacrumSeg.LTptT6S1NodeL;
    viewMuscle = {#include "../drawSettings/MusDrawSettings.any"};
    viewForce.Visible ??= Off;
  };
  AnyMuscleViaPoint LTptT7S2 = {
    AnyMuscleModel &MusMdl = ....MuscleModels.Left.ErectorSpinae.LTptT7S2;
    AnyRefNode &Org = ....Segments.Left.R7Seg.LTptT7S2NodeL;
    AnyRefNode &Via1 = ....Segments.Left.R8Seg.LTptT7S2Via1NodeL;
    AnyRefNode &Via2 = ....Segments.Left.R9Seg.LTptT7S2Via2NodeL;
    AnyRefNode &Via3 = ....Segments.Left.R10Seg.LTptT7S2Via3NodeL;
    AnyRefNode &Via4 = ....Segments.Left.R11Seg.LTptT7S2Via4NodeL;
    AnyRefNode &Via5 = ....Segments.T12Seg.LTptT7S2Via5NodeL;
    AnyRefNode &Via6 = ....Segments.L1Seg.LTptT7S2Via6NodeL;
    AnyRefNode &Via7 = ....Segments.L2Seg.LTptT7S2Via7NodeL;
    AnyRefNode &Via8 = ....Segments.L3Seg.LTptT7S2Via8NodeL;
    AnyRefNode &Via9 = ....Segments.L4Seg.LTptT7S2Via9NodeL;
    AnyRefNode &Via10 = ....Segments.L5Seg.LTptT7S2Via10NodeL;
    AnyRefNode &Ins = ....Segments.SacrumSeg.LTptT7S2NodeL;
    viewMuscle = {#include "../drawSettings/MusDrawSettings.any"};
    viewForce.Visible ??= Off;
  };
  AnyMuscleViaPoint LTptT8S3 = {
    AnyMuscleModel &MusMdl = ....MuscleModels.Left.ErectorSpinae.LTptT8S3;
    AnyRefNode &Org = ....Segments.Left.R8Seg.LTptT8S3NodeL;
    AnyRefNode &Via1 = ....Segments.Left.R9Seg.LTptT8S3Via1NodeL;
    AnyRefNode &Via2 = ....Segments.Left.R10Seg.LTptT8S3Via2NodeL;
    AnyRefNode &Via3 = ....Segments.Left.R11Seg.LTptT8S3Via3NodeL;
    AnyRefNode &Via4 = ....Segments.Left.R12Seg.LTptT8S3Via4NodeL;
    AnyRefNode &Via5 = ....Segments.L1Seg.LTptT8S3Via5NodeL;
    AnyRefNode &Via6 = ....Segments.L2Seg.LTptT8S3Via6NodeL;
    AnyRefNode &Via7 = ....Segments.L3Seg.LTptT8S3Via7NodeL;
    AnyRefNode &Via8 = ....Segments.L4Seg.LTptT8S3Via8NodeL;
    AnyRefNode &Via9 = ....Segments.L5Seg.LTptT8S3Via9NodeL;
    AnyRefNode &Ins = ....Segments.SacrumSeg.LTptT8S3NodeL;
    viewMuscle = {#include "../drawSettings/MusDrawSettings.any"};
    viewForce.Visible ??= Off;
  };
  AnyMuscleViaPoint LTptT9S4 = {
    AnyMuscleModel &MusMdl = ....MuscleModels.Left.ErectorSpinae.LTptT9S4;
    AnyRefNode &Org = ....Segments.Left.R9Seg.LTptT9S4NodeL;
    AnyRefNode &Via1 = ....Segments.Left.R10Seg.LTptT9S4Via1NodeL;
    AnyRefNode &Via2 = ....Segments.Left.R11Seg.LTptT9S4Via2NodeL;
    AnyRefNode &Via3 = ....Segments.Left.R12Seg.LTptT9S4Via3NodeL;
    AnyRefNode &Via4 = ....Segments.L1Seg.LTptT9S4Via4NodeL;
    AnyRefNode &Via5 = ....Segments.L2Seg.LTptT9S4Via5NodeL;
    AnyRefNode &Via6 = ....Segments.L3Seg.LTptT9S4Via6NodeL;
    AnyRefNode &Via7 = ....Segments.L4Seg.LTptT9S4Via7NodeL;
    AnyRefNode &Via8 = ....Segments.L5Seg.LTptT9S4Via8NodeL;
    AnyRefNode &Ins = ....Segments.SacrumSeg.LTptT9S4NodeL;
    viewMuscle = {#include "../drawSettings/MusDrawSettings.any"};
    viewForce.Visible ??= Off;
  };
  AnyMuscleViaPoint LTptT10Sacrum = {
    AnyMuscleModel &MusMdl = ....MuscleModels.Left.ErectorSpinae.LTptT10Sacrum;
    AnyRefNode &Org = ....Segments.Left.R10Seg.LTptT10SacrumNodeL;
    AnyRefNode &Via1 = ....Segments.Left.R11Seg.LTptT10SacrumVia1NodeL;
    AnyRefNode &Via2 = ....Segments.Left.R12Seg.LTptT10SacrumVia2NodeL;
    AnyRefNode &Via3 = ....Segments.L1Seg.LTptT10SacrumVia3NodeL;
    AnyRefNode &Via4 = ....Segments.L2Seg.LTptT10SacrumVia4NodeL;
    AnyRefNode &Via5 = ....Segments.L3Seg.LTptT10SacrumVia5NodeL;
    AnyRefNode &Via6 = ....Segments.L4Seg.LTptT10SacrumVia6NodeL;
    AnyRefNode &Via7 = ....Segments.L5Seg.LTptT10SacrumVia7NodeL;
    AnyRefNode &Ins = ....Segments.SacrumSeg.LTptT10SacrumNodeL;
    viewMuscle = {#include "../drawSettings/MusDrawSettings.any"};
    viewForce.Visible ??= Off;
  };
  // Longissimus Thoracis - lateral part (attaching to ribs)
  AnyMuscleViaPoint LTptC3L3 = {
    AnyMuscleModel &MusMdl = ....MuscleModels.Left.ErectorSpinae.LTptC3L3;
    AnyRefNode &Org = ....Segments.Left.R3Seg.LTptT3L3NodeL;
    AnyRefNode &Via1 = ....Segments.Left.R4Seg.LTptT3L3Via1NodeL;
    AnyRefNode &Via2 = ....Segments.Left.R5Seg.LTptT3L3Via2NodeL;
    AnyRefNode &Via3 = ....Segments.Left.R6Seg.LTptT3L3Via3NodeL;
    AnyRefNode &Via4 = ....Segments.Left.R7Seg.LTptT3L3Via4NodeL;
    AnyRefNode &Via5 = ....Segments.Left.R8Seg.LTptT3L3Via5NodeL;
    AnyRefNode &Via6 = ....Segments.Left.R9Seg.LTptT3L3Via6NodeL;
    AnyRefNode &Via7 = ....Segments.Left.R10Seg.LTptT3L3Via7NodeL;
    AnyRefNode &Via8 = ....Segments.T11Seg.LTptT3L3Via8NodeL;
    AnyRefNode &Via9 = ....Segments.T12Seg.LTptT3L3Via9NodeL;
    AnyRefNode &Via10 = ....Segments.L1Seg.LTptT3L3Via10NodeL;
    AnyRefNode &Via11 = ....Segments.L2Seg.LTptT3L3Via11NodeL;
    AnyRefNode &Ins = ....Segments.L3Seg.LTptT3L3NodeL;
    viewMuscle = {#include "../drawSettings/MusDrawSettings.any"};
    viewForce.Visible ??= Off;
  };
  AnyMuscleViaPoint LTptC4L4 = {
    AnyMuscleModel &MusMdl = ....MuscleModels.Left.ErectorSpinae.LTptC4L4;
    AnyRefNode &Org = ....Segments.Left.R4Seg.LTptT4L4NodeL;
    AnyRefNode &Via1 = ....Segments.Left.R5Seg.LTptT4L4Via1NodeL;
    AnyRefNode &Via2 = ....Segments.Left.R6Seg.LTptT4L4Via2NodeL;
    AnyRefNode &Via3 = ....Segments.Left.R7Seg.LTptT4L4Via3NodeL;
    AnyRefNode &Via4 = ....Segments.Left.R8Seg.LTptT4L4Via4NodeL;
    AnyRefNode &Via5 = ....Segments.Left.R9Seg.LTptT4L4Via5NodeL;
    AnyRefNode &Via6 = ....Segments.Left.R10Seg.LTptT4L4Via6NodeL;
    AnyRefNode &Via7 = ....Segments.T11Seg.LTptT4L4Via7NodeL;
    AnyRefNode &Via8 = ....Segments.T12Seg.LTptT4L4Via8NodeL;
    AnyRefNode &Via9 = ....Segments.L1Seg.LTptT4L4Via9NodeL;
    AnyRefNode &Via10 = ....Segments.L2Seg.LTptT4L4Via10NodeL;
    AnyRefNode &Via11 = ....Segments.L3Seg.LTptT4L4Via11NodeL;
    AnyRefNode &Ins = ....Segments.L4Seg.LTptT4L4NodeL;
    viewMuscle = {#include "../drawSettings/MusDrawSettings.any"};
    viewForce.Visible ??= Off;
  };
  AnyMuscleViaPoint LTptC5L5 = {
    AnyMuscleModel &MusMdl = ....MuscleModels.Left.ErectorSpinae.LTptC5L5;
    AnyRefNode &Org = ....Segments.Left.R5Seg.LTptT5L5NodeL;
    AnyRefNode &Via1 = ....Segments.Left.R6Seg.LTptT5L5Via1NodeL;
    AnyRefNode &Via2 = ....Segments.Left.R7Seg.LTptT5L5Via2NodeL;
    AnyRefNode &Via3 = ....Segments.Left.R8Seg.LTptT5L5Via3NodeL;
    AnyRefNode &Via4 = ....Segments.Left.R9Seg.LTptT5L5Via4NodeL;
    AnyRefNode &Via5 = ....Segments.Left.R10Seg.LTptT5L5Via5NodeL;
    AnyRefNode &Via6 = ....Segments.T11Seg.LTptT5L5Via6NodeL;
    AnyRefNode &Via7 = ....Segments.T12Seg.LTptT5L5Via7NodeL;
    AnyRefNode &Via8 = ....Segments.L1Seg.LTptT5L5Via8NodeL;
    AnyRefNode &Via9 = ....Segments.L2Seg.LTptT5L5Via9NodeL;
    AnyRefNode &Via10 = ....Segments.L3Seg.LTptT5L5Via10NodeL;
    AnyRefNode &Via11 = ....Segments.L4Seg.LTptT5L5Via11NodeL;
    AnyRefNode &Ins = ....Segments.L5Seg.LTptT5L5NodeL;
    viewMuscle = {#include "../drawSettings/MusDrawSettings.any"};
    viewForce.Visible ??= Off;
  };
  AnyMuscleViaPoint LTptC6S1 = {
    AnyMuscleModel &MusMdl = ....MuscleModels.Left.ErectorSpinae.LTptC6S1;
    AnyRefNode &Org = ....Segments.Left.R6Seg.LTptT6S1NodeL;
    AnyRefNode &Via1 = ....Segments.Left.R7Seg.LTptT6S1Via1NodeL;
    AnyRefNode &Via2 = ....Segments.Left.R8Seg.LTptT6S1Via2NodeL;
    AnyRefNode &Via3 = ....Segments.Left.R9Seg.LTptT6S1Via3NodeL;
    AnyRefNode &Via4 = ....Segments.Left.R10Seg.LTptT6S1Via4NodeL;
    AnyRefNode &Via5 = ....Segments.T11Seg.LTptT6S1Via5NodeL;
    AnyRefNode &Via6 = ....Segments.T12Seg.LTptT6S1Via6NodeL;
    AnyRefNode &Via7 = ....Segments.L1Seg.LTptT6S1Via7NodeL;
    AnyRefNode &Via8 = ....Segments.L2Seg.LTptT6S1Via8NodeL;
    AnyRefNode &Via9 = ....Segments.L3Seg.LTptT6S1Via9NodeL;
    AnyRefNode &Via10 = ....Segments.L4Seg.LTptT6S1Via10NodeL;
    AnyRefNode &Via11 = ....Segments.L5Seg.LTptT6S1Via11NodeL;
    AnyRefNode &Ins = ....Segments.SacrumSeg.LTptT6S1NodeL;
    viewMuscle = {#include "../drawSettings/MusDrawSettings.any"};
    viewForce.Visible ??= Off;
  };
  AnyMuscleViaPoint LTptC7S2 = {
    AnyMuscleModel &MusMdl = ....MuscleModels.Left.ErectorSpinae.LTptC7S2;
    AnyRefNode &Org = ....Segments.Left.R7Seg.LTptT7S2NodeL;
    AnyRefNode &Via1 = ....Segments.Left.R8Seg.LTptT7S2Via1NodeL;
    AnyRefNode &Via2 = ....Segments.Left.R9Seg.LTptT7S2Via2NodeL;
    AnyRefNode &Via3 = ....Segments.Left.R10Seg.LTptT7S2Via3NodeL;
    AnyRefNode &Via4 = ....Segments.Left.R11Seg.LTptT7S2Via4NodeL;
    AnyRefNode &Via5 = ....Segments.T12Seg.LTptT7S2Via5NodeL;
    AnyRefNode &Via6 = ....Segments.L1Seg.LTptT7S2Via6NodeL;
    AnyRefNode &Via7 = ....Segments.L2Seg.LTptT7S2Via7NodeL;
    AnyRefNode &Via8 = ....Segments.L3Seg.LTptT7S2Via8NodeL;
    AnyRefNode &Via9 = ....Segments.L4Seg.LTptT7S2Via9NodeL;
    AnyRefNode &Via10 = ....Segments.L5Seg.LTptT7S2Via10NodeL;
    AnyRefNode &Ins = ....Segments.SacrumSeg.LTptT7S2NodeL;
    viewMuscle = {#include "../drawSettings/MusDrawSettings.any"};
    viewForce.Visible ??= Off;
  };
  AnyMuscleViaPoint LTptC8S3 = {
    AnyMuscleModel &MusMdl = ....MuscleModels.Left.ErectorSpinae.LTptC8S3;
    AnyRefNode &Org = ....Segments.Left.R8Seg.LTptT8S3NodeL;
    AnyRefNode &Via1 = ....Segments.Left.R9Seg.LTptT8S3Via1NodeL;
    AnyRefNode &Via2 = ....Segments.Left.R10Seg.LTptT8S3Via2NodeL;
    AnyRefNode &Via3 = ....Segments.Left.R11Seg.LTptT8S3Via3NodeL;
    AnyRefNode &Via4 = ....Segments.Left.R12Seg.LTptT8S3Via4NodeL;
    AnyRefNode &Via5 = ....Segments.L1Seg.LTptT8S3Via5NodeL;
    AnyRefNode &Via6 = ....Segments.L2Seg.LTptT8S3Via6NodeL;
    AnyRefNode &Via7 = ....Segments.L3Seg.LTptT8S3Via7NodeL;
    AnyRefNode &Via8 = ....Segments.L4Seg.LTptT8S3Via8NodeL;
    AnyRefNode &Via9 = ....Segments.L5Seg.LTptT8S3Via9NodeL;
    AnyRefNode &Ins = ....Segments.SacrumSeg.LTptT8S3NodeL;
    viewMuscle = {#include "../drawSettings/MusDrawSettings.any"};
    viewForce.Visible ??= Off;
  };
  AnyMuscleViaPoint LTptC9S4 = {
    AnyMuscleModel &MusMdl = ....MuscleModels.Left.ErectorSpinae.LTptC9S4;
    AnyRefNode &Org = ....Segments.Left.R9Seg.LTptT9S4NodeL;
    AnyRefNode &Via1 = ....Segments.Left.R10Seg.LTptT9S4Via1NodeL;
    AnyRefNode &Via2 = ....Segments.Left.R11Seg.LTptT9S4Via2NodeL;
    AnyRefNode &Via3 = ....Segments.Left.R12Seg.LTptT9S4Via3NodeL;
    AnyRefNode &Via4 = ....Segments.L1Seg.LTptT9S4Via4NodeL;
    AnyRefNode &Via5 = ....Segments.L2Seg.LTptT9S4Via5NodeL;
    AnyRefNode &Via6 = ....Segments.L3Seg.LTptT9S4Via6NodeL;
    AnyRefNode &Via7 = ....Segments.L4Seg.LTptT9S4Via7NodeL;
    AnyRefNode &Via8 = ....Segments.L5Seg.LTptT9S4Via8NodeL;
    AnyRefNode &Ins = ....Segments.SacrumSeg.LTptT9S4NodeL;
    viewMuscle = {#include "../drawSettings/MusDrawSettings.any"};
    viewForce.Visible ??= Off;
  };
  AnyMuscleViaPoint LTptC10Sacrum = {
    AnyMuscleModel &MusMdl = ....MuscleModels.Left.ErectorSpinae.LTptC10Sacrum;
    AnyRefNode &Org = ....Segments.Left.R10Seg.LTptT10SacrumNodeL;
    AnyRefNode &Via1 = ....Segments.Left.R11Seg.LTptT10SacrumVia1NodeL;
    AnyRefNode &Via2 = ....Segments.Left.R12Seg.LTptT10SacrumVia2NodeL;
    AnyRefNode &Via3 = ....Segments.L1Seg.LTptT10SacrumVia3NodeL;
    AnyRefNode &Via4 = ....Segments.L2Seg.LTptT10SacrumVia4NodeL;
    AnyRefNode &Via5 = ....Segments.L3Seg.LTptT10SacrumVia5NodeL;
    AnyRefNode &Via6 = ....Segments.L4Seg.LTptT10SacrumVia6NodeL;
    AnyRefNode &Via7 = ....Segments.L5Seg.LTptT10SacrumVia7NodeL;
    AnyRefNode &Ins = ....Segments.SacrumSeg.LTptT10SacrumNodeL;
    viewMuscle = {#include "../drawSettings/MusDrawSettings.any"};
    viewForce.Visible ??= Off;
  };
  AnyMuscleViaPoint LTptT11Sacrum = {
    AnyMuscleModel &MusMdl = ....MuscleModels.Left.ErectorSpinae.LTptT11Sacrum;
    AnyRefNode &Org = ....Segments.Left.R11Seg.LTptT11SacrumNodeL;
    AnyRefNode &Via1 = ....Segments.Left.R12Seg.LTptT11SacrumVia1NodeL;
    AnyRefNode &Via2 = ....Segments.L1Seg.LTptT11SacrumVia2NodeL;
    AnyRefNode &Via3 = ....Segments.L2Seg.LTptT11SacrumVia3NodeL;
    AnyRefNode &Via4 = ....Segments.L3Seg.LTptT11SacrumVia4NodeL;
    AnyRefNode &Via5 = ....Segments.L4Seg.LTptT11SacrumVia5NodeL;
    AnyRefNode &Via6 = ....Segments.L5Seg.LTptT11SacrumVia6NodeL;
    AnyRefNode &Ins = ....Segments.SacrumSeg.LTptT11SacrumNodeL;
    viewMuscle = {#include "../drawSettings/MusDrawSettings.any"};
    viewForce.Visible ??= Off;
  };
  AnyMuscleViaPoint LTptT12Sacrum = {
    AnyMuscleModel &MusMdl = ....MuscleModels.Left.ErectorSpinae.LTptT12Sacrum;
    AnyRefNode &Org = ....Segments.Left.R12Seg.LTptT12SacrumNodeL;
    AnyRefNode &Via1 = ....Segments.L1Seg.LTptT12SacrumVia1NodeL;
    AnyRefNode &Via2 = ....Segments.L2Seg.LTptT12SacrumVia2NodeL;
    AnyRefNode &Via3 = ....Segments.L3Seg.LTptT12SacrumVia3NodeL;
    AnyRefNode &Via4 = ....Segments.L4Seg.LTptT12SacrumVia4NodeL;
    AnyRefNode &Via5 = ....Segments.L5Seg.LTptT12SacrumVia5NodeL;
    AnyRefNode &Ins = ....Segments.SacrumSeg.LTptT12SacrumNodeL;
    viewMuscle = {#include "../drawSettings/MusDrawSettings.any"};
    viewForce.Visible ??= Off;
  };
  // Iliocostalis Thoracis
  AnyMuscleViaPoint ITC7R7 = {
    AnyMuscleModel &MusMdl = ....MuscleModels.Left.ErectorSpinae.ITC7R7;
    AnyRefNode &Org = ....Segments.T1Seg.ITC7R7NodeLOrg;
    AnyRefNode &Via1 = ....Segments.Left.R1Seg.ITC7R7Via1NodeL;
    AnyRefNode &Via2 = ....Segments.Left.R2Seg.ITC7R7Via2NodeL;
    AnyRefNode &Via3 = ....Segments.Left.R3Seg.ITC7R7Via3NodeL;
    AnyRefNode &Via4 = ....Segments.Left.R4Seg.ITC7R7Via4NodeL;
    AnyRefNode &Via5 = ....Segments.Left.R5Seg.ITC7R7Via5NodeL;
    AnyRefNode &Via6 = ....Segments.Left.R6Seg.ITC7R7Via6NodeL;
    AnyRefNode &Ins = ....Segments.Left.R7Seg.ITC7R7NodeLIns;
    viewMuscle = {#include "../drawSettings/MusDrawSettings.any"};
    viewForce.Visible ??= Off;
  };
  AnyMuscleViaPoint ITR1R7 = {
    AnyMuscleModel &MusMdl = ....MuscleModels.Left.ErectorSpinae.ITR1R7;
    AnyRefNode &Org = ....Segments.Left.R1Seg.ITR1R7NodeLOrg;
    AnyRefNode &Via2 = ....Segments.Left.R2Seg.ITR1R7Via1NodeL;
    AnyRefNode &Via3 = ....Segments.Left.R3Seg.ITR1R7Via2NodeL;
    AnyRefNode &Via4 = ....Segments.Left.R4Seg.ITR1R7Via3NodeL;
    AnyRefNode &Via5 = ....Segments.Left.R5Seg.ITR1R7Via4NodeL;
    AnyRefNode &Via6 = ....Segments.Left.R6Seg.ITR1R7Via5NodeL;
    AnyRefNode &Ins = ....Segments.Left.R7Seg.ITR1R7NodeLIns;
    viewMuscle = {#include "../drawSettings/MusDrawSettings.any"};
    viewForce.Visible ??= Off;
  };
  AnyMuscleViaPoint ITR2R8 = {
    AnyMuscleModel &MusMdl = ....MuscleModels.Left.ErectorSpinae.ITR2R8;
    AnyRefNode &Org = ....Segments.Left.R2Seg.ITR2R8NodeLOrg;
    AnyRefNode &Via2 = ....Segments.Left.R3Seg.ITR2R8Via1NodeL;
    AnyRefNode &Via3 = ....Segments.Left.R4Seg.ITR2R8Via2NodeL;
    AnyRefNode &Via4 = ....Segments.Left.R5Seg.ITR2R8Via3NodeL;
    AnyRefNode &Via5 = ....Segments.Left.R6Seg.ITR2R8Via4NodeL;
    AnyRefNode &Via6 = ....Segments.Left.R7Seg.ITR2R8Via5NodeL;
    AnyRefNode &Ins = ....Segments.Left.R8Seg.ITR2R8NodeLIns;
    viewMuscle = {#include "../drawSettings/MusDrawSettings.any"};
    viewForce.Visible ??= Off;
  };
  AnyMuscleViaPoint ITR3R9 = {
    AnyMuscleModel &MusMdl = ....MuscleModels.Left.ErectorSpinae.ITR3R9;
    AnyRefNode &Org = ....Segments.Left.R3Seg.ITR3R9NodeLOrg;
    AnyRefNode &Via2 = ....Segments.Left.R4Seg.ITR3R9Via1NodeL;
    AnyRefNode &Via3 = ....Segments.Left.R5Seg.ITR3R9Via2NodeL;
    AnyRefNode &Via4 = ....Segments.Left.R6Seg.ITR3R9Via3NodeL;
    AnyRefNode &Via5 = ....Segments.Left.R7Seg.ITR3R9Via4NodeL;
    AnyRefNode &Via6 = ....Segments.Left.R8Seg.ITR3R9Via5NodeL;
    AnyRefNode &Ins = ....Segments.Left.R9Seg.ITR3R9NodeLIns;
    viewMuscle = {#include "../drawSettings/MusDrawSettings.any"};
    viewForce.Visible ??= Off;
  };
  AnyMuscleViaPoint ITR4R10 = {
    AnyMuscleModel &MusMdl = ....MuscleModels.Left.ErectorSpinae.ITR4R10;
    AnyRefNode &Org = ....Segments.Left.R4Seg.ITR4R10NodeLOrg;
    AnyRefNode &Via2 = ....Segments.Left.R5Seg.ITR4R10Via1NodeL;
    AnyRefNode &Via3 = ....Segments.Left.R6Seg.ITR4R10Via2NodeL;
    AnyRefNode &Via4 = ....Segments.Left.R7Seg.ITR4R10Via3NodeL;
    AnyRefNode &Via5 = ....Segments.Left.R8Seg.ITR4R10Via4NodeL;
    AnyRefNode &Via6 = ....Segments.Left.R9Seg.ITR4R10Via5NodeL;
    AnyRefNode &Ins = ....Segments.Left.R10Seg.ITR4R10NodeLIns;
    viewMuscle = {#include "../drawSettings/MusDrawSettings.any"};
    viewForce.Visible ??= Off;
  };
  AnyMuscleViaPoint ITR5R11 = {
    AnyMuscleModel &MusMdl = ....MuscleModels.Left.ErectorSpinae.ITR5T11;
    AnyRefNode &Org = ....Segments.Left.R5Seg.ITR5R11NodeLOrg;
    AnyRefNode &Via2 = ....Segments.Left.R6Seg.ITR5R11Via1NodeL;
    AnyRefNode &Via3 = ....Segments.Left.R7Seg.ITR5R11Via2NodeL;
    AnyRefNode &Via4 = ....Segments.Left.R8Seg.ITR5R11Via3NodeL;
    AnyRefNode &Via5 = ....Segments.Left.R9Seg.ITR5R11Via4NodeL;
    AnyRefNode &Via6 = ....Segments.Left.R10Seg.ITR5R11Via5NodeL;
    AnyRefNode &Ins = ....Segments.Left.R11Seg.ITR5R11NodeLIns;
    viewMuscle = {#include "../drawSettings/MusDrawSettings.any"};
    viewForce.Visible ??= Off;
  };
  AnyMuscleViaPoint ITR6R12 = {
    AnyMuscleModel &MusMdl = ....MuscleModels.Left.ErectorSpinae.ITR6T12;
    AnyRefNode &Org = ....Segments.Left.R6Seg.ITR6R12NodeL;
    AnyRefNode &Via2 = ....Segments.Left.R7Seg.ITR6R12Via1NodeL;
    AnyRefNode &Via3 = ....Segments.Left.R8Seg.ITR6R12Via2NodeL;
    AnyRefNode &Via4 = ....Segments.Left.R9Seg.ITR6R12Via3NodeL;
    AnyRefNode &Via5 = ....Segments.Left.R10Seg.ITR6R12Via4NodeL;
    AnyRefNode &Via6 = ....Segments.Left.R11Seg.ITR6R12Via5NodeL;
    AnyRefNode &Ins = ....Segments.Left.R12Seg.ITR6R12NodeLIns;
    viewMuscle = {#include "../drawSettings/MusDrawSettings.any"};
    viewForce.Visible ??= Off;
  };
}; // End of ErectorSpinae

#if BM_TRUNK_THORACIC_MODEL == _THORACIC_MODEL_FLEXIBLE_
  AnyFolder InterCostalis = {

    Muscle_template_Simple IC_Ext_R1R2(
      CREATE_ELEMENTS=6,
      OriginSegment=....Segments.Left.R1Seg,
      ORIGIN_POINTS=....ModelParameters.R1.Left.IC_R1_Ext_Inf.Points,
      InsertionSegment=....Segments.Left.R2Seg,
      INSERTION_POINTS=....ModelParameters.R2.Left.IC_R2_Ext_Sup.Points,
      MUSCLE_MODEL_PARAMETERS=....MuscleModels.Left.InterCostalis.IC_Ext_R1R2
    )={};

    Muscle_template_Simple IC_Int_R1R2 (
      CREATE_ELEMENTS=6,
      OriginSegment=....Segments.Left.R1Seg,
      ORIGIN_POINTS=....ModelParameters.R1.Left.IC_R1_Int_Inf.Points,
      InsertionSegment=....Segments.Left.R2Seg,
      INSERTION_POINTS=....ModelParameters.R2.Left.IC_R2_Int_Sup.Points,
      MUSCLE_MODEL_PARAMETERS=....MuscleModels.Left.InterCostalis.IC_Int_R1R2
    )={
      NumberOfElements = 7;
      // The Last element is defined manually
      AnyMuscleViaPoint elem7 = {
        AnyRefNode &Org = .....Segments.SternumSeg.Left_IC_Int_R1R2_elem5;
        AnyRefNode &Ins = .InsertionSegment.IC_Int_R1R2_elem5;
        AnyMuscleModel MusMdl = {
          F0=..MuscleModel.F0/..NumberOfElements;
          Lf0=..MuscleModel.F0;
          Vol0=..MuscleModel.Vol0/..NumberOfElements;
        };
        viewMuscle = {#include "../DrawSettings/MusDrawSettings.any"};
      };
    };

    Muscle_template_Simple IC_Ext_R2R3 (
      CREATE_ELEMENTS=7,
      OriginSegment=....Segments.Left.R2Seg,
      ORIGIN_POINTS=....ModelParameters.R2.Left.IC_R2_Ext_Inf.Points,
      InsertionSegment=....Segments.Left.R5Seg,
      INSERTION_POINTS=....ModelParameters.R3.Left.IC_R3_Ext_Sup.Points,
      MUSCLE_MODEL_PARAMETERS=....MuscleModels.Left.InterCostalis.IC_Ext_R2R3
    )={};

    Muscle_template_Simple IC_Int_R2R3 (
      CREATE_ELEMENTS=7,
      OriginSegment=....Segments.Left.R2Seg,
      ORIGIN_POINTS=....ModelParameters.R2.Left.IC_R2_Int_Inf.Points,
      InsertionSegment=....Segments.Left.R3Seg,
      INSERTION_POINTS=....ModelParameters.R3.Left.IC_R3_Int_Sup.Points,
      MUSCLE_MODEL_PARAMETERS=....MuscleModels.Left.InterCostalis.IC_Int_R2R3
    )={
      NumberOfElements = 8;
      AnyMuscleViaPoint elem8= {
        AnyRefNode &Org = .....Segments.SternalBodySeg.Left_IC_Int_R2R3_elem7;
        AnyRefNode &Ins = .InsertionSegment.IC_Int_R2R3_elem7;
        AnyMuscleModel MusMdl = {
          F0=..MuscleModel.F0/..NumberOfElements;
          Lf0=..MuscleModel.F0;
          Vol0=..MuscleModel.Vol0/..NumberOfElements;
        };
        viewMuscle = {#include "../DrawSettings/MusDrawSettings.any"};
      };
    };

    Muscle_template_Simple IC_Ext_R3R4 (
      CREATE_ELEMENTS=7,
      OriginSegment=....Segments.Left.R3Seg,
      ORIGIN_POINTS=....ModelParameters.R3.Left.IC_R3_Ext_Inf.Points,
      InsertionSegment=....Segments.Left.R4Seg,
      INSERTION_POINTS=....ModelParameters.R4.Left.IC_R4_Ext_Sup.Points,
      MUSCLE_MODEL_PARAMETERS=....MuscleModels.Left.InterCostalis.IC_Ext_R3R4
    )={};

    Muscle_template_Simple IC_Int_R3R4 (
      CREATE_ELEMENTS=7,
      OriginSegment=....Segments.Left.R3Seg,
      ORIGIN_POINTS=....ModelParameters.R3.Left.IC_R3_Int_Inf.Points,
      InsertionSegment=....Segments.Left.R4Seg,
      INSERTION_POINTS=....ModelParameters.R4.Left.IC_R4_Int_Sup.Points,
      MUSCLE_MODEL_PARAMETERS=....MuscleModels.Left.InterCostalis.IC_Int_R3R4
    )={
      NumberOfElements = 8;
      AnyMuscleViaPoint elem8= {
        AnyRefNode &Org = .....Segments.SternalBodySeg.Left_IC_Int_R3R4_elem7;
        AnyRefNode &Ins = .InsertionSegment.IC_Int_R3R4_elem7;
        AnyMuscleModel MusMdl = {
          F0=..MuscleModel.F0/..NumberOfElements;
          Lf0=..MuscleModel.F0;
          Vol0=..MuscleModel.Vol0/..NumberOfElements;
        };
        viewMuscle = {#include "../DrawSettings/MusDrawSettings.any"};
      };
    };

    Muscle_template_Simple IC_Ext_R4R5 (
      CREATE_ELEMENTS=7,
      OriginSegment=....Segments.Left.R4Seg,
      ORIGIN_POINTS=....ModelParameters.R4.Left.IC_R4_Ext_Inf.Points,
      InsertionSegment=....Segments.Left.R5Seg,
      INSERTION_POINTS=....ModelParameters.R5.Left.IC_R5_Ext_Sup.Points,
      MUSCLE_MODEL_PARAMETERS=....MuscleModels.Left.InterCostalis.IC_Ext_R4R5
    )={};

    Muscle_template_Simple IC_Int_R4R5 (
      CREATE_ELEMENTS=7,
      OriginSegment=....Segments.Left.R4Seg,
      ORIGIN_POINTS=....ModelParameters.R4.Left.IC_R4_Int_Inf.Points,
      InsertionSegment=....Segments.Left.R5Seg,
      INSERTION_POINTS=....ModelParameters.R5.Left.IC_R5_Int_Sup.Points,
      MUSCLE_MODEL_PARAMETERS=....MuscleModels.Left.InterCostalis.IC_Int_R4R5
    )={
      NumberOfElements = 8;
      AnyMuscleViaPoint elem8= {
        AnyRefNode &Org = .....Segments.SternalBodySeg.Left_IC_Int_R4R5_elem7;
        AnyRefNode &Ins = .InsertionSegment.IC_Int_R4R5_elem7;
        AnyMuscleModel MusMdl = {
          F0=..MuscleModel.F0/..NumberOfElements;
          Lf0=..MuscleModel.F0;
          Vol0=..MuscleModel.Vol0/..NumberOfElements;
        };
        viewMuscle = {#include "../DrawSettings/MusDrawSettings.any"};
      };
    };

    Muscle_template_Simple IC_Ext_R5R6 (
      CREATE_ELEMENTS=7,
      OriginSegment=....Segments.Left.R5Seg,
      ORIGIN_POINTS=....ModelParameters.R5.Left.IC_R5_Ext_Inf.Points,
      InsertionSegment=....Segments.Left.R6Seg,
      INSERTION_POINTS=....ModelParameters.R6.Left.IC_R6_Ext_Sup.Points,
      MUSCLE_MODEL_PARAMETERS=....MuscleModels.Left.InterCostalis.IC_Ext_R5R6
    )={};

    Muscle_template_Simple IC_Int_R5R6 (
      CREATE_ELEMENTS=7,
      OriginSegment=....Segments.Left.R5Seg,
      ORIGIN_POINTS=....ModelParameters.R5.Left.IC_R5_Int_Inf.Points,
      InsertionSegment=....Segments.Left.R6Seg,
      INSERTION_POINTS=....ModelParameters.R6.Left.IC_R6_Int_Sup.Points,
      MUSCLE_MODEL_PARAMETERS=....MuscleModels.Left.InterCostalis.IC_Int_R5R6
    )={
      NumberOfElements = 8;
      AnyMuscleViaPoint elem8= {
        AnyRefNode &Org = .....Segments.SternalBodySeg.Left_IC_Int_R5R6_elem7;
        AnyRefNode &Ins = .InsertionSegment.IC_Int_R5R6_elem7;
        AnyMuscleModel MusMdl = {
          F0=..MuscleModel.F0/..NumberOfElements;
          Lf0=..MuscleModel.F0;
          Vol0=..MuscleModel.Vol0/..NumberOfElements;
        };
        viewMuscle = {#include "../DrawSettings/MusDrawSettings.any"};
      };
    };

    Muscle_template_Simple IC_Ext_R6R7 (
      CREATE_ELEMENTS=7,
      OriginSegment=....Segments.Left.R6Seg,
      ORIGIN_POINTS=....ModelParameters.R6.Left.IC_R6_Ext_Inf.Points,
      InsertionSegment=....Segments.Left.R7Seg,
      INSERTION_POINTS=....ModelParameters.R7.Left.IC_R7_Ext_Sup.Points,
      MUSCLE_MODEL_PARAMETERS=....MuscleModels.Left.InterCostalis.IC_Ext_R6R7
    )={};

    Muscle_template_Simple IC_Int_R6R7 (
      CREATE_ELEMENTS=7,
      OriginSegment=....Segments.Left.R6Seg,
      ORIGIN_POINTS=....ModelParameters.R6.Left.IC_R6_Int_Inf.Points,
      InsertionSegment=....Segments.Left.R7Seg,
      INSERTION_POINTS=....ModelParameters.R7.Left.IC_R7_Int_Sup.Points,
      MUSCLE_MODEL_PARAMETERS=....MuscleModels.Left.InterCostalis.IC_Int_R6R7
    )={
      NumberOfElements = 8;
      AnyMuscleViaPoint elem8= {
        AnyRefNode &Org = .....Segments.SternalBodySeg.Left_IC_Int_R6R7_elem7;
        AnyRefNode &Ins = .InsertionSegment.IC_Int_R6R7_elem7;
        AnyMuscleModel MusMdl = {
          F0=..MuscleModel.F0/..NumberOfElements;
          Lf0=..MuscleModel.F0;
          Vol0=..MuscleModel.Vol0/..NumberOfElements;
        };
        viewMuscle = {#include "../DrawSettings/MusDrawSettings.any"};
      };
    };

    Muscle_template_Simple IC_Ext_R7R8 (
      CREATE_ELEMENTS=7,
      OriginSegment=....Segments.Left.R7Seg,
      ORIGIN_POINTS=....ModelParameters.R7.Left.IC_R7_Ext_Inf.Points,
      InsertionSegment=....Segments.Left.R8Seg,
      INSERTION_POINTS=....ModelParameters.R8.Left.IC_R8_Ext_Sup.Points,
      MUSCLE_MODEL_PARAMETERS=....MuscleModels.Left.InterCostalis.IC_Ext_R7R8
    )={};

    Muscle_template_Simple IC_Int_R7R8 (
      CREATE_ELEMENTS=7,
      OriginSegment=....Segments.Left.R7Seg,
      ORIGIN_POINTS=....ModelParameters.R7.Left.IC_R7_Int_Inf.Points,
      InsertionSegment=....Segments.Left.R8Seg,
      INSERTION_POINTS=....ModelParameters.R8.Left.IC_R8_Int_Sup.Points,
      MUSCLE_MODEL_PARAMETERS=....MuscleModels.Left.InterCostalis.IC_Int_R7R8
    )={
      NumberOfElements = 8;
      AnyMuscleViaPoint elem8= {
        #if BM_TRUNK_THORACIC_STERNUM_TOPOLOGY == 4
          AnyRefNode &Org = .....Segments.Left.CostalCartilageSeg.Left_IC_Int_R7R8_elem7;
        #else
          AnyRefNode &Org = .....Segments.SternalBodySeg.Left_IC_Int_R7R8_elem7;
        #endif
        AnyRefNode &Ins = .InsertionSegment.IC_Int_R7R8_elem7;
        AnyMuscleModel MusMdl = {
          F0=..MuscleModel.F0/..NumberOfElements;
          Lf0=..MuscleModel.F0;
          Vol0=..MuscleModel.Vol0/..NumberOfElements;
        };
        viewMuscle = {#include "../DrawSettings/MusDrawSettings.any"};
      };
    };

    Muscle_template_Simple IC_Ext_R8R9 (
      CREATE_ELEMENTS=7,
      OriginSegment=....Segments.Left.R8Seg,
      ORIGIN_POINTS=....ModelParameters.R8.Left.IC_R8_Ext_Inf.Points,
      InsertionSegment=....Segments.Left.R9Seg,
      INSERTION_POINTS=....ModelParameters.R9.Left.IC_R9_Ext_Sup.Points,
      MUSCLE_MODEL_PARAMETERS=....MuscleModels.Left.InterCostalis.IC_Ext_R8R9
    )={};

    Muscle_template_Simple IC_Int_R8R9 (
      CREATE_ELEMENTS=7,
      OriginSegment=....Segments.Left.R8Seg,
      ORIGIN_POINTS=....ModelParameters.R8.Left.IC_R8_Int_Inf.Points,
      InsertionSegment=....Segments.Left.R9Seg,
      INSERTION_POINTS=....ModelParameters.R9.Left.IC_R9_Int_Sup.Points,
      MUSCLE_MODEL_PARAMETERS=....MuscleModels.Left.InterCostalis.IC_Int_R8R9
    )={
      NumberOfElements = 8;
      AnyMuscleViaPoint elem8= {
      #if BM_TRUNK_THORACIC_STERNUM_TOPOLOGY == 4
        AnyRefNode &Org = .....Segments.Left.CostalCartilageSeg.Left_IC_Int_R8R9_elem7;
      #else
        AnyRefNode &Org = .....Segments.SternalBodySeg.Left_IC_Int_R8R9_elem7;
      #endif
        AnyRefNode &Ins = .InsertionSegment.IC_Int_R8R9_elem7;
        AnyMuscleModel MusMdl = {
          F0=..MuscleModel.F0/..NumberOfElements;
          Lf0=..MuscleModel.F0;
          Vol0=..MuscleModel.Vol0/..NumberOfElements;
        };
        viewMuscle = {#include "../DrawSettings/MusDrawSettings.any"};
      };
    };

    Muscle_template_Simple IC_Ext_R9R10 (
      CREATE_ELEMENTS=7,
      OriginSegment=....Segments.Left.R9Seg,
      ORIGIN_POINTS=....ModelParameters.R9.Left.IC_R9_Ext_Inf.Points,
      InsertionSegment=....Segments.Left.R10Seg,
      INSERTION_POINTS=....ModelParameters.R10.Left.IC_R10_Ext_Sup.Points,
      MUSCLE_MODEL_PARAMETERS=....MuscleModels.Left.InterCostalis.IC_Ext_R9R10
    )={};

    Muscle_template_Simple IC_Int_R9R10 (
      CREATE_ELEMENTS=7,
      OriginSegment=....Segments.Left.R9Seg,
      ORIGIN_POINTS=....ModelParameters.R9.Left.IC_R9_Int_Inf.Points,
      InsertionSegment=....Segments.Left.R10Seg,
      INSERTION_POINTS=....ModelParameters.R10.Left.IC_R10_Int_Sup.Points,
      MUSCLE_MODEL_PARAMETERS=....MuscleModels.Left.InterCostalis.IC_Int_R9R10
    )={
      NumberOfElements = 8;
      AnyMuscleViaPoint elem8= {
      #if BM_TRUNK_THORACIC_STERNUM_TOPOLOGY == 4
        AnyRefNode &Org = .....Segments.Left.CostalCartilageSeg.Left_IC_Int_R9R10_elem7;
      #else
        AnyRefNode &Org = .....Segments.SternalBodySeg.Left_IC_Int_R9R10_elem7;
      #endif
        AnyRefNode &Ins = .InsertionSegment.IC_Int_R9R10_elem7;
        AnyMuscleModel MusMdl = {
          F0=..MuscleModel.F0/..NumberOfElements;
          Lf0=..MuscleModel.F0;
          Vol0=..MuscleModel.Vol0/..NumberOfElements;
        };
        viewMuscle = {#include "../DrawSettings/MusDrawSettings.any"};
      };
    };

    Muscle_template_Simple IC_Ext_R10R11 (
      CREATE_ELEMENTS=7,
      OriginSegment=....Segments.Left.R10Seg,
      ORIGIN_POINTS=....ModelParameters.R10.Left.IC_R10_Ext_Inf.Points,
      InsertionSegment=....Segments.Left.R11Seg,
      INSERTION_POINTS=....ModelParameters.R11.Left.IC_R11_Ext_Sup.Points,
      MUSCLE_MODEL_PARAMETERS=....MuscleModels.Left.InterCostalis.IC_Ext_R10R11
    )={};

    Muscle_template_Simple IC_Int_R10R11 (
      CREATE_ELEMENTS=7,
      OriginSegment=....Segments.Left.R10Seg,
      ORIGIN_POINTS=....ModelParameters.R10.Left.IC_R10_Int_Inf.Points,
      InsertionSegment=....Segments.Left.R11Seg,
      INSERTION_POINTS=....ModelParameters.R11.Left.IC_R11_Int_Sup.Points,
      MUSCLE_MODEL_PARAMETERS=....MuscleModels.Left.InterCostalis.IC_Int_R10R11
    )={};

    Muscle_template_Simple IC_Ext_R11R12 (
      CREATE_ELEMENTS=5,
      OriginSegment=....Segments.Left.R11Seg,
      ORIGIN_POINTS=....ModelParameters.R11.Left.IC_R11_Ext_Inf.Points,
      InsertionSegment=....Segments.Left.R12Seg,
      INSERTION_POINTS=....ModelParameters.R12.Left.IC_R12_Ext_Sup.Points,
      MUSCLE_MODEL_PARAMETERS=....MuscleModels.Left.InterCostalis.IC_Ext_R11R12
    )={};

    Muscle_template_Simple IC_Int_R11R12 (
      CREATE_ELEMENTS=5,
      OriginSegment=....Segments.Left.R11Seg,
      ORIGIN_POINTS=....ModelParameters.R11.Left.IC_R11_Int_Inf.Points,
      InsertionSegment=....Segments.Left.R12Seg,
      INSERTION_POINTS=....ModelParameters.R12.Left.IC_R12_Int_Sup.Points,
      MUSCLE_MODEL_PARAMETERS=....MuscleModels.Left.InterCostalis.IC_Int_R11R12
    )={};
  };
#endif

AnyFolder LevatorCostarum = {

  AnyMuscleViaPoint LCBrC7R1 = {
    AnyMuscleModel &MusMdl = ....MuscleModels.Left.LevatorCostarum.LCModel_1;
    AnyRefNode &S4 = ....Segments.C7Seg.LCBrC7R1LOrg;
    AnyRefNode &R1 = ....Segments.Left.R1Seg.LCBrC7R1_L_Ins;
    viewMuscle = {#include "../drawSettings/MusDrawSettings.any"};
    viewForce.Visible ??= Off;
  };

  AnyMuscleViaPoint LCBrT1R2 = {
    AnyMuscleModel &MusMdl = ....MuscleModels.Left.LevatorCostarum.LCModel_2;
    AnyRefNode &S4 = ....Segments.T1Seg.LCBrT1R2LOrg;
    AnyRefNode &R1 = ....Segments.Left.R2Seg.LCBrT1R2_L_Ins;
    viewMuscle = {#include "../drawSettings/MusDrawSettings.any"};
    viewForce.Visible ??= Off;
  };

  AnyMuscleViaPoint LCBrT2R3 = {
    AnyMuscleModel &MusMdl = ....MuscleModels.Left.LevatorCostarum.LCModel_3;
    AnyRefNode &S4 = ....Segments.T2Seg.LCBrT2R3LOrg;
    AnyRefNode &R1 = ....Segments.Left.R3Seg.LCBrT2R3_L_Ins;
    viewMuscle = {#include "../drawSettings/MusDrawSettings.any"};
    viewForce.Visible ??= Off;
  };

  AnyMuscleViaPoint LCBrT3R4 = {
    AnyMuscleModel &MusMdl = ....MuscleModels.Left.LevatorCostarum.LCModel_4;
    AnyRefNode &S4 = ....Segments.T3Seg.LCBrT3R4LOrg;
    AnyRefNode &R1 = ....Segments.Left.R4Seg.LCBrT3R4_L_Ins;
    viewMuscle = {#include "../drawSettings/MusDrawSettings.any"};
    viewForce.Visible ??= Off;
  };

  AnyMuscleViaPoint LCBrT4R5 = {
    AnyMuscleModel &MusMdl = ....MuscleModels.Left.LevatorCostarum.LCModel_5;
    AnyRefNode &S4 = ....Segments.T4Seg.LCBrT4R5LOrg;
    AnyRefNode &R1 = ....Segments.Left.R5Seg.LCBrT4R5_L_Ins;
    viewMuscle = {#include "../drawSettings/MusDrawSettings.any"};
    viewForce.Visible ??= Off;
  };

  AnyMuscleViaPoint LCBrT5R6 = {
    AnyMuscleModel &MusMdl = ....MuscleModels.Left.LevatorCostarum.LCModel_6;
    AnyRefNode &S4 = ....Segments.T5Seg.LCBrT5R6LOrg;
    AnyRefNode &R1 = ....Segments.Left.R6Seg.LCBrT5R6_L_Ins;
    viewMuscle = {#include "../drawSettings/MusDrawSettings.any"};
    viewForce.Visible ??= Off;
  };

  AnyMuscleViaPoint LCBrT6R7 = {
    AnyMuscleModel &MusMdl = ....MuscleModels.Left.LevatorCostarum.LCModel_7;
    AnyRefNode &S4 = ....Segments.T6Seg.LCBrT6R7LOrg;
    AnyRefNode &R1 = ....Segments.Left.R7Seg.LCBrT6R7_L_Ins;
    viewMuscle = {#include "../drawSettings/MusDrawSettings.any"};
    viewForce.Visible ??= Off;
  };

  AnyMuscleViaPoint LCBrT7R8 = {
    AnyMuscleModel &MusMdl = ....MuscleModels.Left.LevatorCostarum.LCModel_8;
    AnyRefNode &S4 = ....Segments.T7Seg.LCBrT7R8LOrg;
    AnyRefNode &R1 = ....Segments.Left.R8Seg.LCBrT7R8_L_Ins;
    viewMuscle = {#include "../drawSettings/MusDrawSettings.any"};
    viewForce.Visible ??= Off;
  };

  AnyMuscleViaPoint LCBrT8R9 = {
    AnyMuscleModel &MusMdl = ....MuscleModels.Left.LevatorCostarum.LCModel_9;
    AnyRefNode &S4 = ....Segments.T8Seg.LCBrT8R9LOrg;
    AnyRefNode &R1 = ....Segments.Left.R9Seg.LCBrT8R9_L_Ins;
    viewMuscle = {#include "../drawSettings/MusDrawSettings.any"};
    viewForce.Visible ??= Off;
  };

  AnyMuscleViaPoint LCBrT9R10 = {
    AnyMuscleModel &MusMdl = ....MuscleModels.Left.LevatorCostarum.LCModel_10;
    AnyRefNode &S4 = ....Segments.T9Seg.LCBrT9R10LOrg;
    AnyRefNode &R1 = ....Segments.Left.R10Seg.LCBrT9R10_L_Ins;
    viewMuscle = {#include "../drawSettings/MusDrawSettings.any"};
    viewForce.Visible ??= Off;
  };

  AnyMuscleViaPoint LCBrT10R11 = {
    AnyMuscleModel &MusMdl = ....MuscleModels.Left.LevatorCostarum.LCModel_11;
    AnyRefNode &S4 = ....Segments.T10Seg.LCBrT10R11LOrg;
    AnyRefNode &R1 = ....Segments.Left.R11Seg.LCBrT10R11_L_Ins;
    viewMuscle = {#include "../drawSettings/MusDrawSettings.any"};
    viewForce.Visible ??= Off;
  };

  AnyMuscleViaPoint LCBrT11R12 = {
    AnyMuscleModel &MusMdl = ....MuscleModels.Left.LevatorCostarum.LCModel_12;
    AnyRefNode &S4 = ....Segments.T11Seg.LCBrT11R12LOrg;
    AnyRefNode &R1 = ....Segments.Left.R12Seg.LCBrT11R12_L_Ins;
    viewMuscle = {#include "../drawSettings/MusDrawSettings.any"};
    viewForce.Visible ??= Off;
  };

  // LONGUS
  AnyMuscleViaPoint LCLgT5R7 = {
    AnyMuscleModel &MusMdl = ....MuscleModels.Left.LevatorCostarum.LCModel_13;
    AnyRefNode &S4 = ....Segments.T5Seg.LCLgT5R7LOrg;
    AnyRefNode &R1 = ....Segments.Left.R7Seg.LCLgT5R7_L_Ins;
    viewMuscle = {#include "../drawSettings/MusDrawSettings.any"};
    viewForce.Visible ??= Off;
  };

  AnyMuscleViaPoint LCLgT6R8 = {
    AnyMuscleModel &MusMdl = ....MuscleModels.Left.LevatorCostarum.LCModel_14;
    AnyRefNode &S4 = ....Segments.T6Seg.LCLgT6R8LOrg;
    AnyRefNode &R1 = ....Segments.Left.R8Seg.LCLgT6R8_L_Ins;
    viewMuscle = {#include "../drawSettings/MusDrawSettings.any"};
    viewForce.Visible ??= Off;
  };

  AnyMuscleViaPoint LCLgT7R9 = {
    AnyMuscleModel &MusMdl = ....MuscleModels.Left.LevatorCostarum.LCModel_15;
    AnyRefNode &S4 = ....Segments.T7Seg.LCLgT7R9LOrg;
    AnyRefNode &R1 = ....Segments.Left.R9Seg.LCLgT7R9_L_Ins;
    viewMuscle = {#include "../drawSettings/MusDrawSettings.any"};
    viewForce.Visible ??= Off;
  };

  AnyMuscleViaPoint LCLgT8R10 = {
    AnyMuscleModel &MusMdl = ....MuscleModels.Left.LevatorCostarum.LCModel_16;
    AnyRefNode &S4 = ....Segments.T8Seg.LCLgT8R10LOrg;
    AnyRefNode &R1 = ....Segments.Left.R10Seg.LCLgT8R10_L_Ins;
    viewMuscle = {#include "../drawSettings/MusDrawSettings.any"};
    viewForce.Visible ??= Off;
  };

  AnyMuscleViaPoint LCLgT9R11 = {
    AnyMuscleModel &MusMdl = ....MuscleModels.Left.LevatorCostarum.LCModel_17;
    AnyRefNode &S4 = ....Segments.T9Seg.LCLgT9R11LOrg;
    AnyRefNode &R1 = ....Segments.Left.R11Seg.LCLgT9R11_L_Ins;
    viewMuscle = {#include "../drawSettings/MusDrawSettings.any"};
    viewForce.Visible ??= Off;
  };

  AnyMuscleViaPoint LCLgT10R12 = {
    AnyMuscleModel &MusMdl = ....MuscleModels.Left.LevatorCostarum.LCModel_18;
    AnyRefNode &S4 = ....Segments.T10Seg.LCLgT10R12LOrg;
    AnyRefNode &R1 = ....Segments.Left.R12Seg.LCLgT10R12_L_Ins;
    viewMuscle = {#include "../drawSettings/MusDrawSettings.any"};
    viewForce.Visible ??= Off;
  };
};

AnyFolder LongissimusCapitis = {
  AnyMuscleViaPoint LongissimusCapitisC3C0 = {
    AnyMuscleModel &MusMdl = ....MuscleModels.Left.Longissimus.LongissimusCapitisC3C0;
    AnyRefNode &Org = ....Segments.C3Seg.LongissimusCapitisC3C0NodeL;
    AnyRefNode &Ins = ....Segments.SkullSeg.LongissimusCapitisNodeL;
    viewMuscle = {#include "../drawSettings/MusDrawSettings.any"};
    viewForce.Visible ??= Off;
  };
  AnyMuscleViaPoint LongissimusCapitisC4C0 = {
    AnyMuscleModel &MusMdl = ....MuscleModels.Left.Longissimus.LongissimusCapitisC4C0;
    AnyRefNode &Org = ....Segments.C4Seg.LongissimusCapitisC4C0NodeL;
    AnyRefNode &Ins = ....Segments.SkullSeg.LongissimusCapitisNodeL;
    viewMuscle = {#include "../drawSettings/MusDrawSettings.any"};
    viewForce.Visible ??= Off;
  };
  AnyMuscleViaPoint LongissimusCapitisC5C0 = {
    AnyMuscleModel &MusMdl = ....MuscleModels.Left.Longissimus.LongissimusCapitisC5C0;
    AnyRefNode &Org = ....Segments.C5Seg.LongissimusCapitisC5C0NodeL;
    AnyRefNode &Ins = ....Segments.SkullSeg.LongissimusCapitisNodeL;
    viewMuscle = {#include "../drawSettings/MusDrawSettings.any"};
    viewForce.Visible ??= Off;
  };
  AnyMuscleViaPoint LongissimusCapitisC6C0 = {
    AnyMuscleModel &MusMdl = ....MuscleModels.Left.Longissimus.LongissimusCapitisC6C0;
    AnyRefNode &Org = ....Segments.C6Seg.LongissimusCapitisC6C0NodeL;
    AnyRefNode &Ins = ....Segments.SkullSeg.LongissimusCapitisNodeL;
    viewMuscle = {#include "../drawSettings/MusDrawSettings.any"};
    viewForce.Visible ??= Off;
  };
  AnyMuscleViaPoint LongissimusCapitisC7C0 = {
    AnyMuscleModel &MusMdl = ....MuscleModels.Left.Longissimus.LongissimusCapitisC7C0;
    AnyRefNode &Org = ....Segments.C7Seg.LongissimusCapitisC7C0NodeL;
    AnyRefNode &Ins = ....Segments.SkullSeg.LongissimusCapitisNodeL;
    viewMuscle = {#include "../drawSettings/MusDrawSettings.any"};
    viewForce.Visible ??= Off;
  };
  AnyMuscleViaPoint LongissimusCapitisT1C0 = {
    AnyMuscleModel &MusMdl = ....MuscleModels.Left.Longissimus.LongissimusCapitisT1C0;
    AnyRefNode &Org = ....Segments.T1Seg.Left.LongissimusCapitisT1C0Node;
    AnyRefNode &Ins = ....Segments.SkullSeg.LongissimusCapitisNodeL;
    viewMuscle = {#include "../drawSettings/MusDrawSettings.any"};
    viewForce.Visible ??= Off;
  };
  AnyMuscleViaPoint LongissimusCapitisT2C0 = {
    AnyMuscleModel &MusMdl = ....MuscleModels.Left.Longissimus.LongissimusCapitisT2C0;
    AnyRefNode &Org = ....Segments.T2Seg.Left.LongissimusCapitisT2C0Node;
    AnyRefNode &Ins = ....Segments.SkullSeg.LongissimusCapitisNodeL;
    viewMuscle = {#include "../drawSettings/MusDrawSettings.any"};
    viewForce.Visible ??= Off;
  };
  AnyMuscleViaPoint LongissimusCapitisT3C0 = {
    AnyMuscleModel &MusMdl = ....MuscleModels.Left.Longissimus.LongissimusCapitisT3C0;
    AnyRefNode &Org = ....Segments.T3Seg.Left.LongissimusCapitisT3C0Node;
    AnyRefNode &Ins = ....Segments.SkullSeg.LongissimusCapitisNodeL;
    viewMuscle = {#include "../drawSettings/MusDrawSettings.any"};
    viewForce.Visible ??= Off;
  };
  AnyMuscleViaPoint LongissimusCapitisT4C0 = {
    AnyMuscleModel &MusMdl = ....MuscleModels.Left.Longissimus.LongissimusCapitisT4C0;
    AnyRefNode &Org = ....Segments.T4Seg.Left.LongissimusCapitisT4C0Node;
    AnyRefNode &Ins = ....Segments.SkullSeg.LongissimusCapitisNodeL;
    viewMuscle = {#include "../drawSettings/MusDrawSettings.any"};
    viewForce.Visible ??= Off;
  };
  AnyMuscleViaPoint LongissimusCapitisT5C0 = {
    AnyMuscleModel &MusMdl = ....MuscleModels.Left.Longissimus.LongissimusCapitisT5C0;
    AnyRefNode &Org = ....Segments.T5Seg.Left.LongissimusCapitisT5C0Node;
    AnyRefNode &Ins = ....Segments.SkullSeg.LongissimusCapitisNodeL;
    viewMuscle = {#include "../drawSettings/MusDrawSettings.any"};
    viewForce.Visible ??= Off;
  };
};

AnyFolder LongissimusCervicis = {
  AnyMuscleViaPoint LongissimusCervicisT1C2 = {
    AnyMuscleModel &MusMdl = ....MuscleModels.Left.Longissimus.LongissimusCervicisT1C2;
    AnyRefNode &Org = ....Segments.T1Seg.Left.LongissimusCervicisT1Node;
    AnyRefNode &Ins = ....Segments.C2Seg.Left.LongissimusCervicisT1C2Node;
    viewMuscle = {#include "../drawSettings/MusDrawSettings.any"};
    viewForce.Visible ??= Off;
  };

  AnyMuscleViaPoint LongissimusCervicisT2C3 = {
    AnyMuscleModel &MusMdl = ....MuscleModels.Left.Longissimus.LongissimusCervicisT2C3;
    AnyRefNode &Org = ....Segments.T2Seg.Left.LongissimusCervicisT2Node;
    AnyRefNode &Ins = ....Segments.C3Seg.Left.LongissimusCervicisT2C3Node;
    viewMuscle = {#include "../drawSettings/MusDrawSettings.any"};
    viewForce.Visible ??= Off;
  };

  AnyMuscleViaPoint LongissimusCervicisT3C4 = {
    AnyMuscleModel &MusMdl = ....MuscleModels.Left.Longissimus.LongissimusCervicisT3C4;
    AnyRefNode &Org = ....Segments.T3Seg.Left.LongissimusCervicisT3Node;
    AnyRefNode &Ins = ....Segments.C4Seg.Left.LongissimusCervicisT3C4Node;
    viewMuscle = {#include "../drawSettings/MusDrawSettings.any"};
    viewForce.Visible ??= Off;
  };

  AnyMuscleViaPoint LongissimusCervicisT4C5 = {
    AnyMuscleModel &MusMdl = ....MuscleModels.Left.Longissimus.LongissimusCervicisT4C5;
    AnyRefNode &Org = ....Segments.T4Seg.Left.LongissimusCervicisT4Node;
    AnyRefNode &Ins = ....Segments.C5Seg.Left.LongissimusCervicisT4C5Node;
    viewMuscle = {#include "../drawSettings/MusDrawSettings.any"};
    viewForce.Visible ??= Off;
  };

  AnyMuscleViaPoint LongissimusCervicisT5C6 = {
    AnyMuscleModel &MusMdl = ....MuscleModels.Left.Longissimus.LongissimusCervicisT5C6;
    AnyRefNode &Org = ....Segments.T5Seg.Left.LongissimusCervicisT5Node;
    AnyRefNode &Ins = ....Segments.C6Seg.Left.LongissimusCervicisT5C6Node;
    viewMuscle = {#include "../drawSettings/MusDrawSettings.any"};
    viewForce.Visible ??= Off;
  };
};

AnyFolder LongusCapitis = {
  AnyMuscleViaPoint LongusCapitisC6C0 = {
    AnyMuscleModel &MusMdl = ....MuscleModels.Left.Longus.LongusCapitisC6C0;
    AnyRefNode &Org = ....Segments.C6Seg.LongusCapitisC6C0NodeL;
    AnyRefNode &Ins = ....Segments.SkullSeg.LongusCapitisC0NodeL;
    viewMuscle = {#include "../drawSettings/MusDrawSettings.any"};
    viewForce.Visible ??= Off;
  };

  AnyMuscleViaPoint LongusCapitisC5C0 = {
    AnyMuscleModel &MusMdl = ....MuscleModels.Left.Longus.LongusCapitisC5C0;
    AnyRefNode &Org = ....Segments.C5Seg.LongusCapitisC5C0NodeL;
    AnyRefNode &Ins = ....Segments.SkullSeg.LongusCapitisC0NodeL;
    viewMuscle = {#include "../drawSettings/MusDrawSettings.any"};
    viewForce.Visible ??= Off;
  };

  AnyMuscleViaPoint LongusCapitisC4C0 = {
    AnyMuscleModel &MusMdl = ....MuscleModels.Left.Longus.LongusCapitisC4C0;
    AnyRefNode &Org = ....Segments.C4Seg.LongusCapitisC4C0NodeL;
    AnyRefNode &Ins = ....Segments.SkullSeg.LongusCapitisC0NodeL;
    viewMuscle = {#include "../drawSettings/MusDrawSettings.any"};
    viewForce.Visible ??= Off;
  };

  AnyMuscleViaPoint LongusCapitisC3C0 = {
    AnyMuscleModel &MusMdl = ....MuscleModels.Left.Longus.LongusCapitisC3C0;
    AnyRefNode &Org = ....Segments.C3Seg.LongusCapitisC3C0NodeL;
    AnyRefNode &Ins = ....Segments.SkullSeg.LongusCapitisC0NodeL;
    viewMuscle = {#include "../drawSettings/MusDrawSettings.any"};
    viewForce.Visible ??= Off;
  };
};

AnyFolder LongusColli = {
  AnyMuscleViaPoint LongusColliT3C6 = {
    AnyMuscleModel &MusMdl = ....MuscleModels.Left.Longus.LongusColliT3C6;
    AnyRefNode &Org = ....Segments.T3Seg.Left.LongusColliT3C6Node;
    AnyRefNode &Via1 = ....Segments.T2Seg.Left.LongusColliT3C6Node;
    AnyRefNode &Via2 = ....Segments.T1Seg.Left.LongusColliT3C6Node;
    AnyRefNode &Via3 = ....Segments.C7Seg.Left.LongusColliT3C6Node;
    AnyRefNode &Ins = ....Segments.C6Seg.Left.LongusColliT3C6Node;
    viewMuscle = {#include "../drawSettings/MusDrawSettings.any"};
    viewForce.Visible ??= Off;
  };
    AnyMuscleViaPoint LongusColliT2C5 = {
    AnyMuscleModel &MusMdl = ....MuscleModels.Left.Longus.LongusColliT2C5;
    AnyRefNode &Org = ....Segments.T2Seg.Left.LongusColliT2C5Node;
    AnyRefNode &Via1 = ....Segments.T1Seg.Left.LongusColliT2C5Node;
    AnyRefNode &Via2 = ....Segments.C7Seg.Left.LongusColliT2C5Node;
    AnyRefNode &Via3 = ....Segments.C6Seg.Left.LongusColliT2C5Node;
    AnyRefNode &Ins = ....Segments.C5Seg.Left.LongusColliT2C5Node;
    viewMuscle = {#include "../drawSettings/MusDrawSettings.any"};
    viewForce.Visible ??= Off;
  };
  AnyMuscleViaPoint LongusColliT1C4 = {
    AnyMuscleModel &MusMdl = ....MuscleModels.Left.Longus.LongusColliT1C4;
    AnyRefNode &Org = ....Segments.T1Seg.Left.LongusColliT1C4Node;
    AnyRefNode &Via1 = ....Segments.C7Seg.Left.LongusColliT1C4Node;
    AnyRefNode &Via2 = ....Segments.C6Seg.Left.LongusColliT1C4Node;
    AnyRefNode &Via3 = ....Segments.C5Seg.Left.LongusColliT1C4Node;
    AnyRefNode &Ins = ....Segments.C4Seg.Left.LongusColliT1C4Node;
    viewMuscle = {#include "../drawSettings/MusDrawSettings.any"};
    viewForce.Visible ??= Off;
  };
  AnyMuscleViaPoint LongusColliC7C3 = {
    AnyMuscleModel &MusMdl = ....MuscleModels.Left.Longus.LongusColliC7C3;
    AnyRefNode &Org = ....Segments.C7Seg.Left.LongusColliC7C3Node;
    AnyRefNode &Via1 = ....Segments.C6Seg.Left.LongusColliC7C3Node;
    AnyRefNode &Via2 = ....Segments.C5Seg.Left.LongusColliC7C3Node;
    AnyRefNode &Via3 = ....Segments.C4Seg.Left.LongusColliC7C3Node;
    AnyRefNode &Ins = ....Segments.C3Seg.Left.LongusColliC7C3Node;
    viewMuscle = {#include "../drawSettings/MusDrawSettings.any"};
    viewForce.Visible ??= Off;
  };
  AnyMuscleViaPoint LongusColliC6C2 = {
    AnyMuscleModel &MusMdl = ....MuscleModels.Left.Longus.LongusColliC6C2;
    AnyRefNode &Org = ....Segments.C6Seg.Left.LongusColliC6C2Node;
    AnyRefNode &Via1 = ....Segments.C5Seg.Left.LongusColliC6C2Node;
    AnyRefNode &Via2 = ....Segments.C4Seg.Left.LongusColliC6C2Node;
    AnyRefNode &Via3 = ....Segments.C3Seg.Left.LongusColliC6C2Node;
    AnyRefNode &Ins = ....Segments.C2Seg.Left.LongusColliC6C2Node;
    viewMuscle = {#include "../drawSettings/MusDrawSettings.any"};
    viewForce.Visible ??= Off;
  };
  AnyMuscleViaPoint LongusColliC5C1 = {
    AnyMuscleModel &MusMdl = ....MuscleModels.Left.Longus.LongusColliC5C1;
    AnyRefNode &Org = ....Segments.C5Seg.Left.LongusColliC5C1Node;
    AnyRefNode &Via1 = ....Segments.C4Seg.Left.LongusColliC5C1Node;
    AnyRefNode &Via2 = ....Segments.C3Seg.Left.LongusColliC5C1Node;
    AnyRefNode &Via3 = ....Segments.C2Seg.Left.LongusColliC5C1Node;
    AnyRefNode &Ins = ....Segments.C1Seg.Left.LongusColliC5C1Node;
    viewMuscle = {#include "../drawSettings/MusDrawSettings.any"};
    viewForce.Visible ??= Off;
  };
};

AnyFolder Multifidi = {
  AnyMuscleViaPoint MFdL1L3 = {
      AnyMuscleModel &MusMdl = ....MuscleModels.Left.Multifidi.MFdL1L3;
      AnyRefNode &Org = ....Segments.L1Seg.MFdL1L3NodeL;
      AnyRefNode &Ins = ....Segments.L3Seg.MFdL1L3NodeL;
      viewMuscle = {#include "../drawSettings/MusDrawSettings.any"};
      viewForce.Visible ??= Off;
  };

  AnyMuscleViaPoint MFdL2L4 = {
      AnyMuscleModel &MusMdl = ....MuscleModels.Left.Multifidi.MFdL2L4;
      AnyRefNode &Org = ....Segments.L2Seg.MFdL2L4NodeL;
      AnyRefNode &Ins = ....Segments.L4Seg.MFdL2L4NodeL;
      viewMuscle = {#include "../drawSettings/MusDrawSettings.any"};
      viewForce.Visible ??= Off;
  };

  AnyMuscleViaPoint MFdL3L5 = {
      AnyMuscleModel &MusMdl = ....MuscleModels.Left.Multifidi.MFdL3L5;
      AnyRefNode &Org = ....Segments.L3Seg.MFdL3L5NodeL;
      AnyRefNode &Ins = ....Segments.L5Seg.MFdL3L5NodeL;
      viewMuscle = {#include "../drawSettings/MusDrawSettings.any"};
      viewForce.Visible ??= Off;
  };

  AnyMuscleViaPoint MFdL4S1 = {
      AnyMuscleModel &MusMdl = ....MuscleModels.Left.Multifidi.MFdL4S1;
      AnyRefNode &Org = ....Segments.L4Seg.MFdL4S1NodeL;
      AnyRefNode &Ins = ....Segments.SacrumSeg.MFdL4S1NodeL;
      viewMuscle = {#include "../drawSettings/MusDrawSettings.any"};
      viewForce.Visible ??= Off;
  };

  AnyMuscleViaPoint MFdL5S1 = {
      AnyMuscleModel &MusMdl = ....MuscleModels.Left.Multifidi.MFdL5S1;
      AnyRefNode &Org = ....Segments.L5Seg.MFdL5S1NodeL;
      AnyRefNode &Ins = ....Segments.SacrumSeg.MFdL5S1NodeL;
      viewMuscle = {#include "../drawSettings/MusDrawSettings.any"};
      viewForce.Visible ??= Off;
  };

  AnyMuscleViaPoint MFmL1L4 = {
    AnyMuscleModel &MusMdl = ....MuscleModels.Left.Multifidi.MFmL1L4;
    AnyRefNode &Org = ....Segments.L1Seg.MFmL1L4NodeL;
    AnyRefNode &Ins = ....Segments.L4Seg.MFmL1L4NodeL;
    viewMuscle = {#include "../drawSettings/MusDrawSettings.any"};
    viewForce.Visible ??= Off;
  };

  AnyMuscleViaPoint MFmL2L5 = {
      AnyMuscleModel &MusMdl = ....MuscleModels.Left.Multifidi.MFmL2L5;
      AnyRefNode &Org = ....Segments.L2Seg.MFmL2L5NodeL;
      AnyRefNode &Ins = ....Segments.L5Seg.MFmL2L5NodeL;
      viewMuscle = {#include "../drawSettings/MusDrawSettings.any"};
      viewForce.Visible ??= Off;
  };

  AnyMuscleViaPoint MFmL3S1 = {
      AnyMuscleModel &MusMdl = ....MuscleModels.Left.Multifidi.MFmL3S1;
      AnyRefNode &Org = ....Segments.L3Seg.MFmL3S1NodeL;
      AnyRefNode &Ins = ....Segments.SacrumSeg.MFmL3S1NodeL;
      viewMuscle = {#include "../drawSettings/MusDrawSettings.any"};
      viewForce.Visible ??= Off;
  };

  AnyMuscleViaPoint MFmL4Sacrum = {
      AnyMuscleModel &MusMdl = ....MuscleModels.Left.Multifidi.MFmL4Sacrum;
      AnyRefNode &Org = ....Segments.L4Seg.MFmL4SacrumNodeL;
      AnyRefNode &Ins = ....Segments.SacrumSeg.MFmL4SacrumNodeL;
      viewMuscle = {#include "../drawSettings/MusDrawSettings.any"};
      viewForce.Visible ??= Off;
  };

  AnyMuscleViaPoint MFmL5Sacrum = {
      AnyMuscleModel &MusMdl = ....MuscleModels.Left.Multifidi.MFmL5Sacrum;
      AnyRefNode &Org = ....Segments.L5Seg.MFmL5SacrumNodeL;
      AnyRefNode &Ins = ....Segments.SacrumSeg.MFmL5SacrumNodeL;
      viewMuscle = {#include "../drawSettings/MusDrawSettings.any"};
      viewForce.Visible ??= Off;
  };

  AnyMuscleViaPoint MFtsL1L5 = {
      AnyMuscleModel &MusMdl = ....MuscleModels.Left.Multifidi.MFtsL1L5;
      AnyRefNode &Org = ....Segments.L1Seg.MFtsL1L5NodeL;
      AnyRefNode &Ins = ....Segments.L5Seg.MFtsL1L5NodeL;
      viewMuscle = {#include "../drawSettings/MusDrawSettings.any"};
      viewForce.Visible ??= Off;
  };

  AnyMuscleViaPoint MFtsL1S1 = {
      AnyMuscleModel &MusMdl = ....MuscleModels.Left.Multifidi.MFtsL1S1;
      AnyRefNode &Org = ....Segments.L1Seg.MFtsL1S1NodeL;
      AnyRefNode &Ins = ....Segments.SacrumSeg.MFtsL1S1NodeL;
      viewMuscle = {#include "../drawSettings/MusDrawSettings.any"};
      viewForce.Visible ??= Off;
  };

  AnyMuscleViaPoint MFtsL2L5 = {
      AnyMuscleModel &MusMdl = ....MuscleModels.Left.Multifidi.MFtsL2L5;
      AnyRefNode &Org = ....Segments.L2Seg.MFtsL2L5NodeL;
      AnyRefNode &Ins = ....Segments.L5Seg.MFtsL2L5NodeL;
      viewMuscle = {#include "../drawSettings/MusDrawSettings.any"};
      viewForce.Visible ??= Off;
  };

  AnyMuscleViaPoint MFtsL2S1 = {
      AnyMuscleModel &MusMdl = ....MuscleModels.Left.Multifidi.MFtsL2S1;
      AnyRefNode &Org = ....Segments.L2Seg.MFtsL2S1NodeL;
      AnyRefNode &Ins = ....Segments.SacrumSeg.MFtsL2S1NodeL;
      viewMuscle = {#include "../drawSettings/MusDrawSettings.any"};
      viewForce.Visible ??= Off;
  };

  AnyMuscleViaPoint MFtsL3Ligament = {
      AnyMuscleModel &MusMdl = ....MuscleModels.Left.Multifidi.MFtsL3Ligament;
      AnyRefNode &Org = ....Segments.L3Seg.MFtsL3LigamentNodeL;
      AnyRefNode &Via = ....Segments.SacrumSeg.MFtsL3LigamentNodeViaL;
      AnyRefNode &Ins = ....Segments.SacrumSeg.MFtsL3LigamentNodeL;
      viewMuscle = {#include "../drawSettings/MusDrawSettings.any"};
      viewForce.Visible ??= Off;
  };

  AnyMuscleViaPoint MFtsL4Sacrum = {
      AnyMuscleModel &MusMdl = ....MuscleModels.Left.Multifidi.MFtsL4Sacrum;
      AnyRefNode &Org = ....Segments.L4Seg.MFtsL4SacrumNodeL;
      AnyRefNode &Via = ....Segments.SacrumSeg.MFtsL4SacrumViaNodeL;
      AnyRefNode &Ins = ....Segments.SacrumSeg.MFtsL4SacrumNodeL;
      viewMuscle = {#include "../drawSettings/MusDrawSettings.any"};
      viewForce.Visible ??= Off;
  };

  AnyMuscleViaPoint MFtsL5Sacrum = {
      AnyMuscleModel &MusMdl = ....MuscleModels.Left.Multifidi.MFtsL5Sacrum;
      AnyRefNode &Org = ....Segments.L5Seg.MFtsL5SacrumNodeL;
      AnyRefNode &Via = ....Segments.SacrumSeg.MFtsL5SacrumViaNodeL;
      AnyRefNode &Ins = ....Segments.SacrumSeg.MFtsL5SacrumNodeL;
      viewMuscle = {#include "../drawSettings/MusDrawSettings.any"};
      viewForce.Visible ??= Off;
  };

  AnyMuscleViaPoint MFtstL1SIPS = {
      AnyMuscleModel &MusMdl = ....MuscleModels.Left.Multifidi.MFtstL1SIPS;
      AnyRefNode &Org = ....Segments.L1Seg.MFtstL1SIPSNodeL;
      AnyRefNode &Via = ....Segments.PelvisSeg.MFtstL1SIPSViaNodeL;
      AnyRefNode &Ins = ....Segments.PelvisSeg.MFtstL1SIPSNodeL;
      viewMuscle = {#include "../drawSettings/MusDrawSettings.any"};
      viewForce.Visible ??= Off;
  };

  AnyMuscleViaPoint MFtstL2SIPS = {
      AnyMuscleModel &MusMdl = ....MuscleModels.Left.Multifidi.MFtstL2SIPS;
      AnyRefNode &Org = ....Segments.L2Seg.MFtstL2SIPSNodeL;
      AnyRefNode &Via = ....Segments.PelvisSeg.MFtstL2SIPSViaNodeL;
      AnyRefNode &Ins = ....Segments.PelvisSeg.MFtstL2SIPSNodeL;
      viewMuscle = {#include "../drawSettings/MusDrawSettings.any"};
      viewForce.Visible ??= Off;
  };
};

AnyFolder MultifidusCervicis = {
  AnyMuscleViaPoint MultifidusCervicisC5C2 = {
    AnyMuscleModel &MusMdl = ....MuscleModels.Left.Multifidi.MultifidusCervicisC5C2;
    AnyRefNode &Org = ....Segments.C5Seg.MultifidusCervicisC5C2NodeL;
    AnyRefNode &Ins = ....Segments.C2Seg.MultifidusCervicisC2NodeL;
    viewMuscle = {#include "../drawSettings/MusDrawSettings.any"};
    viewForce.Visible ??= Off;
  };

  AnyMuscleViaPoint MultifidusCervicisC6C2 = {
    AnyMuscleModel &MusMdl = ....MuscleModels.Left.Multifidi.MultifidusCervicisC6C2;
    AnyRefNode &Org = ....Segments.C6Seg.MultifidusCervicisC6C2NodeL;
    AnyRefNode &Ins = ....Segments.C2Seg.MultifidusCervicisC2NodeL;
    viewMuscle = {#include "../drawSettings/MusDrawSettings.any"};
    viewForce.Visible ??= Off;
  };

  AnyMuscleViaPoint MultifidusCervicisC6C3 = {
    AnyMuscleModel &MusMdl = ....MuscleModels.Left.Multifidi.MultifidusCervicisC6C3;
    AnyRefNode &Org = ....Segments.C6Seg.MultifidusCervicisC6C2NodeL;
    AnyRefNode &Ins = ....Segments.C3Seg.MultifidusCervicisC3NodeL;
    viewMuscle = {#include "../drawSettings/MusDrawSettings.any"};
    viewForce.Visible ??= Off;
  };

  AnyMuscleViaPoint MultifidusCervicisC7C3 = {
    AnyMuscleModel &MusMdl = ....MuscleModels.Left.Multifidi.MultifidusCervicisC7C3;
    AnyRefNode &Org = ....Segments.C7Seg.MultifidusCervicisC7C3NodeL;
    AnyRefNode &Ins = ....Segments.C3Seg.MultifidusCervicisC3NodeL;
    viewMuscle = {#include "../drawSettings/MusDrawSettings.any"};
    viewForce.Visible ??= Off;
  };

  AnyMuscleViaPoint MultifidusCervicisC7C4 = {
    AnyMuscleModel &MusMdl = ....MuscleModels.Left.Multifidi.MultifidusCervicisC7C4;
    AnyRefNode &Org = ....Segments.C7Seg.MultifidusCervicisC7C4NodeL;
    AnyRefNode &Ins = ....Segments.C4Seg.MultifidusCervicisC4NodeL;
    viewMuscle = {#include "../drawSettings/MusDrawSettings.any"};
    viewForce.Visible ??= Off;
  };

  AnyMuscleViaPoint MultifidusCervicisT1C4 = {
    AnyMuscleModel &MusMdl = ....MuscleModels.Left.Multifidi.MultifidusCervicisT1C4;
    AnyRefNode &Org = ....Segments.T1Seg.MultifidusCervicisT1C4NodeL;
    AnyRefNode &Ins = ....Segments.C4Seg.MultifidusCervicisC4NodeL;
    viewMuscle = {#include "../drawSettings/MusDrawSettings.any"};
    viewForce.Visible ??= Off;
  };

  AnyMuscleViaPoint MultifidusCervicisT1C5 = {
    AnyMuscleModel &MusMdl = ....MuscleModels.Left.Multifidi.MultifidusCervicisT1C5;
    AnyRefNode &Org = ....Segments.T1Seg.MultifidusCervicisT1C5NodeL;
    AnyRefNode &Ins = ....Segments.C5Seg.MultifidusCervicisC5NodeL;
    viewMuscle = {#include "../drawSettings/MusDrawSettings.any"};
    viewForce.Visible ??= Off;
  };

  AnyMuscleViaPoint MultifidusCervicisT2C5 = {
    AnyMuscleModel &MusMdl = ....MuscleModels.Left.Multifidi.MultifidusCervicisT2C5;
    AnyRefNode &Org = ....Segments.T2Seg.MultifidusCervicisT2C5NodeL;
    AnyRefNode &Ins = ....Segments.C5Seg.MultifidusCervicisC5NodeL;
    viewMuscle = {#include "../drawSettings/MusDrawSettings.any"};
    viewForce.Visible ??= Off;
  };

  AnyMuscleViaPoint MultifidusCervicisT2C6 = {
    AnyMuscleModel &MusMdl = ....MuscleModels.Left.Multifidi.MultifidusCervicisT2C6;
    AnyRefNode &Org = ....Segments.T2Seg.MultifidusCervicisT2C6NodeL;
    AnyRefNode &Ins = ....Segments.C6Seg.MultifidusCervicisC6NodeL;
    viewMuscle = {#include "../drawSettings/MusDrawSettings.any"};
    viewForce.Visible ??= Off;
  };

  AnyMuscleViaPoint MultifidusCervicisT3C6 = {
    AnyMuscleModel &MusMdl = ....MuscleModels.Left.Multifidi.MultifidusCervicisT3C6;
    AnyRefNode &Org = ....Segments.T3Seg.MultifidusCervicisT3C6NodeL;
    AnyRefNode &Ins = ....Segments.C6Seg.MultifidusCervicisC6NodeL;
    viewMuscle = {#include "../drawSettings/MusDrawSettings.any"};
    viewForce.Visible ??= Off;
  };

  AnyMuscleViaPoint MultifidusCervicisT3C7 = {
    AnyMuscleModel &MusMdl = ....MuscleModels.Left.Multifidi.MultifidusCervicisT3C7;
    AnyRefNode &Org = ....Segments.T3Seg.MultifidusCervicisT3C7NodeL;
    AnyRefNode &Ins = ....Segments.C7Seg.MultifidusCervicisC7NodeL;
    viewMuscle = {#include "../drawSettings/MusDrawSettings.any"};
    viewForce.Visible ??= Off;
  };

  AnyMuscleViaPoint MultifidusCervicisT4C7 = {
    AnyMuscleModel &MusMdl = ....MuscleModels.Left.Multifidi.MultifidusCervicisT4C7;
    AnyRefNode &Org = ....Segments.T4Seg.MultifidusCervicisT4C7NodeL;
    AnyRefNode &Ins = ....Segments.C7Seg.MultifidusCervicisC7NodeL;
    viewMuscle = {#include "../drawSettings/MusDrawSettings.any"};
    viewForce.Visible ??= Off;
  };
};

AnyFolder ObliquusExternus = {

#if BM_TRUNK_CAVITY_MODEL == _CAVITY_MODEL_VOLUME_
//
AnyMuscleShortestPath OEC_1 = {
  AnyMuscleModel &MusMdl = ....MuscleModels.Left.ObliquusExternus.OEC_1;
  AnyRefNode &Org = ....Segments.Left.R6Seg.ObliquusExternusNode;
  AnyRefNode &Ins = ....Abdominal.Layer_L1.BaseSegAnterior.mid;

  #if BM_TRUNK_THORACIC_STERNUM_TOPOLOGY == 4
  AnyParamSurf &srf1 =....Segments.Left.CostalCartilageSeg.WrappingTorusR10.Surf;
  #else
  AnyParamSurf &srf1 =....Segments.SternalBodySeg.Left.ObliquusWrapping.Surf;
  #endif

  SPLine.StringMesh=10;

  SPLine ={
    AnyMatrix InitWrapPos = {
      transf3D({0,.srf1.MajorRadius+.srf1.MinorRadius, 0}, &.srf1)
    };
    InitWrapPosVecArr = {&InitWrapPos};
  };
  viewMuscle = {#include "../drawSettings/MusDrawSettings.any"};
  viewForce.Visible ??= Off;
};

AnyMuscleShortestPath OEC_2 = {
  AnyMuscleModel &MusMdl = ....MuscleModels.Left.ObliquusExternus.OEC_2;
  AnyRefNode &Org = ....Segments.Left.R7Seg.ObliquusExternusNode;
  AnyRefNode &Ins = ....Abdominal.Layer_L2.BaseSegAnterior.mid;

  #if BM_TRUNK_THORACIC_STERNUM_TOPOLOGY == 4
  AnyParamSurf &srf1 =....Segments.Left.CostalCartilageSeg.WrappingTorusR10.Surf;
  #else
  AnyParamSurf &srf1 =....Segments.SternalBodySeg.Left.ObliquusWrapping.Surf;
  #endif

  SPLine.StringMesh=10;

  SPLine ={
    AnyMatrix InitWrapPos = {
      transf3D({0,.srf1.MajorRadius+.srf1.MinorRadius, 0}, &.srf1)
    };
    InitWrapPosVecArr = {&InitWrapPos};
  };
  viewMuscle = {#include "../drawSettings/MusDrawSettings.any"};
  viewForce.Visible ??= Off;
};


AnyMuscleShortestPath OEC_3 = {
  AnyMuscleModel &MusMdl = ....MuscleModels.Left.ObliquusExternus.OEC_3;
  AnyRefNode &Org = ....Segments.Left.R8Seg.ObliquusExternusNode;
  AnyRefNode &Ins = ....Abdominal.Layer_L3.BaseSegAnterior.mid;

  #if BM_TRUNK_THORACIC_STERNUM_TOPOLOGY == 4
  AnyParamSurf &srf1 =....Segments.Left.CostalCartilageSeg.WrappingTorusR10.Surf;
  #else
  AnyParamSurf &srf1 =....Segments.SternalBodySeg.Left.ObliquusWrapping.Surf;
  #endif

  SPLine.StringMesh=10;

  SPLine ={
    AnyMatrix InitWrapPos = {
      transf3D({0,.srf1.MajorRadius+.srf1.MinorRadius, 0}, &.srf1)
    };
    InitWrapPosVecArr = {&InitWrapPos};
  };
  viewMuscle = {#include "../drawSettings/MusDrawSettings.any"};
  viewForce.Visible ??= Off;
};


AnyMuscleShortestPath OEC_4 = {
  AnyMuscleModel &MusMdl = ....MuscleModels.Left.ObliquusExternus.OEC_4;
  AnyRefNode &Org = ....Segments.Left.R9Seg.ObliquusExternusNode;
  AnyRefNode &Ins = ....Abdominal.Layer_L4.BaseSegAnterior.mid;

  #if BM_TRUNK_THORACIC_STERNUM_TOPOLOGY == 4
  AnyParamSurf &srf1 =....Segments.Left.CostalCartilageSeg.WrappingTorusR10.Surf;
  #else
  AnyParamSurf &srf1 =....Segments.SternalBodySeg.Left.ObliquusWrapping.Surf;
  #endif

  SPLine.StringMesh=100;

  SPLine ={
    AnyMatrix InitWrapPos = {
      transf3D({0,.srf1.MajorRadius+.srf1.MinorRadius, 0}, &.srf1)
    };
    InitWrapPosVecArr = {&InitWrapPos};
  };
  viewMuscle = {#include "../drawSettings/MusDrawSettings.any"};
  viewForce.Visible ??= Off;
};


AnyMuscleShortestPath  OEC_5= {
  AnyMuscleModel &MusMdl = ....MuscleModels.Left.ObliquusExternus.OEC_5;
  AnyRefNode &Org = ....Segments.Left.R9Seg.ObliquusExternusNode_1;
  AnyRefNode &Ins = ....Abdominal.Layer_L5.BaseSegAnterior.mid;

  #if BM_TRUNK_THORACIC_STERNUM_TOPOLOGY == 4
  AnyParamSurf &srf0 =....Segments.Left.CostalCartilageSeg.WrappingTorusR10.Surf;
  #else
  AnyParamSurf &srf0 =....Segments.SternalBodySeg.Left.ObliquusWrapping.Surf;
  #endif
  AnyParamSurf  &srf1 =....Abdominal.ObliquusWrapping.WrappingSeg.Layer4WrappingPoints.Left.nn09.Translate.OutwardCyl;
  AnyParamSurf  &srf2 =....Abdominal.ObliquusWrapping.WrappingSeg.Layer5WrappingPoints.Left.nn10.Translate.OutwardCyl;

  SPLine.StringMesh=100;

  SPLine ={
    AnyMatrix InitWrapPos = {
      transf3D({0,-.srf1.radius, 0.5*.srf1.Length}, &.srf1),
      transf3D({0,-.srf2.radius, 0.5*.srf2.Length}, &.srf2)
    };
    InitWrapPosVecArr = {&InitWrapPos};
  };
  viewMuscle = {#include "../drawSettings/MusDrawSettings.any"};
  viewForce.Visible ??= Off;
};


AnyMuscleShortestPath OEC_6 = {
  AnyMuscleModel &MusMdl = ....MuscleModels.Left.ObliquusExternus.OEC_6;
  AnyRefNode &Org = ....Segments.Left.R10Seg.ObliquusExternusNode_1;
  AnyRefNode &Ins =     ....Abdominal.Layer_Pelvic2.BaseSegAnterior.VolumePoints.Left.nn11;

  // AnyParamSurf &srf1 =....Abdominal.ObliquusWrapping.WrappingSeg.Layer4WrappingPoints.Left.nn09.Translate.VerticalCyl;
  AnyParamSurf &srf2 =....Abdominal.ObliquusWrapping.WrappingSeg.Layer4WrappingPoints.Left.nn10.Translate.OutwardCyl;

  SPLine.StringMesh=100;

  SPLine ={
    AnyMatrix InitWrapPos = {
      // transf3D({0,-.srf1.radius, 0.5*.srf1.Length}, &.srf1),
      transf3D({0,-1.1*.srf2.radius, 0.5*.srf2.Length}, &.srf2),
    };
    InitWrapPosVecArr = {&InitWrapPos};
  };

  viewMuscle = {#include "../drawSettings/MusDrawSettings.any" };
  viewForce.Visible ??= Off;
};


AnyMuscleShortestPath OEC_7 = {
  AnyMuscleModel &MusMdl = ....MuscleModels.Left.ObliquusExternus.OEC_7;
  AnyRefNode &Org = ....Segments.Left.R10Seg.ObliquusExternusNode_2;
  AnyRefNode &Ins =     ....Abdominal.Layer_Pelvic2.BaseSegAnterior.VolumePoints.Left.nn10;

  // AnyParamSurf &srf1 =....Abdominal.ObliquusWrapping.WrappingSeg.Layer4WrappingPoints.Left.nn08.Translate.VerticalCyl;
  AnyParamSurf &srf2 =....Abdominal.ObliquusWrapping.WrappingSeg.Layer4WrappingPoints.Left.nn09.Translate.OutwardCyl;

  SPLine.StringMesh=100;

  SPLine ={
    AnyMatrix InitWrapPos = {
      // transf3D({0,-1.1*.srf1.radius, 0.5*.srf1.Length}, &.srf1),
      transf3D({0,-1.1*.srf2.radius, 0.5*.srf2.Length}, &.srf2),
    };
    InitWrapPosVecArr = {&InitWrapPos};
  };

  viewMuscle = {#include "../drawSettings/MusDrawSettings.any"};
  viewForce.Visible ??= Off;
};


AnyMuscleViaPoint OEC_8= {
  AnyMuscleModel &MusMdl = ....MuscleModels.Left.ObliquusExternus.OEC_8;
  AnyRefNode &Org = ....Segments.Left.R10Seg.ObliquusExternusNode_00;
  AnyRefNode &Ins =    ....Segments.PelvisSeg.Left.ObliquusInternusNode_8;
  viewMuscle = {#include "../drawSettings/MusDrawSettings.any"};
  viewForce.Visible ??= Off;
};


AnyMuscleViaPoint OEC_9= {
  AnyMuscleModel &MusMdl = ....MuscleModels.Left.ObliquusExternus.OEC_9;
  AnyRefNode &Org = ....Segments.Left.R10Seg.ObliquusExternusNode_0;
  AnyRefNode &Ins =    ....Segments.PelvisSeg.Left.ObliquusInternusNode_9;
  viewMuscle = {#include "../drawSettings/MusDrawSettings.any"};
  viewForce.Visible ??= Off;
};


AnyMuscleViaPoint OEC_10 = {
  AnyMuscleModel &MusMdl = ....MuscleModels.Left.ObliquusExternus.OEC_10;
  AnyRefNode &Org = ....Segments.Left.R11Seg.ObliquusExternusNode;
  AnyRefNode &Ins =    ....Segments.PelvisSeg.Left.ObliquusInternusNode_7;
  viewMuscle = {#include "../drawSettings/MusDrawSettings.any"};
  viewForce.Visible ??= Off;
};


AnyMuscleViaPoint OEC_11 = {
  AnyMuscleModel &MusMdl = ....MuscleModels.Left.ObliquusExternus.OEC_11;
  AnyRefNode &Org = ....Segments.Left.R11Seg.ObliquusExternusNode1;
  AnyRefNode &Ins =    ....Segments.PelvisSeg.Left.ObliquusInternusNode_5;
  viewMuscle = {#include "../drawSettings/MusDrawSettings.any"};
  viewForce.Visible ??= Off;
};


AnyMuscleViaPoint OEC_12 = {
  AnyMuscleModel &MusMdl = ....MuscleModels.Left.ObliquusExternus.OEC_12;
  AnyRefNode &Org = ....Segments.Left.R12Seg.ObliquusExternusNode;
  AnyRefNode &Ins =    ....Segments.PelvisSeg.Left.ObliquusInternusNode_4;
  viewMuscle = {#include "../drawSettings/MusDrawSettings.any"};
  viewForce.Visible ??= Off;
};

#endif


#if BM_TRUNK_CAVITY_MODEL == _CAVITY_MODEL_BUCKLE_
    AnyMuscleViaPoint OEC_1 = {
      AnyMuscleModel &MusMdl = ....MuscleModels.Left.ObliquusExternus.OEC_1;
      AnyRefNode &Org = ....Segments.Left.R6Seg.ObliquusExternusNode;
      AnyRefNode &Ins = ....Buckle.Segments.BuckleSeg.Left.ObliquusExternusNode_1;
      viewMuscle = {#include "../drawSettings/MusDrawSettings.any"};
      viewForce.Visible ??= Off;
    };

    AnyMuscleViaPoint OEC_2 = {
      AnyMuscleModel &MusMdl = ....MuscleModels.Left.ObliquusExternus.OEC_2;
      AnyRefNode &Org = ....Segments.Left.R7Seg.ObliquusExternusNode;
      AnyRefNode &Ins = ....Buckle.Segments.BuckleSeg.Left.ObliquusExternusNode_2;
      viewMuscle = {#include "../drawSettings/MusDrawSettings.any"};
      viewForce.Visible ??= Off;
    };

    AnyMuscleViaPoint OEC_3 = {
      AnyMuscleModel &MusMdl = ....MuscleModels.Left.ObliquusExternus.OEC_3;
      AnyRefNode &Org = ....Segments.Left.R8Seg.ObliquusExternusNode;
      AnyRefNode &Ins = ....Buckle.Segments.BuckleSeg.Left.ObliquusExternusNode_3;
      viewMuscle = {#include "../drawSettings/MusDrawSettings.any"};
      viewForce.Visible ??= Off;
    };

    AnyMuscleViaPoint OEC_4 = {
      AnyMuscleModel &MusMdl = ....MuscleModels.Left.ObliquusExternus.OEC_4;
      AnyRefNode &Org = ....Segments.Left.R9Seg.ObliquusExternusNode;
      AnyRefNode &Ins = ....Buckle.Segments.BuckleSeg.Left.ObliquusExternusNode_4;
      viewMuscle = {#include "../drawSettings/MusDrawSettings.any"};
      viewForce.Visible ??= Off;
    };

    AnyMuscleViaPoint OEC_5 = {
      AnyMuscleModel &MusMdl = ....MuscleModels.Left.ObliquusExternus.OEC_5;
      AnyRefNode &Org = ....Segments.Left.R10Seg.ObliquusExternusNode_1;
      AnyRefNode &Ins = ....Buckle.Segments.BuckleSeg.Left.ObliquusExternusNode_5;
      viewMuscle = {#include "../drawSettings/MusDrawSettings.any"};
      viewForce.Visible ??= Off;
    };

    AnyMuscleViaPoint OEC_6 = {
      AnyMuscleModel &MusMdl = ....MuscleModels.Left.ObliquusExternus.OEC_6;
      AnyRefNode &Org = ....Segments.Left.R10Seg.ObliquusExternusNode_2;
      AnyRefNode &Ins = ....Segments.PelvisSeg.Left.ObliquusExternusNode_1;
      viewMuscle = {#include "../drawSettings/MusDrawSettings.any"};
      viewForce.Visible ??= Off;
    };

    AnyMuscleViaPoint OEC_7 = {
      AnyMuscleModel &MusMdl = ....MuscleModels.Left.ObliquusExternus.OEC_7;
      AnyRefNode &Org = ....Segments.Left.R11Seg.ObliquusExternusNode;
      AnyRefNode &Ins = ....Segments.PelvisSeg.Left.ObliquusExternusNode_2;
      viewMuscle = {#include "../drawSettings/MusDrawSettings.any"};
      viewForce.Visible ??= Off;
    };

    AnyMuscleViaPoint OEC_8 = {
      AnyMuscleModel &MusMdl = ....MuscleModels.Left.ObliquusExternus.OEC_8;
      AnyRefNode &Org = ....Segments.Left.R12Seg.ObliquusExternusNode;
      AnyRefNode &Ins = ....Segments.PelvisSeg.Left.ObliquusExternusNode_3;
      viewMuscle = {#include "../drawSettings/MusDrawSettings.any"};
      viewForce.Visible ??= Off;
    };
  #endif
};
AnyFolder ObliquusInternus = {

#if BM_TRUNK_CAVITY_MODEL == _CAVITY_MODEL_VOLUME_


AnyMuscleViaPoint OIC_1 = {
  AnyMuscleModel &MusMdl = ....MuscleModels.Left.ObliquusInternus.OIC_6;
  AnyRefNode &Org = ....Segments.Left.R12Seg.ObliquusExternusNode;
  AnyRefNode &Ins = ....Segments.PelvisSeg.Left.ObliquusInternusNode_1;
  viewMuscle = {#include "../drawSettings/MusDrawSettings.any"};
  viewForce.Visible ??= Off;
 };


AnyMuscleViaPoint OIC_2 = {
  AnyMuscleModel &MusMdl = ....MuscleModels.Left.ObliquusInternus.OIC_6;
  AnyRefNode &Org = ....Segments.Left.R11Seg.ObliquusExternusNode1;
  AnyRefNode &Ins = ....Segments.PelvisSeg.Left.ObliquusInternusNode_2;
  viewMuscle = {#include "../drawSettings/MusDrawSettings.any"};
  viewForce.Visible ??= Off;
};


AnyMuscleViaPoint OIC_3 = {
  AnyMuscleModel &MusMdl = ....MuscleModels.Left.ObliquusInternus.OIC_6;
  AnyRefNode &Org = ....Segments.Left.R11Seg.ObliquusExternusNode;
  AnyRefNode &Ins = ....Segments.PelvisSeg.Left.ObliquusInternusNode_3;
  viewMuscle = {#include "../drawSettings/MusDrawSettings.any"};
  viewForce.Visible ??= Off;
};


AnyMuscleViaPoint OIC_4 = {
  AnyMuscleModel &MusMdl = ....MuscleModels.Left.ObliquusInternus.OIC_6;
  AnyRefNode &Org = ....Segments.Left.R10Seg.ObliquusExternusNode_2;
  AnyRefNode &Ins = ....Segments.PelvisSeg.Left.ObliquusInternusNode_4;
  viewMuscle = {#include "../drawSettings/MusDrawSettings.any"};
  viewForce.Visible ??= Off;
};


AnyMuscleViaPoint OIC_5 = {
  AnyMuscleModel &MusMdl = ....MuscleModels.Left.ObliquusInternus.OIC_6;
  AnyRefNode &Org = ....Segments.Left.R10Seg.ObliquusExternusNode_1;
  AnyRefNode &Ins = ....Segments.PelvisSeg.Left.ObliquusInternusNode_4_1;
  viewMuscle = {#include "../drawSettings/MusDrawSettings.any"};
  viewForce.Visible ??= Off;
};


AnyMuscleShortestPath OIC_6 = {
  AnyMuscleModel &MusMdl = ....MuscleModels.Left.ObliquusInternus.OIC_6;
  #if BM_TRUNK_THORACIC_STERNUM_TOPOLOGY == 4
    AnyRefNode &Org = ....Segments.Left.CostalCartilageSeg.ObliquusInternus_1;
  #else
    AnyRefNode &Org = ....Segments.SternalBodySeg.Left.ObliquusInternusNode_1;
  #endif
  AnyRefNode &Ins = ....Segments.PelvisSeg.Left.ObliquusInternusNode_5;

  AnyParamSurf &srf4 =....Abdominal.ObliquusWrapping.WrappingSeg.Layer4WrappingPoints.Left.nn04.Translate.InwardCyl;

  SPLine.StringMesh=80;

  SPLine ={
    AnyMatrix InitWrapPos = {
      transf3D({0,-.srf4.radius, 0.5*.srf4.Length}, &.srf4)
    };
    InitWrapPosVecArr = {&InitWrapPos};
  };

  viewMuscle = {#include "../drawSettings/MusDrawSettings.any"};
  viewForce.Visible ??= Off;
};


AnyMuscleShortestPath OIC_7 = {
  AnyMuscleModel &MusMdl = ....MuscleModels.Left.ObliquusInternus.OIC_7;
  #if BM_TRUNK_THORACIC_STERNUM_TOPOLOGY == 4
    AnyRefNode &Org = ....Segments.Left.CostalCartilageSeg.ObliquusInternus_2;
  #else
    AnyRefNode &Org = ....Segments.SternalBodySeg.Left.ObliquusInternusNode_2;
  #endif
  AnyRefNode &Ins = ....Segments.PelvisSeg.Left.ObliquusInternusNode_5;

  AnyParamSurf &srf3 =....Abdominal.ObliquusWrapping.WrappingSeg.Layer3WrappingPoints.Left.nn08.Translate.InwardCyl;

  SPLine.StringMesh=100;

  SPLine ={
    AnyMatrix InitWrapPos = {
      transf3D({0,-.srf3.radius, 0.5*.srf3.Length}, &.srf3)
    };
    InitWrapPosVecArr = {&InitWrapPos};
  };

  viewMuscle = {#include "../drawSettings/MusDrawSettings.any"};
  viewForce.Visible ??= Off;
};


AnyMuscleShortestPath OIC_8 = {
  AnyMuscleModel &MusMdl = ....MuscleModels.Left.ObliquusInternus.OIC_8;
  AnyRefNode &Org = ....Segments.SternalBodySeg.Xiphoid_DiaphragmNodeL;
  AnyRefNode &Ins = ....Segments.PelvisSeg.Left.ObliquusInternusNode_6;

  AnyParamSurf &srf2 =....Abdominal.ObliquusWrapping.WrappingSeg.Layer2WrappingPoints.Left.nn10.Translate.InwardCyl;
  AnyParamSurf &srf3 =....Abdominal.ObliquusWrapping.WrappingSeg.Layer3WrappingPoints.Left.nn08.Translate.InwardCyl;

  SPLine.StringMesh=100;

  SPLine ={
    AnyMatrix InitWrapPos = {
      transf3D({0,-.srf2.radius, 0.5*.srf2.Length}, &.srf2),
      transf3D({0,-.srf3.radius, 0.5*.srf3.Length}, &.srf3)
    };
    InitWrapPosVecArr = {&InitWrapPos};
  };
  viewMuscle = {#include "../drawSettings/MusDrawSettings.any"};
  viewForce.Visible ??= Off;
};


AnyMuscleShortestPath OIC_9 = {
  AnyMuscleModel &MusMdl = ....MuscleModels.Left.ObliquusInternus.OIC_9;
  AnyRefNode &Org =      ....Abdominal.Layer_L1.BaseSegAnterior.mid;
  AnyRefNode &Ins = ....Segments.PelvisSeg.Left.ObliquusInternusNode_6;

 // AnyParamSurf &srf1 =....Abdominal.ObliquusWrapping.WrappingSeg.Layer2WrappingPoints.Left.nn11.Translate.InwardCyl;
  AnyParamSurf &srf2 =....Abdominal.ObliquusWrapping.WrappingSeg.Layer3WrappingPoints.Left.nn10.Translate.InwardCyl;
  AnyParamSurf &srf3 =....Abdominal.ObliquusWrapping.WrappingSeg.Layer4WrappingPoints.Left.nn09.Translate.InwardCyl;

  SPLine.StringMesh=80;

  SPLine ={
    AnyMatrix InitWrapPos = {
   //   transf3D({0,-.srf1.radius, 0.5*.srf1.Length}, &.srf1),
      transf3D({0,-.srf2.radius, 0.5*.srf2.Length}, &.srf2),
      transf3D({0,-.srf3.radius, 0.5*.srf3.Length}, &.srf3)
    };
    InitWrapPosVecArr = {&InitWrapPos};
  };

  viewMuscle = {#include "../drawSettings/MusDrawSettings.any"};
  viewForce.Visible ??= Off;
 };

AnyMuscleShortestPath OIC_10 = {
  AnyMuscleModel &MusMdl = ....MuscleModels.Left.ObliquusInternus.OIC_10;
  AnyRefNode &Org =      ....Abdominal.Layer_L2.BaseSegAnterior.mid;
  AnyRefNode &Ins = ....Segments.PelvisSeg.Left.ObliquusInternusNode_6;

  AnyParamSurf &srf1 =....Abdominal.ObliquusWrapping.WrappingSeg.Layer3WrappingPoints.Left.nn11.Translate.InwardCyl;
  AnyParamSurf &srf2 =....Abdominal.ObliquusWrapping.WrappingSeg.Layer4WrappingPoints.Left.nn09.Translate.InwardCyl;

  SPLine.StringMesh=60;

  SPLine ={
    AnyMatrix InitWrapPos = {
      transf3D({0,-.srf1.radius, 0.5*.srf1.Length}, &.srf1),
      transf3D({0,-.srf2.radius, 0.5*.srf2.Length}, &.srf2)
    };
    InitWrapPosVecArr = {&InitWrapPos};
  };

  viewMuscle = {#include "../drawSettings/MusDrawSettings.any"};
  viewForce.Visible ??= Off;
};


AnyMuscleShortestPath OIC_11 = {
  AnyMuscleModel &MusMdl = ....MuscleModels.Left.ObliquusInternus.OIC_11;
  AnyRefNode &Org = ....Abdominal.Layer_L3.BaseSegAnterior.mid;
  AnyRefNode &Ins = ....Segments.PelvisSeg.Left.ObliquusInternusNode_7;

  AnyParamSurf &srf1 =....Abdominal.ObliquusWrapping.WrappingSeg.Layer4WrappingPoints.Left.nn11.Translate.InwardCyl;
  AnyParamSurf &srf2 =....Abdominal.ObliquusWrapping.WrappingSeg.Layer5WrappingPoints.Left.nn08.Translate.InwardCyl;

  SPLine.StringMesh=60;

  SPLine ={
    AnyMatrix InitWrapPos = {
      transf3D({0,-.srf1.radius, 0.5*.srf1.Length}, &.srf1),
      transf3D({0,-.srf2.radius, 0.5*.srf2.Length}, &.srf2)
    };
    InitWrapPosVecArr = {&InitWrapPos};
  };

  viewMuscle = {#include "../drawSettings/MusDrawSettings.any"};
  viewForce.Visible ??= Off;
};


AnyMuscleShortestPath OIC_12 = {
  AnyMuscleModel &MusMdl = ....MuscleModels.Left.ObliquusInternus.OIC_12;
  AnyRefNode &Org =      ....Abdominal.Layer_L4.BaseSegAnterior.mid;
  AnyRefNode &Ins = ....Segments.PelvisSeg.Left.ObliquusInternusNode_7;

  AnyParamSurf &srf1 =....Abdominal.ObliquusWrapping.WrappingSeg.Layer5WrappingPoints.Left.nn09.Translate.InwardCyl;

  SPLine.StringMesh=60;

  SPLine ={
    AnyMatrix InitWrapPos = {
      transf3D({0,-.srf1.radius, 0.5*.srf1.Length}, &.srf1)
    };
    InitWrapPosVecArr = {&InitWrapPos};
  };

  viewMuscle = {#include "../drawSettings/MusDrawSettings.any"};
  viewForce.Visible ??= Off;
};

AnyMuscleShortestPath  OIC_13= {
  AnyMuscleModel &MusMdl = ....MuscleModels.Left.ObliquusInternus.OIC_13;
  AnyRefNode &Org = ....Abdominal.Layer_L5.BaseSegAnterior.mid;
  AnyRefNode &Ins = ....Segments.PelvisSeg.Left.ObliquusInternusNode_8;

  AnyParamSurf &srf1 =....Abdominal.ObliquusWrapping.WrappingSeg.Layer5WrappingPoints.Left.nn11.Translate.InwardCyl;

  SPLine.StringMesh=60;

  SPLine ={
    AnyMatrix InitWrapPos = {
        transf3D({0,-.srf1.radius, 0.5*.srf1.Length}, &.srf1)
      };
      InitWrapPosVecArr = {&InitWrapPos};
    };

  viewMuscle = {#include "../drawSettings/MusDrawSettings.any"};
  viewForce.Visible ??= Off;
};

#endif


  #if BM_TRUNK_CAVITY_MODEL == _CAVITY_MODEL_BUCKLE_
    AnyMuscleViaPoint OIC_1 = {
      AnyMuscleModel &MusMdl = ....MuscleModels.Left.ObliquusInternus.OIC_1;
      AnyRefNode &Org = ....Segments.Left.R11Seg.ObliquusInternusNode;
      AnyRefNode &Ins = ....Segments.PelvisSeg.Left.ObliquusInternusNode_1;
      viewMuscle = {#include "../drawSettings/MusDrawSettings.any"};
      viewForce.Visible ??= Off;
    };

    AnyMuscleViaPoint OIC_2 = {
      AnyMuscleModel &MusMdl = ....MuscleModels.Left.ObliquusInternus.OIC_2;
      AnyRefNode &Org = ....Segments.Left.R10Seg.ObliquusInternusNode_2;
      AnyRefNode &Ins = ....Segments.PelvisSeg.Left.ObliquusInternusNode_2;
      viewMuscle = {#include "../drawSettings/MusDrawSettings.any"};
      viewForce.Visible ??= Off;
    };

    AnyMuscleViaPoint OIC_3 = {
      AnyMuscleModel &MusMdl = ....MuscleModels.Left.ObliquusInternus.OIC_3;
      AnyRefNode &Org = ....Segments.Left.R10Seg.ObliquusInternusNode_1;
      AnyRefNode &Ins = ....Segments.PelvisSeg.Left.ObliquusInternusNode_3;
      viewMuscle = {#include "../drawSettings/MusDrawSettings.any"};
      viewForce.Visible ??= Off;
    };

    AnyMuscleViaPoint OIC_4 = {
      AnyMuscleModel &MusMdl = ....MuscleModels.Left.ObliquusInternus.OIC_4;
      AnyRefNode &Org = ....Segments.SternalBodySeg.Left.ObliquusInternusNode_1;
      AnyRefNode &Ins = ....Segments.PelvisSeg.Left.ObliquusInternusNode_4;
      viewMuscle = {#include "../drawSettings/MusDrawSettings.any"};
      viewForce.Visible ??= Off;
    };

    AnyMuscleViaPoint OIC_5 = {
      AnyMuscleModel &MusMdl = ....MuscleModels.Left.ObliquusInternus.OIC_5;
      AnyRefNode &Org = ....Segments.SternalBodySeg.Left.ObliquusInternusNode_2;
      AnyRefNode &Ins = ....Segments.PelvisSeg.Left.ObliquusInternusNode_5;
      viewMuscle = {#include "../drawSettings/MusDrawSettings.any"};
      viewForce.Visible ??= Off;
    };

    AnyMuscleViaPoint OIC_6 = {
      AnyMuscleModel &MusMdl = ....MuscleModels.Left.ObliquusInternus.OIC_6;
      AnyRefNode &Org = ....Buckle.Segments.BuckleSeg.Left.ObliquusInternusNode_1;
      AnyRefNode &Ins = ....Segments.PelvisSeg.Left.ObliquusInternusNode_6;
      viewMuscle = {#include "../drawSettings/MusDrawSettings.any"};
      viewForce.Visible ??= Off;
    };

    AnyMuscleViaPoint OIC_7 = {
      AnyMuscleModel &MusMdl = ....MuscleModels.Left.ObliquusInternus.OIC_7;
      AnyRefNode &Org = ....Buckle.Segments.BuckleSeg.Left.ObliquusInternusNode_2;
      AnyRefNode &Ins = ....Segments.PelvisSeg.Left.ObliquusInternusNode_7;
      viewMuscle = {#include "../drawSettings/MusDrawSettings.any"};
      viewForce.Visible ??= Off;
    };

    AnyMuscleViaPoint OIC_8 = {
      AnyMuscleModel &MusMdl = ....MuscleModels.Left.ObliquusInternus.OIC_8;
      AnyRefNode &Org = ....Buckle.Segments.BuckleSeg.Left.ObliquusInternusNode_3;
      AnyRefNode &Ins = ....Segments.PelvisSeg.Left.ObliquusInternusNode_8;
      viewMuscle = {#include "../drawSettings/MusDrawSettings.any"};
      viewForce.Visible ??= Off;
    };

    AnyMuscleViaPoint OIC_9 = {
      AnyMuscleModel &MusMdl = ....MuscleModels.Left.ObliquusInternus.OIC_9;
      AnyRefNode &Org = ....Buckle.Segments.BuckleSeg.Left.ObliquusInternusNode_4;
      AnyRefNode &Ins = ....Segments.PelvisSeg.Left.ObliquusInternusNode_9;
      viewMuscle = {#include "../drawSettings/MusDrawSettings.any"};
      viewForce.Visible ??= Off;
    };

    AnyMuscleViaPoint OIC_10 = {
      AnyMuscleModel &MusMdl = ....MuscleModels.Left.ObliquusInternus.OIC_10;
      AnyRefNode &Org = ....Buckle.Segments.BuckleSeg.Left.ObliquusInternusNode_5;
      AnyRefNode &Ins = ....Segments.PelvisSeg.Left.ObliquusInternusNode_10;
      viewMuscle = {#include "../drawSettings/MusDrawSettings.any"};
      viewForce.Visible ??= Off;
    };
  #endif
};

// Psoas is separated since it is used by the legs in certain BM configurations
#include "PsoasMajorLeft.any"

AnyFolder QuadratusLumborum = {
  AnyMuscleViaPoint QLC12Lat_CILat = {
    AnyMuscleModel &MusMdl = ....MuscleModels.Left.QuadratusLumborum.QL_1;
    AnyRefNode &Org = ....Segments.Left.R12Seg.QLC12Lat_CINode1L;
    AnyRefNode &Ins = ....Segments.PelvisSeg.QLLatNode1L;
     viewMuscle = {#include "../drawSettings/MusDrawSettings.any"};
     viewForce.Visible ??= Off;
  };
  AnyMuscleViaPoint QLC12InterMedian_CILat = {
    AnyMuscleModel &MusMdl = ....MuscleModels.Left.QuadratusLumborum.QL_2;
    AnyRefNode &Org = ....Segments.Left.R12Seg.QLC12Lat_CINode3L;
    AnyRefNode &Ins = ....Segments.PelvisSeg.QLLatNode2L;
    viewMuscle = {#include "../drawSettings/MusDrawSettings.any"};
  };
  AnyMuscleViaPoint QLC12Median_CILat = {
    AnyMuscleModel &MusMdl = ....MuscleModels.Left.QuadratusLumborum.QL_3;
    AnyRefNode &Org = ....Segments.Left.R12Seg.QLC12InterMedian_CINode1L;
    AnyRefNode &Ins = ....Segments.PelvisSeg.QLLatNode3L;
    viewMuscle = {#include "../drawSettings/MusDrawSettings.any"};
  };

  AnyMuscleViaPoint QLC12InterMedian_CIInterMedian = {
    AnyMuscleModel &MusMdl = ....MuscleModels.Left.QuadratusLumborum.QL_4;
    AnyRefNode &Org = ....Segments.Left.R12Seg.QLC12InterMedian_CINode3L;
    AnyRefNode &Ins = ....Segments.PelvisSeg.QLLatNode5L;
    viewMuscle = {#include "../drawSettings/MusDrawSettings.any"};
  };
  AnyMuscleViaPoint QLC12Median_CIInterMedian = {
    AnyMuscleModel &MusMdl = ....MuscleModels.Left.QuadratusLumborum.QL_5;
    AnyRefNode &Org = ....Segments.Left.R12Seg.QLC12Median_CINode1L;
    AnyRefNode &Ins = ....Segments.PelvisSeg.QLInterMedianNode1L;
    viewMuscle = {#include "../drawSettings/MusDrawSettings.any"};
  };

  AnyMuscleViaPoint QLT12_CILat = {
    AnyMuscleModel &MusMdl = ....MuscleModels.Left.QuadratusLumborum.QL_6;
    AnyRefNode &Org = ....Segments.T12Seg.QLT12_CINodeL;
    AnyRefNode &Ins = ....Segments.PelvisSeg.QLLatNode3L;
    viewMuscle = {#include "../drawSettings/MusDrawSettings.any"};
  };

  AnyMuscleViaPoint QLL1_CILat = {
    AnyMuscleModel &MusMdl = ....MuscleModels.Left.QuadratusLumborum.QL_7;
    AnyRefNode &Org = ....Segments.L1Seg.QLL1_CINodeL;
    AnyRefNode &Ins = ....Segments.PelvisSeg.QLLatNode4L;
     viewMuscle = {#include "../drawSettings/MusDrawSettings.any"};
     viewForce.Visible ??= Off;
  };

  AnyMuscleViaPoint QLL2_CILat = {
    AnyMuscleModel &MusMdl = ....MuscleModels.Left.QuadratusLumborum.QL_8;
    AnyRefNode &Org = ....Segments.L2Seg.QLL2_CINodeL;
    AnyRefNode &Ins = ....Segments.PelvisSeg.QLLatNode4L;
     viewMuscle = {#include "../drawSettings/MusDrawSettings.any"};
     viewForce.Visible ??= Off;
  };

  AnyMuscleViaPoint QLL3_CILat = {
    AnyMuscleModel &MusMdl = ....MuscleModels.Left.QuadratusLumborum.QL_9;
    AnyRefNode &Org = ....Segments.L3Seg.QLL3_CINodeL;
    AnyRefNode &Ins = ....Segments.PelvisSeg.QLLatNode5L;
     viewMuscle = {#include "../drawSettings/MusDrawSettings.any"};
     viewForce.Visible ??= Off;
  };

  AnyMuscleViaPoint QLT12_CIInterMedian = {
    AnyMuscleModel &MusMdl = ....MuscleModels.Left.QuadratusLumborum.QL_10;
    AnyRefNode &Org = ....Segments.T12Seg.QLT12_CINodeL;
    AnyRefNode &Ins = ....Segments.PelvisSeg.QLInterMedianNode1L;
    viewMuscle = {#include "../drawSettings/MusDrawSettings.any"};
  };

  AnyMuscleViaPoint QLL1_CIInterMedian = {
    AnyMuscleModel &MusMdl = ....MuscleModels.Left.QuadratusLumborum.QL_11;
    AnyRefNode &Org = ....Segments.L1Seg.QLL1_CINodeL;
    AnyRefNode &Ins = ....Segments.PelvisSeg.QLInterMedianNode2L;
    viewMuscle = {#include "../drawSettings/MusDrawSettings.any"};
  };

  AnyMuscleViaPoint QLL2_CIInterMedian = {
    AnyMuscleModel &MusMdl = ....MuscleModels.Left.QuadratusLumborum.QL_12;
    AnyRefNode &Org = ....Segments.L2Seg.QLL2_CINodeL;
    AnyRefNode &Ins = ....Segments.PelvisSeg.QLInterMedianNode2L;
    viewMuscle = {#include "../drawSettings/MusDrawSettings.any"};
  };

  AnyMuscleViaPoint QLL3_CIInterMedian = {
    AnyMuscleModel &MusMdl = ....MuscleModels.Left.QuadratusLumborum.QL_13;
    AnyRefNode &Org = ....Segments.L3Seg.QLL3_CINodeL;
    AnyRefNode &Ins = ....Segments.PelvisSeg.QLInterMedianNode3L;
    viewMuscle = {#include "../drawSettings/MusDrawSettings.any"};
  };

  AnyMuscleViaPoint QLL4_CIInterMedian = {
    AnyMuscleModel &MusMdl = ....MuscleModels.Left.QuadratusLumborum.QL_14;
    AnyRefNode &Org = ....Segments.L4Seg.QLL4_CINodeL;
    AnyRefNode &Ins = ....Segments.PelvisSeg.QLInterMedianNode3L;
     viewMuscle = {#include "../drawSettings/MusDrawSettings.any"};
     viewForce.Visible ??= Off;
  };

    AnyMuscleViaPoint QLT12_CIMedian = {
    AnyMuscleModel &MusMdl = ....MuscleModels.Left.QuadratusLumborum.QL_15;
    AnyRefNode &Org = ....Segments.T12Seg.QLT12_CINodeL;
    AnyRefNode &Ins = ....Segments.PelvisSeg.QLInterMedianNode4L;
    viewMuscle = {#include "../drawSettings/MusDrawSettings.any"};
  };

  AnyMuscleViaPoint QLL1_CIMedian = {
    AnyMuscleModel &MusMdl = ....MuscleModels.Left.QuadratusLumborum.QL_16;
    AnyRefNode &Org = ....Segments.L1Seg.QLL1_CINodeL;
    AnyRefNode &Ins = ....Segments.PelvisSeg.QLInterMedianNode4L;
    viewMuscle = {#include "../drawSettings/MusDrawSettings.any"};
  };

  AnyMuscleViaPoint QLL2_CIMedian = {
    AnyMuscleModel &MusMdl = ....MuscleModels.Left.QuadratusLumborum.QL_17;
    AnyRefNode &Org = ....Segments.L2Seg.QLL2_CINodeL;
    AnyRefNode &Ins = ....Segments.PelvisSeg.QLInterMedianNode5L;
    viewMuscle = {#include "../drawSettings/MusDrawSettings.any"};
  };

  AnyMuscleViaPoint QLL3_CIMedian = {
    AnyMuscleModel &MusMdl = ....MuscleModels.Left.QuadratusLumborum.QL_18;
    AnyRefNode &Org = ....Segments.L3Seg.QLL3_CINodeL;
    AnyRefNode &Ins = ....Segments.PelvisSeg.QLInterMedianNode5L;
    viewMuscle = {#include "../drawSettings/MusDrawSettings.any"};
  };

  AnyMuscleViaPoint QLL4_CIMedian = {
    AnyMuscleModel &MusMdl = ....MuscleModels.Left.QuadratusLumborum.QL_19;
    AnyRefNode &Org = ....Segments.L4Seg.QLL4_CINodeL;
    AnyRefNode &Ins = ....Segments.PelvisSeg.QLMedianNodeL;
    viewMuscle = {#include "../drawSettings/MusDrawSettings.any"};
  };

    AnyMuscleViaPoint QLC12Lat_L4 = {
    AnyMuscleModel &MusMdl = ....MuscleModels.Left.QuadratusLumborum.QL_20;
    AnyRefNode &Org = ....Segments.L4Seg.QLL4_CINodeL;
    AnyRefNode &Ins = ....Segments.Left.R12Seg.QLC12Lat_CINode2L;
    viewMuscle = {#include "../drawSettings/MusDrawSettings.any"};
  };
    AnyMuscleViaPoint QLC12Lat_L3 = {
    AnyMuscleModel &MusMdl = ....MuscleModels.Left.QuadratusLumborum.QL_21;
    AnyRefNode &Org = ....Segments.L3Seg.QLL3_CINodeL;
    AnyRefNode &Ins = ....Segments.Left.R12Seg.QLC12Lat_CINode4L;
    viewMuscle = {#include "../drawSettings/MusDrawSettings.any"};
  };
    AnyMuscleViaPoint QLC12Lat_L2 = {
    AnyMuscleModel &MusMdl = ....MuscleModels.Left.QuadratusLumborum.QL_22;
    AnyRefNode &Org = ....Segments.L2Seg.QLL2_CINodeL;
    AnyRefNode &Ins = ....Segments.Left.R12Seg.QLC12Lat_CINode5L;
    viewMuscle = {#include "../drawSettings/MusDrawSettings.any"};
  };

    AnyMuscleViaPoint QLC12InterMedian_L4 = {
    AnyMuscleModel &MusMdl = ....MuscleModels.Left.QuadratusLumborum.QL_23;
    AnyRefNode &Org = ....Segments.L4Seg.QLL4_CINodeL;
    AnyRefNode &Ins = ....Segments.Left.R12Seg.QLC12InterMedian_CINode2L;
    viewMuscle = {#include "../drawSettings/MusDrawSettings.any"};
  };
    AnyMuscleViaPoint QLC12InterMedian_L3 = {
    AnyMuscleModel &MusMdl = ....MuscleModels.Left.QuadratusLumborum.QL_24;
    AnyRefNode &Org = ....Segments.L3Seg.QLL3_CINodeL;
    AnyRefNode &Ins = ....Segments.Left.R12Seg.QLC12InterMedian_CINode4L;
    viewMuscle = {#include "../drawSettings/MusDrawSettings.any"};
  };
    AnyMuscleViaPoint QLC12InterMedian_L2 = {
    AnyMuscleModel &MusMdl = ....MuscleModels.Left.QuadratusLumborum.QL_25;
    AnyRefNode &Org = ....Segments.L2Seg.QLL2_CINodeL;
    AnyRefNode &Ins = ....Segments.Left.R12Seg.QLC12InterMedian_CINode5L;
    viewMuscle = {#include "../drawSettings/MusDrawSettings.any"};
  };

    AnyMuscleViaPoint QLC12Median_L4 = {
    AnyMuscleModel &MusMdl = ....MuscleModels.Left.QuadratusLumborum.QL_26;
    AnyRefNode &Org = ....Segments.L4Seg.QLL4_CINodeL;
    AnyRefNode &Ins = ....Segments.Left.R12Seg.QLC12Median_CINode2L;
    viewMuscle = {#include "../drawSettings/MusDrawSettings.any"};
  };
    AnyMuscleViaPoint QLC12Median_L3 = {
    AnyMuscleModel &MusMdl = ....MuscleModels.Left.QuadratusLumborum.QL_27;
    AnyRefNode &Org = ....Segments.L3Seg.QLL3_CINodeL;
    AnyRefNode &Ins = ....Segments.Left.R12Seg.QLC12Median_CINode3L;
    viewMuscle = {#include "../drawSettings/MusDrawSettings.any"};
  };
    AnyMuscleViaPoint QLC12Median_L2 = {
    AnyMuscleModel &MusMdl = ....MuscleModels.Left.QuadratusLumborum.QL_28;
    AnyRefNode &Org = ....Segments.L2Seg.QLL2_CINodeL;
    AnyRefNode &Ins = ....Segments.Left.R12Seg.QLC12Median_CINode4L;
    viewMuscle = {#include "../drawSettings/MusDrawSettings.any"};
  };


};

AnyFolder RectusAbdominis = {

  #if BM_TRUNK_CAVITY_MODEL == _CAVITY_MODEL_BUCKLE_

    AnyMuscleViaPoint RA_1= {
      AnyMuscleModel &MusMdl = ....MuscleModels.Left.RectusAbdominis.RA_1;
      AnyRefNode &Org = ....Segments.SternalBodySeg.RACP_CO6_2_L;
      AnyRefNode& Via3 = ....Segments.PelvisSeg.RA_1_ViaL;
      AnyRefNode &Ins = ....Segments.PelvisSeg.RA_1_L;
      viewMuscle = {#include "../drawSettings/MusDrawSettings.any"};
      viewForce.Visible ??= Off;
    };


    AnyMuscleViaPoint RA_2 = {
      AnyMuscleModel &MusMdl = ....MuscleModels.Left.RectusAbdominis.RA_2;
      AnyRefNode &Org = ....Segments.SternalBodySeg.RACP_CO5_2_L;
      AnyRefNode &Via1 = ....Segments.SternalBodySeg.RACP_Via_2_L;
      AnyRefNode& Via3 = ....Segments.PelvisSeg.RA_2_ViaL;
      AnyRefNode &Ins = ....Segments.PelvisSeg.RA_2_L;
      viewMuscle = {#include "../drawSettings/MusDrawSettings.any"};
      viewForce.Visible ??= Off;
    };

  #endif

  #if BM_TRUNK_CAVITY_MODEL == _CAVITY_MODEL_VOLUME_

    #if BM_TRUNK_EXPERIMENTAL_RECTUS_ABDOMINIS == ON

    AnyMuscleViaPoint RA_1 = {
      AnyRefNode &Org = ....Segments.SternalBodySeg.RACP_CO6_2_L;
      AnyRefNode &Via1 = ....Abdominal.Layer_L1.BaseSegAnterior.rectus1L;
      AnyRefNode &Via2 = ....Abdominal.Layer_L2.BaseSegAnterior.rectus1L;
      AnyRefNode &Via3 = ....Abdominal.Layer_L3.BaseSegAnterior.rectus1L;
      AnyRefNode &Via4 = ....Abdominal.Layer_L4.BaseSegAnterior.rectus1L;
      AnyRefNode &Via5 = ....Abdominal.Layer_L5.BaseSegAnterior.rectus1L;
      AnyRefNode &Ins = ....Segments.PelvisSeg.RA_1_L;
      viewMuscle = {#include "../drawSettings/MusDrawSettings.any"};
      viewForce.Visible ??= Off;
      AnyMuscleModel& MusMdl = ....MuscleModels.Left.RectusAbdominis.RA_1;
    };

    AnyMuscleViaPoint RA_2 = {
      AnyRefNode &Org = ....Segments.SternalBodySeg.RACP_CO5_2_L;
      #if BM_TRUNK_THORACIC_STERNUM_TOPOLOGY == 4
        AnyRefNode &Via0 = ....Segments.Left.CostalCartilageSeg.RACP_Via_2_L;
      #else
        AnyRefNode &Via0 = ....Segments.SternalBodySeg.RACP_Via_2_L;
      #endif
      AnyRefNode &Via1 = ....Abdominal.Layer_L1.BaseSegAnterior.rectus2L;
      AnyRefNode &Via2 = ....Abdominal.Layer_L2.BaseSegAnterior.rectus2L;
      AnyRefNode &Via3 = ....Abdominal.Layer_L3.BaseSegAnterior.rectus2L;
      AnyRefNode &Via4 = ....Abdominal.Layer_L4.BaseSegAnterior.rectus2L;
      AnyRefNode &Via5 = ....Abdominal.Layer_L5.BaseSegAnterior.rectus2L;
      AnyRefNode &Ins = ....Segments.PelvisSeg.RA_2_L;
      viewMuscle = {#include "../drawSettings/MusDrawSettings.any"};
      viewForce.Visible ??= Off;
      AnyMuscleModel& MusMdl = ....MuscleModels.Left.RectusAbdominis.RA_2;
    };

    #endif

    #if BM_TRUNK_EXPERIMENTAL_RECTUS_ABDOMINIS == OFF

    AnyMuscleViaPoint RA_1_1 = {
      AnyRefNode &Org = ....Segments.SternalBodySeg.RACP_CO6_2_L;


      AnyRefNode &Ins = ....Abdominal.Layer_L1.BaseSegAnterior.rectus1L;
      viewMuscle = {#include "../drawSettings/MusDrawSettings.any"};
      viewForce.Visible ??= Off;
      /// The rectus abdominis in the cavity model needs use simple muscle models
      /// since the muscle is attached between the abdominal layers which leads to
      /// short muscle length.
      AnyMuscleModel MusMdl = {
         Lf0 = .....MuscleModels.Left.RectusAbdominis.RA_1.Lf0/6;
         Vol0 = .....MuscleModels.Left.RectusAbdominis.RA_1.Vol0/6;
         F0 =  .....MuscleModels.Left.RectusAbdominis.RA_1.F0;
      };
    };

    AnyMuscleViaPoint RA_1_2 = {
      AnyRefNode &Org = ....Abdominal.Layer_L1.BaseSegAnterior.rectus1L;
      AnyRefNode &Ins = ....Abdominal.Layer_L2.BaseSegAnterior.rectus1L;
      viewMuscle = {#include "../drawSettings/MusDrawSettings.any"};
      viewForce.Visible ??= Off;
      /// The rectus abdominis in the cavity model needs use simple muscle models
      /// since the muscle is attached between the abdominal layers which leads to
      /// short muscle length.
      AnyMuscleModel MusMdl = {
         Lf0 = .....MuscleModels.Left.RectusAbdominis.RA_1.Lf0/6;
         Vol0 = .....MuscleModels.Left.RectusAbdominis.RA_1.Vol0/6;
         F0 =  .....MuscleModels.Left.RectusAbdominis.RA_1.F0;
      };
    };

    AnyMuscleViaPoint RA_1_3 = {
      AnyRefNode &Org = ....Abdominal.Layer_L2.BaseSegAnterior.rectus1L;
      AnyRefNode &Ins = ....Abdominal.Layer_L3.BaseSegAnterior.rectus1L;
      viewMuscle = {#include "../drawSettings/MusDrawSettings.any"};
      viewForce.Visible ??= Off;
      /// The rectus abdominis in the cavity model needs use simple muscle models
      /// since the muscle is attached between the abdominal layers which leads to
      /// short muscle length.
      AnyMuscleModel MusMdl = {
         Lf0 = .....MuscleModels.Left.RectusAbdominis.RA_1.Lf0/6;
         Vol0 = .....MuscleModels.Left.RectusAbdominis.RA_1.Vol0/6;
         F0 =  .....MuscleModels.Left.RectusAbdominis.RA_1.F0;
      };
    };

    AnyMuscleViaPoint RA_1_4 = {
      AnyRefNode &Org = ....Abdominal.Layer_L3.BaseSegAnterior.rectus1L;
      AnyRefNode &Ins = ....Abdominal.Layer_L4.BaseSegAnterior.rectus1L;
      viewMuscle = {#include "../drawSettings/MusDrawSettings.any"};
      viewForce.Visible ??= Off;
      /// The rectus abdominis in the cavity model needs use simple muscle models
      /// since the muscle is attached between the abdominal layers which leads to
      /// short muscle length.
      AnyMuscleModel MusMdl = {
         Lf0 = .....MuscleModels.Left.RectusAbdominis.RA_1.Lf0/6;
         Vol0 = .....MuscleModels.Left.RectusAbdominis.RA_1.Vol0/6;
         F0 =  .....MuscleModels.Left.RectusAbdominis.RA_1.F0;
      };
    };

    AnyMuscleViaPoint RA_1_5 = {
      AnyRefNode &Org = ....Abdominal.Layer_L4.BaseSegAnterior.rectus1L;
      AnyRefNode &Ins = ....Abdominal.Layer_L5.BaseSegAnterior.rectus1L;
      viewMuscle = {#include "../drawSettings/MusDrawSettings.any"};
      viewForce.Visible ??= Off;
      /// The rectus abdominis in the cavity model needs use simple muscle models
      /// since the muscle is attached between the abdominal layers which leads to
      /// short muscle length.
      AnyMuscleModel MusMdl = {
         Lf0 = .....MuscleModels.Left.RectusAbdominis.RA_1.Lf0/6;
         Vol0 = .....MuscleModels.Left.RectusAbdominis.RA_1.Vol0/6;
         F0 =  .....MuscleModels.Left.RectusAbdominis.RA_1.F0;
      };
    };

    AnyMuscleViaPoint RA_1_6 = {
      AnyRefNode &Org = ....Abdominal.Layer_L5.BaseSegAnterior.rectus1L;
      AnyRefNode &Ins = ....Segments.PelvisSeg.RA_1_L;
      viewMuscle = {#include "../drawSettings/MusDrawSettings.any"};
      viewForce.Visible ??= Off;
      /// The rectus abdominis in the cavity model needs use simple muscle models
      /// since the muscle is attached between the abdominal layers which leads to
      /// short muscle length.
      AnyMuscleModel MusMdl = {
         Lf0 = .....MuscleModels.Left.RectusAbdominis.RA_1.Lf0/6;
         Vol0 = .....MuscleModels.Left.RectusAbdominis.RA_1.Vol0/6;
         F0 =  .....MuscleModels.Left.RectusAbdominis.RA_1.F0;
      };
    };
    AnyMuscleViaPoint RA_2_1 = {
      AnyRefNode &Org = ....Segments.SternalBodySeg.RACP_CO5_2_L;

      #if BM_TRUNK_THORACIC_STERNUM_TOPOLOGY == 4
        AnyRefNode &Via1 = ....Segments.Left.CostalCartilageSeg.RACP_Via_2_L;
      #else
        AnyRefNode &Via1 = ....Segments.SternalBodySeg.RACP_Via_2_L;
      #endif

      AnyRefNode &Ins = ....Abdominal.Layer_L1.BaseSegAnterior.rectus2L;
      viewMuscle = {#include "../drawSettings/MusDrawSettings.any"};
      viewForce.Visible ??= Off;
      /// The rectus abdominis in the cavity model needs use simple muscle models
      /// since the muscle is attached between the abdominal layers which leads to
      /// short muscle length.
      AnyMuscleModel MusMdl = {
         Lf0 = .....MuscleModels.Left.RectusAbdominis.RA_2.Lf0/6;
         Vol0 = .....MuscleModels.Left.RectusAbdominis.RA_2.Vol0/6;
         F0 =  .....MuscleModels.Left.RectusAbdominis.RA_2.F0;
      };
    };

    AnyMuscleViaPoint RA_2_2 = {
      AnyRefNode &Org = ....Abdominal.Layer_L1.BaseSegAnterior.rectus2L;
      AnyRefNode &Ins = ....Abdominal.Layer_L2.BaseSegAnterior.rectus2L;
      viewMuscle = {#include "../drawSettings/MusDrawSettings.any"};
      viewForce.Visible ??= Off;
      /// The rectus abdominis in the cavity model needs use simple muscle models
      /// since the muscle is attached between the abdominal layers which leads to
      /// short muscle length.
      AnyMuscleModel MusMdl = {
         Lf0 = .....MuscleModels.Left.RectusAbdominis.RA_2.Lf0/6;
         Vol0 = .....MuscleModels.Left.RectusAbdominis.RA_2.Vol0/6;
         F0 =  .....MuscleModels.Left.RectusAbdominis.RA_2.F0;
      };
    };

    AnyMuscleViaPoint RA_2_3 = {
      AnyRefNode &Org = ....Abdominal.Layer_L2.BaseSegAnterior.rectus2L;
      AnyRefNode &Ins = ....Abdominal.Layer_L3.BaseSegAnterior.rectus2L;
      viewMuscle = {#include "../drawSettings/MusDrawSettings.any"};
      viewForce.Visible ??= Off;
      /// The rectus abdominis in the cavity model needs use simple muscle models
      /// since the muscle is attached between the abdominal layers which leads to
      /// short muscle length.
      AnyMuscleModel MusMdl = {
         Lf0 = .....MuscleModels.Left.RectusAbdominis.RA_2.Lf0/6;
         Vol0 = .....MuscleModels.Left.RectusAbdominis.RA_2.Vol0/6;
         F0 =  .....MuscleModels.Left.RectusAbdominis.RA_2.F0;
      };
    };

    AnyMuscleViaPoint RA_2_4 = {
      AnyRefNode &Org = ....Abdominal.Layer_L3.BaseSegAnterior.rectus2L;
      AnyRefNode &Ins = ....Abdominal.Layer_L4.BaseSegAnterior.rectus2L;
      viewMuscle = {#include "../drawSettings/MusDrawSettings.any"};
      viewForce.Visible ??= Off;
      /// The rectus abdominis in the cavity model needs use simple muscle models
      /// since the muscle is attached between the abdominal layers which leads to
      /// short muscle length.
      AnyMuscleModel MusMdl = {
         Lf0 = .....MuscleModels.Left.RectusAbdominis.RA_2.Lf0/6;
         Vol0 = .....MuscleModels.Left.RectusAbdominis.RA_2.Vol0/6;
         F0 =  .....MuscleModels.Left.RectusAbdominis.RA_2.F0;
      };
    };

    AnyMuscleViaPoint RA_2_5 = {
      AnyRefNode &Org = ....Abdominal.Layer_L4.BaseSegAnterior.rectus2L;
      AnyRefNode &Ins = ....Abdominal.Layer_L5.BaseSegAnterior.rectus2L;
      viewMuscle = {#include "../drawSettings/MusDrawSettings.any"};
      viewForce.Visible ??= Off;
      /// The rectus abdominis in the cavity model needs use simple muscle models
      /// since the muscle is attached between the abdominal layers which leads to
      /// short muscle length.
      AnyMuscleModel MusMdl = {
         Lf0 = .....MuscleModels.Left.RectusAbdominis.RA_2.Lf0/6;
         Vol0 = .....MuscleModels.Left.RectusAbdominis.RA_2.Vol0/6;
         F0 =  .....MuscleModels.Left.RectusAbdominis.RA_2.F0;
      };
    };

    AnyMuscleViaPoint RA_2_6 = {
      AnyRefNode &Org = ....Abdominal.Layer_L5.BaseSegAnterior.rectus2L;
      AnyRefNode &Ins = ....Segments.PelvisSeg.RA_2_L;
      viewMuscle = {#include "../drawSettings/MusDrawSettings.any"};
      viewForce.Visible ??= Off;
      /// The rectus abdominis in the cavity model needs use simple muscle models
      /// since the muscle is attached between the abdominal layers which leads to
      /// short muscle length.
      AnyMuscleModel MusMdl = {
         Lf0 = .....MuscleModels.Left.RectusAbdominis.RA_2.Lf0/6;
         Vol0 = .....MuscleModels.Left.RectusAbdominis.RA_2.Vol0/6;
         F0 =  .....MuscleModels.Left.RectusAbdominis.RA_2.F0;
      };
    };
    #endif

  #endif
};

AnyFolder Scalenus = {
  AnyMuscleViaPoint ScalenusAnteriorR1C6 = {
    AnyMuscleModel &MusMdl= ....MuscleModels.Left.Scalenus.ScalenusAnteriorR1C6;
    AnyRefNode &Org = ....Segments.C6Seg.Left.ScalenusAnteriorR1C6Node;
    AnyRefNode &Ins = ....Segments.Left.R1Seg.ScalenusAnteriorR1C6Node;
    viewMuscle = {#include "../drawSettings/MusDrawSettings.any"};
    viewForce.Visible ??= Off;
  };
  AnyMuscleViaPoint ScalenusAnteriorR1C5 = {
    AnyMuscleModel &MusMdl= ....MuscleModels.Left.Scalenus.ScalenusAnteriorR1C5;
    AnyRefNode &Org = ....Segments.C5Seg.Left.ScalenusAnteriorR1C5Node;
    AnyRefNode &Ins = ....Segments.Left.R1Seg.ScalenusAnteriorR1C5Node;
    viewMuscle = {#include "../drawSettings/MusDrawSettings.any"};
    viewForce.Visible ??= Off;
  };
  AnyMuscleViaPoint ScalenusAnteriorR1C4 = {
    AnyMuscleModel &MusMdl= ....MuscleModels.Left.Scalenus.ScalenusAnteriorR1C4;
    AnyRefNode &Org = ....Segments.C4Seg.Left.ScalenusAnteriorR1C4Node;
    AnyRefNode &Ins = ....Segments.Left.R1Seg.ScalenusAnteriorR1C4Node;
    viewMuscle = {#include "../drawSettings/MusDrawSettings.any"};
    viewForce.Visible ??= Off;
  };
  AnyMuscleViaPoint ScalenusAnteriorR1C3 = {
    AnyMuscleModel &MusMdl= ....MuscleModels.Left.Scalenus.ScalenusAnteriorR1C3;
    AnyRefNode &Org = ....Segments.C3Seg.Left.ScalenusAnteriorR1C3Node;
    AnyRefNode &Ins = ....Segments.Left.R1Seg.ScalenusAnteriorR1C3Node;
    viewMuscle = {#include "../drawSettings/MusDrawSettings.any"};
    viewForce.Visible ??= Off;
  };

  AnyMuscleViaPoint ScalenusMediusR1C7 = {
    AnyMuscleModel &MusMdl =....MuscleModels.Left.Scalenus.ScalenusMediusR1C7;
    AnyRefNode &Org = ....Segments.C7Seg.Left.ScalenusMediusR1C7Node;
    AnyRefNode &Ins = ....Segments.Left.R1Seg.ScalenusMediusR1C7Node;
    viewMuscle = {#include "../drawSettings/MusDrawSettings.any"};
    viewForce.Visible ??= Off;
  };
  AnyMuscleViaPoint ScalenusMediusR1C6 = {
    AnyMuscleModel &MusMdl =....MuscleModels.Left.Scalenus.ScalenusMediusR1C6;
    AnyRefNode &Org = ....Segments.C6Seg.Left.ScalenusMediusR1C6Node;
    AnyRefNode &Ins = ....Segments.Left.R1Seg.ScalenusMediusR1C6Node;
    viewMuscle = {#include "../drawSettings/MusDrawSettings.any"};
    viewForce.Visible ??= Off;
  };
  AnyMuscleViaPoint ScalenusMediusR1C5 = {
    AnyMuscleModel &MusMdl =....MuscleModels.Left.Scalenus.ScalenusMediusR1C5;
    AnyRefNode &Org = ....Segments.C5Seg.Left.ScalenusMediusR1C5Node;
    AnyRefNode &Ins = ....Segments.Left.R1Seg.ScalenusMediusR1C5Node;
    viewMuscle = {#include "../drawSettings/MusDrawSettings.any"};
    viewForce.Visible ??= Off;
  };
  AnyMuscleViaPoint ScalenusMediusR1C4 = {
    AnyMuscleModel &MusMdl =....MuscleModels.Left.Scalenus.ScalenusMediusR1C4;
    AnyRefNode &Org = ....Segments.C4Seg.Left.ScalenusMediusR1C4Node;
    AnyRefNode &Ins = ....Segments.Left.R1Seg.ScalenusMediusR1C4Node;
    viewMuscle = {#include "../drawSettings/MusDrawSettings.any"};
    viewForce.Visible ??= Off;
  };
  AnyMuscleViaPoint ScalenusMediusR1C3 = {
    AnyMuscleModel &MusMdl =....MuscleModels.Left.Scalenus.ScalenusMediusR1C3;
    AnyRefNode &Org = ....Segments.C3Seg.Left.ScalenusMediusR1C3Node;
    AnyRefNode &Ins = ....Segments.Left.R1Seg.ScalenusMediusR1C3Node;
    viewMuscle = {#include "../drawSettings/MusDrawSettings.any"};
    viewForce.Visible ??= Off;
  };
  AnyMuscleViaPoint ScalenusMediusR1C2 = {
    AnyMuscleModel &MusMdl =....MuscleModels.Left.Scalenus.ScalenusMediusR1C2;
    AnyRefNode &Org = ....Segments.C2Seg.Left.ScalenusMediusR1C2Node;
    AnyRefNode &Ins = ....Segments.Left.R1Seg.ScalenusMediusR1C2Node;
    viewMuscle = {#include "../drawSettings/MusDrawSettings.any"};
    viewForce.Visible ??= Off;
  };
  AnyMuscleViaPoint ScalenusPosteriorR2C7 = {
    AnyMuscleModel &MusMdl =....MuscleModels.Left.Scalenus.ScalenusPosteriorR2C7;
    AnyRefNode &Org = ....Segments.C7Seg.Left.ScalenusPosteriorR2C7Node;
    AnyRefNode &Ins = ....Segments.Left.R2Seg.ScalenusPosteriorR2C7Node;
    viewMuscle = {#include "../drawSettings/MusDrawSettings.any"};
    viewForce.Visible ??= Off;
  };
  AnyMuscleViaPoint ScalenusPosteriorR2C6 = {
    AnyMuscleModel &MusMdl =....MuscleModels.Left.Scalenus.ScalenusPosteriorR2C6;
    AnyRefNode &Org = ....Segments.C6Seg.Left.ScalenusPosteriorR2C6Node;
    AnyRefNode &Ins = ....Segments.Left.R2Seg.ScalenusPosteriorR2C6Node;
    viewMuscle = {#include "../drawSettings/MusDrawSettings.any"};
    viewForce.Visible ??= Off;
  };
  AnyMuscleViaPoint ScalenusPosteriorR2C5 = {
    AnyMuscleModel &MusMdl =....MuscleModels.Left.Scalenus.ScalenusPosteriorR2C5;
    AnyRefNode &Org = ....Segments.C5Seg.Left.ScalenusPosteriorR2C5Node;
    AnyRefNode &Ins = ....Segments.Left.R2Seg.ScalenusPosteriorR2C5Node;
    viewMuscle = {#include "../drawSettings/MusDrawSettings.any"};
    viewForce.Visible ??= Off;
  };
};

// Model needs the Hyoid bone. The hyoid muscles try to stabilize the trachea and play a
// vital part in swallowing and speech.
AnyFolder Hyoid = {
  AnyMuscleViaPoint LumpedHyoidStC0 = {
    AnyMuscleModel &MusMdl = ....MuscleModels.Left.LumpedHyoid.LumpedHyoidT1C0;
    AnyRefNode &Org = ....Segments.SkullSeg.LumpedHyoidT1C0NodeL;
    AnyRefNode &Ins = ....Segments.SternumSeg.LumpedHyoidStC0NodeLIns;
    viewMuscle = {#include "../drawSettings/MusDrawSettings.any"};
    viewForce.Visible ??= Off;
  };
};

AnyFolder SemispinalisCapitis = {
  AnyMuscleViaPoint SemispinalisCapitisC4C0 = {
    AnyMuscleModel &MusMdl = ....MuscleModels.Left.Semispinalis.SemispinalisCapitisC4C0;
    AnyRefNode &Org = ....Segments.C4Seg.SemispinalisCapitisC4C0NodeL;
    AnyRefNode &Ins = ....Segments.SkullSeg.SemispinalisCapitisNodeL;
    viewMuscle = {#include "../drawSettings/MusDrawSettings.any"};
    viewForce.Visible ??= Off;
  };

  AnyMuscleViaPoint SemispinalisCapitisC5C0 = {
    AnyMuscleModel &MusMdl = ....MuscleModels.Left.Semispinalis.SemispinalisCapitisC5C0;
    AnyRefNode &Org = ....Segments.C5Seg.SemispinalisCapitisC5C0NodeL;
    AnyRefNode &Ins = ....Segments.SkullSeg.SemispinalisCapitisNodeL;
    viewMuscle = {#include "../drawSettings/MusDrawSettings.any"};
    viewForce.Visible ??= Off;
  };

  AnyMuscleViaPoint SemispinalisCapitisC6C0 = {
    AnyMuscleModel &MusMdl = ....MuscleModels.Left.Semispinalis.SemispinalisCapitisC6C0;
    AnyRefNode &Org = ....Segments.C6Seg.SemispinalisCapitisC6C0NodeL;
    AnyRefNode &Ins = ....Segments.SkullSeg.SemispinalisCapitisNodeL;
    viewMuscle = {#include "../drawSettings/MusDrawSettings.any"};
    viewForce.Visible ??= Off;
  };

  AnyMuscleViaPoint SemispinalisCapitisC7C0 = {
    AnyMuscleModel &MusMdl = ....MuscleModels.Left.Semispinalis.SemispinalisCapitisC7C0;
    AnyRefNode &Org = ....Segments.C7Seg.SemispinalisCapitisC7C0NodeL;
    AnyRefNode &Ins = ....Segments.SkullSeg.SemispinalisCapitisNodeL;
    viewMuscle = {#include "../drawSettings/MusDrawSettings.any"};
    viewForce.Visible ??= Off;
  };

  AnyMuscleViaPoint SemispinalisCapitisT1C0 = {
    AnyMuscleModel &MusMdl = ....MuscleModels.Left.Semispinalis.SemispinalisCapitisT1C0;
    AnyRefNode &Org = ....Segments.T1Seg.Left.SemispinalisCapitisT1C0Node;
    AnyRefNode &Ins = ....Segments.SkullSeg.SemispinalisCapitisNodeL;
    viewMuscle = {#include "../drawSettings/MusDrawSettings.any"};
    viewForce.Visible ??= Off;
  };
  AnyMuscleViaPoint SemispinalisCapitisT2C0 = {
    AnyMuscleModel &MusMdl = ....MuscleModels.Left.Semispinalis.SemispinalisCapitisT2C0;
    AnyRefNode &Org = ....Segments.T2Seg.Left.SemispinalisCapitisT2C0Node;
    AnyRefNode &Ins = ....Segments.SkullSeg.SemispinalisCapitisNodeL;
    viewMuscle = {#include "../drawSettings/MusDrawSettings.any"};
    viewForce.Visible ??= Off;
  };
  AnyMuscleViaPoint SemispinalisCapitisT3C0 = {
    AnyMuscleModel &MusMdl = ....MuscleModels.Left.Semispinalis.SemispinalisCapitisT3C0;
    AnyRefNode &Org = ....Segments.T3Seg.Left.SemispinalisCapitisT3C0Node;
    AnyRefNode &Ins = ....Segments.SkullSeg.SemispinalisCapitisNodeL;
    viewMuscle = {#include "../drawSettings/MusDrawSettings.any"};
    viewForce.Visible ??= Off;
  };
  AnyMuscleViaPoint SemispinalisCapitisT4C0 = {
    AnyMuscleModel &MusMdl = ....MuscleModels.Left.Semispinalis.SemispinalisCapitisT4C0;
    AnyRefNode &Org = ....Segments.T4Seg.Left.SemispinalisCapitisT4C0Node;
    AnyRefNode &Ins = ....Segments.SkullSeg.SemispinalisCapitisNodeL;
    viewMuscle = {#include "../drawSettings/MusDrawSettings.any"};
    viewForce.Visible ??= Off;
  };
  AnyMuscleViaPoint SemispinalisCapitisT5C0 = {
    AnyMuscleModel &MusMdl = ....MuscleModels.Left.Semispinalis.SemispinalisCapitisT5C0;
    AnyRefNode &Org = ....Segments.T5Seg.Left.SemispinalisCapitisT5C0Node;
    AnyRefNode &Ins = ....Segments.SkullSeg.SemispinalisCapitisNodeL;
    viewMuscle = {#include "../drawSettings/MusDrawSettings.any"};
    viewForce.Visible ??= Off;
  };
  AnyMuscleViaPoint SemispinalisCapitisT6C0 = {
    AnyMuscleModel &MusMdl = ....MuscleModels.Left.Semispinalis.SemispinalisCapitisT6C0;
    AnyRefNode &Org = ....Segments.T6Seg.Left.SemispinalisCapitisT6C0Node;
    AnyRefNode &Ins = ....Segments.SkullSeg.SemispinalisCapitisNodeL;
    viewMuscle = {#include "../drawSettings/MusDrawSettings.any"};
    viewForce.Visible ??= Off;
  };
};

AnyFolder SemispinalisCervicis = {
  AnyMuscleViaPoint SemispinalisCervicisT1C2 = {
    AnyMuscleModel &MusMdl = ....MuscleModels.Left.Semispinalis.SemispinalisCervicisT1C2;
    AnyRefNode &Org = ....Segments.T1Seg.SemispinalisCervicisT1C2NodeL;
    AnyRefNode &Ins = ....Segments.C2Seg.SemispinalisCervicisT1C2NodeL;
    viewMuscle = {#include "../drawSettings/MusDrawSettings.any"};
    viewForce.Visible ??= Off;
  };

  AnyMuscleViaPoint SemispinalisCervicisT2C3 = {
    AnyMuscleModel &MusMdl = ....MuscleModels.Left.Semispinalis.SemispinalisCervicisT2C3;
    AnyRefNode &Org = ....Segments.T2Seg.SemispinalisCervicisT2C3NodeL;
    AnyRefNode &Ins = ....Segments.C3Seg.SemispinalisCervicisT2C3NodeL;
    viewMuscle = {#include "../drawSettings/MusDrawSettings.any"};
    viewForce.Visible ??= Off;
  };

  AnyMuscleViaPoint SemispinalisCervicisT3C4 = {
    AnyMuscleModel &MusMdl = ....MuscleModels.Left.Semispinalis.SemispinalisCervicisT3C4;
    AnyRefNode &Org = ....Segments.T3Seg.SemispinalisCervicisT3C4NodeL;
    AnyRefNode &Ins = ....Segments.C4Seg.SemispinalisCervicisT3C4NodeL;
    viewMuscle = {#include "../drawSettings/MusDrawSettings.any"};
    viewForce.Visible ??= Off;
  };

  AnyMuscleViaPoint SemispinalisCervicisT4C5 = {
    AnyMuscleModel &MusMdl = ....MuscleModels.Left.Semispinalis.SemispinalisCervicisT4C5;
    AnyRefNode &Org = ....Segments.T4Seg.SemispinalisCervicisT4C5NodeL;
    AnyRefNode &Ins = ....Segments.C5Seg.SemispinalisCervicisT4C5NodeL;
    viewMuscle = {#include "../drawSettings/MusDrawSettings.any"};
    viewForce.Visible ??= Off;
  };

  AnyMuscleViaPoint SemispinalisCervicisT5C6 = {
    AnyMuscleModel &MusMdl = ....MuscleModels.Left.Semispinalis.SemispinalisCervicisT5C6;
    AnyRefNode &Org = ....Segments.T5Seg.SemispinalisCervicisT5C6NodeL;
    AnyRefNode &Ins = ....Segments.C6Seg.SemispinalisCervicisT5C6NodeL;
    viewMuscle = {#include "../drawSettings/MusDrawSettings.any"};
    viewForce.Visible ??= Off;
  };

  AnyMuscleViaPoint SemispinalisCervicisT6C7 = {
    AnyMuscleModel &MusMdl = ....MuscleModels.Left.Semispinalis.SemispinalisCervicisT6C7;
    AnyRefNode &Org = ....Segments.T6Seg.SemispinalisCervicisT6C7NodeL;
    AnyRefNode &Ins = ....Segments.C7Seg.SemispinalisCervicisT6C7NodeL;
    viewMuscle = {#include "../drawSettings/MusDrawSettings.any"};
    viewForce.Visible ??= Off;
  };
};

AnyFolder SemispinalisThoracis = {

  AnyMuscleViaPoint SSTT12T4 =
  {
    AnyMuscleModel &MusMdl = ....MuscleModels.Left.SemispinalisThoracis.SSTT12T4;
    AnyRefFrame &Org = ....Segments.T12Seg.SSTT12TransversusL;
    AnyRefNode &Via1 = ....Segments.T11Seg.SSTT11ViaNodeL;
    AnyRefNode &Via2 = ....Segments.T10Seg.SSTT10ViaNodeL;
    AnyRefNode &Via3 = ....Segments.T9Seg.SSTT9ViaNodeL;
    AnyRefNode &Via4 = ....Segments.T8Seg.SSTT8ViaNodeL;
    AnyRefNode &Via5 = ....Segments.T7Seg.SSTT4ViaNodeL;
    AnyRefFrame &Ins = ....Segments.T4Seg.SSTT4Spinous;
    viewMuscle = {#include "../drawSettings/MusDrawSettings.any"};
    viewForce.Visible ??= Off;
  };

  AnyMuscleViaPoint SSTT11T3 =
  {
    AnyMuscleModel &MusMdl = ....MuscleModels.Left.SemispinalisThoracis.SSTT11T3;
    AnyRefFrame &Org = ....Segments.T11Seg.SSTT11TransversusL;
    AnyRefNode &Via2 = ....Segments.T10Seg.SSTT10ViaNodeL;
    AnyRefNode &Via3 = ....Segments.T9Seg.SSTT9ViaNodeL;
    AnyRefNode &Via4 = ....Segments.T8Seg.SSTT8ViaNodeL;
    AnyRefNode &Via5 = ....Segments.T7Seg.SSTT3ViaNodeL;
    AnyRefFrame &Ins = ....Segments.T3Seg.SSTT3Spinous;
    viewMuscle = {#include "../drawSettings/MusDrawSettings.any"};
    viewForce.Visible ??= Off;
  };

  AnyMuscleViaPoint SSTT10T2 =
  {
    AnyMuscleModel &MusMdl = ....MuscleModels.Left.SemispinalisThoracis.SSTT10T2;
    AnyRefFrame &Org = ....Segments.T10Seg.SSTT10TransversusL;
    AnyRefNode &Via3 = ....Segments.T9Seg.SSTT9ViaNodeL;
    AnyRefNode &Via4 = ....Segments.T8Seg.SSTT8ViaNodeL;
    AnyRefNode &Via5 = ....Segments.T7Seg.SSTT2ViaNodeL;
    AnyRefFrame &Ins = ....Segments.T2Seg.SSTT2Spinous;
    viewMuscle = {#include "../drawSettings/MusDrawSettings.any"};
    viewForce.Visible ??= Off;
  };

  AnyMuscleViaPoint SSTT9T1 =
  {
    AnyMuscleModel &MusMdl = ....MuscleModels.Left.SemispinalisThoracis.SSTT9T1;
    AnyRefFrame &Org = ....Segments.T9Seg.SSTT9TransversusL;
    AnyRefNode &Via4 = ....Segments.T8Seg.SSTT9T4ViaNodeL;
    AnyRefNode &Via5 = ....Segments.T7Seg.SSTT9T1ViaNodeL;
    AnyRefFrame &Ins = ....Segments.T1Seg.SSTT1Spinous;
    viewMuscle = {#include "../drawSettings/MusDrawSettings.any"};
    viewForce.Visible ??= Off;
  };

  AnyMuscleViaPoint SSTT8C7 =
  {
    AnyMuscleModel &MusMdl = ....MuscleModels.Left.SemispinalisThoracis.SSTT8C7;
    AnyRefFrame &Org = ....Segments.T8Seg.SSTT8TransversusL;
    AnyRefNode &Via5 = ....Segments.T7Seg.SSTT8T4ViaNodeL;
    AnyRefFrame &Ins = ....Segments.C7Seg.SSTC7Spinous;
    viewMuscle = {#include "../drawSettings/MusDrawSettings.any"};
    viewForce.Visible ??= Off;
  };

  AnyMuscleViaPoint SSTT7C6 =
  {
    AnyMuscleModel &MusMdl = ....MuscleModels.Left.SemispinalisThoracis.SSTT7C6;
    AnyRefFrame &Org = ....Segments.T7Seg.SSTT7TransversusL;
    AnyRefFrame &Ins = ....Segments.C6Seg.SSTC6Spinous;
    viewMuscle = {#include "../drawSettings/MusDrawSettings.any"};
    viewForce.Visible ??= Off;
  };
};

AnyFolder SerratusPosteriorSuperior = {

  AnyMuscleViaPoint SPSR2C7 = {
    AnyMuscleModel &MusMdl = ....MuscleModels.Left.SerratusPosteriorSuperior.SPSR2C7;
    AnyRefNode &C7 = ....Segments.C7Seg.O_serratus_posterior_superior_1C7NodeL;
    AnyRefNode &R2 = ....Segments.Left.R2Seg.O_serratus_posterior_superior_1L;
    viewMuscle = {#include "../drawSettings/MusDrawSettings.any"};
    viewForce.Visible ??= Off;
  };

    AnyMuscleViaPoint SPSR3T1 = {
    AnyMuscleModel &MusMdl = ....MuscleModels.Left.SerratusPosteriorSuperior.SPSR3T1;
    AnyRefNode &T1 = ....Segments.T1Seg.O_serratus_posterior_superior_T1L;
    AnyRefNode &R3 = ....Segments.Left.R3Seg.O_serratus_posterior_superior_2L;
    viewMuscle = {#include "../drawSettings/MusDrawSettings.any"};
    viewForce.Visible ??= Off;
  };

    AnyMuscleViaPoint SPSR4T2 = {
    AnyMuscleModel &MusMdl = ....MuscleModels.Left.SerratusPosteriorSuperior.SPSR4T2;
    AnyRefNode &T2 = ....Segments.T2Seg.O_serratus_posterior_superior_T2L;
    AnyRefNode &R4 = ....Segments.Left.R4Seg.O_serratus_posterior_superior_3L;
    viewMuscle = {#include "../drawSettings/MusDrawSettings.any"};
    viewForce.Visible ??= Off;
  };

    AnyMuscleViaPoint SPSR5T3 = {
    AnyMuscleModel &MusMdl = ....MuscleModels.Left.SerratusPosteriorSuperior.SPSR5T3;
    AnyRefNode &T3 = ....Segments.T3Seg.O_serratus_posterior_superior_T3L;
    AnyRefNode &R5 = ....Segments.Left.R5Seg.O_serratus_posterior_superior_4L;
    viewMuscle = {#include "../drawSettings/MusDrawSettings.any"};
    viewForce.Visible ??= Off;
  };
};

AnyFolder SerratusPosteriorInferior = {

  AnyMuscleViaPoint SPIL2R12 = {
    AnyMuscleModel &MusMdl = ....MuscleModels.Left.SerratusPosteriorInferior.SPIL2R12;
    AnyRefNode &L2 = ....Segments.L2Seg.O_serratus_posterior_inferior_L;
    AnyRefNode &Via1 = ....Segments.L2Seg.O_serratus_posterior_inferior_L2R12ViaNode_L;
    AnyRefNode &R12 = ....Segments.Left.R12Seg.O_serratus_posterior_inferior_R12L;
    viewMuscle = {#include "../drawSettings/MusDrawSettings.any"};
    viewForce.Visible ??= Off;
  };

  AnyMuscleViaPoint SPIL1R11 = {
    AnyMuscleModel &MusMdl = ....MuscleModels.Left.SerratusPosteriorInferior.SPIL1R11;
    AnyRefNode &L1 = ....Segments.L1Seg.O_serratus_posterior_inferior_L;
    AnyRefNode &Via1 = ....Segments.L1Seg.O_serratus_posterior_inferior_L1R11ViaNode_L;
    AnyRefNode &R11 = ....Segments.Left.R11Seg.O_serratus_posterior_inferior_R11L;
    viewMuscle = {#include "../drawSettings/MusDrawSettings.any"};
    viewForce.Visible ??= Off;
  };

  AnyMuscleViaPoint SPIT12R10 = {
    AnyMuscleModel &MusMdl = ....MuscleModels.Left.SerratusPosteriorInferior.SPIT12R10;
    AnyRefNode &T12 = ....Segments.T12Seg.O_serratus_posterior_inferior_T12L;
    AnyRefNode &Via1 = ....Segments.T12Seg.O_serratus_posterior_inferior_T12R10ViaNodeL;
    AnyRefNode &R10 = ....Segments.Left.R10Seg.O_serratus_posterior_inferior_R10L;
    viewMuscle = {#include "../drawSettings/MusDrawSettings.any"};
    viewForce.Visible ??= Off;
  };

  AnyMuscleViaPoint SPIT11R9 = {
    AnyMuscleModel &MusMdl = ....MuscleModels.Left.SerratusPosteriorInferior.SPIT11R9;
    AnyRefNode &T11 = ....Segments.T11Seg.O_serratus_posterior_inferior_T11L;
    AnyRefNode &Via1 = ....Segments.T11Seg.O_serratus_posterior_inferior_T11R9ViaNodeL;
    AnyRefNode &R9 = ....Segments.Left.R9Seg.O_serratus_posterior_inferior_R9L;
    viewMuscle = {#include "../drawSettings/MusDrawSettings.any"};
    viewForce.Visible ??= Off;
  };
};

AnyFolder SpleniusCapitis = {
  AnyMuscleViaPoint SpleniusCapitisC7C0 = {
    AnyMuscleModel &MusMdl = ....MuscleModels.Left.Splenius.SpleniusCapitisC7C0;
    AnyRefNode &Org = ....Segments.SkullSeg.SpleniusCapitisNodeL;
    AnyRefNode &Ins = ....Segments.C7Seg.SpleniusCapitisC7C0NodeL;
    viewMuscle = {#include "../drawSettings/MusDrawSettings.any"};
    viewForce.Visible ??= Off;
  };
  AnyMuscleViaPoint SpleniusCapitisT1C0 = {
    AnyMuscleModel &MusMdl = ....MuscleModels.Left.Splenius.SpleniusCapitisT1C0;
    AnyRefNode &Org = ....Segments.SkullSeg.SpleniusCapitisNodeL;
    AnyRefNode &Ins = ....Segments.T1Seg.Left.SpleniusCapitisT1C0Node;
    viewMuscle = {#include "../drawSettings/MusDrawSettings.any"};
    viewForce.Visible ??= Off;
  };
  AnyMuscleViaPoint SpleniusCapitisT2C0 = {
    AnyMuscleModel &MusMdl = ....MuscleModels.Left.Splenius.SpleniusCapitisT2C0;
    AnyRefNode &Org = ....Segments.SkullSeg.SpleniusCapitisNodeL;
    AnyRefNode &Ins = ....Segments.T2Seg.Left.SpleniusCapitisT2C0Node;
    viewMuscle = {#include "../drawSettings/MusDrawSettings.any"};
    viewForce.Visible ??= Off;
  };
  AnyMuscleViaPoint SpleniusCapitisT3C0 = {
    AnyMuscleModel &MusMdl = ....MuscleModels.Left.Splenius.SpleniusCapitisT3C0;
    AnyRefNode &Org = ....Segments.SkullSeg.SpleniusCapitisNodeL;
    AnyRefNode &Ins = ....Segments.T3Seg.Left.SpleniusCapitisT3C0Node;
    viewMuscle = {#include "../drawSettings/MusDrawSettings.any"};
    viewForce.Visible ??= Off;
  };
};

AnyFolder SpleniusCervicis = {
  AnyMuscleViaPoint SpleniusCervicisT3C1 = {
    AnyMuscleModel &MusMdl = ....MuscleModels.Left.Splenius.SpleniusCervicisT3C1;
    AnyRefNode &Org = ....Segments.T3Seg.Left.SpleniusCervicisNode;
    AnyRefNode &Ins = ....Segments.C1Seg.Left.SpleniusCervicisT3C1Node;
    viewMuscle = {#include "../drawSettings/MusDrawSettings.any"};
    viewForce.Visible ??= Off;
  };
  AnyMuscleViaPoint SpleniusCervicisT4C2 = {
    AnyMuscleModel &MusMdl = ....MuscleModels.Left.Splenius.SpleniusCervicisT4C2;
    AnyRefNode &Org = ....Segments.T4Seg.Left.SpleniusCervicisNode;
    AnyRefNode &Ins = ....Segments.C2Seg.Left.SpleniusCervicisT4C2Node;
    viewMuscle = {#include "../drawSettings/MusDrawSettings.any"};
    viewForce.Visible ??= Off;
  };

  AnyMuscleViaPoint SpleniusCervicisT5C3 = {
    AnyMuscleModel &MusMdl = ....MuscleModels.Left.Splenius.SpleniusCervicisT5C3;
    AnyRefNode &Org = ....Segments.T5Seg.Left.SpleniusCervicisNode;
    AnyRefNode &Ins = ....Segments.C3Seg.Left.SpleniusCervicisT5C3Node;
    viewMuscle = {#include "../drawSettings/MusDrawSettings.any"};
    viewForce.Visible ??= Off;
  };
  AnyMuscleViaPoint SpleniusCervicisT6C3 = {
    AnyMuscleModel &MusMdl = ....MuscleModels.Left.Splenius.SpleniusCervicisT6C3;
    AnyRefNode &Org = ....Segments.T6Seg.Left.SpleniusCervicisNode;
    AnyRefNode &Ins = ....Segments.C3Seg.Left.SpleniusCervicisT6C3Node;
    viewMuscle = {#include "../drawSettings/MusDrawSettings.any"};
    viewForce.Visible ??= Off;
  };
};

#if BM_TRUNK_THORACIC_MODEL == _THORACIC_MODEL_FLEXIBLE_
  AnyFolder Subcostalis = {
    AnyMuscleViaPoint SCR1R3 = {
      AnyMuscleModel &MusMdl = ....MuscleModels.Left.Subcostalis.SCModel_1;
      AnyRefNode &R1 = ....Segments.Left.R1Seg.SCR1R3_L_Org;
      AnyRefNode &R3 = ....Segments.Left.R3Seg.SCR1R3_L_Ins;
      viewMuscle = {#include "../drawSettings/MusDrawSettings.any"};
      viewForce.Visible ??= Off;
    };

    AnyMuscleViaPoint SCR1R4 = {
      AnyMuscleModel &MusMdl = ....MuscleModels.Left.Subcostalis.SCModel_2;
      AnyRefNode &R1 = ....Segments.Left.R1Seg.SCR1R4_L_Org;
      AnyRefNode &R3 = ....Segments.Left.R4Seg.SCR1R4_L_Ins;
      viewMuscle = {#include "../drawSettings/MusDrawSettings.any"};
      viewForce.Visible ??= Off;
    };

    AnyMuscleViaPoint SCR2R4 = {
      AnyMuscleModel &MusMdl = ....MuscleModels.Left.Subcostalis.SCModel_3;
      AnyRefNode &R2 = ....Segments.Left.R2Seg.SCR2R4_L_Org;
      AnyRefNode &R4 = ....Segments.Left.R4Seg.SCR2R4_L_Ins;
      viewMuscle = {#include "../drawSettings/MusDrawSettings.any"};
      viewForce.Visible ??= Off;
    };

    AnyMuscleViaPoint SCR2R5 = {
      AnyMuscleModel &MusMdl = ....MuscleModels.Left.Subcostalis.SCModel_4;
      AnyRefNode &R2 = ....Segments.Left.R2Seg.SCR2R5_L_Org;
      AnyRefNode &R4 = ....Segments.Left.R5Seg.SCR2R5_L_Ins;
      viewMuscle = {#include "../drawSettings/MusDrawSettings.any"};
      viewForce.Visible ??= Off;
    };

    AnyMuscleViaPoint SCR3R5 = {
      AnyMuscleModel &MusMdl = ....MuscleModels.Left.Subcostalis.SCModel_5;
      AnyRefNode &R3 = ....Segments.Left.R3Seg.SCR3R5_L_Org;
      AnyRefNode &R5 = ....Segments.Left.R5Seg.SCR3R5_L_Ins;
      viewMuscle = {#include "../drawSettings/MusDrawSettings.any"};
      viewForce.Visible ??= Off;
    };

    AnyMuscleViaPoint SCR3R6 = {
      AnyMuscleModel &MusMdl = ....MuscleModels.Left.Subcostalis.SCModel_6;
      AnyRefNode &R3 = ....Segments.Left.R3Seg.SCR3R6_L_Org;
      AnyRefNode &R5 = ....Segments.Left.R6Seg.SCR3R6_L_Ins;
      viewMuscle = {#include "../drawSettings/MusDrawSettings.any"};
      viewForce.Visible ??= Off;
    };

    AnyMuscleViaPoint SCR4R6 = {
      AnyMuscleModel &MusMdl = ....MuscleModels.Left.Subcostalis.SCModel_7;
      AnyRefNode &R4 = ....Segments.Left.R4Seg.SCR4R6_L_Org;
      AnyRefNode &R6 = ....Segments.Left.R6Seg.SCR4R6_L_Ins;
      viewMuscle = {#include "../drawSettings/MusDrawSettings.any"};
      viewForce.Visible ??= Off;
    };

    AnyMuscleViaPoint SCR4R7 = {
      AnyMuscleModel &MusMdl = ....MuscleModels.Left.Subcostalis.SCModel_8;
      AnyRefNode &R4 = ....Segments.Left.R4Seg.SCR4R7_L_Org;
      AnyRefNode &R6 = ....Segments.Left.R7Seg.SCR4R7_L_Ins;
      viewMuscle = {#include "../drawSettings/MusDrawSettings.any"};
      viewForce.Visible ??= Off;
    };

    AnyMuscleViaPoint SCR5R7 = {
      AnyMuscleModel &MusMdl = ....MuscleModels.Left.Subcostalis.SCModel_9;
      AnyRefNode &R5 = ....Segments.Left.R5Seg.SCR5R7_L_Org;
      AnyRefNode &R7 = ....Segments.Left.R7Seg.SCR5R7_L_Ins;
      viewMuscle = {#include "../drawSettings/MusDrawSettings.any"};
      viewForce.Visible ??= Off;
    };

    AnyMuscleViaPoint SCR5R8 = {
      AnyMuscleModel &MusMdl = ....MuscleModels.Left.Subcostalis.SCModel_10;
      AnyRefNode &R5 = ....Segments.Left.R5Seg.SCR5R8_L_Org;
      AnyRefNode &R7 = ....Segments.Left.R8Seg.SCR5R8_L_Ins;
      viewMuscle = {#include "../drawSettings/MusDrawSettings.any"};
      viewForce.Visible ??= Off;
    };

    AnyMuscleViaPoint SCR6R8 = {
      AnyMuscleModel &MusMdl = ....MuscleModels.Left.Subcostalis.SCModel_11;
      AnyRefNode &R6 = ....Segments.Left.R6Seg.SCR6R8_L_Org;
      AnyRefNode &R8 = ....Segments.Left.R8Seg.SCR6R8_L_Ins;
      viewMuscle = {#include "../drawSettings/MusDrawSettings.any"};
      viewForce.Visible ??= Off;
    };

    AnyMuscleViaPoint SCR6R9 = {
      AnyMuscleModel &MusMdl = ....MuscleModels.Left.Subcostalis.SCModel_12;
      AnyRefNode &R6 = ....Segments.Left.R6Seg.SCR6R9_L_Org;
      AnyRefNode &R8 = ....Segments.Left.R9Seg.SCR6R9_L_Ins;
      viewMuscle = {#include "../drawSettings/MusDrawSettings.any"};
      viewForce.Visible ??= Off;
    };

    AnyMuscleViaPoint SCR7R9 = {
      AnyMuscleModel &MusMdl = ....MuscleModels.Left.Subcostalis.SCModel_13;
      AnyRefNode &R7 = ....Segments.Left.R7Seg.SCR7R9_L_Org;
      AnyRefNode &R9 = ....Segments.Left.R9Seg.SCR7R9_L_Ins;
      viewMuscle = {#include "../drawSettings/MusDrawSettings.any"};
      viewForce.Visible ??= Off;
    };

    AnyMuscleViaPoint SCR7R10 = {
      AnyMuscleModel &MusMdl = ....MuscleModels.Left.Subcostalis.SCModel_14;
      AnyRefNode &R7 = ....Segments.Left.R7Seg.SCR7R10_L_Org;
      AnyRefNode &R9 = ....Segments.Left.R10Seg.SCR7R10_L_Ins;
      viewMuscle = {#include "../drawSettings/MusDrawSettings.any"};
      viewForce.Visible ??= Off;
    };

    AnyMuscleViaPoint SCR8R10 = {
      AnyMuscleModel &MusMdl = ....MuscleModels.Left.Subcostalis.SCModel_15;
      AnyRefNode &R8 = ....Segments.Left.R8Seg.SCR8R10_L_Org;
      AnyRefNode &R10 = ....Segments.Left.R10Seg.SCR8R10_L_Ins;
      viewMuscle = {#include "../drawSettings/MusDrawSettings.any"};
      viewForce.Visible ??= Off;
    };

    AnyMuscleViaPoint SCR8R11 = {
      AnyMuscleModel &MusMdl = ....MuscleModels.Left.Subcostalis.SCModel_16;
      AnyRefNode &R8 = ....Segments.Left.R8Seg.SCR8R11_L_Ins;
      AnyRefNode &R11 = ....Segments.Left.R11Seg.SCR8R11_L_Org;
      viewMuscle = {#include "../drawSettings/MusDrawSettings.any"};
      viewForce.Visible ??= Off;
    };

    AnyMuscleViaPoint SCR9R11 = {
      AnyMuscleModel &MusMdl = ....MuscleModels.Left.Subcostalis.SCModel_17;
      AnyRefNode &R9 = ....Segments.Left.R9Seg.SCR9R11_L_Ins;
      AnyRefNode &R11 = ....Segments.Left.R11Seg.SCR9R11_L_Org;
      viewMuscle = {#include "../drawSettings/MusDrawSettings.any"};
      viewForce.Visible ??= Off;
    };
  };
#endif

AnyFolder ThoracicMultifidi = {
  AnyMuscleViaPoint MFT4T1 = {
    AnyMuscleModel &MusMdl = ....MuscleModels.Left.Multifidi.MFT4T1;
    AnyRefFrame &Org = ....Segments.T4Seg.MFT4T1NodeLOrg;
    AnyRefFrame &Ins = ....Segments.T1Seg.MFT4T1NodeLIns;
    viewMuscle = {#include "../drawSettings/MusDrawSettings.any"};
    viewForce.Visible ??= Off;
  };

  AnyMuscleViaPoint MFT5T1 = {
    AnyMuscleModel &MusMdl = ....MuscleModels.Left.Multifidi.MFT5T1;
    AnyRefFrame &Org = ....Segments.T5Seg.MFT5T1NodeLOrg;
    AnyRefFrame &Ins = ....Segments.T1Seg.MFT5T1NodeLIns;
    viewMuscle = {#include "../drawSettings/MusDrawSettings.any"};
    viewForce.Visible ??= Off;
  };

  AnyMuscleViaPoint MFT5T2 = {
    AnyMuscleModel &MusMdl = ....MuscleModels.Left.Multifidi.MFT5T2;
    AnyRefFrame &Org = ....Segments.T5Seg.MFT5T2NodeLOrg;
    AnyRefFrame &Ins = ....Segments.T2Seg.MFT5T2NodeLIns;
    viewMuscle = {#include "../drawSettings/MusDrawSettings.any"};
    viewForce.Visible ??= Off;
  };

  AnyMuscleViaPoint MFT6T1 = {
    AnyMuscleModel &MusMdl = ....MuscleModels.Left.Multifidi.MFT6T1;
    AnyRefFrame &Org = ....Segments.T6Seg.MFT6T1NodeLOrg;
    AnyRefFrame &Ins = ....Segments.T1Seg.MFT6T1NodeLIns;
    viewMuscle = {#include "../drawSettings/MusDrawSettings.any"};
    viewForce.Visible ??= Off;
  };

  AnyMuscleViaPoint MFT6T2 = {
    AnyMuscleModel &MusMdl = ....MuscleModels.Left.Multifidi.MFT6T2;
    AnyRefFrame &Org = ....Segments.T6Seg.MFT6T2NodeLOrg;
    AnyRefFrame &Ins = ....Segments.T2Seg.MFT6T2NodeLIns;
    viewMuscle = {#include "../drawSettings/MusDrawSettings.any"};
    viewForce.Visible ??= Off;
  };

  AnyMuscleViaPoint MFT6T3 = {
    AnyMuscleModel &MusMdl = ....MuscleModels.Left.Multifidi.MFT6T3;
    AnyRefFrame &Org = ....Segments.T6Seg.MFT6T3NodeLOrg;
    AnyRefFrame &Ins = ....Segments.T3Seg.MFT6T3NodeLIns;
    viewMuscle = {#include "../drawSettings/MusDrawSettings.any"};
    viewForce.Visible ??= Off;
  };

  AnyMuscleViaPoint MFT7T2 = {
    AnyMuscleModel &MusMdl = ....MuscleModels.Left.Multifidi.MFT7T2;
    AnyRefFrame &Org = ....Segments.T7Seg.MFT7T2NodeLOrg;
    AnyRefFrame &Ins = ....Segments.T2Seg.MFT7T2NodeLIns;
    viewMuscle = {#include "../drawSettings/MusDrawSettings.any"};
    viewForce.Visible ??= Off;
  };

  AnyMuscleViaPoint MFT7T3 = {
    AnyMuscleModel &MusMdl = ....MuscleModels.Left.Multifidi.MFT7T3;
    AnyRefFrame &Org = ....Segments.T7Seg.MFT7T3NodeLOrg;
    AnyRefFrame &Ins = ....Segments.T3Seg.MFT7T3NodeLIns;
    viewMuscle = {#include "../drawSettings/MusDrawSettings.any"};
    viewForce.Visible ??= Off;
  };

  AnyMuscleViaPoint MFT7T4 = {
    AnyMuscleModel &MusMdl = ....MuscleModels.Left.Multifidi.MFT7T4;
    AnyRefFrame &Org = ....Segments.T7Seg.MFT7T4NodeLOrg;
    AnyRefFrame &Ins = ....Segments.T4Seg.MFT7T4NodeLIns;
    viewMuscle = {#include "../drawSettings/MusDrawSettings.any"};
    viewForce.Visible ??= Off;
  };

  AnyMuscleViaPoint MFT8T3 = {
    AnyMuscleModel &MusMdl = ....MuscleModels.Left.Multifidi.MFT8T3;
    AnyRefFrame &Org = ....Segments.T8Seg.MFT8T3NodeLOrg;
    AnyRefFrame &Ins = ....Segments.T3Seg.MFT8T3NodeLIns;
    viewMuscle = {#include "../drawSettings/MusDrawSettings.any"};
    viewForce.Visible ??= Off;
  };

  AnyMuscleViaPoint MFT8T4 = {
    AnyMuscleModel &MusMdl = ....MuscleModels.Left.Multifidi.MFT8T4;
    AnyRefFrame &Org = ....Segments.T8Seg.MFT8T4NodeLOrg;
    AnyRefFrame &Ins = ....Segments.T4Seg.MFT8T4NodeLIns;
    viewMuscle = {#include "../drawSettings/MusDrawSettings.any"};
    viewForce.Visible ??= Off;
  };

  AnyMuscleViaPoint MFT8T5 = {
    AnyMuscleModel &MusMdl = ....MuscleModels.Left.Multifidi.MFT8T5;
    AnyRefFrame &Org = ....Segments.T8Seg.MFT8T5NodeLOrg;
    AnyRefFrame &Ins = ....Segments.T5Seg.MFT8T5NodeLIns;
    viewMuscle = {#include "../drawSettings/MusDrawSettings.any"};
    viewForce.Visible ??= Off;
  };

  AnyMuscleViaPoint MFT9T4 = {
    AnyMuscleModel &MusMdl = ....MuscleModels.Left.Multifidi.MFT9T4;
    AnyRefFrame &Org = ....Segments.T9Seg.MFT9T4NodeLOrg;
    AnyRefFrame &Ins = ....Segments.T4Seg.MFT9T4NodeLIns;
    viewMuscle = {#include "../drawSettings/MusDrawSettings.any"};
    viewForce.Visible ??= Off;
  };

  AnyMuscleViaPoint MFT9T5 = {
    AnyMuscleModel &MusMdl = ....MuscleModels.Left.Multifidi.MFT9T5;
    AnyRefFrame &Org = ....Segments.T9Seg.MFT9T5NodeLOrg;
    AnyRefFrame &Ins = ....Segments.T5Seg.MFT9T5NodeLIns;
    viewMuscle = {#include "../drawSettings/MusDrawSettings.any"};
    viewForce.Visible ??= Off;
  };

  AnyMuscleViaPoint MFT9T6 = {
    AnyMuscleModel &MusMdl = ....MuscleModels.Left.Multifidi.MFT9T6;
    AnyRefFrame &Org = ....Segments.T9Seg.MFT9T6NodeLOrg;
    AnyRefFrame &Ins = ....Segments.T6Seg.MFT9T6NodeLIns;
    viewMuscle = {#include "../drawSettings/MusDrawSettings.any"};
    viewForce.Visible ??= Off;
  };

  AnyMuscleViaPoint MFT10T5 = {
    AnyMuscleModel &MusMdl = ....MuscleModels.Left.Multifidi.MFT10T5;
    AnyRefFrame &Org = ....Segments.T10Seg.MFT10T5NodeLOrg;
    AnyRefFrame &Ins = ....Segments.T5Seg.MFT10T5NodeLIns;
    viewMuscle = {#include "../drawSettings/MusDrawSettings.any"};
    viewForce.Visible ??= Off;
  };

  AnyMuscleViaPoint MFT10T6 = {
    AnyMuscleModel &MusMdl = ....MuscleModels.Left.Multifidi.MFT10T6;
    AnyRefFrame &Org = ....Segments.T10Seg.MFT10T6NodeLOrg;
    AnyRefFrame &Ins = ....Segments.T6Seg.MFT10T6NodeLIns;
    viewMuscle = {#include "../drawSettings/MusDrawSettings.any"};
    viewForce.Visible ??= Off;
  };

  AnyMuscleViaPoint MFT10T7 = {
    AnyMuscleModel &MusMdl = ....MuscleModels.Left.Multifidi.MFT10T7;
    AnyRefFrame &Org = ....Segments.T10Seg.MFT10T7NodeLOrg;
    AnyRefFrame &Ins = ....Segments.T7Seg.MFT10T7NodeLIns;
    viewMuscle = {#include "../drawSettings/MusDrawSettings.any"};
    viewForce.Visible ??= Off;
  };

  AnyMuscleViaPoint MFT11T6 = {
    AnyMuscleModel &MusMdl = ....MuscleModels.Left.Multifidi.MFT11T6;
    AnyRefFrame &Org = ....Segments.T11Seg.MFT11T6NodeLOrg;
    AnyRefFrame &Ins = ....Segments.T6Seg.MFT11T6NodeLIns;
    viewMuscle = {#include "../drawSettings/MusDrawSettings.any"};
    viewForce.Visible ??= Off;
  };

  AnyMuscleViaPoint MFT11T7 = {
    AnyMuscleModel &MusMdl = ....MuscleModels.Left.Multifidi.MFT11T7;
    AnyRefFrame &Org = ....Segments.T11Seg.MFT11T7NodeLOrg;
    AnyRefFrame &Ins = ....Segments.T7Seg.MFT11T7NodeLIns;
    viewMuscle = {#include "../drawSettings/MusDrawSettings.any"};
    viewForce.Visible ??= Off;
  };

  AnyMuscleViaPoint MFT11T8 = {
    AnyMuscleModel &MusMdl = ....MuscleModels.Left.Multifidi.MFT11T8;
    AnyRefFrame &Org = ....Segments.T11Seg.MFT11T8NodeLOrg;
    AnyRefFrame &Ins = ....Segments.T8Seg.MFT11T8NodeLIns;
    viewMuscle = {#include "../drawSettings/MusDrawSettings.any"};
    viewForce.Visible ??= Off;
  };

  AnyMuscleViaPoint MFT12T7 = {
    AnyMuscleModel &MusMdl = ....MuscleModels.Left.Multifidi.MFT12T7;
    AnyRefFrame &Org = ....Segments.T12Seg.MFT12T7NodeLOrg;
    AnyRefFrame &Ins = ....Segments.T7Seg.MFT12T7NodeLIns;
    viewMuscle = {#include "../drawSettings/MusDrawSettings.any"};
    viewForce.Visible ??= Off;
  };

  AnyMuscleViaPoint MFT12T8 = {
    AnyMuscleModel &MusMdl = ....MuscleModels.Left.Multifidi.MFT12T8;
    AnyRefFrame &Org = ....Segments.T12Seg.MFT12T8NodeLOrg;
    AnyRefFrame &Ins = ....Segments.T8Seg.MFT12T8NodeLIns;
    viewMuscle = {#include "../drawSettings/MusDrawSettings.any"};
    viewForce.Visible ??= Off;
  };

  AnyMuscleViaPoint MFT12T9 = {
    AnyMuscleModel &MusMdl = ....MuscleModels.Left.Multifidi.MFT12T9;
    AnyRefFrame &Org = ....Segments.T12Seg.MFT12T9NodeLOrg;
    AnyRefFrame &Ins = ....Segments.T9Seg.MFT12T9NodeLIns;
    viewMuscle = {#include "../drawSettings/MusDrawSettings.any"};
    viewForce.Visible ??= Off;
  };

  AnyMuscleViaPoint MFL1T8 = {
    AnyMuscleModel &MusMdl = ....MuscleModels.Left.Multifidi.MFL1T8;
    AnyRefFrame &Org = ....Segments.L1Seg.MFL1T8NodeLOrg;
    AnyRefFrame &Ins = ....Segments.T8Seg.MFL1T8NodeLIns;
    viewMuscle = {#include "../drawSettings/MusDrawSettings.any" };
    viewForce.Visible ??= Off;
  };

  AnyMuscleViaPoint MFL1T9 = {
    AnyMuscleModel &MusMdl = ....MuscleModels.Left.Multifidi.MFL1T9;
    AnyRefFrame &Org = ....Segments.L1Seg.MFL1T9NodeLOrg;
    AnyRefFrame &Ins = ....Segments.T9Seg.MFL1T9NodeLIns;
    viewMuscle = {#include "../drawSettings/MusDrawSettings.any"};
    viewForce.Visible ??= Off;
  };

  AnyMuscleViaPoint MFL1T10 = {
    AnyMuscleModel &MusMdl = ....MuscleModels.Left.Multifidi.MFL1T10;
    AnyRefFrame &Org = ....Segments.L1Seg.MFL1T10NodeLOrg;
    AnyRefFrame &Ins = ....Segments.T10Seg.MFL1T10NodeLIns;
    viewMuscle = {#include "../drawSettings/MusDrawSettings.any"};
    viewForce.Visible ??= Off;
  };

  AnyMuscleViaPoint MFL2T9 = {
    AnyMuscleModel &MusMdl = ....MuscleModels.Left.Multifidi.MFL2T9;
    AnyRefFrame &Org = ....Segments.L2Seg.MFL2T9NodeLOrg;
    AnyRefFrame &Ins = ....Segments.T9Seg.MFL2T9NodeLIns;
    viewMuscle = {#include "../drawSettings/MusDrawSettings.any"};
    viewForce.Visible ??= Off;
  };

  AnyMuscleViaPoint MFL2T10 = {
    AnyMuscleModel &MusMdl = ....MuscleModels.Left.Multifidi.MFL2T10;
    AnyRefFrame &Org = ....Segments.L2Seg.MFL2T10NodeLOrg;
    AnyRefFrame &Ins = ....Segments.T10Seg.MFL2T10NodeLIns;
    viewMuscle = {#include "../drawSettings/MusDrawSettings.any" };
    viewForce.Visible ??= Off;
  };

  AnyMuscleViaPoint MFL2T11 = {
    AnyMuscleModel &MusMdl = ....MuscleModels.Left.Multifidi.MFL2T11;
    AnyRefFrame &Org = ....Segments.L2Seg.MFL2T11NodeLOrg;
    AnyRefFrame &Ins = ....Segments.T11Seg.MFL2T11NodeLIns;
    viewMuscle = {#include "../drawSettings/MusDrawSettings.any" };
    viewForce.Visible ??= Off;
  };

  AnyMuscleViaPoint MFL3T10 = {
    AnyMuscleModel &MusMdl = ....MuscleModels.Left.Multifidi.MFL3T10;
    AnyRefFrame &Org = ....Segments.L3Seg.MFL3T10NodeLOrg;
    AnyRefFrame &Ins = ....Segments.T10Seg.MFL3T10NodeLIns;
    viewMuscle = {#include "../drawSettings/MusDrawSettings.any" };
    viewForce.Visible ??= Off;
  };

  AnyMuscleViaPoint MFL3T11 = {
    AnyMuscleModel &MusMdl = ....MuscleModels.Left.Multifidi.MFL3T11;
    AnyRefFrame &Org = ....Segments.L3Seg.MFL3T11NodeLOrg;
    AnyRefFrame &Ins = ....Segments.T11Seg.MFL3T11NodeLIns;
    viewMuscle = {#include "../drawSettings/MusDrawSettings.any" };
    viewForce.Visible ??= Off;
  };

  AnyMuscleViaPoint MFL3T12 = {
    AnyMuscleModel &MusMdl = ....MuscleModels.Left.Multifidi.MFL3T12;
    AnyRefFrame &Org = ....Segments.L3Seg.MFL3T12NodeLOrg;
    AnyRefFrame &Ins = ....Segments.T12Seg.MFL3T12NodeLIns;
    viewMuscle = {#include "../drawSettings/MusDrawSettings.any"};
    viewForce.Visible ??= Off;
  };

  AnyMuscleViaPoint MFL4T11 = {
    AnyMuscleModel &MusMdl = ....MuscleModels.Left.Multifidi.MFL4T11;
    AnyRefFrame &Org = ....Segments.L4Seg.MFL4T11NodeLOrg;
    AnyRefFrame &Ins = ....Segments.T11Seg.MFL4T11NodeLIns;
    viewMuscle = {#include "../drawSettings/MusDrawSettings.any"};
    viewForce.Visible ??= Off;
  };

  AnyMuscleViaPoint MFL4T12 = {
    AnyMuscleModel &MusMdl = ....MuscleModels.Left.Multifidi.MFL4T12;
    AnyRefFrame &Org = ....Segments.L4Seg.MFL4T12NodeLOrg;
    AnyRefFrame &Ins = ....Segments.T12Seg.MFL4T12NodeLIns;
    viewMuscle = {#include "../drawSettings/MusDrawSettings.any"};
    viewForce.Visible ??= Off;
  };

  AnyMuscleViaPoint MFL5T12 = {
    AnyMuscleModel &MusMdl = ....MuscleModels.Left.Multifidi.MFL5T12;
    AnyRefFrame &Org = ....Segments.L5Seg.MFL5T12NodeLOrg;
    AnyRefFrame &Ins = ....Segments.T12Seg.MFL5T12NodeLIns;
    viewMuscle = {#include "../drawSettings/MusDrawSettings.any"};
    viewForce.Visible ??= Off;
  };
};

#if BM_TRUNK_THORACIC_MODEL == _THORACIC_MODEL_FLEXIBLE_
AnyFolder RotatoresBrevis = {
    AnyMuscleViaPoint RotatoresBrevisT1C7 =   {
     AnyMuscleModel &MusMdl = ....MuscleModels.Left.RotatoresBrevis.RotatoresBrevis_1;
     AnyRefFrame &Org = ....Segments.T1Seg.Left.RotatoresBrevisT1C7Node;
     AnyRefFrame &Ins = ....Segments.C7Seg.Left.RotatoresBrevisT1C7Node;
     viewMuscle = {#include "../drawSettings/MusDrawSettings.any"};
     viewForce.Visible ??= Off;
   };
    AnyMuscleViaPoint RotatoresBrevisT2T1 =   {
     AnyMuscleModel &MusMdl = ....MuscleModels.Left.RotatoresBrevis.RotatoresBrevis_2;
     AnyRefFrame &Org = ....Segments.T2Seg.Left.RotatoresBrevisT2T1Node;
     AnyRefFrame &Ins = ....Segments.T1Seg.Left.RotatoresBrevisT2T1Node;
     viewMuscle = {#include "../drawSettings/MusDrawSettings.any"};
     viewForce.Visible ??= Off;
   };
    AnyMuscleViaPoint RotatoresBrevisT3T2 =   {
     AnyMuscleModel &MusMdl = ....MuscleModels.Left.RotatoresBrevis.RotatoresBrevis_3;
     AnyRefFrame &Org = ....Segments.T3Seg.Left.RotatoresBrevisT3T2Node;
     AnyRefFrame &Ins = ....Segments.T2Seg.Left.RotatoresBrevisT3T2Node;
     viewMuscle = {#include "../drawSettings/MusDrawSettings.any"};
     viewForce.Visible ??= Off;
   };
    AnyMuscleViaPoint RotatoresBrevisT4T3 =   {
     AnyMuscleModel &MusMdl = ....MuscleModels.Left.RotatoresBrevis.RotatoresBrevis_4;
     AnyRefFrame &Org = ....Segments.T4Seg.Left.RotatoresBrevisT4T3Node;
     AnyRefFrame &Ins = ....Segments.T3Seg.Left.RotatoresBrevisT4T3Node;
     viewMuscle = {#include "../drawSettings/MusDrawSettings.any"};
     viewForce.Visible ??= Off;
   };
    AnyMuscleViaPoint RotatoresBrevisT5T4 =   {
     AnyMuscleModel &MusMdl = ....MuscleModels.Left.RotatoresBrevis.RotatoresBrevis_5;
     AnyRefFrame &Org = ....Segments.T5Seg.Left.RotatoresBrevisT5T4Node;
     AnyRefFrame &Ins = ....Segments.T4Seg.Left.RotatoresBrevisT5T4Node;
     viewMuscle = {#include "../drawSettings/MusDrawSettings.any"};
     viewForce.Visible ??= Off;
   };
    AnyMuscleViaPoint RotatoresBrevisT6T5 =   {
     AnyMuscleModel &MusMdl = ....MuscleModels.Left.RotatoresBrevis.RotatoresBrevis_6;
     AnyRefFrame &Org = ....Segments.T6Seg.Left.RotatoresBrevisT6T5Node;
     AnyRefFrame &Ins = ....Segments.T5Seg.Left.RotatoresBrevisT6T5Node;
     viewMuscle = {#include "../drawSettings/MusDrawSettings.any"};
     viewForce.Visible ??= Off;
   };
    AnyMuscleViaPoint RotatoresBrevisT7T6 =   {
     AnyMuscleModel &MusMdl = ....MuscleModels.Left.RotatoresBrevis.RotatoresBrevis_7;
     AnyRefFrame &Org = ....Segments.T7Seg.Left.RotatoresBrevisT7T6Node;
     AnyRefFrame &Ins = ....Segments.T6Seg.Left.RotatoresBrevisT7T6Node;
     viewMuscle = {#include "../drawSettings/MusDrawSettings.any"};
     viewForce.Visible ??= Off;
   };
    AnyMuscleViaPoint RotatoresBrevisT8T7 =   {
     AnyMuscleModel &MusMdl = ....MuscleModels.Left.RotatoresBrevis.RotatoresBrevis_8;
     AnyRefFrame &Org = ....Segments.T8Seg.Left.RotatoresBrevisT8T7Node;
     AnyRefFrame &Ins = ....Segments.T7Seg.Left.RotatoresBrevisT8T7Node;
     viewMuscle = {#include "../drawSettings/MusDrawSettings.any"};
     viewForce.Visible ??= Off;
   };
    AnyMuscleViaPoint RotatoresBrevisT9T8 =   {
     AnyMuscleModel &MusMdl = ....MuscleModels.Left.RotatoresBrevis.RotatoresBrevis_9;
     AnyRefFrame &Org = ....Segments.T9Seg.Left.RotatoresBrevisT9T8Node;
     AnyRefFrame &Ins = ....Segments.T8Seg.Left.RotatoresBrevisT9T8Node;
     viewMuscle = {#include "../drawSettings/MusDrawSettings.any"};
     viewForce.Visible ??= Off;
   };
    AnyMuscleViaPoint RotatoresBrevisT10T9 =   {
     AnyMuscleModel &MusMdl = ....MuscleModels.Left.RotatoresBrevis.RotatoresBrevis_10;
     AnyRefFrame &Org = ....Segments.T10Seg.Left.RotatoresBrevisT10T9Node;
     AnyRefFrame &Ins = ....Segments.T9Seg.Left.RotatoresBrevisT10T9Node;
     viewMuscle = {#include "../drawSettings/MusDrawSettings.any"};
     viewForce.Visible ??= Off;
   };
    AnyMuscleViaPoint RotatoresBrevisT11T10 =   {
     AnyMuscleModel &MusMdl = ....MuscleModels.Left.RotatoresBrevis.RotatoresBrevis_11;
     AnyRefFrame &Org = ....Segments.T11Seg.Left.RotatoresBrevisT11T10Node;
     AnyRefFrame &Ins = ....Segments.T10Seg.Left.RotatoresBrevisT11T10Node;
     viewMuscle = {#include "../drawSettings/MusDrawSettings.any"};
     viewForce.Visible ??= Off;
   };
    AnyMuscleViaPoint RotatoresBrevisT12T11 =   {
     AnyMuscleModel &MusMdl = ....MuscleModels.Left.RotatoresBrevis.RotatoresBrevis_12;
     AnyRefFrame &Org = ....Segments.T12Seg.Left.RotatoresBrevisT12T11Node;
     AnyRefFrame &Ins = ....Segments.T11Seg.Left.RotatoresBrevisT12T11Node;
     viewMuscle = {#include "../drawSettings/MusDrawSettings.any"};
     viewForce.Visible ??= Off;
   };
};

AnyFolder RotatoresLongus = {
    AnyMuscleViaPoint RotatoresLongusT2C7 =   {
     AnyMuscleModel &MusMdl = ....MuscleModels.Left.RotatoresLongus.RotatoresLongus_1;
     AnyRefFrame &Org = ....Segments.T2Seg.Left.RotatoresLongusT2C7Node;
     AnyRefFrame &Ins = ....Segments.C7Seg.Left.RotatoresLongusT2C7Node;
     viewMuscle = {#include "../drawSettings/MusDrawSettings.any"};
     viewForce.Visible ??= Off;
   };
    AnyMuscleViaPoint RotatoresLongusT3T1 =   {
     AnyMuscleModel &MusMdl = ....MuscleModels.Left.RotatoresLongus.RotatoresLongus_2;
     AnyRefFrame &Org = ....Segments.T3Seg.Left.RotatoresLongusT3T1Node;
     AnyRefFrame &Ins = ....Segments.T1Seg.Left.RotatoresLongusT3T1Node;
     viewMuscle = {#include "../drawSettings/MusDrawSettings.any"};
     viewForce.Visible ??= Off;
   };
    AnyMuscleViaPoint RotatoresLongusT4T2 =   {
     AnyMuscleModel &MusMdl = ....MuscleModels.Left.RotatoresLongus.RotatoresLongus_3;
     AnyRefFrame &Org = ....Segments.T4Seg.Left.RotatoresLongusT4T2Node;
     AnyRefFrame &Ins = ....Segments.T2Seg.Left.RotatoresLongusT4T2Node;
     viewMuscle = {#include "../drawSettings/MusDrawSettings.any"};
     viewForce.Visible ??= Off;
   };
    AnyMuscleViaPoint RotatoresLongusT5T3 =   {
     AnyMuscleModel &MusMdl = ....MuscleModels.Left.RotatoresLongus.RotatoresLongus_4;
     AnyRefFrame &Org = ....Segments.T5Seg.Left.RotatoresLongusT5T3Node;
     AnyRefFrame &Ins = ....Segments.T3Seg.Left.RotatoresLongusT5T3Node;
     viewMuscle = {#include "../drawSettings/MusDrawSettings.any"};
     viewForce.Visible ??= Off;
   };
    AnyMuscleViaPoint RotatoresLongusT6T4 =   {
     AnyMuscleModel &MusMdl = ....MuscleModels.Left.RotatoresLongus.RotatoresLongus_5;
     AnyRefFrame &Org = ....Segments.T6Seg.Left.RotatoresLongusT6T4Node;
     AnyRefFrame &Ins = ....Segments.T4Seg.Left.RotatoresLongusT6T4Node;
     viewMuscle = {#include "../drawSettings/MusDrawSettings.any"};
     viewForce.Visible ??= Off;
   };
    AnyMuscleViaPoint RotatoresLongusT7T5 =   {
     AnyMuscleModel &MusMdl = ....MuscleModels.Left.RotatoresLongus.RotatoresLongus_6;
     AnyRefFrame &Org = ....Segments.T7Seg.Left.RotatoresLongusT7T5Node;
     AnyRefFrame &Ins = ....Segments.T5Seg.Left.RotatoresLongusT7T5Node;
     viewMuscle = {#include "../drawSettings/MusDrawSettings.any"};
     viewForce.Visible ??= Off;
   };
    AnyMuscleViaPoint RotatoresLongusT8T6 =   {
     AnyMuscleModel &MusMdl = ....MuscleModels.Left.RotatoresLongus.RotatoresLongus_7;
     AnyRefFrame &Org = ....Segments.T8Seg.Left.RotatoresLongusT8T6Node;
     AnyRefFrame &Ins = ....Segments.T6Seg.Left.RotatoresLongusT8T6Node;
     viewMuscle = {#include "../drawSettings/MusDrawSettings.any"};
     viewForce.Visible ??= Off;
   };
    AnyMuscleViaPoint RotatoresLongusT9T7 =   {
     AnyMuscleModel &MusMdl = ....MuscleModels.Left.RotatoresLongus.RotatoresLongus_8;
     AnyRefFrame &Org = ....Segments.T9Seg.Left.RotatoresLongusT9T7Node;
     AnyRefFrame &Ins = ....Segments.T7Seg.Left.RotatoresLongusT9T7Node;
     viewMuscle = {#include "../drawSettings/MusDrawSettings.any"};
     viewForce.Visible ??= Off;
   };
    AnyMuscleViaPoint RotatoresLongusT10T8 =   {
     AnyMuscleModel &MusMdl = ....MuscleModels.Left.RotatoresLongus.RotatoresLongus_9;
     AnyRefFrame &Org = ....Segments.T10Seg.Left.RotatoresLongusT10T8Node;
     AnyRefFrame &Ins = ....Segments.T8Seg.Left.RotatoresLongusT10T8Node;
     viewMuscle = {#include "../drawSettings/MusDrawSettings.any"};
     viewForce.Visible ??= Off;
   };
    AnyMuscleViaPoint RotatoresLongusT11T9 =   {
     AnyMuscleModel &MusMdl = ....MuscleModels.Left.RotatoresLongus.RotatoresLongus_10;
     AnyRefFrame &Org = ....Segments.T11Seg.Left.RotatoresLongusT11T9Node;
     AnyRefFrame &Ins = ....Segments.T9Seg.Left.RotatoresLongusT11T9Node;
     viewMuscle = {#include "../drawSettings/MusDrawSettings.any"};
     viewForce.Visible ??= Off;
   };
    AnyMuscleViaPoint RotatoresLongusT12T10 =   {
     AnyMuscleModel &MusMdl = ....MuscleModels.Left.RotatoresLongus.RotatoresLongus_11;
     AnyRefFrame &Org = ....Segments.T12Seg.Left.RotatoresLongusT12T10Node;
     AnyRefFrame &Ins = ....Segments.T10Seg.Left.RotatoresLongusT12T10Node;
     viewMuscle = {#include "../drawSettings/MusDrawSettings.any"};
     viewForce.Visible ??= Off;
   };
 };

  AnyFolder TransversusThoracis = {
    AnyMuscleViaPoint TrThR2S = {
      AnyMuscleModel &MusMdl = ....MuscleModels.Left.TransversusThoracis.TransvThModel_1;
      AnyRefNode &R2 = ....Segments.Left.R2Seg.TrThR2SNodeLOrg;
      AnyRefNode &S = ....Segments.SternalBodySeg.TrThR2SNodeLIns;
      viewMuscle = {#include "../drawSettings/MusDrawSettings.any"};
      viewForce.Visible ??= Off;
    };

    AnyMuscleViaPoint TrThR2R4S = {
      AnyMuscleModel &MusMdl = ....MuscleModels.Left.TransversusThoracis.TransvThModel_2;
      AnyRefNode &R4 = ....Segments.Left.R2Seg.TrThR2R4NodeLOrg;
      AnyRefNode &S = ....Segments.Left.R4Seg.TrThR2R4NodeLIns;
      viewMuscle = {#include "../drawSettings/MusDrawSettings.any"};
      viewForce.Visible ??= Off;
    };

    AnyMuscleViaPoint TrThR3S = {
      AnyMuscleModel &MusMdl = ....MuscleModels.Left.TransversusThoracis.TransvThModel_3;
      AnyRefNode &R3 = ....Segments.Left.R3Seg.TrThR3SNodeLOrg;
      AnyRefNode &S = ....Segments.SternalBodySeg.TrThR3SNodeLIns;
      viewMuscle = {#include "../drawSettings/MusDrawSettings.any"};
      viewForce.Visible ??= Off;
    };

    AnyMuscleViaPoint TrThR3R5S = {
      AnyMuscleModel &MusMdl = ....MuscleModels.Left.TransversusThoracis.TransvThModel_4;
      AnyRefNode &R3 = ....Segments.Left.R3Seg.TrThR3R5NodeLOrg;
      AnyRefNode &S = ....Segments.Left.R5Seg.TrThR3R5NodeLIns;
      viewMuscle = {#include "../drawSettings/MusDrawSettings.any"};
      viewForce.Visible ??= Off;
    };

    AnyMuscleViaPoint TrThR4S = {
      AnyMuscleModel &MusMdl = ....MuscleModels.Left.TransversusThoracis.TransvThModel_5;
      AnyRefNode &R4 = ....Segments.Left.R4Seg.TrThR4SNodeLOrg;
      AnyRefNode &S = ....Segments.SternalBodySeg.TrThR4SNodeLIns;
      viewMuscle = {#include "../drawSettings/MusDrawSettings.any"};
      viewForce.Visible ??= Off;
    };

    AnyMuscleViaPoint TrThR4R6S = {
      AnyMuscleModel &MusMdl = ....MuscleModels.Left.TransversusThoracis.TransvThModel_6;
      AnyRefNode &R4 = ....Segments.Left.R4Seg.TrThR4R6NodeLOrg;
      AnyRefNode &S = ....Segments.Left.R6Seg.TrThR4R6NodeLIns;
      viewMuscle = {#include "../drawSettings/MusDrawSettings.any"};
      viewForce.Visible ??= Off;
    };

    AnyMuscleViaPoint TrThR5S = {
      AnyMuscleModel &MusMdl = ....MuscleModels.Left.TransversusThoracis.TransvThModel_7;
      AnyRefNode &R5 = ....Segments.Left.R5Seg.TrThR5SNodeLOrg;
      AnyRefNode &S = ....Segments.SternalBodySeg.TrThR5SNodeLIns;
      viewMuscle = {#include "../drawSettings/MusDrawSettings.any"};
      viewForce.Visible ??= Off;
    };

    AnyMuscleViaPoint TrThR5R7S = {
      AnyMuscleModel &MusMdl = ....MuscleModels.Left.TransversusThoracis.TransvThModel_8;
      AnyRefNode &R4 = ....Segments.Left.R5Seg.TrThR5R7NodeLOrg;
      AnyRefNode &S56 = ....Segments.Left.R7Seg.TrThR5R7NodeLIns;
      viewMuscle = {#include "../drawSettings/MusDrawSettings.any"};
      viewForce.Visible ??= Off;
    };

    AnyMuscleViaPoint TrThR6S = {
      AnyMuscleModel &MusMdl = ....MuscleModels.Left.TransversusThoracis.TransvThModel_9;
      AnyRefNode &R4 = ....Segments.Left.R6Seg.TrThR6SNodeLOrg;
      AnyRefNode &S56 = ....Segments.SternalBodySeg.TrThR6SNodeLIns;
      viewMuscle = {#include "../drawSettings/MusDrawSettings.any"};
      viewForce.Visible ??= Off;
    };

    AnyMuscleViaPoint TrThR7S = {
      AnyMuscleModel &MusMdl = ....MuscleModels.Left.TransversusThoracis.TransvThModel_10;
      AnyRefNode &R7 = ....Segments.Left.R7Seg.TrThR7SNodeLOrg;
      AnyRefNode &S8 = ....Segments.SternalBodySeg.TrThNodeLIns;
    };

    AnyMuscleViaPoint TrThR8S = {
      AnyMuscleModel &MusMdl = ....MuscleModels.Left.TransversusThoracis.TransvThModel_11;
      AnyRefNode &R8 = ....Segments.Left.R8Seg.TrThR8SNodeLOrg;
      AnyRefNode &S8 = ....Segments.SternalBodySeg.TrThNodeLIns;
    };

    AnyMuscleViaPoint TrThR9S = {
      AnyMuscleModel &MusMdl = ....MuscleModels.Left.TransversusThoracis.TransvThModel_12;
      AnyRefNode &R9 = ....Segments.Left.R9Seg.TrThR9SNodeLOrg;
      AnyRefNode &S8 = ....Segments.SternalBodySeg.TrThNodeLIns;
    };

    AnyMuscleViaPoint TrThR10S = {
      AnyMuscleModel &MusMdl = ....MuscleModels.Left.TransversusThoracis.TransvThModel_13;
      AnyRefNode &R10 = ....Segments.Left.R10Seg.TrThR10SNodeLOrg;
      AnyRefNode &S8 = ....Segments.SternalBodySeg.TrThNodeLIns;
    };
  };
#endif

#if BM_TRUNK_MUSCLES & BM_TRUNK_CAVITY_MODEL == _CAVITY_MODEL_VOLUME_
  AnyFolder PelvicFloor = {
    AnyMuscleViaPoint Puporectalis1= {
      AnyMuscleModel &MusMdl = ....MuscleModels.Left.PelvicFloor.Puporectalis_1;
      AnyRefNode &Org = ....Segments.PelvisSeg.Puporectalis1NodeL;
      AnyRefNode &Ins = ....Segments.SacrumSeg.Puporectalis1NodeL;
      viewMuscle = {#include "../drawSettings/MusDrawSettings.any"};
      viewForce.Visible ??= Off;
    };
      AnyMuscleViaPoint Puporectalis2= {
      AnyMuscleModel &MusMdl = ....MuscleModels.Left.PelvicFloor.Puporectalis_2;
      AnyRefNode &Org = ....Segments.PelvisSeg.Puporectalis2NodeL;
      AnyRefNode &Ins = ....Segments.SacrumSeg.Puporectalis2NodeL;
      viewMuscle = {#include "../drawSettings/MusDrawSettings.any"};
      viewForce.Visible ??= Off;
    };

    AnyMuscleViaPoint Pupococcygeus1= {
      AnyMuscleModel &MusMdl = ....MuscleModels.Left.PelvicFloor.Pupococcygeus_1;
      AnyRefNode &Org = ....Segments.PelvisSeg.Pupococcygeus1NodeL;
      AnyRefNode &Ins = ....Segments.SacrumSeg.Pupococcygeus1NodeL;
      viewMuscle = {#include "../drawSettings/MusDrawSettings.any"};
      viewForce.Visible ??= Off;
    };
      AnyMuscleViaPoint Pupococcygeus2= {
      AnyMuscleModel &MusMdl = ....MuscleModels.Left.PelvicFloor.Pupococcygeus_2;
      AnyRefNode &Org = ....Segments.PelvisSeg.Pupococcygeus2NodeL;
      AnyRefNode &Ins = ....Segments.SacrumSeg.Pupococcygeus2NodeL;
      viewMuscle = {#include "../drawSettings/MusDrawSettings.any"};
      viewForce.Visible ??= Off;
    };
  };
#endif
#endif
