/*
Include file with Obliquus Internus definitions.

Mark de Zee (24-06-2003)
*/

AnyFolder ObliquusInternus = {

  AnyMuscleViaPoint OICI_C12 = {
    AnyMuscleModel &MusMdl = ...MuscleParametersSpineLeft.ObliquusInternusParameter.OICI_C12Par;
    AnyRefNode &Org = ...SegmentsThorax.ThoraxSeg.OICI_C12NodeL;
    AnyRefNode &Ins = ...SegmentsLumbar.PelvisSeg.OICI_C12NodeL;
    AnyDrawMuscle DrwMus = {#include "../drawSettings/MusDrawSettings.any"};
  };

  AnyMuscleViaPoint OICI_C11 = {
    AnyMuscleModel &MusMdl = ...MuscleParametersSpineLeft.ObliquusInternusParameter.OICI_C11Par;
    AnyRefNode &Org = ...SegmentsThorax.ThoraxSeg.OICI_C11NodeL;
    AnyRefNode &Ins = ...SegmentsLumbar.PelvisSeg.OICI_C11NodeL;
    AnyDrawMuscle DrwMus = {#include "../drawSettings/MusDrawSettings.any"};
  };

  AnyMuscleViaPoint OICI_C10 = {
    AnyMuscleModel &MusMdl = ...MuscleParametersSpineLeft.ObliquusInternusParameter.OICI_C10Par;
    AnyRefNode &Org = ...SegmentsThorax.ThoraxSeg.OICI_C10NodeL;
    AnyRefNode &Ins = ...SegmentsLumbar.PelvisSeg.OICI_C10NodeL;
    AnyDrawMuscle DrwMus = {#include "../drawSettings/MusDrawSettings.any"};
  };

  AnyMuscleViaPoint OICI_RS1 = {
    AnyMuscleModel &MusMdl = ...MuscleParametersSpineLeft.ObliquusInternusParameter.OICI_RS1Par;
    AnyRefNode &Org = ...Buckle.Segments.BuckleSeg.OICI_RS1NodeL;
    AnyRefNode &Ins = ...SegmentsLumbar.PelvisSeg.OICI_RS1NodeL;
    AnyDrawMuscle DrwMus = {#include "../drawSettings/MusDrawSettings.any"};
  };

  AnyMuscleViaPoint OICI_RS2 = {
    AnyMuscleModel &MusMdl = ...MuscleParametersSpineLeft.ObliquusInternusParameter.OICI_RS2Par;
    AnyRefNode &Org = ...Buckle.Segments.BuckleSeg.OICI_RS2NodeL;
    AnyRefNode &Ins = ...SegmentsLumbar.PelvisSeg.OICI_RS2NodeL;
    AnyDrawMuscle DrwMus = {#include "../drawSettings/MusDrawSettings.any"};
  };

  AnyMuscleViaPoint OICI_RS3 = {
    AnyMuscleModel &MusMdl = ...MuscleParametersSpineLeft.ObliquusInternusParameter.OICI_RS3Par;
    AnyRefNode &Org = ...Buckle.Segments.BuckleSeg.OICI_RS3NodeL;
    AnyRefNode &Ins = ...SegmentsLumbar.PelvisSeg.OICI_RS3NodeL;
    AnyDrawMuscle DrwMus = {#include "../drawSettings/MusDrawSettings.any"};
  };
 };
