AnyFolder MusclesSpine ={

  ///Definition of the rectus abdominus
  AnyFolder RectusAbdominis = {

    AnyMuscleViaPoint RA = {
      AnyMuscleModel &MusMdl = ...MuscleParametersSpineRight.RectusAbdominisParameter.RA_Par;
      AnyRefNode &Org = ...SegmentsThorax.ThoraxSeg.RACP_CO6Node;
      AnyRefNode &Via2 = ...Buckle.Segments.BuckleSeg.Rectus;
      AnyRefNode &Ins = ...SegmentsLumbar.PelvisSeg.RANode;
      AnyDrawMuscle DrwMus = {#include "../drawSettings/MusDrawSettings.any"};
    };

  };
};
