#if BM_TRUNK_CAVITY_MODEL == _CAVITY_MODEL_VOLUME_
  AnyRefNode  Disc7CenterNode ={sRel = .Scale(.Data.Disc7Center_pos);};
  AnyRefNode  Puborectalis_1NodeR ={sRel = .Scale(.Data.Right.Puborectalis_1_pos);};
  AnyRefNode  Puborectalis_2NodeR ={sRel = .Scale(.Data.Right.Puborectalis_2_pos);};
  AnyRefNode  Puborectalis_1NodeL ={sRel = .Scale(.Data.Left.Puborectalis_1_pos);};
  AnyRefNode  Puborectalis_2NodeL ={sRel = .Scale(.Data.Left.Puborectalis_2_pos);};
  AnyRefNode  Pubococcygeus_1NodeR = {sRel = .Scale(.Data.Right.Pubococcygeus_1_pos);};
  AnyRefNode  Pubococcygeus_2NodeR = {sRel = .Scale( .Data.Right.Pubococcygeus_2_pos);};
  AnyRefNode  Pubococcygeus_1NodeL ={sRel = .Scale( .Data.Left.Pubococcygeus_1_pos);};
  AnyRefNode  Pubococcygeus_2NodeL ={sRel = .Scale( .Data.Left.Pubococcygeus_2_pos);};
#endif
