AnyFolder ScalenusAndHyoid = {
  // AnyViaPointMuscle ScalenusAnteriorR1C4 = {
    // AnyMuscleModel &MusMdl = ...MuscleParametersRibCageLeft.ScalenusAnteriorR1C4Par;
    // AnyRefNode &Org = ...SegmentsThorax.T1Seg.ScalenusAnteriorR1C4NodeL;
    // AnyRefNode &Ins = ...SegmentsRibCage.RibsLeft.R1Seg.ScalenusAnteriorR1C4NodeL;
    // AnyDrawMuscle DrwMus = {#include "../drawSettings/MusDrawSettings.any"};
  // };

  // AnyViaPointMuscle ScalenusMediusR1C3 = {
    // AnyMuscleModel &MusMdl = ...MuscleParametersRibCageLeft.ScalenusMediusR1C3Par;
    // AnyRefNode &Org = ...SegmentsThorax.T1Seg.ScalenusMediusR1C3NodeL;
    // AnyRefNode &Ins = ...SegmentsRibCage.RibsLeft.R1Seg.ScalenusMediusR1C3NodeL;
    // AnyDrawMuscle DrwMus = {#include "../drawSettings/MusDrawSettings.any"};
  // };

  // AnyViaPointMuscle ScalenusPosteriorR2C5 = {
    // AnyMuscleModel &MusMdl = ...MuscleParametersRibCageLeft.ScalenusPosteriorR2C5Par;
    // AnyRefNode &Org = ...SegmentsThorax.T1Seg.ScalenusPosteriorR2C5NodeL;
    // AnyRefNode &Ins = ...SegmentsRibCage.RibsLeft.R2Seg.ScalenusPosteriorR2C5NodeL;
    // AnyDrawMuscle DrwMus = {#include "../drawSettings/MusDrawSettings.any"};
  // };


  // AnyViaPointMuscle LumpedHyoidStC0 = {
    // AnyMuscleModel &MusMdl = ...MuscleParametersRibCageLeft.LumpedHyoidStC0Par;
    // AnyRefNode &Org = ...SegmentsThorax.T1Seg.LumpedHyoidStC0NodeL;
    // AnyRefNode &Ins = ...SegmentsRibCage.SternumSeg.LumpedHyoidStC0NodeL;
    // AnyDrawMuscle DrwMus = {#include "../drawSettings/MusDrawSettings.any"};
  // };


  AnyViaPointMuscle LumpedHyoidT1C0 = {
    AnyMuscleModel &MusMdl = ...MuscleParametersCervicalSpineLeft.LumpedHyoidT1C0Par;
    AnyRefNode &Org = ...SegmentsCervicalSpine.SkullSeg.LumpedHyoidT1C0NodeL;
    AnyRefNode &Ins = ...SegmentsThorax.T1Seg.LumpedHyoidT1C0NodeL;
    AnyDrawMuscle DrwMus = {#include "../drawSettings/MusDrawSettings.any"};
  };

  AnyViaPointMuscle ScalenusAnteriorT1C4 = {
    AnyMuscleModel &MusMdl = ...MuscleParametersCervicalSpineLeft.ScalenusAnteriorT1C4Par;
    AnyRefNode &Org = ...SegmentsCervicalSpine.C4Seg.ScalenusAnteriorT1C4NodeL;
    AnyRefNode &Ins = ...SegmentsThorax.T1Seg.ScalenusAnteriorT1C4NodeL;
    AnyDrawMuscle DrwMus = {#include "../drawSettings/MusDrawSettings.any"};
  };

  AnyViaPointMuscle ScalenusMediusT1C3 = {
    AnyMuscleModel &MusMdl = ...MuscleParametersCervicalSpineLeft.ScalenusMediusT1C3Par;
    AnyRefNode &Org = ...SegmentsCervicalSpine.C3Seg.ScalenusMediusT1C3NodeL;
    AnyRefNode &Ins = ...SegmentsThorax.T1Seg.ScalenusMediusT1C3NodeL;
    AnyDrawMuscle DrwMus = {#include "../drawSettings/MusDrawSettings.any"};
  };

  AnyViaPointMuscle ScalenusPosteriorT1C5 = {
    AnyMuscleModel &MusMdl = ...MuscleParametersCervicalSpineLeft.ScalenusPosteriorT1C5Par;
    AnyRefNode &Org = ...SegmentsCervicalSpine.C5Seg.ScalenusPosteriorT1C5NodeL;
    AnyRefNode &Ins = ...SegmentsThorax.T1Seg.ScalenusPosteriorT1C5NodeL;
    AnyDrawMuscle DrwMus = {#include "../drawSettings/MusDrawSettings.any"};
  };

};
