/**
Definitions of Segments in the Thorax Part of the Spine.

Abbrevitations:
ALL = Anterior Longitudinal Ligament
PLL = Posterior Longitudinal Ligament
LS = Ligamentum Supraspinale
LI = Ligamentum Interspinalia

MF = Multifidi
ILpl = Iliocostalis Lumborum pars lumborum (part of Erector Spinae)
LTpl = Longissimus Thoracis pars lumborum (part of Erector Spinae)
ILpt = Iliocostalis Lumborum pars thoracis (part of Erector Spinae)
LTpt = Longissimus Thoracis pars thoracis (part of Erector Spinae)
PM = Psoas Major
QL = Quadratus Lumborum
RA = Rectus Abdominis
OE = Obliquus Externus
OI = Obliquus Internus

C = Costae
CI = Crista Iliaca
CP = Crista Pubica
SIPS = Spina iliaca posterior superior
SIPI = Spina iliaca Posterior inferior
T = Thoracal hvirvel
L = Lumbal hvirvel
S = Sacral segment
*/
AnyFolder SegmentsThorax = {

  AnySeg SkullSeg = {

    AnyFolder &Data=..ModelParameters.SkullSeg;

    AnyFunTransform3D &Scale =..ScalingTrunk.SkullSeg.ScaleFunction;

    r0=..SegmentsCervicalSpine.C1Seg.C1C0JntNode.sRel*..SegmentsCervicalSpine.C1Seg.Axes0'
       +..SegmentsCervicalSpine.C1Seg.r0
       + C1C0JntNode.sRel*Axes0;

    AnyVar MassS = ..Scaling.MassScaling.Head.MassScale;

    AnyVar MassStandard = ..StandardParameters.HeadWithoutNeck.Mass;
    Mass = MassS*MassStandard;

    Jii = Data.Jii;

    AnyRefNode AnatomicalFrame = {};
    AnyRefNode& ScalingNode = AnatomicalFrame;
    AnyFunTransform3D& GeomScale = Scale;

    sCoM = Scale(Data.sCoM_pos); //Moet nog defenieerd worden
    JaboutCoMOnOff = On;

    AnyRefNode C1C0JntNode = {sRel = .Scale(.Data.C1C0JntNode_pos);AnyDrawNodes DrwNode = {ScaleXYZ = {1,1,1}*0.003;RGB = {0, 1, 0};};};
    AnyRefNode NeckNode={sRel=.Scale(.Data.NeckNode_pos);};

    //Lumped Hyoid
    AnyRefNode LumpedHyoidT1C0NodeR = {sRel = .Scale(.Data.LumpedHyoidT1C0NodeR_pos);};
    AnyRefNode LumpedHyoidT1C0NodeL = {sRel = .Scale(.Data.LumpedHyoidT1C0NodeL_pos);};

    //Longus Colli nodes
    AnyRefNode LongusColliT1C0NodeR = {sRel = .Scale(.Data.LongusColliT1C0NodeR_pos);};
    AnyRefNode LongusColliT1C0NodeL = {sRel = .Scale(.Data.LongusColliT1C0NodeL_pos);};

    //Longus cappitis nodes
    AnyRefNode LongusCapitisC0NodeR = {sRel = .Scale(.Data.LongusCapitisC0NodeR_pos);};
    AnyRefNode LongusCapitisC0NodeL = {sRel = .Scale(.Data.LongusCapitisC0NodeL_pos);};

    //Splenius capitis nodes
    AnyRefNode SpleniusCapitisNodeR = {sRel = .Scale(.Data.SpleniusCapitisNodeR_pos);};
    AnyRefNode SpleniusCapitisNodeL = {sRel = .Scale(.Data.SpleniusCapitisNodeL_pos);};

    //Semispinalis capitis nodes
    AnyRefNode SemispinalisCapitisNodeR = {sRel = .Scale(.Data.SemispinalisCapitisNodeR_pos);};
    AnyRefNode SemispinalisCapitisNodeL = {sRel = .Scale(.Data.SemispinalisCapitisNodeL_pos);};

    //Longissimus capitis nodes
    AnyRefNode LongissimusCapitisNodeR = {sRel = .Scale(.Data.LongissimusCapitisNodeR_pos);};
    AnyRefNode LongissimusCapitisNodeL = {sRel = .Scale(.Data.LongissimusCapitisNodeL_pos);};

    AnyDrawSurf DrwSurf = {
      FileName = ...STL.FilenameSkull;
      RGB = ...ColorRef.Segments;
      AnyFunTransform3D &Scale =.Scale;
      Opacity = Main.DrawSettings.BonesOpacity.Skull;
    };

    AnyRefNode TopOfHead = {sRel = .Scale(.Data.TopOfHead_pos);};

    AnyRefNode Right ={};
    AnyRefNode Left ={};

  };


  AnySeg ThoraxSeg = {

    AnyFolder &Data=..ModelParameters.ThoraxSeg;


    r0=..SegmentsLumbar.L1Seg.T12L1JntNode.sRel*..SegmentsLumbar.L1Seg.Axes0'+..SegmentsLumbar.L1Seg.r0-T12L1JntNode.sRel*Axes0';

    AnyFunTransform3D &Scale =..ScalingTrunk.ThoraxSeg.ScaleFunction;
    AnyVar MassS = ..Scaling.MassScaling.Thorax.MassScale;

    //Mass = 0.216*..BodyParRef.BodyMass; //Mass of Thorax concentrated in the CoM of the Thorax (Winter, 1990)

    AnyVar MassStandard = ..StandardParameters.Trunk.Mass;
    Mass = MassS*MassStandard;

    AnyVar UBHeight =  Data.UBHeight; //0.50; //Upperbody height
    AnyVar Radius = (Mass/(pi*UBHeight*1000))^0.5;
    AnyVar Ixx = 0.25*Mass*Radius^2 + 1/12*Mass*UBHeight^2;
    AnyVar Izz = Ixx;
    AnyVar Iyy = 0.5*Mass*Radius^2;

    AnyMat33 JMatRot = AnatomicalFrame.ARel*{{Ixx,0,0},{0,Iyy,0},{0,0,Izz}}*AnatomicalFrame.ARel';
    Jii = {JMatRot[0][0], JMatRot[1][1], JMatRot[2][2]};
    Jij = {JMatRot[1][0], JMatRot[2][1], JMatRot[2][0]};


    sCoM = Scale(Data.sCoM_pos);
    JaboutCoMOnOff = On;

    // At some point this coordinate system needs to be made more specific and contructed from bony landmarks on the
    // thorax. The current anatomical frame is contructed to give a neutral position for the center of mass when the
    // pelvis-thorax extension angle is zero.
    AnyRefNode AnatomicalFrame = {
      ARel=...SegmentsLumbar.PelvisSeg.AnatomicalFrame.ARel*RotMat(14.5*pi/180,z);
    };

    AnyRefNode& ScalingNode = AnatomicalFrame;
    AnyFunTransform3D& GeomScale = Scale;

    //Incisura jungularis right and left
    //the nodes are used for attachment of ShoulderArm block
    AnyRefNode ij = {
      //This is the standard value for the ij it must be used in order to scale the model
      //since nodes are inserted into this node.
      //If the position of ij are to be adjusted it should be done by changing sRelStd
      AnyVec3 sRelStd = .Data.ij_pos;

      sRel = .Scale(sRelStd);

      ARel = .AnatomicalFrame.ARel*{{0, 0, -1},
                                    {0, 1,  0},
                                    {1, 0,  0}};
    };

    AnyRefNode iji = {
      //This is the standard value for the ij it must be used in order to scale the model
      //since nodes are inserted into this node.
      //If the position of ij are to be adjusted it should be done by changing sRelS
      AnyVec3 sRelStd = .Data.iji_pos;

      sRel = .Scale(sRelStd);


      ARel = .AnatomicalFrame.ARel*{{0, 0, -1},
                                    {0, 1,  0},
                                    {1, 0,  0}};
    };

    AnyRefNode C1HatNode = {sRel = .Scale(.Data.C1HatNode_pos);};

    AnyRefNode T12L1JntNode = {sRel = .Scale(.Data.T12L1JntNode_pos);};
    AnyRefNode T1C7JntNode  = {sRel = .Scale(.Data.T1C7JntNode_pos);AnyDrawNodes DrwNode = {ScaleXYZ = 0.003*{1,1,1};RGB = {1, 0, 0};};};

    AnyRefNode ForceVectorNode = {sRel = .Scale(.Data.ForceVectorNode_pos);};

    // Ligament Nodes
    AnyRefNode ALLNodeInferior = {sRel = .Scale(.Data.ALLNodeInferior_pos);};

    AnyRefNode PLLNodeInferior = {sRel = .Scale(.Data.PLLNodeInferior_pos);}; //on T12
    AnyRefNode PLLViaNode      = {sRel = .Scale(.Data.PLLViaNode_pos);}; //on T12

    AnyRefNode PLLNodeInferiorT11 = {sRel = .Scale(.Data.PLLNodeInferiorT11_pos);}; //on T11

    AnyRefNode LSNodeT12 = {sRel = .Scale(.Data.LSNodeT12_pos);};
    AnyRefNode LSNodeT11 = {sRel = .Scale(.Data.LSNodeT11_pos);};

    AnyRefNode LINodeInferior = {sRel = .Scale(.Data.LINodeInferior_pos);}; //on T12

    //Lumped Hyoid
    AnyRefNode LumpedHyoidT1C0NodeR = {sRel = .Scale(.Data.LumpedHyoidT1C0NodeR_pos);};
    AnyRefNode LumpedHyoidT1C0NodeL = {sRel = .Scale(.Data.LumpedHyoidT1C0NodeL_pos);};

    //Longi Colli node
    AnyRefNode LongusColliT1NodeR = {sRel = .Scale(.Data.LongusColliT1NodeR_pos);};
    AnyRefNode LongusColliT1NodeL = {sRel = .Scale(.Data.LongusColliT1NodeL_pos);};

    //Scalenus anterior nodes
    AnyRefNode ScalenusAnteriorT1C4NodeR = {sRel = .Scale(.Data.ScalenusAnteriorT1C4NodeR_pos);};
    AnyRefNode ScalenusAnteriorT1C4NodeL = {sRel = .Scale(.Data.ScalenusAnteriorT1C4NodeL_pos);};

    //Scalenus medius nodes
    AnyRefNode ScalenusMediusT1C3NodeR = {sRel = .Scale(.Data.ScalenusMediusT1C3NodeR_pos);};
    AnyRefNode ScalenusMediusT1C3NodeL = {sRel = .Scale(.Data.ScalenusMediusT1C3NodeL_pos);};

    //Scalenus Posterior nodes
    AnyRefNode ScalenusPosteriorT1C5NodeR = {sRel = .Scale(.Data.ScalenusPosteriorT1C5NodeR_pos);};
    AnyRefNode ScalenusPosteriorT1C5NodeL = {sRel = .Scale(.Data.ScalenusPosteriorT1C5NodeL_pos);};

    //Splenius capitis nodes
    AnyRefNode SpleniusCapitisT2C0NodeR = {sRel = .Scale(.Data.SpleniusCapitisT2C0NodeR_pos);};
    AnyRefNode SpleniusCapitisT2C0NodeL = {sRel = .Scale(.Data.SpleniusCapitisT2C0NodeL_pos);};

    //Splenius cervicis nodes
    AnyRefNode SpleniusCervicisNodeR = {sRel = .Scale(.Data.SpleniusCervicisNodeR_pos);};
    AnyRefNode SpleniusCervicisNodeL = {sRel = .Scale(.Data.SpleniusCervicisNodeL_pos);};

    //Semispinalis capitis nodes
    AnyRefNode SemispinalisCapitisT3C0NodeR = {sRel = .Scale(.Data.SemispinalisCapitisT3C0NodeR_pos);};
    AnyRefNode SemispinalisCapitisT3C0NodeL = {sRel = .Scale(.Data.SemispinalisCapitisT3C0NodeL_pos);};

    //Semispinalis cervicis nodes
    AnyRefNode SemispinalisCervicisT1C2NodeR = {sRel = .Scale(.Data.SemispinalisCervicisT1C2NodeR_pos);};
    AnyRefNode SemispinalisCervicisT1C2NodeL = {sRel = .Scale(.Data.SemispinalisCervicisT1C2NodeL_pos);};

    AnyRefNode SemispinalisCervicisT2C3NodeR = {sRel = .Scale(.Data.SemispinalisCervicisT2C3NodeR_pos);};
    AnyRefNode SemispinalisCervicisT2C3NodeL = {sRel = .Scale(.Data.SemispinalisCervicisT2C3NodeL_pos);};

    AnyRefNode SemispinalisCervicisT3C4NodeR = {sRel = .Scale(.Data.SemispinalisCervicisT3C4NodeR_pos);};
    AnyRefNode SemispinalisCervicisT3C4NodeL = {sRel = .Scale(.Data.SemispinalisCervicisT3C4NodeL_pos);};

    AnyRefNode SemispinalisCervicisT4C5NodeR = {sRel = .Scale(.Data.SemispinalisCervicisT4C5NodeR_pos);};
    AnyRefNode SemispinalisCervicisT4C5NodeL = {sRel = .Scale(.Data.SemispinalisCervicisT4C5NodeL_pos);};

    AnyRefNode SemispinalisCervicisT5C6NodeR = {sRel = .Scale(.Data.SemispinalisCervicisT5C6NodeR_pos);};
    AnyRefNode SemispinalisCervicisT5C6NodeL = {sRel = .Scale(.Data.SemispinalisCervicisT5C6NodeL_pos);};

    AnyRefNode SemispinalisCervicisT6C7NodeR = {sRel = .Scale(.Data.SemispinalisCervicisT6C7NodeR_pos);};
    AnyRefNode SemispinalisCervicisT6C7NodeL = {sRel = .Scale(.Data.SemispinalisCervicisT6C7NodeL_pos);};

    //Longissimus capitis nodes
    AnyRefNode LongissimusCapitisT2C0NodeR = {sRel = .Scale(.Data.LongissimusCapitisT2C0NodeR_pos);};
    AnyRefNode LongissimusCapitisT2C0NodeL = {sRel = .Scale(.Data.LongissimusCapitisT2C0NodeL_pos);};

    //Longissimus cervicis nodes
    AnyRefNode LongissimusCervicisT2NodeR = {sRel = .Scale(.Data.LongissimusCervicisT2NodeR_pos);};
    AnyRefNode LongissimusCervicisT2NodeL = {sRel = .Scale(.Data.LongissimusCervicisT2NodeL_pos);};

    //Multifidus cervicis nodes
    AnyRefNode MultifidusCervicisT1C4NodeR = {sRel = .Scale(.Data.MultifidusCervicisT1C4NodeR_pos);};
    AnyRefNode MultifidusCervicisT1C4NodeL = {sRel = .Scale(.Data.MultifidusCervicisT1C4NodeL_pos);};

    AnyRefNode MultifidusCervicisT1C5NodeR = {sRel = .Scale(.Data.MultifidusCervicisT1C5NodeR_pos);};
    AnyRefNode MultifidusCervicisT1C5NodeL = {sRel = .Scale(.Data.MultifidusCervicisT1C5NodeL_pos);};

    AnyRefNode MultifidusCervicisT2C5NodeR = {sRel = .Scale(.Data.MultifidusCervicisT2C5NodeR_pos);};
    AnyRefNode MultifidusCervicisT2C5NodeL = {sRel = .Scale(.Data.MultifidusCervicisT2C5NodeL_pos);};

    AnyRefNode MultifidusCervicisT2C6NodeR = {sRel = .Scale(.Data.MultifidusCervicisT2C6NodeR_pos);};
    AnyRefNode MultifidusCervicisT2C6NodeL = {sRel = .Scale(.Data.MultifidusCervicisT2C6NodeL_pos);};

    AnyRefNode MultifidusCervicisT3C6NodeR = {sRel = .Scale(.Data.MultifidusCervicisT3C6NodeR_pos);};
    AnyRefNode MultifidusCervicisT3C6NodeL = {sRel = .Scale(.Data.MultifidusCervicisT3C6NodeL_pos);};

    AnyRefNode MultifidusCervicisT3C7NodeR = {sRel = .Scale(.Data.MultifidusCervicisT3C7NodeR_pos);};
    AnyRefNode MultifidusCervicisT3C7NodeL = {sRel = .Scale(.Data.MultifidusCervicisT3C7NodeL_pos);};

    AnyRefNode MultifidusCervicisT4C7NodeR = {sRel = .Scale(.Data.MultifidusCervicisT4C7NodeR_pos);};
    AnyRefNode MultifidusCervicisT4C7NodeL = {sRel = .Scale(.Data.MultifidusCervicisT4C7NodeL_pos);};

    // Erector Spinae Nodes

    AnyRefNode ILptC5SIPSNodeR = {sRel = .Scale(.Data.ILptC5SIPSNodeR_pos);};
    AnyRefNode ILptC5SIPSNodeL = {sRel = .Scale(.Data.ILptC5SIPSNodeL_pos);};

    AnyRefNode ILptC5SIPSVia1NodeR = {sRel = .Scale(.Data.ILptC5SIPSVia1NodeR_pos);};
    AnyRefNode ILptC5SIPSVia1NodeL = {sRel = .Scale(.Data.ILptC5SIPSVia1NodeL_pos);};

    AnyRefNode ILptC5SIPSVia2NodeR = {sRel = .Scale(.Data.ILptC5SIPSVia2NodeR_pos);};
    AnyRefNode ILptC5SIPSVia2NodeL = {sRel = .Scale(.Data.ILptC5SIPSVia2NodeL_pos);};

    AnyRefNode ILptC5SIPSVia3NodeR = {sRel = .Scale(.Data.ILptC5SIPSVia3NodeR_pos);};
    AnyRefNode ILptC5SIPSVia3NodeL = {sRel = .Scale(.Data.ILptC5SIPSVia3NodeL_pos);};

    AnyRefNode ILptC5SIPSVia4NodeR = {sRel = .Scale(.Data.ILptC5SIPSVia4NodeR_pos);};
    AnyRefNode ILptC5SIPSVia4NodeL = {sRel = .Scale(.Data.ILptC5SIPSVia4NodeL_pos);};

    AnyRefNode ILptC5SIPSVia5NodeR = {sRel = .Scale(.Data.ILptC5SIPSVia5NodeR_pos);};
    AnyRefNode ILptC5SIPSVia5NodeL = {sRel = .Scale(.Data.ILptC5SIPSVia5NodeL_pos);};

    AnyRefNode ILptC5SIPSVia6NodeR = {sRel = .Scale(.Data.ILptC5SIPSVia6NodeR_pos);};
    AnyRefNode ILptC5SIPSVia6NodeL = {sRel = .Scale(.Data.ILptC5SIPSVia6NodeL_pos);};


    AnyRefNode ILptC6SIPSNodeR = {sRel = .Scale(.Data.ILptC6SIPSNodeR_pos);};
    AnyRefNode ILptC6SIPSNodeL = {sRel = .Scale(.Data.ILptC6SIPSNodeL_pos);};

    AnyRefNode ILptC6SIPSVia1NodeR = {sRel = .Scale(.Data.ILptC6SIPSVia1NodeR_pos);};
    AnyRefNode ILptC6SIPSVia1NodeL = {sRel = .Scale(.Data.ILptC6SIPSVia1NodeL_pos);};

    AnyRefNode ILptC6SIPSVia2NodeR = {sRel = .Scale(.Data.ILptC6SIPSVia2NodeR_pos);};
    AnyRefNode ILptC6SIPSVia2NodeL = {sRel = .Scale(.Data.ILptC6SIPSVia2NodeL_pos);};

    AnyRefNode ILptC6SIPSVia3NodeR = {sRel = .Scale(.Data.ILptC6SIPSVia3NodeR_pos);};
    AnyRefNode ILptC6SIPSVia3NodeL = {sRel = .Scale(.Data.ILptC6SIPSVia3NodeL_pos);};

    AnyRefNode ILptC6SIPSVia4NodeR = {sRel = .Scale(.Data.ILptC6SIPSVia4NodeR_pos);};
    AnyRefNode ILptC6SIPSVia4NodeL = {sRel = .Scale(.Data.ILptC6SIPSVia4NodeL_pos);};

    AnyRefNode ILptC6SIPSVia5NodeR = {sRel = .Scale(.Data.ILptC6SIPSVia5NodeR_pos);};
    AnyRefNode ILptC6SIPSVia5NodeL = {sRel = .Scale(.Data.ILptC6SIPSVia5NodeL_pos);};

    AnyRefNode ILptC7CINodeR = {sRel = .Scale(.Data.ILptC7CINodeR_pos);};
    AnyRefNode ILptC7CINodeL = {sRel = .Scale(.Data.ILptC7CINodeL_pos);};

    AnyRefNode ILptC7CIVia1NodeR = {sRel = .Scale(.Data.ILptC7CIVia1NodeR_pos);};
    AnyRefNode ILptC7CIVia1NodeL = {sRel = .Scale(.Data.ILptC7CIVia1NodeL_pos);};

    AnyRefNode ILptC7CIVia2NodeR = {sRel = .Scale(.Data.ILptC7CIVia2NodeR_pos);};
    AnyRefNode ILptC7CIVia2NodeL = {sRel = .Scale(.Data.ILptC7CIVia2NodeL_pos);};

    AnyRefNode ILptC7CIVia3NodeR = {sRel = .Scale(.Data.ILptC7CIVia3NodeR_pos);};
    AnyRefNode ILptC7CIVia3NodeL = {sRel = .Scale(.Data.ILptC7CIVia3NodeL_pos);};

    AnyRefNode ILptC7CIVia4NodeR = {sRel = .Scale(.Data.ILptC7CIVia4NodeR_pos);};
    AnyRefNode ILptC7CIVia4NodeL = {sRel = .Scale(.Data.ILptC7CIVia4NodeL_pos);};

    AnyRefNode ILptC8CINodeR = {sRel = .Scale(.Data.ILptC8CINodeR_pos);};
    AnyRefNode ILptC8CINodeL = {sRel = .Scale(.Data.ILptC8CINodeL_pos);};

    AnyRefNode ILptC8CIVia1NodeR = {sRel = .Scale(.Data.ILptC8CIVia1NodeR_pos);};
    AnyRefNode ILptC8CIVia1NodeL = {sRel = .Scale(.Data.ILptC8CIVia1NodeL_pos);};

    AnyRefNode ILptC8CIVia2NodeR = {sRel = .Scale(.Data.ILptC8CIVia2NodeR_pos);};
    AnyRefNode ILptC8CIVia2NodeL = {sRel = .Scale(.Data.ILptC8CIVia2NodeL_pos);};

    AnyRefNode ILptC8CIVia3NodeR = {sRel = .Scale(.Data.ILptC8CIVia3NodeR_pos);};
    AnyRefNode ILptC8CIVia3NodeL = {sRel = .Scale(.Data.ILptC8CIVia3NodeL_pos);};

    AnyRefNode ILptC9CINodeR = {sRel = .Scale(.Data.ILptC9CINodeR_pos);};
    AnyRefNode ILptC9CINodeL = {sRel = .Scale(.Data.ILptC9CINodeL_pos);};

    AnyRefNode ILptC9CIVia1NodeR = {sRel = .Scale(.Data.ILptC9CIVia1NodeR_pos);};
    AnyRefNode ILptC9CIVia1NodeL = {sRel = .Scale(.Data.ILptC9CIVia1NodeL_pos);};

    AnyRefNode ILptC9CIVia2NodeR = {sRel = .Scale(.Data.ILptC9CIVia2NodeR_pos);};
    AnyRefNode ILptC9CIVia2NodeL = {sRel = .Scale(.Data.ILptC9CIVia2NodeL_pos);};

    AnyRefNode ILptC10CINodeR = {sRel = .Scale(.Data.ILptC10CINodeR_pos);};
    AnyRefNode ILptC10CINodeL = {sRel = .Scale(.Data.ILptC10CINodeL_pos);};

    AnyRefNode ILptC10CIVia1NodeR = {sRel = .Scale(.Data.ILptC10CIVia1NodeR_pos);};
    AnyRefNode ILptC10CIVia1NodeL = {sRel = .Scale(.Data.ILptC10CIVia1NodeL_pos);};

    AnyRefNode ILptC11CINodeR = {sRel = .Scale(.Data.ILptC11CINodeR_pos);};
    AnyRefNode ILptC11CINodeL = {sRel = .Scale(.Data.ILptC11CINodeL_pos);};

    AnyRefNode ILptC12CINodeR = {sRel = .Scale(.Data.ILptC12CINodeR_pos);};
    AnyRefNode ILptC12CINodeL = {sRel = .Scale(.Data.ILptC12CINodeL_pos);};

    AnyRefNode LTptT1L1NodeR = {sRel = .Scale(.Data.LTptT1L1NodeR_pos);};
    AnyRefNode LTptT1L1NodeL = {sRel = .Scale(.Data.LTptT1L1NodeL_pos);};

    AnyRefNode LTptT1L1Via1NodeR = {sRel = .Scale(.Data.LTptT1L1Via1NodeR_pos);};
    AnyRefNode LTptT1L1Via1NodeL = {sRel = .Scale(.Data.LTptT1L1Via1NodeL_pos);};

    AnyRefNode LTptT1L1Via2NodeR = {sRel = .Scale(.Data.LTptT1L1Via2NodeR_pos);};
    AnyRefNode LTptT1L1Via2NodeL = {sRel = .Scale(.Data.LTptT1L1Via2NodeL_pos);};

    AnyRefNode LTptT1L1Via3NodeR = {sRel = .Scale(.Data.LTptT1L1Via3NodeR_pos);};
    AnyRefNode LTptT1L1Via3NodeL = {sRel = .Scale(.Data.LTptT1L1Via3NodeL_pos);};

    AnyRefNode LTptT1L1Via4NodeR = {sRel = .Scale(.Data.LTptT1L1Via4NodeR_pos);};
    AnyRefNode LTptT1L1Via4NodeL = {sRel = .Scale(.Data.LTptT1L1Via4NodeL_pos);};

    AnyRefNode LTptT1L1Via5NodeR = {sRel = .Scale(.Data.LTptT1L1Via5NodeR_pos);};
    AnyRefNode LTptT1L1Via5NodeL = {sRel = .Scale(.Data.LTptT1L1Via5NodeL_pos);};

    AnyRefNode LTptT1L1Via6NodeR = {sRel = .Scale(.Data.LTptT1L1Via6NodeR_pos);};
    AnyRefNode LTptT1L1Via6NodeL = {sRel = .Scale(.Data.LTptT1L1Via6NodeL_pos);};

    AnyRefNode LTptT1L1Via7NodeR = {sRel = .Scale(.Data.LTptT1L1Via7NodeR_pos);};
    AnyRefNode LTptT1L1Via7NodeL = {sRel = .Scale(.Data.LTptT1L1Via7NodeL_pos);};

    AnyRefNode LTptT1L1Via8NodeR = {sRel = .Scale(.Data.LTptT1L1Via8NodeR_pos);};
    AnyRefNode LTptT1L1Via8NodeL = {sRel = .Scale(.Data.LTptT1L1Via8NodeL_pos);};

    AnyRefNode LTptT1L1Via9NodeR = {sRel = .Scale(.Data.LTptT1L1Via9NodeR_pos);};
    AnyRefNode LTptT1L1Via9NodeL = {sRel = .Scale(.Data.LTptT1L1Via9NodeL_pos);};

    AnyRefNode LTptT1L1Via10NodeR = {sRel = .Scale(.Data.LTptT1L1Via10NodeR_pos);};
    AnyRefNode LTptT1L1Via10NodeL = {sRel = .Scale(.Data.LTptT1L1Via10NodeL_pos);};

    AnyRefNode LTptT1L1Via11NodeR = {sRel = .Scale(.Data.LTptT1L1Via11NodeR_pos);};
    AnyRefNode LTptT1L1Via11NodeL = {sRel = .Scale(.Data.LTptT1L1Via11NodeL_pos);};

    AnyRefNode LTptT2L2NodeR = {sRel = .Scale(.Data.LTptT2L2NodeR_pos);};
    AnyRefNode LTptT2L2NodeL = {sRel = .Scale(.Data.LTptT2L2NodeL_pos);};

    AnyRefNode LTptT2L2Via1NodeR = {sRel = .Scale(.Data.LTptT2L2Via1NodeR_pos);};
    AnyRefNode LTptT2L2Via1NodeL = {sRel = .Scale(.Data.LTptT2L2Via1NodeL_pos);};

    AnyRefNode LTptT2L2Via2NodeR = {sRel = .Scale(.Data.LTptT2L2Via2NodeR_pos);};
    AnyRefNode LTptT2L2Via2NodeL = {sRel = .Scale(.Data.LTptT2L2Via2NodeL_pos);};

    AnyRefNode LTptT2L2Via3NodeR = {sRel = .Scale(.Data.LTptT2L2Via3NodeR_pos);};
    AnyRefNode LTptT2L2Via3NodeL = {sRel = .Scale(.Data.LTptT2L2Via3NodeL_pos);};

    AnyRefNode LTptT2L2Via4NodeR = {sRel = .Scale(.Data.LTptT2L2Via4NodeR_pos);};
    AnyRefNode LTptT2L2Via4NodeL = {sRel = .Scale(.Data.LTptT2L2Via4NodeL_pos);};

    AnyRefNode LTptT2L2Via5NodeR = {sRel = .Scale(.Data.LTptT2L2Via5NodeR_pos);};
    AnyRefNode LTptT2L2Via5NodeL = {sRel = .Scale(.Data.LTptT2L2Via5NodeL_pos);};

    AnyRefNode LTptT2L2Via6NodeR = {sRel = .Scale(.Data.LTptT2L2Via6NodeR_pos);};
    AnyRefNode LTptT2L2Via6NodeL = {sRel = .Scale(.Data.LTptT2L2Via6NodeL_pos);};

    AnyRefNode LTptT2L2Via7NodeR = {sRel = .Scale(.Data.LTptT2L2Via7NodeR_pos);};
    AnyRefNode LTptT2L2Via7NodeL = {sRel = .Scale(.Data.LTptT2L2Via7NodeL_pos);};

    AnyRefNode LTptT2L2Via8NodeR = {sRel = .Scale(.Data.LTptT2L2Via8NodeR_pos);};
    AnyRefNode LTptT2L2Via8NodeL = {sRel = .Scale(.Data.LTptT2L2Via8NodeL_pos);};

    AnyRefNode LTptT2L2Via9NodeR = {sRel = .Scale(.Data.LTptT2L2Via9NodeR_pos);};
    AnyRefNode LTptT2L2Via9NodeL = {sRel = .Scale(.Data.LTptT2L2Via9NodeL_pos);};

    AnyRefNode LTptT2L2Via10NodeR = {sRel = .Scale(.Data.LTptT2L2Via10NodeR_pos);};
    AnyRefNode LTptT2L2Via10NodeL = {sRel = .Scale(.Data.LTptT2L2Via10NodeL_pos);};

    AnyRefNode LTptT3L3NodeR = {sRel = .Scale(.Data.LTptT3L3NodeR_pos);};
    AnyRefNode LTptT3L3NodeL = {sRel = .Scale(.Data.LTptT3L3NodeL_pos);};

    AnyRefNode LTptT3L3Via1NodeR = {sRel = .Scale(.Data.LTptT3L3Via1NodeR_pos);};
    AnyRefNode LTptT3L3Via1NodeL = {sRel = .Scale(.Data.LTptT3L3Via1NodeL_pos);};

    AnyRefNode LTptT3L3Via2NodeR = {sRel = .Scale(.Data.LTptT3L3Via2NodeR_pos);};
    AnyRefNode LTptT3L3Via2NodeL = {sRel = .Scale(.Data.LTptT3L3Via2NodeL_pos);};

    AnyRefNode LTptT3L3Via3NodeR = {sRel = .Scale(.Data.LTptT3L3Via3NodeR_pos);};
    AnyRefNode LTptT3L3Via3NodeL = {sRel = .Scale(.Data.LTptT3L3Via3NodeL_pos);};

    AnyRefNode LTptT3L3Via4NodeR = {sRel = .Scale(.Data.LTptT3L3Via4NodeR_pos);};
    AnyRefNode LTptT3L3Via4NodeL = {sRel = .Scale(.Data.LTptT3L3Via4NodeL_pos);};

    AnyRefNode LTptT3L3Via5NodeR = {sRel = .Scale(.Data.LTptT3L3Via5NodeR_pos);};
    AnyRefNode LTptT3L3Via5NodeL = {sRel = .Scale(.Data.LTptT3L3Via5NodeL_pos);};

    AnyRefNode LTptT3L3Via6NodeR = {sRel = .Scale(.Data.LTptT3L3Via6NodeR_pos);};
    AnyRefNode LTptT3L3Via6NodeL = {sRel = .Scale(.Data.LTptT3L3Via6NodeL_pos);};

    AnyRefNode LTptT3L3Via7NodeR = {sRel = .Scale(.Data.LTptT3L3Via7NodeR_pos);};
    AnyRefNode LTptT3L3Via7NodeL = {sRel = .Scale(.Data.LTptT3L3Via7NodeL_pos);};

    AnyRefNode LTptT3L3Via8NodeR = {sRel = .Scale(.Data.LTptT3L3Via8NodeR_pos);};
    AnyRefNode LTptT3L3Via8NodeL = {sRel = .Scale(.Data.LTptT3L3Via8NodeL_pos);};

    AnyRefNode LTptT3L3Via9NodeR = {sRel = .Scale(.Data.LTptT3L3Via9NodeR_pos);};
    AnyRefNode LTptT3L3Via9NodeL = {sRel = .Scale(.Data.LTptT3L3Via9NodeL_pos);};

    AnyRefNode LTptT4L4NodeR  = {sRel = .Scale(.Data.LTptT4L4NodeR_pos);};
    AnyRefNode LTptT4L4NodeL  = {sRel = .Scale(.Data.LTptT4L4NodeL_pos);};

    AnyRefNode LTptT4L4Via1NodeR = {sRel = .Scale(.Data.LTptT4L4Via1NodeR_pos);};
    AnyRefNode LTptT4L4Via1NodeL = {sRel = .Scale(.Data.LTptT4L4Via1NodeL_pos);};

    AnyRefNode LTptT4L4Via2NodeR = {sRel = .Scale(.Data.LTptT4L4Via2NodeR_pos);};
    AnyRefNode LTptT4L4Via2NodeL = {sRel = .Scale(.Data.LTptT4L4Via2NodeL_pos);};

    AnyRefNode LTptT4L4Via3NodeR = {sRel = .Scale(.Data.LTptT4L4Via3NodeR_pos);};
    AnyRefNode LTptT4L4Via3NodeL = {sRel = .Scale(.Data.LTptT4L4Via3NodeL_pos);};

    AnyRefNode LTptT4L4Via4NodeR = {sRel = .Scale(.Data.LTptT4L4Via4NodeR_pos);};
    AnyRefNode LTptT4L4Via4NodeL = {sRel = .Scale(.Data.LTptT4L4Via4NodeL_pos);};

    AnyRefNode LTptT4L4Via5NodeR = {sRel = .Scale(.Data.LTptT4L4Via5NodeR_pos);};
    AnyRefNode LTptT4L4Via5NodeL = {sRel = .Scale(.Data.LTptT4L4Via5NodeL_pos);};

    AnyRefNode LTptT4L4Via6NodeR = {sRel = .Scale(.Data.LTptT4L4Via6NodeR_pos);};
    AnyRefNode LTptT4L4Via6NodeL = {sRel = .Scale(.Data.LTptT4L4Via6NodeL_pos);};

    AnyRefNode LTptT4L4Via7NodeR = {sRel = .Scale(.Data.LTptT4L4Via7NodeR_pos);};
    AnyRefNode LTptT4L4Via7NodeL = {sRel = .Scale(.Data.LTptT4L4Via7NodeL_pos);};

    AnyRefNode LTptT4L4Via8NodeR = {sRel = .Scale(.Data.LTptT4L4Via8NodeR_pos);};
    AnyRefNode LTptT4L4Via8NodeL = {sRel = .Scale(.Data.LTptT4L4Via8NodeL_pos);};

    AnyRefNode LTptT5L5NodeR = {sRel = .Scale(.Data.LTptT5L5NodeR_pos);};
    AnyRefNode LTptT5L5NodeL = {sRel = .Scale(.Data.LTptT5L5NodeL_pos);};

    AnyRefNode LTptT5L5Via1NodeR = {sRel = .Scale(.Data.LTptT5L5Via1NodeR_pos);};
    AnyRefNode LTptT5L5Via1NodeL = {sRel = .Scale(.Data.LTptT5L5Via1NodeL_pos);};

    AnyRefNode LTptT5L5Via2NodeR = {sRel = .Scale(.Data.LTptT5L5Via2NodeR_pos);};
    AnyRefNode LTptT5L5Via2NodeL = {sRel = .Scale(.Data.LTptT5L5Via2NodeL_pos);};

    AnyRefNode LTptT5L5Via3NodeR = {sRel = .Scale(.Data.LTptT5L5Via3NodeR_pos);};
    AnyRefNode LTptT5L5Via3NodeL = {sRel = .Scale(.Data.LTptT5L5Via3NodeL_pos);};

    AnyRefNode LTptT5L5Via4NodeR = {sRel = .Scale(.Data.LTptT5L5Via4NodeR_pos);};
    AnyRefNode LTptT5L5Via4NodeL = {sRel = .Scale(.Data.LTptT5L5Via4NodeL_pos);};

    AnyRefNode LTptT5L5Via5NodeR = {sRel = .Scale(.Data.LTptT5L5Via5NodeR_pos);};
    AnyRefNode LTptT5L5Via5NodeL = {sRel = .Scale(.Data.LTptT5L5Via5NodeL_pos);};

    AnyRefNode LTptT5L5Via6NodeR = {sRel = .Scale(.Data.LTptT5L5Via6NodeR_pos);};
    AnyRefNode LTptT5L5Via6NodeL = {sRel = .Scale(.Data.LTptT5L5Via6NodeL_pos);};

    AnyRefNode LTptT5L5Via7NodeR = {sRel = .Scale(.Data.LTptT5L5Via7NodeR_pos);};
    AnyRefNode LTptT5L5Via7NodeL = {sRel = .Scale(.Data.LTptT5L5Via7NodeL_pos);};

    AnyRefNode LTptT6S1NodeR = {sRel = .Scale(.Data.LTptT6S1NodeR_pos);};
    AnyRefNode LTptT6S1NodeL = {sRel = .Scale(.Data.LTptT6S1NodeL_pos);};

    AnyRefNode LTptT6S1Via1NodeR = {sRel = .Scale(.Data.LTptT6S1Via1NodeR_pos);};
    AnyRefNode LTptT6S1Via1NodeL = {sRel = .Scale(.Data.LTptT6S1Via1NodeL_pos);};

    AnyRefNode LTptT6S1Via2NodeR = {sRel = .Scale(.Data.LTptT6S1Via2NodeR_pos);};
    AnyRefNode LTptT6S1Via2NodeL = {sRel = .Scale(.Data.LTptT6S1Via2NodeL_pos);};

    AnyRefNode LTptT6S1Via3NodeR = {sRel = .Scale(.Data.LTptT6S1Via3NodeR_pos);};
    AnyRefNode LTptT6S1Via3NodeL = {sRel = .Scale(.Data.LTptT6S1Via3NodeL_pos);};

    AnyRefNode LTptT6S1Via4NodeR = {sRel = .Scale(.Data.LTptT6S1Via4NodeR_pos);};
    AnyRefNode LTptT6S1Via4NodeL = {sRel = .Scale(.Data.LTptT6S1Via4NodeL_pos);};

    AnyRefNode LTptT6S1Via5NodeR = {sRel = .Scale(.Data.LTptT6S1Via5NodeR_pos);};
    AnyRefNode LTptT6S1Via5NodeL = {sRel = .Scale(.Data.LTptT6S1Via5NodeL_pos);};

    AnyRefNode LTptT6S1Via6NodeR = {sRel = .Scale(.Data.LTptT6S1Via6NodeR_pos);};
    AnyRefNode LTptT6S1Via6NodeL = {sRel = .Scale(.Data.LTptT6S1Via6NodeL_pos);};

    AnyRefNode LTptT7S2NodeR = {sRel = .Scale(.Data.LTptT7S2NodeR_pos);};
    AnyRefNode LTptT7S2NodeL = {sRel = .Scale(.Data.LTptT7S2NodeL_pos);};

    AnyRefNode LTptT7S2Via1NodeR = {sRel = .Scale(.Data.LTptT7S2Via1NodeR_pos);};
    AnyRefNode LTptT7S2Via1NodeL = {sRel = .Scale(.Data.LTptT7S2Via1NodeL_pos);};

    AnyRefNode LTptT7S2Via2NodeR = {sRel = .Scale(.Data.LTptT7S2Via2NodeR_pos);};
    AnyRefNode LTptT7S2Via2NodeL = {sRel = .Scale(.Data.LTptT7S2Via2NodeL_pos);};

    AnyRefNode LTptT7S2Via3NodeR = {sRel = .Scale(.Data.LTptT7S2Via3NodeR_pos);};
    AnyRefNode LTptT7S2Via3NodeL = {sRel = .Scale(.Data.LTptT7S2Via3NodeL_pos);};

    AnyRefNode LTptT7S2Via4NodeR = {sRel = .Scale(.Data.LTptT7S2Via4NodeR_pos);};
    AnyRefNode LTptT7S2Via4NodeL = {sRel = .Scale(.Data.LTptT7S2Via4NodeL_pos);};

    AnyRefNode LTptT7S2Via5NodeR = {sRel = .Scale(.Data.LTptT7S2Via5NodeR_pos);};
    AnyRefNode LTptT7S2Via5NodeL = {sRel = .Scale(.Data.LTptT7S2Via5NodeL_pos);};

    AnyRefNode LTptT8S3NodeR = {sRel = .Scale(.Data.LTptT8S3NodeR_pos);};
    AnyRefNode LTptT8S3NodeL = {sRel = .Scale(.Data.LTptT8S3NodeL_pos);};

    AnyRefNode LTptT8S3Via1NodeR = {sRel = .Scale(.Data.LTptT8S3Via1NodeR_pos);};
    AnyRefNode LTptT8S3Via1NodeL = {sRel = .Scale(.Data.LTptT8S3Via1NodeL_pos);};

    AnyRefNode LTptT8S3Via2NodeR = {sRel = .Scale(.Data.LTptT8S3Via2NodeR_pos);};
    AnyRefNode LTptT8S3Via2NodeL = {sRel = .Scale(.Data.LTptT8S3Via2NodeL_pos);};

    AnyRefNode LTptT8S3Via3NodeR = {sRel = .Scale(.Data.LTptT8S3Via3NodeR_pos);};
    AnyRefNode LTptT8S3Via3NodeL = {sRel = .Scale(.Data.LTptT8S3Via3NodeL_pos);};

    AnyRefNode LTptT8S3Via4NodeR = {sRel = .Scale(.Data.LTptT8S3Via4NodeR_pos);};
    AnyRefNode LTptT8S3Via4NodeL = {sRel = .Scale(.Data.LTptT8S3Via4NodeL_pos);};

    AnyRefNode LTptT9S4NodeR = {sRel = .Scale(.Data.LTptT9S4NodeR_pos);};
    AnyRefNode LTptT9S4NodeL = {sRel = .Scale(.Data.LTptT9S4NodeL_pos);};

    AnyRefNode LTptT9S4Via1NodeR = {sRel = .Scale(.Data.LTptT9S4Via1NodeR_pos);};
    AnyRefNode LTptT9S4Via1NodeL = {sRel = .Scale(.Data.LTptT9S4Via1NodeL_pos);};

    AnyRefNode LTptT9S4Via2NodeR = {sRel = .Scale(.Data.LTptT9S4Via2NodeR_pos);};
    AnyRefNode LTptT9S4Via2NodeL = {sRel = .Scale(.Data.LTptT9S4Via2NodeL_pos);};

    AnyRefNode LTptT9S4Via3NodeR = {sRel = .Scale(.Data.LTptT9S4Via3NodeR_pos);};
    AnyRefNode LTptT9S4Via3NodeL = {sRel = .Scale(.Data.LTptT9S4Via3NodeL_pos);};

    AnyRefNode LTptT10SacrumNodeR = {sRel = .Scale(.Data.LTptT10SacrumNodeR_pos);};
    AnyRefNode LTptT10SacrumNodeL = {sRel = .Scale(.Data.LTptT10SacrumNodeL_pos);};

    AnyRefNode LTptT10SacrumVia1NodeR = {sRel = .Scale(.Data.LTptT10SacrumVia1NodeR_pos);};
    AnyRefNode LTptT10SacrumVia1NodeL = {sRel = .Scale(.Data.LTptT10SacrumVia1NodeL_pos);};

    AnyRefNode LTptT10SacrumVia2NodeR = {sRel = .Scale(.Data.LTptT10SacrumVia2NodeR_pos);};
    AnyRefNode LTptT10SacrumVia2NodeL = {sRel = .Scale(.Data.LTptT10SacrumVia2NodeL_pos);};

    AnyRefNode LTptT11SacrumNodeR = {sRel = .Scale(.Data.LTptT11SacrumNodeR_pos);};
    AnyRefNode LTptT11SacrumNodeL = {sRel = .Scale(.Data.LTptT11SacrumNodeL_pos);};

    AnyRefNode LTptT11SacrumVia1NodeR = {sRel = .Scale(.Data.LTptT11SacrumVia1NodeR_pos);};
    AnyRefNode LTptT11SacrumVia1NodeL = {sRel = .Scale(.Data.LTptT11SacrumVia1NodeL_pos);};

    AnyRefNode LTptT12SacrumNodeR = {sRel = .Scale(.Data.LTptT12SacrumNodeR_pos);};
    AnyRefNode LTptT12SacrumNodeL = {sRel = .Scale(.Data.LTptT12SacrumNodeL_pos);};
    // End of Erector Spinae Nodes

    // Psoas Major Nodes
    AnyRefNode PMT12I_TMNodeR = {sRel = .Scale(.Data.PMT12I_TMNodeR_pos);};
    AnyRefNode PMT12I_TMNodeL = {sRel = .Scale(.Data.PMT12I_TMNodeL_pos);};
    // End of Psoas Major Nodes

    // Quadratus Lumborum Nodes
    AnyRefNode QLC12_CINodeR = {sRel = .Scale(.Data.QLC12_CINodeR_pos);};
    AnyRefNode QLC12_CINodeL = {sRel = .Scale(.Data.QLC12_CINodeL_pos);};
    // End of Quadratus Lumborum Nodes

    // Rectus Abdominis Nodes
    AnyRefNode RACP_CO7_1_R = {sRel = .Scale(.Data.RACP_CO7Node_1_R_pos);};
    AnyRefNode RACP_CO6_2_R = {sRel = .Scale(.Data.RACP_CO6Node_2_R_pos);};
    AnyRefNode RACP_CO5_3_R = {sRel = .Scale(.Data.RACP_CO5Node_3_R_pos);};
    AnyRefNode RACP_CO5_4_R = {sRel = .Scale(.Data.RACP_CO5Node_4_R_pos);};
    AnyRefNode RACP_Via_2_R = {sRel = .Scale(.Data.RACP_Via_2_R_pos);};
    AnyRefNode RACP_Via_3_R = {sRel = .Scale(.Data.RACP_Via_3_R_pos);};
    AnyRefNode RACP_Via_4_R = {sRel = .Scale(.Data.RACP_Via_4_R_pos);};

    AnyRefNode RACP_CO7_1_L = {sRel = .Scale(.Data.RACP_CO7Node_1_L_pos);};
    AnyRefNode RACP_CO6_2_L = {sRel = .Scale(.Data.RACP_CO6Node_2_L_pos);};
    AnyRefNode RACP_CO5_3_L = {sRel = .Scale(.Data.RACP_CO5Node_3_L_pos);};
    AnyRefNode RACP_CO5_4_L = {sRel = .Scale(.Data.RACP_CO5Node_4_L_pos);};
    AnyRefNode RACP_Via_2_L = {sRel = .Scale(.Data.RACP_Via_2_L_pos);};
    AnyRefNode RACP_Via_3_L = {sRel = .Scale(.Data.RACP_Via_3_L_pos);};
    AnyRefNode RACP_Via_4_L = {sRel = .Scale(.Data.RACP_Via_4_L_pos);};
   // End of Rectus Abdominis Nodes

    // Obliquus Externus Nodes
    AnyRefNode OEC6_RSNodeR = {sRel = .Scale(.Data.OEC6_RSNodeR_pos);};
    AnyRefNode OEC6_RSNodeL = {sRel = .Scale(.Data.OEC6_RSNodeL_pos);};

    AnyRefNode OEC7_RSNodeR = {sRel = .Scale(.Data.OEC7_RSNodeR_pos);};
    AnyRefNode OEC7_RSNodeL = {sRel = .Scale(.Data.OEC7_RSNodeL_pos);};

    AnyRefNode OEC8_RSNodeR = {sRel = .Scale(.Data.OEC8_RSNodeR_pos);};
    AnyRefNode OEC8_RSNodeL = {sRel = .Scale(.Data.OEC8_RSNodeL_pos);};

    AnyRefNode OEC9_RSNodeR = {sRel = .Scale(.Data.OEC9_RSNodeR_pos);};
    AnyRefNode OEC9_RSNodeL = {sRel = .Scale(.Data.OEC9_RSNodeL_pos);};

    AnyRefNode OEC10_RSNodeR = {sRel = .Scale(.Data.OEC10_RSNodeR_pos);};
    AnyRefNode OEC10_RSNodeL = {sRel = .Scale(.Data.OEC10_RSNodeL_pos);};

    AnyRefNode OEC10a_CINodeR = {sRel = .Scale(.Data.OEC10a_RSNodeR_pos);};
    AnyRefNode OEC10a_CINodeL = {sRel = .Scale(.Data.OEC10a_RSNodeL_pos);};

    AnyRefNode OEC11_CINodeR = {sRel = .Scale(.Data.OEC11_CINodeR_pos);};
    AnyRefNode OEC11_CINodeL = {sRel = .Scale(.Data.OEC11_CINodeL_pos);};

    AnyRefNode OEC12_CINodeR = {sRel = .Scale(.Data.OEC12_CINodeR_pos);};
    AnyRefNode OEC12_CINodeL = {sRel = .Scale(.Data.OEC12_CINodeL_pos);};
    // End of Obliquus Externus Nodes

    // Obliquus Internus Nodes
    AnyRefNode OICI_C8NodeR = {sRel = .Scale(.Data.OICI_C8NodeR_pos);};
    AnyRefNode OICI_C8NodeL = {sRel = .Scale(.Data.OICI_C8NodeL_pos);};

    AnyRefNode OICI_C9NodeR = {sRel = .Scale(.Data.OICI_C9NodeR_pos);};
    AnyRefNode OICI_C9NodeL = {sRel = .Scale(.Data.OICI_C9NodeL_pos);};

    AnyRefNode OICI_C10aNodeR = {sRel = .Scale(.Data.OICI_C10aNodeR_pos);};
    AnyRefNode OICI_C10aNodeL = {sRel = .Scale(.Data.OICI_C10aNodeL_pos);};

    AnyRefNode OICI_C10NodeR = {sRel = .Scale(.Data.OICI_C10NodeR_pos);};
    AnyRefNode OICI_C10NodeL = {sRel = .Scale(.Data.OICI_C10NodeL_pos);};

    AnyRefNode OICI_C11NodeR = {sRel = .Scale(.Data.OICI_C11NodeR_pos);};
    AnyRefNode OICI_C11NodeL = {sRel = .Scale(.Data.OICI_C11NodeL_pos);};
    // End of Obliquus Internus Nodes

    AnyRefNode T1C5Jnt = {sRel = .Scale(.Data.T1C5Jnt_pos);};

    AnyDrawSurf DrwSurf = {
      FileName = ...STL.FilenameThoraxSegWithoutNeck;
      RGB = ...ColorRef.Segments;
      ScaleXYZ={1.0,1.0,1.0};
      Opacity = Main.DrawSettings.BonesOpacity.Thorax;
      AnyFunTransform3D &Scale =.Scale;
    };

    AnyRefNode Right ={
      AnyInt Sign = 1;
      #include "ThoraxScapulaContactRibPoints.any"
    };
    AnyRefNode Left ={
      AnyInt Sign = -1;
      #include "ThoraxScapulaContactRibPoints.any"
    };
  }; // End of ThoraxSeg

};
