SelectedOutput.Trunk.JointMomentMeasure = {
    AnyVar T1C7ExtensionMoment = ...Trunk.JointMuscles.T1C7Jnt.Extension.Object.Muscle.PosMuscle.Fm
                                - ...Trunk.JointMuscles.T1C7Jnt.Extension.Object.Muscle.NegMuscle.Fm;

    AnyVar T1C7AxialMoment = ...Trunk.JointMuscles.T1C7Jnt.AxialRotation.Object.Muscle.PosMuscle.Fm
                            - ...Trunk.JointMuscles.T1C7Jnt.AxialRotation.Object.Muscle.NegMuscle.Fm;

    AnyVar T1C7LateralMoment = ...Trunk.JointMuscles.T1C7Jnt.LateralBend.Object.Muscle.PosMuscle.Fm
                              - ...Trunk.JointMuscles.T1C7Jnt.LateralBend.Object.Muscle.NegMuscle.Fm;
    // ThoraxSeg.T1C7JntNode ref


    AnyVar C7C6ExtensionMoment = ...Trunk.JointMuscles.C7C6Jnt.Extension.Object.Muscle.PosMuscle.Fm
                                - ...Trunk.JointMuscles.C7C6Jnt.Extension.Object.Muscle.NegMuscle.Fm;

    AnyVar C7C6AxialMoment = ...Trunk.JointMuscles.C7C6Jnt.AxialRotation.Object.Muscle.PosMuscle.Fm
                            - ...Trunk.JointMuscles.C7C6Jnt.AxialRotation.Object.Muscle.NegMuscle.Fm;

    AnyVar C7C6LateralMoment = ...Trunk.JointMuscles.C7C6Jnt.LateralBend.Object.Muscle.PosMuscle.Fm
                              - ...Trunk.JointMuscles.C7C6Jnt.LateralBend.Object.Muscle.NegMuscle.Fm;
    // C7Seg.C7C6JntNode ref


    AnyVar C6C5ExtensionMoment = ...Trunk.JointMuscles.C6C5Jnt.Extension.Object.Muscle.PosMuscle.Fm
                                - ...Trunk.JointMuscles.C6C5Jnt.Extension.Object.Muscle.NegMuscle.Fm;

    AnyVar C6C5AxialMoment = ...Trunk.JointMuscles.C6C5Jnt.AxialRotation.Object.Muscle.PosMuscle.Fm
                            - ...Trunk.JointMuscles.C6C5Jnt.AxialRotation.Object.Muscle.NegMuscle.Fm;

    AnyVar C6C5LateralMoment = ...Trunk.JointMuscles.C6C5Jnt.LateralBend.Object.Muscle.PosMuscle.Fm
                              - ...Trunk.JointMuscles.C6C5Jnt.LateralBend.Object.Muscle.NegMuscle.Fm;
    // C6Seg.C6C5JntNode ref


    AnyVar C5C4ExtensionMoment = ...Trunk.JointMuscles.C5C4Jnt.Extension.Object.Muscle.PosMuscle.Fm
                                - ...Trunk.JointMuscles.C5C4Jnt.Extension.Object.Muscle.NegMuscle.Fm;

    AnyVar C5C4AxialMoment = ...Trunk.JointMuscles.C5C4Jnt.AxialRotation.Object.Muscle.PosMuscle.Fm
                            - ...Trunk.JointMuscles.C5C4Jnt.AxialRotation.Object.Muscle.NegMuscle.Fm;

    AnyVar C5C4LateralMoment = ...Trunk.JointMuscles.C5C4Jnt.LateralBend.Object.Muscle.PosMuscle.Fm
                              - ...Trunk.JointMuscles.C5C4Jnt.LateralBend.Object.Muscle.NegMuscle.Fm;
    // C5Seg.C5C4JntNode ref


    AnyVar C4C3ExtensionMoment = ...Trunk.JointMuscles.C4C3Jnt.Extension.Object.Muscle.PosMuscle.Fm
                                - ...Trunk.JointMuscles.C4C3Jnt.Extension.Object.Muscle.NegMuscle.Fm;

    AnyVar C4C3AxialMoment = ...Trunk.JointMuscles.C4C3Jnt.AxialRotation.Object.Muscle.PosMuscle.Fm
                            - ...Trunk.JointMuscles.C4C3Jnt.AxialRotation.Object.Muscle.NegMuscle.Fm;

    AnyVar C4C3LateralMoment = ...Trunk.JointMuscles.C4C3Jnt.LateralBend.Object.Muscle.PosMuscle.Fm
                              - ...Trunk.JointMuscles.C4C3Jnt.LateralBend.Object.Muscle.NegMuscle.Fm;
    // C4Seg.C4C3JntNode ref


    AnyVar C3C2ExtensionMoment = ...Trunk.JointMuscles.C3C2Jnt.Extension.Object.Muscle.PosMuscle.Fm
                                - ...Trunk.JointMuscles.C3C2Jnt.Extension.Object.Muscle.NegMuscle.Fm;

    AnyVar C3C2AxialMoment = ...Trunk.JointMuscles.C3C2Jnt.AxialRotation.Object.Muscle.PosMuscle.Fm
                            - ...Trunk.JointMuscles.C3C2Jnt.AxialRotation.Object.Muscle.NegMuscle.Fm;

    AnyVar C3C2LateralMoment = ...Trunk.JointMuscles.C3C2Jnt.LateralBend.Object.Muscle.PosMuscle.Fm
                              - ...Trunk.JointMuscles.C3C2Jnt.LateralBend.Object.Muscle.NegMuscle.Fm;
    // C3Seg.C3C2JntNode ref


    AnyVar C2C1AxialMoment = ...Trunk.JointMuscles.C2C1Jnt.AxialRotation.Object.Muscle.PosMuscle.Fm
                            - ...Trunk.JointMuscles.C2C1Jnt.AxialRotation.Object.Muscle.NegMuscle.Fm;
    // C2Seg.C2C1JntNode ref


    AnyVar C1C0ExtensionMoment = ...Trunk.JointMuscles.C1C0Jnt.Extension.Object.Muscle.PosMuscle.Fm
                                - ...Trunk.JointMuscles.C1C0Jnt.Extension.Object.Muscle.NegMuscle.Fm;
    // C1Seg.C1C0JntNode ref
};
