AnyFolder SemispinalisLeft = {


  AnyViaPointMuscle SEL1T8 =
  {
    AnyMuscleModel &MusMdl = ...MuscleParametersSpineLeft.SemispinalisParameter.SEL1T8Par;
    AnyRefFrame &Org = ...SegmentsLumbar.L1Seg.SEL1T8NodeL;
    AnyRefFrame &Ins = ...SegmentsThorax.ThoraxSeg.SEL1T8NodeL;
    AnyDrawMuscle DrwMus = {#include "../drawSettings/MusDrawSettings.any"};

  };


  AnyViaPointMuscle SEL1T10 =
  {
    AnyMuscleModel &MusMdl = ...MuscleParametersSpineLeft.SemispinalisParameter.SEL1T10Par;
    AnyRefFrame &Org = ...SegmentsLumbar.L1Seg.SEL1T10NodeL;
    AnyRefFrame &Ins = ...SegmentsThorax.ThoraxSeg.SEL1T10NodeL;
    AnyDrawMuscle DrwMus = {#include "../drawSettings/MusDrawSettings.any"};

  };


  AnyViaPointMuscle SEL1T11 =
  {
    AnyMuscleModel &MusMdl = ...MuscleParametersSpineLeft.SemispinalisParameter.SEL1T11Par;
    AnyRefFrame &Org = ...SegmentsLumbar.L1Seg.SEL1T11NodeL;
    AnyRefFrame &Ins = ...SegmentsThorax.ThoraxSeg.SEL1T11NodeL;
    AnyDrawMuscle DrwMus = {#include "../drawSettings/MusDrawSettings.any"};

  };


  AnyViaPointMuscle SEL2T9 =
  {
    AnyMuscleModel &MusMdl = ...MuscleParametersSpineLeft.SemispinalisParameter.SEL2T9Par;
    AnyRefFrame &Org = ...SegmentsLumbar.L2Seg.SEL2T9NodeL;
    AnyRefFrame &Ins = ...SegmentsThorax.ThoraxSeg.SEL2T9NodeL;
    AnyDrawMuscle DrwMus = {#include "../drawSettings/MusDrawSettings.any"};

  };


  AnyViaPointMuscle SEL2T10 =
  {
    AnyMuscleModel &MusMdl = ...MuscleParametersSpineLeft.SemispinalisParameter.SEL2T10Par;
    AnyRefFrame &Org = ...SegmentsLumbar.L2Seg.SEL2T10NodeL;
    AnyRefFrame &Ins = ...SegmentsThorax.ThoraxSeg.SEL2T10NodeL;
    AnyDrawMuscle DrwMus = {#include "../drawSettings/MusDrawSettings.any"};

  };


  AnyViaPointMuscle SEL2T11 =
  {
    AnyMuscleModel &MusMdl = ...MuscleParametersSpineLeft.SemispinalisParameter.SEL2T11Par;
    AnyRefFrame &Org = ...SegmentsLumbar.L2Seg.SEL2T11NodeL;
    AnyRefFrame &Ins = ...SegmentsThorax.ThoraxSeg.SEL2T11NodeL;
    AnyDrawMuscle DrwMus = {#include "../drawSettings/MusDrawSettings.any"};

  };


  AnyViaPointMuscle SEL2T12 =
  {
    AnyMuscleModel &MusMdl = ...MuscleParametersSpineLeft.SemispinalisParameter.SEL2T12Par;
    AnyRefFrame &Org = ...SegmentsLumbar.L2Seg.SEL2T12NodeL;
    AnyRefFrame &Ins = ...SegmentsThorax.ThoraxSeg.SEL2T12NodeL;
    AnyDrawMuscle DrwMus = {#include "../drawSettings/MusDrawSettings.any"};

  };


  AnyViaPointMuscle SEL3T11 =
  {
    AnyMuscleModel &MusMdl = ...MuscleParametersSpineLeft.SemispinalisParameter.SEL3T11Par;
    AnyRefFrame &Org = ...SegmentsLumbar.L3Seg.SEL3T11NodeL;
    AnyRefFrame &Ins = ...SegmentsThorax.ThoraxSeg.SEL3T11NodeL;
    AnyDrawMuscle DrwMus = {#include "../drawSettings/MusDrawSettings.any"};

  };


  AnyViaPointMuscle SEL3T12 =
  {
    AnyMuscleModel &MusMdl = ...MuscleParametersSpineLeft.SemispinalisParameter.SEL3T12Par;
    AnyRefFrame &Org = ...SegmentsLumbar.L3Seg.SEL3T12NodeL;
    AnyRefFrame &Ins = ...SegmentsThorax.ThoraxSeg.SEL3T12NodeL;
    AnyDrawMuscle DrwMus = {#include "../drawSettings/MusDrawSettings.any"};

  };
};
