AnyFolder C1Seg = {
  AnyFloat Jii = {0.00022,0.00042,0.00022};
  AnyFloat sCoM_pos = {0.026-0.008,0.573,0.0};
  AnyFloat C2C1JntNode_pos = {0.03500000, 0.5740000, 0.0000000};
  AnyFloat C1C0JntNode_pos = {0.02500000, 0.5960000, 0.0000000};
  AnyFloat LongusColliT1C1NodeR_pos = {0.04200000, 0.5740000, 0.008000000};
  AnyFloat LongusColliT1C1NodeL_pos = {0.04200000, 0.5740000, -0.008000000};
  AnyFloat SpleniusCervicisT3C1NodeR_pos = {0.01900000, 0.5730000, 0.03900000};
  AnyFloat SpleniusCervicisT3C1NodeL_pos = {0.01900000, 0.5730000, -0.03900000};
  AnyFloat Right_pos = {0.0000000, 0.0000000, 0.0000000};
  AnyFloat Left_pos = {0.0000000, 0.0000000, 0.0000000};
  AnyFloat Right_O_levator_scapulae_1_pos = {0.02500000, 0.5750000, 0.03900000};
  AnyFloat Right_O_trapezius_clavicular_part_5_pos = {-0.01000000, 0.5700000, 0.005000000};
  AnyFloat Left_O_levator_scapulae_1_pos = {0.02500000, 0.5750000, -0.03900000};
  AnyFloat Left_O_trapezius_clavicular_part_5_pos = {-0.01000000, 0.5700000, -0.005000000};
};
AnyFolder C2Seg = {
  AnyFloat Jii = {0.00025,0.00048,0.00025};
  AnyFloat sCoM_pos = {0.034-0.008,0.561,0.0};
  AnyFloat C3C2JntNode_pos = {0.03100000, 0.5430000, 0.0000000};
  AnyFloat C2C1JntNode_pos = {0.03500000, 0.5740000, 0.0000000};
  AnyFloat LongusColliT1C2NodeR_pos = {0.04200000, 0.5610000, 0.008000000};
  AnyFloat LongusColliT1C2NodeL_pos = {0.04200000, 0.5610000, -0.008000000};
  AnyFloat SpleniusCervicisT3C2NodeR_pos = {0.02200000, 0.5580000, 0.02600000};
  AnyFloat SpleniusCervicisT3C2NodeL_pos = {0.02200000, 0.5580000, -0.02600000};
  AnyFloat SemispinalisCervicisT1C2NodeR_pos = {-0.01000000, 0.5440000, 0.0000000};
  AnyFloat SemispinalisCervicisT1C2NodeL_pos = {-0.01000000, 0.5440000, 0.0000000};
  AnyFloat LongissimusCervicisT2C2NodeR_pos = {0.02200000, 0.5580000, 0.02600000};
  AnyFloat LongissimusCervicisT2C2NodeL_pos = {0.02200000, 0.5580000, -0.02600000};
  AnyFloat MultifidusCervicisC2NodeR_pos = {-0.01000000, 0.5440000, 0.0000000};
  AnyFloat MultifidusCervicisC2NodeL_pos = {-0.01000000, 0.5440000, 0.0000000};
  AnyFloat Right_pos = {0.0000000, 0.0000000, 0.0000000};
  AnyFloat Left_pos = {0.0000000, 0.0000000, 0.0000000};
  AnyFloat Right_O_levator_scapulae_2_pos = {0.02500000, 0.5650000, 0.02567000};
  AnyFloat Right_O_trapezius_clavicular_part_4_pos = {-0.01000000, 0.5450000, 0.005000000};
  AnyFloat Left_O_levator_scapulae_2_pos = {0.02500000, 0.5650000, -0.02567000};
  AnyFloat Left_O_trapezius_clavicular_part_4_pos = {-0.01000000, 0.5450000, -0.005000000};
};
AnyFolder C3Seg = {
  AnyFloat Jii = {0.00024,0.00046,0.00024};
  AnyFloat sCoM_pos = {0.034-0.008,0.543,0.0};
  AnyFloat C4C3JntNode_pos = {0.03000000, 0.5290000, 0.0000000};
  AnyFloat C3C2JntNode_pos = {0.03100000, 0.5430000, 0.0000000};
  AnyFloat LongusColliT1C3NodeR_pos = {0.04300000, 0.5420000, 0.008000000};
  AnyFloat LongusColliT1C3NodeL_pos = {0.04300000, 0.5420000, -0.008000000};
  AnyFloat LongusCapitisC3C0NodeR_pos = {0.03200000, 0.5450000, 0.02000000};
  AnyFloat LongusCapitisC3C0NodeL_pos = {0.03200000, 0.5450000, -0.02000000};
  AnyFloat ScalenusMediusT1C3NodeR_pos = {0.02400000, 0.5400000, 0.02400000};
  AnyFloat ScalenusMediusT1C3NodeL_pos = {0.02400000, 0.5400000, -0.02400000};
  AnyFloat SpleniusCervicisT3C3NodeR_pos = {0.02300000, 0.5420000, 0.02600000};
  AnyFloat SpleniusCervicisT3C3NodeL_pos = {0.02300000, 0.5420000, -0.02600000};
  AnyFloat SemispinalisCervicisT2C3NodeR_pos = {-0.01100000, 0.5310000, 0.0000000};
  AnyFloat SemispinalisCervicisT2C3NodeL_pos = {-0.01100000, 0.5310000, 0.0000000};
  AnyFloat LongissimusCapitisC3C0NodeR_pos = {0.02300000, 0.5420000, 0.02600000};
  AnyFloat LongissimusCapitisC3C0NodeL_pos = {0.02300000, 0.5420000, -0.02600000};
  AnyFloat LongissimusCervicisT2C3NodeR_pos = {0.02300000, 0.5420000, 0.02600000};
  AnyFloat LongissimusCervicisT2C3NodeL_pos = {0.02300000, 0.5420000, -0.02600000};
  AnyFloat MultifidusCervicisC3NodeR_pos = {-0.01100000, 0.5310000, 0.0000000};
  AnyFloat MultifidusCervicisC3NodeL_pos = {-0.01100000, 0.5310000, 0.0000000};
  AnyFloat Right_pos = {0.0000000, 0.0000000, 0.0000000};
  AnyFloat Left_pos = {0.0000000, 0.0000000, 0.0000000};
  AnyFloat Right_O_levator_scapulae_3_pos = {0.02400000, 0.5500000, 0.02310000};
  AnyFloat Right_O_trapezius_clavicular_part_3_pos = {-0.01200000, 0.5350000, 0.005000000};
  AnyFloat Left_O_levator_scapulae_3_pos = {0.02400000, 0.5500000, -0.02310000};
  AnyFloat Left_O_trapezius_clavicular_part_3_pos = {-0.01200000, 0.5350000, -0.005000000};
};
AnyFolder C4Seg = {
  AnyFloat Jii = {0.00023,0.00044,0.00023};
  AnyFloat sCoM_pos = {0.033-0.008,0.526,0.0};
  AnyFloat C5C4JntNode_pos = {0.02900000, 0.5110000, 0.0000000};
  AnyFloat C4C3JntNode_pos = {0.03000000, 0.5290000, 0.0000000};
  AnyFloat LongusColliT1C4NodeR_pos = {0.04200000, 0.5250000, 0.008000000};
  AnyFloat LongusColliT1C4NodeL_pos = {0.04200000, 0.5250000, -0.008000000};
  AnyFloat LongusCapitisC4C0NodeR_pos = {0.03000000, 0.5280000, 0.02100000};
  AnyFloat LongusCapitisC4C0NodeL_pos = {0.03000000, 0.5280000, -0.02100000};
  AnyFloat ScalenusAnteriorT1C4NodeR_pos = {0.02200000, 0.5260000, 0.02600000};
  AnyFloat ScalenusAnteriorT1C4NodeL_pos = {0.02200000, 0.5260000, -0.02600000};
  AnyFloat SemispinalisCapitisC4C0NodeR_pos = {0.02200000, 0.5260000, 0.02600000};
  AnyFloat SemispinalisCapitisC4C0NodeL_pos = {0.02200000, 0.5260000, -0.02600000};
  AnyFloat SemispinalisCervicisT3C4NodeR_pos = {-0.01400000, 0.5210000, 0.0000000};
  AnyFloat SemispinalisCervicisT3C4NodeL_pos = {-0.01400000, 0.5210000, 0.0000000};
  AnyFloat LongissimusCapitisC4C0NodeR_pos = {0.02200000, 0.5260000, 0.02600000};
  AnyFloat LongissimusCapitisC4C0NodeL_pos = {0.02200000, 0.5260000, -0.02600000};
  AnyFloat LongissimusCervicisT2C4NodeR_pos = {0.02200000, 0.5260000, 0.02600000};
  AnyFloat LongissimusCervicisT2C4NodeL_pos = {0.02200000, 0.5260000, -0.02600000};
  AnyFloat MultifidusCervicisC4NodeR_pos = {-0.01400000, 0.5210000, 0.0000000};
  AnyFloat MultifidusCervicisC4NodeL_pos = {-0.01400000, 0.5210000, 0.0000000};
  AnyFloat Right_pos = {0.0000000, 0.0000000, 0.0000000};
  AnyFloat Left_pos = {0.0000000, 0.0000000, 0.0000000};
  AnyFloat Right_O_levator_scapulae_4_pos = {0.02300000, 0.5350000, 0.02310000};
  AnyFloat Right_O_trapezius_clavicular_part_2_pos = {-0.01400000, 0.5220000, 0.005000000};
  AnyFloat Left_O_levator_scapulae_4_pos = {0.02300000, 0.5350000, -0.02310000};
  AnyFloat Left_O_trapezius_clavicular_part_2_pos = {-0.01400000, 0.5220000, -0.005000000};
};
AnyFolder C5Seg = {
  AnyFloat Jii = {0.00023,0.00045,0.00023};
  AnyFloat sCoM_pos = {0.030-0.008,0.508,0.0};
  AnyFloat C6C5JntNode_pos = {0.02600000, 0.4950000, 0.0000000};
  AnyFloat C5C4JntNode_pos = {0.02900000, 0.5110000, 0.0000000};
  AnyFloat LongusColliT1C5NodeR_pos = {0.03900000, 0.5060000, 0.008000000};
  AnyFloat LongusColliT1C5NodeL_pos = {0.03900000, 0.5060000, -0.008000000};
  AnyFloat LongusCapitisC5C0NodeR_pos = {0.02600000, 0.5100000, 0.02500000};
  AnyFloat LongusCapitisC5C0NodeL_pos = {0.02600000, 0.5100000, -0.02500000};
  AnyFloat ScalenusPosteriorT1C5NodeR_pos = {0.02000000, 0.5100000, 0.02800000};
  AnyFloat ScalenusPosteriorT1C5NodeL_pos = {0.02000000, 0.5100000, -0.02800000};
  AnyFloat SemispinalisCapitisC5C0NodeR_pos = {0.02000000, 0.5100000, 0.02800000};
  AnyFloat SemispinalisCapitisC5C0NodeL_pos = {0.02000000, 0.5100000, -0.02800000};
  AnyFloat SemispinalisCervicisT4C5NodeR_pos = {-0.02200000, 0.5110000, 0.0000000};
  AnyFloat SemispinalisCervicisT4C5NodeL_pos = {-0.02200000, 0.5110000, 0.0000000};
  AnyFloat LongissimusCapitisC5C0NodeR_pos = {0.02000000, 0.5100000, 0.02800000};
  AnyFloat LongissimusCapitisC5C0NodeL_pos = {0.02000000, 0.5100000, -0.02800000};
  AnyFloat LongissimusCervicisT2C5NodeR_pos = {0.02000000, 0.5100000, 0.02800000};
  AnyFloat LongissimusCervicisT2C5NodeL_pos = {0.02000000, 0.5100000, -0.02800000};
  AnyFloat MultifidusCervicisC5C2NodeR_pos = {0.02000000, 0.5100000, 0.02800000};
  AnyFloat MultifidusCervicisC5C2NodeL_pos = {0.02000000, 0.5100000, -0.02800000};
  AnyFloat MultifidusCervicisC5NodeR_pos = {-0.02200000, 0.5110000, 0.0000000};
  AnyFloat MultifidusCervicisC5NodeL_pos = {-0.02200000, 0.5110000, 0.0000000};
  AnyFloat Right_pos = {0.0000000, 0.0000000, 0.0000000};
  AnyFloat Left_pos = {0.0000000, 0.0000000, 0.0000000};
  AnyFloat Right_O_trapezius_clavicular_part_1_pos = {-0.02200000, 0.5130000, 0.005000000};
  AnyFloat Left_O_trapezius_clavicular_part_1_pos = {-0.02200000, 0.5130000, -0.005000000};
};
AnyFolder C6Seg = {
  AnyFloat Jii = {0.00024,0.00047,0.00024};
  AnyFloat sCoM_pos = {0.026-0.008,0.490,0.0};
  AnyFloat C7C6JntNode_pos = {0.01900000, 0.4790000, 0.0000000};
  AnyFloat C6C5JntNode_pos = {0.02600000, 0.4950000, 0.0000000};
  AnyFloat LongusColliT1C6NodeR_pos = {0.03500000, 0.4860000, 0.008000000};
  AnyFloat LongusColliT1C6NodeL_pos = {0.03500000, 0.4860000, -0.008000000};
  AnyFloat LongusCapitisC6C0NodeR_pos = {0.02200000, 0.4930000, 0.02600000};
  AnyFloat LongusCapitisC6C0NodeL_pos = {0.02200000, 0.4930000, -0.02600000};
  AnyFloat SemispinalisCapitisC6C0NodeR_pos = {0.01800000, 0.4980000, 0.03200000};
  AnyFloat SemispinalisCapitisC6C0NodeL_pos = {0.01800000, 0.4980000, -0.03200000};
  AnyFloat SemispinalisCervicisT5C6NodeR_pos = {-0.02700000, 0.4950000, 0.0000000};
  AnyFloat SemispinalisCervicisT5C6NodeL_pos = {-0.02700000, 0.4950000, 0.0000000};
  AnyFloat LongissimusCapitisC6C0NodeR_pos = {0.01800000, 0.4980000, 0.03200000};
  AnyFloat LongissimusCapitisC6C0NodeL_pos = {0.01800000, 0.4980000, -0.03200000};
  AnyFloat LongissimusCervicisT2C6NodeR_pos = {0.01800000, 0.4980000, 0.03200000};
  AnyFloat LongissimusCervicisT2C6NodeL_pos = {0.01800000, 0.4980000, -0.03200000};
  AnyFloat MultifidusCervicisC6C2NodeR_pos = {0.01800000, 0.4980000, 0.03200000};
  AnyFloat MultifidusCervicisC6C2NodeL_pos = {0.01800000, 0.4980000, -0.03200000};
  AnyFloat MultifidusCervicisC6C3NodeR_pos = {0.01800000, 0.4980000, 0.03200000};
  AnyFloat MultifidusCervicisC6C3NodeL_pos = {0.01800000, 0.4980000, -0.03200000};
  AnyFloat MultifidusCervicisC6NodeR_pos = {-0.02700000, 0.4950000, 0.0000000};
  AnyFloat MultifidusCervicisC6NodeL_pos = {-0.02700000, 0.4950000, 0.0000000};
  AnyFloat Right_pos = {0.0000000, 0.0000000, 0.0000000};
  AnyFloat Left_pos = {0.0000000, 0.0000000, 0.0000000};
  AnyFloat Right_O_trapezius_clavicular_part_7_pos = {-0.02600000, 0.4950000, 0.005000000};
  AnyFloat Left_O_trapezius_clavicular_part_7_pos = {-0.02600000, 0.4950000, -0.005000000};
};
AnyFolder C7Seg = {
  AnyFloat Jii = {0.00022,0.00043,0.00022};
  AnyFloat sCoM_pos = {0.018-0.008,0.471,0.0};
  AnyFloat T1C7JntNode_pos = {0.01100000, 0.4610000, 0.0000000};
  AnyFloat C7C6JntNode_pos = {0.01900000, 0.4790000, 0.0000000};
  AnyFloat SpleniusCapitisC7C0NodeR_pos = {-0.03500000, 0.4720000, 0.0000000};
  AnyFloat SpleniusCapitisC7C0NodeL_pos = {-0.03500000, 0.4720000, 0.0000000};
  AnyFloat SemispinalisCapitisC7C0NodeR_pos = {-0.01300000, 0.4950000, 0.03200000};
  AnyFloat SemispinalisCapitisC7C0NodeL_pos = {-0.01300000, 0.4950000, -0.03200000};
  AnyFloat SemispinalisCervicisT6C7NodeR_pos = {-0.03300000, 0.4700000, 0.0000000};
  AnyFloat SemispinalisCervicisT6C7NodeL_pos = {-0.03300000, 0.4700000, 0.0000000};
  AnyFloat LongissimusCapitisC7C0NodeR_pos = {-0.005000000, 0.4950000, 0.03200000};
  AnyFloat LongissimusCapitisC7C0NodeL_pos = {-0.005000000, 0.4950000, -0.03200000};
  AnyFloat LongissimusCervicisT2C7NodeR_pos = {-0.005000000, 0.4950000, 0.03200000};
  AnyFloat LongissimusCervicisT2C7NodeL_pos = {-0.005000000, 0.4950000, -0.03200000};
  AnyFloat MultifidusCervicisC7C3NodeR_pos = {-0.005000000, 0.4950000, 0.03200000};
  AnyFloat MultifidusCervicisC7C3NodeL_pos = {-0.005000000, 0.4950000, -0.03200000};
  AnyFloat MultifidusCervicisC7C4NodeR_pos = {-0.005000000, 0.4950000, 0.03200000};
  AnyFloat MultifidusCervicisC7C4NodeL_pos = {-0.005000000, 0.4950000, -0.03200000};
  AnyFloat MultifidusCervicisC7NodeR_pos = {-0.03300000, 0.4700000, 0.0000000};
  AnyFloat MultifidusCervicisC7NodeL_pos = {-0.03300000, 0.4700000, 0.0000000};
  AnyFloat Right_pos = {0.0000000, 0.0000000, 0.0000000};
  AnyFloat Left_pos = {0.0000000, 0.0000000, 0.0000000};
  AnyFloat Right_O_trapezius_clavicular_part_8_pos = {-0.03000000, 0.4700000, 0.005000000};
  AnyFloat Right_O_rhomboideus_1_pos = {-0.02700000, 0.4700000, 0.005000000};
  AnyFloat Left_O_trapezius_clavicular_part_8_pos = {-0.03000000, 0.4700000, 0.005000000};
  AnyFloat Left_O_rhomboideus_1_sRel_pos = {-0.02700000, 0.4700000, 0.005000000};
};
