AnyFloat ZReflection = {{1,0,0},{0,1,0},{0,0,-1}};

AnyFolder PelvisSeg = {

  // This block moved from the StandardParameters.any

  AnyVec3 RASIS = {0.120080, -0.05009163, 0.1312};
  AnyVec3 LASIS = { 0.120080, -0.05009163, -0.1312};
  AnyVec3 RPSIS = {-0.016926, 0.01085285, 0.0236796};
  AnyVec3 LPSIS = {-0.016926, 0.01085285, -0.0236796};
  AnyVec3 RPT = {0.1070, -0.1413, 0.0190};//< Right Pubic Tubercle
  AnyVec3 LPT = {0.1070, -0.1413, -0.0190};//< Left Pubic Tubercle

  AnyFloat SacralInterfaceMorphingPointsPicked = {
  {0.0543855, -0.0164601, -0.00191518},
 {0.024924, 0.00666343, 0.000595145},
 {-0.0164834, 0.00836085, 0.00224322},
 {-0.0242425, -0.022508, 0.00064846},
 {-0.0406775, -0.0590935, 0.00194642},
 {-0.0336094, -0.128441, -0.0016917},
 {-0.0420192, -0.103225, 0.0242102},
 {-0.0409142, -0.099191, -0.0272619},
 {0.0382823, -0.0422929, 0.0481419},
 {0.0345507, 0.0198072, 0.0448075},
 {0.014581, -0.0100491, 0.0471374},
 {0.0405619, -0.0413236, -0.0459349},
 {0.0334144, 0.0163358, -0.0381829},
 {0.021979, -0.01505, -0.045024},
 {-0.0446654, -0.0770829, -0.0102879},
 {-0.0452276, -0.106339, -0.0111785},
 {-0.0399201, -0.112691, -0.0156785},
 {-0.0381448, -0.11934, 0.00921956},
 {-0.0471807, -0.105513, 0.00555406},
 {-0.0512493, -0.081406, 0.00761028},
 {-0.0368024, -0.116344, -0.00179385},
 {-0.0359238, -0.072841, -0.000305753}
 };

   //Trick to ensure symmetry on Z
  AnyFloat SacralInterfaceMorphingPoints = arrcat(SacralInterfaceMorphingPointsPicked,   SacralInterfaceMorphingPointsPicked * {{1,0,0},{0,1,0},{0,0,-1}});


  AnyFloat PelvicInterfaceMorphingRightPoints = {
  {0.104428, -0.140406, 0.00308862},
 {0.10547, -0.138748, 0.0222285},
 {0.0728191, -0.165556, 0.00130153},
 {0.0599428, -0.173275, 0.0147677},
 {0.0300061, -0.173138, 0.0277551},
 {0.0493885, -0.134952, 0.052601},
 {0.081841, -0.135439, 0.0413888},
 {0.0328742, -0.127934, 0.0647686},
 {-0.00890269, -0.151025, 0.0707131},
 {-0.0133161, -0.126963, 0.0583294},
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
 RASIS,
 RPSIS,
 RPT
 };


  AnyVec3 sCoM_pos = {0.053000, -0.050, 0.000};
  AnyMatrix points_RBF_unscaled = arrcat(SacralInterfaceMorphingPoints, PelvicInterfaceMorphingRightPoints,  PelvicInterfaceMorphingRightPoints * {{1,0,0},{0,1,0},{0,0,-1}});

  AnyFloat Right_PsoasWrapSurf_points = {
          {0.076, -0.112, 0.048},
          {0.076, -0.095, 0.093},
          {0.077, -0.139, 0.077},
          {0.082, -0.117, 0.076},
          {0.077, -0.104, 0.072}};

  AnyFloat Left_PsoasWrapSurf_points = {
          {0.076, -0.112, -0.048},
          {0.076, -0.095, -0.093},
          {0.077, -0.139, -0.077},
          {0.082, -0.117, -0.076},
          {0.077, -0.104, -0.072}};

  AnyFloat HipJointsCenterTD_pos = {0.050000, -0.1150000, 0};
  AnyFloat GroundPelvisJntNode_pos = {0.015000, -9.911979e-034, 0};
  AnyFloat L5PelvisJntNode_pos = {0.058000, -0.005000000, 0};
  AnyFloat PelvisSacrumJntNode_pos = {0.02700000, -0.03000000, 0} ;
  AnyFloat Right_pos = {0.015000, 0.0000000, 0.0000000};
  AnyFloat Left_pos = {0.015000, 0.0000000, 0.0000000};
  AnyFloat ALLNodeSuperior_pos = {0.073000, -0.01800000, 0};
  AnyFloat PLLNodeSuperior_pos = {0.047000, 0, 0};

  AnyFloat MFmL5SacrumNodeR_pos = {0.00205033, 0.012148, 0.0129715};//{0.032000, -0.008000000, 0.01900000};
  AnyFloat MFmL4SacrumNodeR_pos = {-0.0213334, -0.01194, 0.0257652};//{0.015000, -0.02100000, 0.02500000};
  AnyFloat MFmL5SacrumNodeL_pos = {0.00205033, 0.012148, -0.0129715};//{0.032000, -0.008000000, -0.01900000};
  AnyFloat MFmL4SacrumNodeL_pos = {-0.0213334, -0.01194, -0.0257652};//{0.015000, -0.02100000, -0.02500000};

  AnyFloat MFdL5S1NodeR_pos = {0.00447431, 0.00935999, 0.0172032};//{0.032000, -0.008000000, 0.01900000};
  AnyFloat MFdL5S1NodeL_pos = {0.00447431, 0.00935999, -0.0172032};//{0.032000, -0.008000000, -0.01900000};
  AnyFloat MFdL4S1NodeR_pos = {0.0306566, 0.0142471 , 0.0333636};//{0.038000, 0.007000000, 0.02600000};
  AnyFloat MFdL4S1NodeL_pos = {0.0306566, 0.0142471 ,-0.0333636};//{0.038000, 0.007000000, -0.02600000};

  AnyFloat MFmL3S1NodeR_pos = {0.0306566, 0.0142471 , 0.0333636};//{0.038000, 0.007000000, 0.02600000};
  AnyFloat MFmL3S1NodeL_pos = {0.0306566, 0.0142471 ,-0.0333636};//{0.038000, 0.007000000, -0.02600000};
  AnyFloat MFtsL1S1NodeR_pos = {0.0306566, 0.0142471 , 0.0333636};//{0.038000, 0.007000000, 0.02600000};
  AnyFloat MFtsL1S1NodeL_pos = {0.0306566, 0.0142471 ,-0.0333636};//{0.038000, 0.007000000, -0.02600000};
  AnyFloat MFtsL2S1NodeR_pos = {0.0306566, 0.0142471 , 0.0333636};//{0.038000, 0.007000000, 0.02600000};
  AnyFloat MFtsL2S1NodeL_pos = {0.0306566, 0.0142471 ,-0.0333636};//{0.038000, 0.007000000, -0.02600000};

  //<point x="-0.0255907, -0.0356921, 0.038108 " active="1" name="0"/>
  //<point x="-0.0180531, -0.0141317, 0.0397136" active="1" name="1"/>

  AnyFloat MFtsL3LigamentNodeViaR_pos = {-0.0180531-0.0075, -0.0141317-0.005, (0.0397136-0.005)};//{0.012000, -0.04300000, 0.03500000};
  AnyFloat MFtsL3LigamentNodeViaL_pos = {-0.0180531-0.0075, -0.0141317-0.005,-(0.0397136-0.005)};//{0.012000, -0.04300000, -0.03500000};

  AnyFloat MFtsL3LigamentNodeR_pos = {-0.0255907, -0.0356921, 0.038108 };//{0.012000, -0.04300000, 0.03500000};
  AnyFloat MFtsL3LigamentNodeL_pos = {-0.0255907, -0.0356921, -0.038108 };//{0.012000, -0.04300000, -0.03500000};

  AnyFloat MFtsL4SacrumViaNodeR_pos = {-0.017548 , -0.00147985-0.005, 0.0054480+0.005};
  AnyFloat MFtsL5SacrumViaNodeR_pos = {-0.0121086, 0.00488946 , 0.0119143};
  AnyFloat MFtsL4SacrumViaNodeL_pos = {-0.017548 , -0.00147985-0.005, -0.0054480-0.005};
  AnyFloat MFtsL5SacrumViaNodeL_pos = {-0.0121086, 0.00488946 , -0.0119143};


  AnyFloat MFtsL4SacrumNodeR_pos = {-0.027368, -0.0316718, 0.0152958};//{0.008000, -0.04000000, 0.02800000};
  AnyFloat MFtsL5SacrumNodeR_pos = {-0.038453, -0.0540485, 0.0311674};//{0.007000, -0.02500000, 0.01200000};
  AnyFloat MFtsL4SacrumNodeL_pos = {-0.027368, -0.0316718, -0.0152958};//{0.008000, -0.04000000, -0.02800000};
  AnyFloat MFtsL5SacrumNodeL_pos = {-0.038453, -0.0540485, -0.0311674};//{0.007000, -0.02500000, -0.01200000};


  AnyFloat MFtstL1SIPSViaNodeR_pos = {-0.0149335+0.02, 0.0153627+0.015,  (0.054064-0.02)};//{-0.007000, -0.007000000, 0.02200000};
  AnyFloat MFtstL2SIPSViaNodeR_pos = {-0.0174397+0.02, 0.0118849+0.01,  (0.048182-0.02)};//{-0.002000, -0.008000000, 0.02200000};
  AnyFloat MFtstL1SIPSViaNodeL_pos = {-0.0149335+0.02, 0.0153627+0.015, -(0.054064-0.02)};//{-0.007000, -0.007000000, -0.02200000};
  AnyFloat MFtstL2SIPSViaNodeL_pos = {-0.0174397+0.02, 0.0118849+0.01, -(0.048182-0.02)};//{-0.002000, -0.008000000, -0.02200000};


  AnyFloat MFtstL1SIPSNodeR_pos = {-0.0149335, 0.0153627,  0.054064};//{-0.007000, -0.007000000, 0.02200000};
  AnyFloat MFtstL2SIPSNodeR_pos = {-0.0174397, 0.0118849,  0.048182};//{-0.002000, -0.008000000, 0.02200000};
  AnyFloat MFtstL1SIPSNodeL_pos = {-0.0149335, 0.0153627, -0.054064};//{-0.007000, -0.007000000, -0.02200000};
  AnyFloat MFtstL2SIPSNodeL_pos = {-0.0174397, 0.0118849, -0.048182};//{-0.002000, -0.008000000, -0.02200000};


  // Erector Spinae Nodes
  AnyVec3 ILplL1CINodeR0 = {-0.000516508, 0.0354869, 0.0554782};//{-0.008000,0.007,0.020};
  AnyVec3 ILplL2CINodeR0 = {-0.00572358 , 0.0317726, 0.0549007};//{-0.006000,0.014,0.023};

  AnyVec3 LTplL1SIPSNodeR0 = {0.00696654, 0.0391073, 0.0604304};//{-0.002000,0.021,0.033};
  AnyVec3 LTplL2SIPSNodeR0 = {0.00622304, 0.0395058, 0.0568333};//{0.000000,0.019,0.030};

  AnyVec3 ILptC6SIPSNodeR0 = {-0.00317836, 0.0328506, 0.0532211};//{-0.004000,0.011,0.024};
  AnyVec3 ILptC5SIPSNodeR0 = {0.00208588, 0.0372169, 0.0562346};//{-0.008000,0.007,0.020};

  AnyVec3 ILptC7CINodeR0 =  {-0.00800184, 0.0184049, 0.0435864};//{0.000000,0.015,0.028};
  AnyVec3 ILptC8CINodeR0 =  {-0.00526293, 0.0243863, 0.046309 };//{0.004000,0.019,0.032};
  AnyVec3 ILptC9CINodeR0 =  {-0.00222712, 0.0301648, 0.0499919};//{0.008000,0.023,0.036};
  AnyVec3 ILptC10CINodeR0 = {0.000544396, 0.0349682, 0.0529106};//{0.012000,0.027,0.040};
  AnyVec3 ILptC11CINodeR0 = {0.00440885 , 0.0385561, 0.0568978};//{0.016000,0.031,0.044};
  AnyVec3 ILptC12CINodeR0 = {0.0103772  , 0.0412754, 0.0622313};//{0.020000,0.035,0.048};

  AnyVec3 LTptT6S1NodeR0      = {-0.0171665 - 0.005, 0.00751867, 0.00000000};//{0.018000, 0.003,0.000};
  AnyVec3 LTptT7S2NodeR0      = {-0.0242993 - 0.005, -0.0226956, 0.00000000};//{0.007000,-0.015,0.000};
  AnyVec3 LTptT8S3NodeR0      = {-0.0324856 - 0.005, -0.0401841, 0.00000000};//{-0.00400,-0.032,0.000};
  AnyVec3 LTptT9S4NodeR0      = {-0.0420005 - 0.005, -0.070595 , 0.00000000};//{-0.00300,-0.051,0.000};
  AnyVec3 LTptT10SacrumNodeR0 = {-0.0302671 - 0.005, -0.0382631, 0.01443650};//{0.005000,-0.038,0.018};
  AnyVec3 LTptT11SacrumNodeR0 = {-0.0311736 - 0.005, -0.0385761, 0.02201010};//{0.005000,-0.038,0.023};
  AnyVec3 LTptT12SacrumNodeR0 = {-0.0308891 - 0.005, -0.0388656, 0.03019510};//{0.005000,-0.038,0.028};

  AnyVec3 LTptT10SacrumViaNodeR0 = {-0.0302671+0.0, -0.0382631+0.03, 0.01443650+0.0025};//{0.005000,-0.038,0.018};
  AnyVec3 LTptT11SacrumViaNodeR0 = {-0.0311736+0.0, -0.0385761+0.03, 0.02201010+0.0025};//{0.005000,-0.038,0.023};
  AnyVec3 LTptT12SacrumViaNodeR0 = {-0.0308891+0.0, -0.0388656+0.03, 0.03019510+0.0025};//{0.005000,-0.038,0.028};

  AnyFloat ILplL1CINodeR_pos      = ILplL1CINodeR0     ;
  AnyFloat ILplL2CINodeR_pos      = ILplL2CINodeR0     ;
  AnyFloat LTplL1SIPSNodeR_pos    = LTplL1SIPSNodeR0   ;
  AnyFloat LTplL2SIPSNodeR_pos    = LTplL2SIPSNodeR0   ;
  AnyFloat ILptC5SIPSNodeR_pos    = ILptC5SIPSNodeR0   ;
  AnyFloat ILptC6SIPSNodeR_pos    = ILptC6SIPSNodeR0   ;
  AnyFloat ILptC7CINodeR_pos      = ILptC7CINodeR0     ;
  AnyFloat ILptC8CINodeR_pos      = ILptC8CINodeR0     ;
  AnyFloat ILptC9CINodeR_pos      = ILptC9CINodeR0     ;
  AnyFloat ILptC10CINodeR_pos     = ILptC10CINodeR0    ;
  AnyFloat ILptC11CINodeR_pos     = ILptC11CINodeR0    ;
  AnyFloat ILptC12CINodeR_pos     = ILptC12CINodeR0    ;
  AnyFloat LTptT6S1NodeR_pos      = LTptT6S1NodeR0     ;
  AnyFloat LTptT7S2NodeR_pos      = LTptT7S2NodeR0     ;
  AnyFloat LTptT8S3NodeR_pos      = LTptT8S3NodeR0     ;
  AnyFloat LTptT9S4NodeR_pos      = LTptT9S4NodeR0     ;
  AnyFloat LTptT10SacrumNodeR_pos = LTptT10SacrumNodeR0;
  AnyFloat LTptT11SacrumNodeR_pos = LTptT11SacrumNodeR0;
  AnyFloat LTptT12SacrumNodeR_pos = LTptT12SacrumNodeR0;

  AnyFloat LTptT10SacrumViaNodeR_pos = LTptT10SacrumViaNodeR0;
  AnyFloat LTptT11SacrumViaNodeR_pos = LTptT11SacrumViaNodeR0;
  AnyFloat LTptT12SacrumViaNodeR_pos = LTptT12SacrumViaNodeR0;

  AnyFloat ILplL1CINodeL_pos      = ILplL1CINodeR_pos      *.ZReflection;
  AnyFloat ILplL2CINodeL_pos      = ILplL2CINodeR_pos      *.ZReflection;
  AnyFloat LTplL1SIPSNodeL_pos    = LTplL1SIPSNodeR_pos    *.ZReflection;
  AnyFloat LTplL2SIPSNodeL_pos    = LTplL2SIPSNodeR_pos    *.ZReflection;
  AnyFloat ILptC5SIPSNodeL_pos    = ILptC5SIPSNodeR_pos    *.ZReflection;
  AnyFloat ILptC6SIPSNodeL_pos    = ILptC6SIPSNodeR_pos    *.ZReflection;
  AnyFloat ILptC7CINodeL_pos      = ILptC7CINodeR_pos      *.ZReflection;
  AnyFloat ILptC8CINodeL_pos      = ILptC8CINodeR_pos      *.ZReflection;
  AnyFloat ILptC9CINodeL_pos      = ILptC9CINodeR_pos      *.ZReflection;
  AnyFloat ILptC10CINodeL_pos     = ILptC10CINodeR_pos     *.ZReflection;
  AnyFloat ILptC11CINodeL_pos     = ILptC11CINodeR_pos     *.ZReflection;
  AnyFloat ILptC12CINodeL_pos     = ILptC12CINodeR_pos     *.ZReflection;
  AnyFloat LTptT6S1NodeL_pos      = LTptT6S1NodeR_pos      *.ZReflection;
  AnyFloat LTptT7S2NodeL_pos      = LTptT7S2NodeR_pos      *.ZReflection;
  AnyFloat LTptT8S3NodeL_pos      = LTptT8S3NodeR_pos      *.ZReflection;
  AnyFloat LTptT9S4NodeL_pos      = LTptT9S4NodeR_pos      *.ZReflection;
  AnyFloat LTptT10SacLumNodeL_pos = LTptT10SacrumNodeR_pos *.ZReflection;
  AnyFloat LTptT11SacLumNodeL_pos = LTptT11SacrumNodeR_pos *.ZReflection;
  AnyFloat LTptT12SacLumNodeL_pos = LTptT12SacrumNodeR_pos *.ZReflection;

  AnyFloat LTptT10SacrumViaNodeL_pos = LTptT10SacrumViaNodeR_pos *.ZReflection;
  AnyFloat LTptT11SacrumViaNodeL_pos = LTptT11SacrumViaNodeR_pos *.ZReflection;
  AnyFloat LTptT12SacrumViaNodeL_pos = LTptT12SacrumViaNodeR_pos *.ZReflection;

  AnyFloat ILplL3CINodeR_pos = {-0.00991402 , 0.0279672, 0.0529199};//{-0.004000, 0.01900000, 0.02600000};
  AnyFloat ILplL4CINodeR_pos = {-0.0125597  , 0.02113  , 0.0502513};//{-0.002000, 0.02400000,  0.02900000};
  AnyFloat ILplL3CINodeL_pos = {-0.00991402 , 0.0279672, -0.0529199};//{-0.004000, 0.01900000, -0.02600000};
  AnyFloat ILplL4CINodeL_pos = {-0.0125597  , 0.02113  , -0.0502513};//{-0.002000, 0.02400000, -0.02900000};

  AnyFloat LTplL3SIPSNodeR_pos    = {0.00643616, 0.0377332, 0.0536012};//{0.002000, 0.01700000,  0.02700000};
  AnyFloat LTplL4SIPSNodeR_pos    = {0.00711773, 0.0334732, 0.0493415};//{0.004000, 0.01500000,  0.02400000};
  AnyFloat LTplL3SIPSNodeL_pos    = {0.00643616, 0.0377332, -0.0536012};//{0.002000, 0.01700000, -0.02700000};
  AnyFloat LTplL4SIPSNodeL_pos    = {0.00711773, 0.0334732, -0.0493415};//{0.004000, 0.01500000, -0.02400000};

  AnyFloat LTplL5IliumNodeR_pos   = {0.006000, 0.01300000, 0.02100000};
  AnyFloat LTplL5IliumNodeL_pos   = {0.006000, 0.01300000,-0.02100000};
  AnyFloat LTptT10SacrumNodeL_pos = LTptT10SacrumNodeR_pos*.ZReflection;
  AnyFloat LTptT11SacrumNodeL_pos = LTptT11SacrumNodeR_pos*.ZReflection;
  AnyFloat LTptT12SacrumNodeL_pos = LTptT12SacrumNodeR_pos*.ZReflection;
  // End of Erector Spinae Nodes

  // Psoas Major Nodes
  //These points are used as via points
  AnyVec3 IliopubicEminenceViaNodeR0 = {0.086, -0.102, 0.078};
  AnyFloat IliopubicEminenceViaNodeR_pos = IliopubicEminenceViaNodeR0;
  AnyFloat IliopubicEminenceViaNodeL_pos = IliopubicEminenceViaNodeR0*.ZReflection;
  AnyFloat Right_IliopubicEminenceEndNode_pos = {0.089,-0.1101,0.0785};
  AnyFloat Left_IliopubicEminenceEndNode_pos = {0.089,-0.1101,0.0785}*.ZReflection;

  AnyVar Translation =0.015;
  AnyFloat PMT12I_TMVia5NodeR_pos = {0.07+Translation,-0.037,(.ThoraxSeg.PMT12I_TMNodeR0[2] - .ThoraxSeg.PMT12I_TMZ*(.ThoraxSeg.PMT12I_TMNodeR0[1] + 0.037))};
  AnyFloat PML1I_TMVia4NodeR_pos  = {0.07+Translation,-0.037,(.L1Seg.PML1I_TMNodeR0[2]      - .L3Seg.PML1I_TMZ*(.L1Seg.PML1I_TMNodeR0[1]                         + 0.037))};
  AnyFloat PML2I_TMVia3NodeR_pos  = {0.07+Translation,-0.037,(.L2Seg.PML2I_TMNodeR0[2]      - .L3Seg.PML2I_TMZ*(.L2Seg.PML2I_TMNodeR0[1]                         + 0.037))};
  AnyFloat PML3I_TMVia2NodeR_pos  = {0.07+Translation,-0.037,(.L3Seg.PML3I_TMNodeR0[2]      - .L3Seg.PML3I_TMZ*(.L3Seg.PML3I_TMNodeR0[1]                         + 0.037))};
  AnyFloat PML4I_TMVia1NodeR_pos  = {0.07+Translation,-0.037,(.L4Seg.PML4I_TMNodeR0[2]      - .L3Seg.PML4I_TMZ*(.L4Seg.PML4I_TMNodeR0[1]                         + 0.037))};
  AnyFloat PML5_TMVia1NodeR_pos   = {0.07+Translation,-0.037,(.L5Seg.PML5_TMNodeR0[2]       - .L3Seg.PML5_TMZ *(.L5Seg.PML5_TMNodeR0[1]                          + 0.037))};
  AnyFloat PML1T_TMVia5NodeR_pos  = {0.07            ,-0.037,(.L1Seg.PML1T_TMNodeR0[2]      - .L2Seg.PML1T_TMZ*(.L1Seg.PML1T_TMNodeR0[1]                         + 0.037))};
  AnyFloat PML2T_TMVia4NodeR_pos  = {0.07            ,-0.037,(.L2Seg.PML2T_TMNodeR0[2]      - .L2Seg.PML2T_TMZ*(.L2Seg.PML2T_TMNodeR0[1]                         + 0.037))};
  AnyFloat PML3T_TMVia3NodeR_pos  = {0.07            ,-0.037,(.L3Seg.PML3T_TMNodeR0[2]      - .L2Seg.PML3T_TMZ*(.L3Seg.PML3T_TMNodeR0[1]                         + 0.037))};
  AnyFloat PML4T_TMVia2NodeR_pos  = {0.07            ,-0.037,(.L4Seg.PML4T_TMNodeR0[2]      - .L2Seg.PML4T_TMZ*(.L4Seg.PML4T_TMNodeR0[1]                         + 0.037))};
  AnyFloat PML5T_TMVia1NodeR_pos  = {0.07            ,-0.037,(.L5Seg.PML5T_TMNodeR0[2]      - .L2Seg.PML5T_TMZ*(.L5Seg.PML5T_TMNodeR0[1]                         + 0.037))};

  AnyFloat PMT12I_TMVia5NodeL_pos = PMT12I_TMVia5NodeR_pos *.ZReflection;
  AnyFloat PML1I_TMVia4NodeL_pos  = PML1I_TMVia4NodeR_pos  *.ZReflection;
  AnyFloat PML2I_TMVia3NodeL_pos  = PML2I_TMVia3NodeR_pos  *.ZReflection;
  AnyFloat PML3I_TMVia2NodeL_pos  = PML3I_TMVia2NodeR_pos  *.ZReflection;
  AnyFloat PML4I_TMVia1NodeL_pos  = PML4I_TMVia1NodeR_pos  *.ZReflection;
  AnyFloat PML5_TMVia1NodeL_pos   = PML5_TMVia1NodeR_pos   *.ZReflection;
  AnyFloat PML1T_TMVia5NodeL_pos  = PML1T_TMVia5NodeR_pos  *.ZReflection;
  AnyFloat PML2T_TMVia4NodeL_pos  = PML2T_TMVia4NodeR_pos  *.ZReflection;
  AnyFloat PML3T_TMVia3NodeL_pos  = PML3T_TMVia3NodeR_pos  *.ZReflection;
  AnyFloat PML4T_TMVia2NodeL_pos  = PML4T_TMVia2NodeR_pos  *.ZReflection;
  AnyFloat PML5T_TMVia1NodeL_pos  = PML5T_TMVia1NodeR_pos  *.ZReflection;
  // End of Psoas Major Nodes

  AnyFloat QLNodeR_pos = {0.053000, 0.05400000,  0.08300000} - {0.015,0.0075,0};
  AnyFloat QLNodeL_pos = {0.053000, 0.05400000, -0.08300000} - {0.015,0.0075,0};


  AnyFloat RA_NodeR1_pos = {0.115000, -0.1310000,   0.00000000};
  AnyFloat RA_NodeR2_pos = {0.115000, -0.1310000,   0.00000000};
  AnyFloat RA_NodeR3_pos = {0.115000, -0.1310000,   0.01000000};
  AnyFloat RA_NodeR4_pos = {0.115000, -0.1310000,   0.02000000};
  AnyFloat RA_NodeL1_pos = {0.115000, -0.1310000,   -0.00000000};
  AnyFloat RA_NodeL2_pos = {0.115000, -0.1310000,   -0.00000000};
  AnyFloat RA_NodeL3_pos = {0.115000, -0.1310000,   -0.01000000};
  AnyFloat RA_NodeL4_pos = {0.115000, -0.1310000,   -0.02000000};

  AnyFloat RA_NodeR1Via_pos = {0.13651832, -0.05828126,  0.002};
  AnyFloat RA_NodeR2Via_pos = {0.13536613, -0.0579459 ,  0.006};
  AnyFloat RA_NodeR3Via_pos = {0.13421394, -0.05761053,  0.01789372};
  AnyFloat RA_NodeR4Via_pos = {0.1326777 , -0.05716338,  0.02978744};
  AnyFloat RA_NodeL1Via_pos = {0.13651832, -0.05828126,  -0.002};
  AnyFloat RA_NodeL2Via_pos = {0.13536613, -0.0579459 ,  -0.006};
  AnyFloat RA_NodeL3Via_pos = {0.13421394, -0.05761053,  -0.01789372};
  AnyFloat RA_NodeL4Via_pos = {0.1326777 , -0.05716338,  -0.02978744};

  AnyFloat OEC12_CINodeR_pos = {0.04977, 0.0435192, 0.09298};
  AnyFloat OEC11_CINodeR_pos = {0.096817106, -0.0012205498, 0.13769041};
  AnyFloat OEC10a_CINodeR_pos = {0.1088, -0.02659, 0.1473};
  AnyFloat OEC12_CINodeL_pos = {0.04977, 0.0435192, -0.09298};
  AnyFloat OEC11_CINodeL_pos = {0.096817106, -0.0012205498, -0.13769041};
  AnyFloat OEC10a_CINodeL_pos = {0.1088, -0.02659, -0.1473};


  AnyFloat OICI_C11NodeR_pos = {0.0075142789,0.04030681, 0.059687428};
  AnyFloat OICI_C10aNodeR_pos = {0.031630576,0.04502495, 0.075529367};
  AnyFloat OICI_C10NodeR_pos = {0.04977525,0.043519221, 0.092987895};
  AnyFloat OICI_C9NodeR_pos = {0.065335087,0.035016526, 0.1084922};
  AnyFloat OICI_C8NodeR_pos = {0.080460943,0.016277507, 0.12737164};
  AnyFloat OICI_RS1NodeR_pos = {0.096817106,-0.0012205498, 0.13769041};
  AnyFloat OICI_RS2NodeR_pos = {0.10559666,-0.014595013, 0.14242136};
  AnyFloat OICI_RS3NodeR_pos = {0.112334,-0.0314788, 0.142239};
  AnyFloat OICI_RS4NodeR_pos = {0.114946,-0.037678201, 0.13897499};
  AnyFloat OICI_RS5NodeR_pos = {0.118205,-0.043456201, 0.137155};

  AnyFloat OICI_C11NodeL_pos = {0.0075142789,0.04030681, -0.059687428};
  AnyFloat OICI_C10aNodeL_pos = {0.031630576,0.04502495, -0.075529367};
  AnyFloat OICI_C10NodeL_pos = {0.04977525,0.043519221, -0.092987895};
  AnyFloat OICI_C9NodeL_pos = {0.065335087,0.035016526, -0.1084922};
  AnyFloat OICI_C8NodeL_pos = {0.080460943,0.016277507, -0.12737164};
  AnyFloat OICI_RS1NodeL_pos = {0.096817106,-0.0012205498, -0.13769041};
  AnyFloat OICI_RS2NodeL_pos = {0.10559666,-0.014595013, -0.14242136};
  AnyFloat OICI_RS3NodeL_pos = {0.112334,-0.0314788, -0.142239};
  AnyFloat OICI_RS4NodeL_pos = {0.114946,-0.037678201, -0.13897499};
  AnyFloat OICI_RS5NodeL_pos = {0.118205,-0.043456201, -0.137155};


  AnyFloat Seat_contactR_pos = {0.005000, -0.1750000, 0.04000000};
  AnyFloat Seat_contactL_pos = {0.005000, -0.1750000, -0.04000000};
  AnyFloat Seat_contactCenter_pos = {0.005000, -0.1750000, 2.895209e-017};
  AnyFloat PosteriorRContactNode_pos = {0.048000, 0.05000000, 0.1000000};
  AnyFloat PosteriorLContactNode_pos = {0.048000, 0.05000000, -0.1000000};
  AnyFloat Seat1RContactNode_pos = {0.090000, -0.1650000, 0.04000000};
  AnyFloat Seat1LContactNode_pos = {0.090000, -0.1650000, -0.04000000};
  AnyFloat Seat2RContactNode_pos = {0.070000, -0.1700000, 0.04000000};
  AnyFloat Seat2MidContactNode_pos = {0.070000, -0.1700000, 4.163336e-017};
  AnyFloat Seat2LContactNode_pos = {0.070000, -0.1700000, -0.04000000};
  AnyFloat Seat3RContactNode_pos = {0.030000, -0.1750000, 0.04000000};
  AnyFloat Seat3LContactNode_pos = {0.030000, -0.1750000, -0.04000000};
  AnyFloat Seat4RContactNode_pos = {-0.010000, -0.1650000, 0.04000000};
  AnyFloat Seat4LContactNode_pos = {-0.010000, -0.1650000, -0.04000000};
  AnyFloat PressureNode_pos = {0.085000, -0.1400000, 2.453266e-017};
  AnyFloat BuckleNodeBottomCenter_pos = {0.115000, -0.1400000, 2.369714e-017};
  AnyFloat BuckleNodeRight_pos = {0.115000, -0.06000000, 0.1300000};
  AnyFloat BuckleNodeLeft_pos = {0.115000, -0.06000000, -0.1300000};
};
AnyFolder SacrumSeg = {
  AnyFloat ScalingNode_pos = {0.0000000, 0.0000000, 0.0000000};
  AnyFloat SacrumL5JntNode_pos = {0.04300000, -0.005000000, 0.0000000};
  AnyFloat SacrumPelvisJntNode_pos = {0.02700000, -0.03000000, 0.0000000};
  AnyFloat SacrumContactNode_pos = {-0.006000000, -0.02500000, 0.0000000};
  AnyFloat SacrumRContactNode_pos = {-0.006000000, -0.02500000, 0.05000000};
  AnyFloat SacrumLContactNode_pos = {-0.006000000, -0.02500000, -0.05000000};
};
AnyFolder L5Seg = {
  AnyFloat sCoM_pos={0.051, 0.009, 0.000000};
  AnyFloat ScalingNode_pos = {0.0000000, 0.0000000, 0.0000000};

  AnyVec3 L5SacrumJnt = {0.043,-0.02,0.0};  // used by StdParameters

  AnyFloat L5SacrumJntNode_pos = {0.04300000, -0.005000000, 0.0000000};
  AnyFloat L4L5JntNode_pos = {0.05000000, 0.02700000, 0.0000000};
  AnyFloat Right_pos = {0.0000000, 0.0000000, 0.0000000};
  AnyFloat Left_pos = {0.0000000, 0.0000000, 0.0000000};


    // Erector Spinae Nodes
    AnyVec3 LTptT5L5NodeR0 = {0.001,0.016,0.0};

    AnyFloat LTplL5IliumNodeR_pos       = {0.028,0.022,0.028};
    AnyFloat LTptT5L5NodeR_pos          = LTptT5L5NodeR0;
    AnyFloat LTptT6S1Via11NodeR_pos     = {-0.001-0.015,0.011,(.ThoraxSeg.LTptT6S1NodeR0[2]      - .ThoraxSeg.LTptT6S1Z     *(.ThoraxSeg.LTptT6S1NodeR0[1]      - 0.011))};
    AnyFloat LTptT7S2Via10NodeR_pos     = {-0.001-0.015,0.011,(.ThoraxSeg.LTptT7S2NodeR0[2]      - .ThoraxSeg.LTptT7S2Z     *(.ThoraxSeg.LTptT7S2NodeR0[1]      - 0.011))};
    AnyFloat LTptT8S3Via9NodeR_pos      = {-0.001-0.015,0.011,(.ThoraxSeg.LTptT8S3NodeR0[2]      - .ThoraxSeg.LTptT8S3Z     *(.ThoraxSeg.LTptT8S3NodeR0[1]      - 0.011))};
    AnyFloat LTptT9S4Via8NodeR_pos      = {-0.001-0.015,0.011,(.ThoraxSeg.LTptT9S4NodeR0[2]      - .ThoraxSeg.LTptT9S4Z     *(.ThoraxSeg.LTptT9S4NodeR0[1]      - 0.011))};
    AnyFloat LTptT10SacrumVia7NodeR_pos = {-0.001-0.015,0.011,(.ThoraxSeg.LTptT10SacrumNodeR0[2] - .ThoraxSeg.LTptT10SacrumZ*(.ThoraxSeg.LTptT10SacrumNodeR0[1] - 0.011))};
    AnyFloat LTptT11SacrumVia6NodeR_pos = {-0.001-0.015,0.011,(.ThoraxSeg.LTptT11SacrumNodeR0[2] - .ThoraxSeg.LTptT11SacrumZ*(.ThoraxSeg.LTptT11SacrumNodeR0[1] - 0.011))};
    AnyFloat LTptT12SacrumVia5NodeR_pos = {-0.001-0.015,0.011,(.ThoraxSeg.LTptT12SacrumNodeR0[2] - .ThoraxSeg.LTptT12SacrumZ*(.ThoraxSeg.LTptT12SacrumNodeR0[1] - 0.011))};

    AnyFloat LTplL5IliumNodeL_pos       = LTplL5IliumNodeR_pos       *.ZReflection;
    AnyFloat LTptT5L5NodeL_pos          = LTptT5L5NodeR_pos          *.ZReflection;
    AnyFloat LTptT6S1Via11NodeL_pos     = LTptT6S1Via11NodeR_pos     *.ZReflection;
    AnyFloat LTptT7S2Via10NodeL_pos     = LTptT7S2Via10NodeR_pos     *.ZReflection;
    AnyFloat LTptT8S3Via9NodeL_pos      = LTptT8S3Via9NodeR_pos      *.ZReflection;
    AnyFloat LTptT9S4Via8NodeL_pos      = LTptT9S4Via8NodeR_pos      *.ZReflection;
    AnyFloat LTptT10SacrumVia7NodeL_pos = LTptT10SacrumVia7NodeR_pos *.ZReflection;
    AnyFloat LTptT11SacrumVia6NodeL_pos = LTptT11SacrumVia6NodeR_pos *.ZReflection;
    AnyFloat LTptT12SacrumVia5NodeL_pos = LTptT12SacrumVia5NodeR_pos *.ZReflection;
    // End of Erector Spinae Nodes

    // Psoas Major Nodes
    AnyVar  PML5_Translate =0.015;
    AnyVec3 PML5_TMNodeR0 = { PML5_Translate+0.049,0.011,0.021};
    AnyVec3 PML5T_TMNodeR0 = {0.034,0.020,0.028};

    AnyFloat PML5_TMNodeR_pos       = PML5_TMNodeR0;
    AnyFloat PML5T_TMNodeR_pos      = PML5T_TMNodeR0;
    AnyFloat PMT12I_TMVia4NodeR_pos = {0.064                         ,0.008,(.ThoraxSeg.PMT12I_TMNodeR0[2] - .ThoraxSeg.PMT12I_TMZ*(.ThoraxSeg.PMT12I_TMNodeR0[1] - 0.008))};
    AnyFloat PML1I_TMVia3NodeR_pos  = {0.064                         ,0.008,(.L1Seg.PML1I_TMNodeR0[2]      - .L3Seg.PML1I_TMZ*(.L1Seg.PML1I_TMNodeR0[1]           - 0.008))};
    AnyFloat PML2I_TMVia2NodeR_pos  = {.L2Seg.PML2I_Translation+0.054,0.008,(.L2Seg.PML2I_TMNodeR0[2]      - .L3Seg.PML2I_TMZ*(.L2Seg.PML2I_TMNodeR0[1]           - 0.008))};
    AnyFloat PML3I_TMVia1NodeR_pos  = {.L3Seg.PML3I_Translation+0.054,0.008,(.L3Seg.PML3I_TMNodeR0[2]      - .L3Seg.PML3I_TMZ*(.L3Seg.PML3I_TMNodeR0[1]           - 0.008))};
    AnyFloat PML1T_TMVia4NodeR_pos  = {0.054                         ,0.008,(.L1Seg.PML1T_TMNodeR0[2]      - .L2Seg.PML1T_TMZ*(.L1Seg.PML1T_TMNodeR0[1]           - 0.008))};
    AnyFloat PML2T_TMVia3NodeR_pos  = {0.054                         ,0.008,(.L2Seg.PML2T_TMNodeR0[2]      - .L2Seg.PML2T_TMZ*(.L2Seg.PML2T_TMNodeR0[1]           - 0.008))};
    AnyFloat PML3T_TMVia2NodeR_pos  = {0.054                         ,0.008,(.L3Seg.PML3T_TMNodeR0[2]      - .L2Seg.PML3T_TMZ*(.L3Seg.PML3T_TMNodeR0[1]           - 0.008))};
    AnyFloat PML4T_TMVia1NodeR_pos  = {0.048                         ,0.008,(.L4Seg.PML4T_TMNodeR0[2]      - .L2Seg.PML4T_TMZ*(.L4Seg.PML4T_TMNodeR0[1]           - 0.008))};

    AnyFloat PML5_TMNodeL_pos       = PML5_TMNodeR_pos       *.ZReflection;
    AnyFloat PML5T_TMNodeL_pos      = PML5T_TMNodeR_pos      *.ZReflection;
    AnyFloat PMT12I_TMVia4NodeL_pos = PMT12I_TMVia4NodeR_pos *.ZReflection;
    AnyFloat PML1I_TMVia3NodeL_pos  = PML1I_TMVia3NodeR_pos  *.ZReflection;
    AnyFloat PML2I_TMVia2NodeL_pos  = PML2I_TMVia2NodeR_pos  *.ZReflection;
    AnyFloat PML3I_TMVia1NodeL_pos  = PML3I_TMVia1NodeR_pos  *.ZReflection;
    AnyFloat PML1T_TMVia4NodeL_pos  = PML1T_TMVia4NodeR_pos  *.ZReflection;
    AnyFloat PML2T_TMVia3NodeL_pos  = PML2T_TMVia3NodeR_pos  *.ZReflection;
    AnyFloat PML3T_TMVia2NodeL_pos  = PML3T_TMVia2NodeR_pos  *.ZReflection;
    AnyFloat PML4T_TMVia1NodeL_pos  = PML4T_TMVia1NodeR_pos  *.ZReflection;
	// End of Psoas Major Nodes


  AnyFloat LINodeSuperior_pos = {0.01900000, 0.02300000, 0.0000000};
  AnyFloat MFdL3L5NodeR_pos = {0.02700000, 0.02500000, 0.02200000};
  AnyFloat MFdL3L5NodeL_pos = {0.02700000, 0.02500000, -0.02200000};
  AnyFloat MFdL5S1NodeR_pos = {0.008000000, 0.009000000, 0.005000000};
  AnyFloat MFdL5S1NodeL_pos = {0.008000000, 0.009000000, -0.005000000};
  AnyFloat MFmL2L5NodeR_pos = {0.02700000, 0.02500000, 0.02200000};
  AnyFloat MFmL2L5NodeL_pos = {0.02700000, 0.02500000, -0.02200000};
  AnyFloat MFmL5SacrumNodeR_pos = {0.004000000, 0.01000000, 0.005000000};
  AnyFloat MFmL5SacrumNodeL_pos = {0.004000000, 0.01000000, -0.005000000};
  AnyFloat MFtsL1L5NodeR_pos = {0.02700000, 0.02500000, 0.02200000};
  AnyFloat MFtsL1L5NodeL_pos = {0.02700000, 0.02500000, -0.02200000};
  AnyFloat MFtsL2L5NodeR_pos = {0.02700000, 0.02500000, 0.02200000};
  AnyFloat MFtsL2L5NodeL_pos = {0.02700000, 0.02500000, -0.02200000};
  AnyFloat MFtsL5SacrumNodeR_pos = {0.001000000, 0.007000000, 0.0000000};
  AnyFloat MFtsL5SacrumNodeL_pos = {0.001000000, 0.007000000, 0.0000000};
  AnyFloat OEC10_RSNodeR_pos = {0.1580000, 0.008000000, 0.01500000};
  AnyFloat OEC10_RSNodeL_pos = {0.1580000, 0.008000000, -0.01500000};
  AnyFloat BuckleContactNode_pos = {0.1190000, 0.006000000, 0.0000000};
  AnyFloat L5RContactNode_pos = {-0.01000000, 0.008000000, 0.05000000};
  AnyFloat L5LContactNode_pos = {-0.01000000, 0.008000000, -0.05000000};
  AnyFloat MFL5T12NodeR_pos = {0.02500000, 0.02200000, 0.02400000};
  AnyFloat MFL5T12NodeL_pos = {0.02500000, 0.02200000, -0.02400000};
};
AnyFolder L4Seg = {
  AnyFloat sCoM_pos = {0.056, 0.044, 0.000000};
  AnyFloat ScalingNode_pos = {0.0000000, 0.0000000, 0.0000000};
  AnyFloat L4L5JntNode_pos = {0.05000000, 0.02700000, 0.0000000};
  AnyFloat L3L4JntNode_pos = {0.05000000, 0.06100000, 0.0000000};
  AnyFloat Right_pos = {0.0000000, 0.0000000, 0.0000000};
  AnyFloat Left_pos = {0.0000000, 0.0000000, 0.0000000};
  AnyFloat LINodeInferior_pos = {0.005000000, 0.02000000, 0.0000000};
  AnyFloat LINodeSuperior_pos = {0.01900000, 0.04900000, 0.0000000};
  AnyFloat MFdL2L4NodeR_pos = {0.02600000, 0.05500000, 0.02200000};
  AnyFloat MFdL2L4NodeL_pos = {0.02600000, 0.05500000, -0.02200000};
  AnyFloat MFdL4S1NodeR_pos = {0.01400000, 0.02800000, 0.005000000};
  AnyFloat MFdL4S1NodeL_pos = {0.01400000, 0.02800000, -0.005000000};
  AnyFloat MFmL1L4NodeR_pos = {0.02600000, 0.05500000, 0.02200000};
  AnyFloat MFmL1L4NodeL_pos = {0.02600000, 0.05500000, -0.02200000};
  AnyFloat MFmL4SacrumNodeR_pos = {0.009000000, 0.02500000, 0.005000000};
  AnyFloat MFmL4SacrumNodeL_pos = {0.009000000, 0.02500000, -0.005000000};
  AnyFloat MFtsL4SacrumNodeR_pos = {0.003000000, 0.02100000, 0.0000000};
  AnyFloat MFtsL4SacrumNodeL_pos = {0.003000000, 0.02100000, 0.0000000};

  AnyVec3 LSNode_0 = {-0.003,0.029,0};
  AnyFloat LSNode_pos = LSNode_0;

  // Erector Spinae Nodes
  AnyVec3 LTptT4L4NodeR0 = {-0.001,0.038,0.0};
  AnyFloat LTptT4L4NodeR = LTptT4L4NodeR0;
  AnyVar ILplL1CIZ = (.L1Seg.ILplL1CINodeR0[2]-.PelvisSeg.ILplL1CINodeR0[2])/(.L1Seg.ILplL1CINodeR0[1]-.PelvisSeg.ILplL1CINodeR0[1]);
  AnyVar ILplL2CIZ = (.L2Seg.ILplL2CINodeR0[2]-.PelvisSeg.ILplL2CINodeR0[2])/(.L2Seg.ILplL2CINodeR0[1]-.PelvisSeg.ILplL2CINodeR0[1]);

  AnyFloat ILplL1CIViaNodeR_pos       = {LSNode_0[0]-0.005,LSNode_0[1],(.L1Seg.ILplL1CINodeR0[2]          - ILplL1CIZ*(.L1Seg.ILplL1CINodeR0[1] - LSNode_0[1]))};
  AnyFloat ILplL2CIViaNodeR_pos       = {LSNode_0[0]-0.005,LSNode_0[1],(.L2Seg.ILplL2CINodeR0[2]          - ILplL2CIZ*(.L2Seg.ILplL2CINodeR0[1] - LSNode_0[1]))};
  AnyFloat LTptT5L5Via11NodeR_pos     = {LSNode_0[0]+0.004,LSNode_0[1],(.ThoraxSeg.LTptT5L5NodeR0[2]      - .ThoraxSeg.LTptT5L5Z     *(.ThoraxSeg.LTptT5L5NodeR0[1]      - LSNode_0[1]))};
  AnyFloat LTptT6S1Via10NodeR_pos     = {LSNode_0[0]+0.004-0.005,LSNode_0[1],(.ThoraxSeg.LTptT6S1NodeR0[2]      - .ThoraxSeg.LTptT6S1Z     *(.ThoraxSeg.LTptT6S1NodeR0[1]      - LSNode_0[1]))};
  AnyFloat LTptT7S2Via9NodeR_pos      = {LSNode_0[0]+0.002-0.005,LSNode_0[1],(.ThoraxSeg.LTptT7S2NodeR0[2]      - .ThoraxSeg.LTptT7S2Z     *(.ThoraxSeg.LTptT7S2NodeR0[1]      - LSNode_0[1]))};
  AnyFloat LTptT8S3Via8NodeR_pos      = {LSNode_0[0]      -0.005,LSNode_0[1],(.ThoraxSeg.LTptT8S3NodeR0[2]      - .ThoraxSeg.LTptT8S3Z     *(.ThoraxSeg.LTptT8S3NodeR0[1]      - LSNode_0[1]))};
  AnyFloat LTptT9S4Via7NodeR_pos      = {LSNode_0[0]      -0.005,LSNode_0[1],(.ThoraxSeg.LTptT9S4NodeR0[2]      - .ThoraxSeg.LTptT9S4Z     *(.ThoraxSeg.LTptT9S4NodeR0[1]      - LSNode_0[1]))};
  AnyFloat LTptT10SacrumVia6NodeR_pos = {LSNode_0[0]      -0.005,LSNode_0[1],(.ThoraxSeg.LTptT10SacrumNodeR0[2] - .ThoraxSeg.LTptT10SacrumZ*(.ThoraxSeg.LTptT10SacrumNodeR0[1] - LSNode_0[1]))};
  AnyFloat LTptT11SacrumVia5NodeR_pos = {LSNode_0[0]      -0.005,LSNode_0[1],(.ThoraxSeg.LTptT11SacrumNodeR0[2] - .ThoraxSeg.LTptT11SacrumZ*(.ThoraxSeg.LTptT11SacrumNodeR0[1] - LSNode_0[1]))};
  AnyFloat LTptT12SacrumVia4NodeR_pos = {LSNode_0[0]      -0.005,LSNode_0[1],(.ThoraxSeg.LTptT12SacrumNodeR0[2] - .ThoraxSeg.LTptT12SacrumZ*(.ThoraxSeg.LTptT12SacrumNodeR0[1] - LSNode_0[1]))};

  AnyFloat ILplL1CIViaNodeL_pos       = ILplL1CIViaNodeR_pos       *.ZReflection;
  AnyFloat ILplL2CIViaNodeL_pos       = ILplL2CIViaNodeR_pos       *.ZReflection;
  AnyFloat LTptT5L5Via11NodeL_pos     = LTptT5L5Via11NodeR_pos     *.ZReflection;
  AnyFloat LTptT6S1Via10NodeL_pos     = LTptT6S1Via10NodeR_pos     *.ZReflection;
  AnyFloat LTptT7S2Via9NodeL_pos      = LTptT7S2Via9NodeR_pos      *.ZReflection;
  AnyFloat LTptT8S3Via8NodeL_pos      = LTptT8S3Via8NodeR_pos      *.ZReflection;
  AnyFloat LTptT9S4Via7NodeL_pos      = LTptT9S4Via7NodeR_pos      *.ZReflection;
  AnyFloat LTptT10SacrumVia6NodeL_pos = LTptT10SacrumVia6NodeR_pos *.ZReflection;
  AnyFloat LTptT11SacrumVia5NodeL_pos = LTptT11SacrumVia5NodeR_pos *.ZReflection;
  AnyFloat LTptT12SacrumVia4NodeL_pos = LTptT12SacrumVia4NodeR_pos *.ZReflection;

  // End of Erector Spinae Nodes
  // Psoas Major Nodes
  AnyVar PML4I_Translation=0.015;
  AnyVec3 PML4I_TMNodeR0 = {PML4I_Translation+ 0.052,0.023,0.022};
  AnyVec3 PML4T_TMNodeR0 = {0.034,0.050,0.028};

  AnyFloat PML4I_TMNodeR_pos      = PML4I_TMNodeR0;
  AnyFloat PML4T_TMNodeR_pos      = PML4T_TMNodeR0;
  AnyFloat PMT12I_TMVia3NodeR_pos = {0.065                          ,0.043,(.ThoraxSeg.PMT12I_TMNodeR0[2] - .ThoraxSeg.PMT12I_TMZ*(.ThoraxSeg.PMT12I_TMNodeR0[1] - 0.043))};//STC
  AnyFloat PML1I_TMVia2NodeR_pos  = {0.065                          ,0.043,(.L1Seg.PML1I_TMNodeR0[2]      - .L3Seg.PML1I_TMZ     *(.L1Seg.PML1I_TMNodeR0[1]      - 0.043))}; //STC
  AnyFloat PML2I_TMVia1NodeR_pos  = {.L2Seg.PML2I_Translation+0.055 ,0.043,(.L2Seg.PML2I_TMNodeR0[2]      - .L3Seg.PML2I_TMZ     *(.L2Seg.PML2I_TMNodeR0[1]      - 0.043))};
  AnyFloat PML1T_TMVia3NodeR_pos  = {0.050                          ,0.043,(.L1Seg.PML1T_TMNodeR0[2]      - .L2Seg.PML1T_TMZ     *(.L1Seg.PML1T_TMNodeR0[1]      - 0.043))};
  AnyFloat PML2T_TMVia2NodeR_pos  = {0.050                          ,0.043,(.L2Seg.PML2T_TMNodeR0[2]      - .L2Seg.PML2T_TMZ     *(.L2Seg.PML2T_TMNodeR0[1]      - 0.043))};
  AnyFloat PML3T_TMVia1NodeR_pos  = {0.045                          ,0.043,(.L3Seg.PML3T_TMNodeR0[2]      - .L2Seg.PML3T_TMZ     *(.L3Seg.PML3T_TMNodeR0[1]      - 0.043))};

  AnyFloat PML4I_TMNodeL_pos      = PML4I_TMNodeR_pos      *.ZReflection;
  AnyFloat PML4T_TMNodeL_pos      = PML4T_TMNodeR_pos      *.ZReflection;
  AnyFloat PMT12I_TMVia3NodeL_pos = PMT12I_TMVia3NodeR_pos *.ZReflection;
  AnyFloat PML1I_TMVia2NodeL_pos  = PML1I_TMVia2NodeR_pos  *.ZReflection;
  AnyFloat PML2I_TMVia1NodeL_pos  = PML2I_TMVia1NodeR_pos  *.ZReflection;
  AnyFloat PML1T_TMVia3NodeL_pos  = PML1T_TMVia3NodeR_pos  *.ZReflection;
  AnyFloat PML2T_TMVia2NodeL_pos  = PML2T_TMVia2NodeR_pos  *.ZReflection;
  AnyFloat PML3T_TMVia1NodeL_pos  = PML3T_TMVia1NodeR_pos  *.ZReflection;

  // End of Psoas Major Nodes

  AnyFloat ILplL4CINodeR_pos = {0.02500000, 0.05000000, 0.03500000};
  AnyFloat ILplL4CINodeL_pos = {0.02500000, 0.05000000, -0.03500000};
  AnyFloat LTplL4SIPSNodeR_pos = {0.02800000, 0.05100000, 0.02800000};
  AnyFloat LTplL4SIPSNodeL_pos = {0.02800000, 0.05100000, -0.02800000};
  AnyFloat LTptT4L4NodeR_pos = {-0.001000000, 0.03800000, 0.0000000};
  AnyFloat LTptT4L4NodeL_pos = {-0.001000000, 0.03800000, 0.0000000};
  AnyFloat QLL4_CINodeR_pos = {0.03100000, 0.05000000, 0.03300000};
  AnyFloat QLL4_CINodeL_pos = {0.03100000, 0.05000000, -0.03300000};
  AnyFloat OEC9_RSNodeR_pos = {0.1580000, 0.03800000, 0.01500000};
  AnyFloat OEC9_RSNodeL_pos = {0.1580000, 0.03800000, -0.01500000};
  AnyFloat OICI_RS3NodeR_pos = {0.1580000, 0.03800000, 0.01500000};
  AnyFloat OICI_RS3NodeL_pos = {0.1580000, 0.03800000, -0.01500000};
  AnyFloat MidPoint_pos = {0.05000000, 0.04400000, 0.0000000};
  AnyFloat SupportNode_pos = {-0.005000000, 0.02900000, 0.0000000};
  AnyFloat BuckleContactNode_pos = {0.07400000, 0.04400000, 0.0000000};
  AnyFloat L4RContactNode_pos = {-0.01000000, 0.03000000, 0.05000000};
  AnyFloat L4LContactNode_pos = {-0.01000000, 0.03000000, -0.05000000};
  AnyFloat MFL4T11NodeR_pos = {0.02500000, 0.05100000, 0.02400000};
  AnyFloat MFL4T11NodeL_pos = {0.02500000, 0.05100000, -0.02400000};
  AnyFloat MFL4T12NodeR_pos = {0.02500000, 0.05100000, 0.02400000};
  AnyFloat MFL4T12NodeL_pos = {0.02500000, 0.05100000, -0.02400000};
};
AnyFolder L3Seg = {
  AnyFloat sCoM_pos={0.051, 0.079, 0.000000};
  AnyFloat ScalingNode_pos = {0.0000000, 0.0000000, 0.0000000};
  AnyFloat L3L4JntNode_pos = {0.05000000, 0.06100000, 0.0000000};
  AnyFloat L2L3JntNode_pos = {0.04400000, 0.09400000, 0.0000000};
  AnyFloat Right_pos = {0.0000000, 0.0000000, 0.0000000};
  AnyFloat Left_pos = {0.0000000, 0.0000000, 0.0000000};
  AnyFloat LSNode_pos = {-0.003000000, 0.05100000, 0.0000000};
  AnyFloat LINodeInferior_pos = {0.007000000, 0.04400000, 0.0000000};
  AnyFloat LINodeSuperior_pos = {0.01500000, 0.07500000, 0.0000000};
  AnyFloat MFdL1L3NodeR_pos = {0.01900000, 0.08300000, 0.02200000};
  AnyFloat MFdL1L3NodeL_pos = {0.01900000, 0.08300000, -0.02200000};
  AnyFloat MFdL3L5NodeR_pos = {0.01400000, 0.05300000, 0.005000000};
  AnyFloat MFdL3L5NodeL_pos = {0.01400000, 0.05300000, -0.005000000};
  AnyFloat MFmL3S1NodeR_pos = {0.009000000, 0.04900000, 0.005000000};
  AnyFloat MFmL3S1NodeL_pos = {0.009000000, 0.04900000, -0.005000000};
  AnyFloat MFtsL3LigamentNodeR_pos = {0.004000000, 0.04400000, 0.0000000};
  AnyFloat MFtsL3LigamentNodeL_pos = {0.004000000, 0.04400000, 0.0000000};

  // Ligament Nodes
  AnyVec3 LSNode_0 = {-0.003,0.051,0};
  AnyFloat LSNode = LSNode_0;

  // Erector Spinae Nodes
  AnyVec3 LTptT3L3NodeR0 = {-0.003,0.060,0.0};
  AnyVar ILplL1CIZ = (.L1Seg.ILplL1CINodeR0[2]-.PelvisSeg.ILplL1CINodeR0[2])/(.L1Seg.ILplL1CINodeR0[1]-.PelvisSeg.ILplL1CINodeR0[1]);
  AnyVar ILplL2CIZ = (.L2Seg.ILplL2CINodeR0[2]-.PelvisSeg.ILplL2CINodeR0[2])/(.L2Seg.ILplL2CINodeR0[1]-.PelvisSeg.ILplL2CINodeR0[1]);
  AnyVar LTplL1SIPSZ = (.L1Seg.LTplL1SIPSNodeR0[2]-.PelvisSeg.LTplL1SIPSNodeR0[2])/(.L1Seg.LTplL1SIPSNodeR0[1]-.PelvisSeg.LTplL1SIPSNodeR0[1]);
  AnyVar LTplL2SIPSZ = (.L2Seg.LTplL2SIPSNodeR0[2]-.PelvisSeg.LTplL2SIPSNodeR0[2])/(.L2Seg.LTplL2SIPSNodeR0[1]-.PelvisSeg.LTplL2SIPSNodeR0[1]);

  AnyFloat LTptT3L3NodeR_pos          = LTptT3L3NodeR0;
  AnyFloat ILplL1CIViaNodeR_pos       = {LSNode_0[0]      ,LSNode_0[1],(.L1Seg.ILplL1CINodeR0[2]         - ILplL1CIZ                 *(.L1Seg.ILplL1CINodeR0[1]          - LSNode_0[1]))};
  AnyFloat ILplL2CIViaNodeR_pos       = {LSNode_0[0]      ,LSNode_0[1],(.L2Seg.ILplL2CINodeR0[2]         - ILplL2CIZ                 *(.L2Seg.ILplL2CINodeR0[1]          - LSNode_0[1]))};
  AnyFloat LTplL1SIPSViaNodeR_pos     = {LSNode_0[0]      ,LSNode_0[1],(.L1Seg.LTplL1SIPSNodeR0[2]       - LTplL1SIPSZ               *(.L1Seg.LTplL1SIPSNodeR0[1]        - LSNode_0[1]))};
  AnyFloat LTplL2SIPSViaNodeR_pos     = {LSNode_0[0]      ,LSNode_0[1],(.L2Seg.LTplL2SIPSNodeR0[2]       - LTplL2SIPSZ               *(.L2Seg.LTplL2SIPSNodeR0[1]        - LSNode_0[1]))};
  AnyFloat ILptC5SIPSVia9NodeR_pos    = {LSNode_0[0]-0.005,LSNode_0[1],(.ThoraxSeg.ILptC5SIPSNodeR0[2]    - .ThoraxSeg.ILptC5SIPSZ   *(.ThoraxSeg.ILptC5SIPSNodeR0[1]    - LSNode_0[1]))};
  AnyFloat ILptC6SIPSVia8NodeR_pos    = {LSNode_0[0]-0.005,LSNode_0[1],(.ThoraxSeg.ILptC6SIPSNodeR0[2]    - .ThoraxSeg.ILptC6SIPSZ   *(.ThoraxSeg.ILptC6SIPSNodeR0[1]    - LSNode_0[1]))};
  AnyFloat ILptC7CIVia7NodeR_pos      = {LSNode_0[0]-0.005,LSNode_0[1],(.ThoraxSeg.ILptC7CINodeR0[2]      - .ThoraxSeg.ILptC7CIZ     *(.ThoraxSeg.ILptC7CINodeR0[1]      - LSNode_0[1]))};
  AnyFloat ILptC8CIVia6NodeR_pos      = {LSNode_0[0]-0.005,LSNode_0[1],(.ThoraxSeg.ILptC8CINodeR0[2]      - .ThoraxSeg.ILptC8CIZ     *(.ThoraxSeg.ILptC8CINodeR0[1]      - LSNode_0[1]))};
  AnyFloat ILptC9CIVia5NodeR_pos      = {LSNode_0[0]-0.005,LSNode_0[1],(.ThoraxSeg.ILptC9CINodeR0[2]      - .ThoraxSeg.ILptC9CIZ     *(.ThoraxSeg.ILptC9CINodeR0[1]      - LSNode_0[1]))};
  AnyFloat ILptC10CIVia4NodeR_pos     = {LSNode_0[0]-0.003,LSNode_0[1],(.ThoraxSeg.ILptC10CINodeR0[2]     - .ThoraxSeg.ILptC10CIZ    *(.ThoraxSeg.ILptC10CINodeR0[1]     - LSNode_0[1]))};
  AnyFloat ILptC11CIVia3NodeR_pos     = {LSNode_0[0]-0.001,LSNode_0[1],(.ThoraxSeg.ILptC11CINodeR0[2]     - .ThoraxSeg.ILptC11CIZ    *(.ThoraxSeg.ILptC11CINodeR0[1]     - LSNode_0[1]))};
  AnyFloat ILptC12CIVia3NodeR_pos     = {LSNode_0[0]+0.003,LSNode_0[1],(.ThoraxSeg.ILptC12CINodeR0[2]     - .ThoraxSeg.ILptC12CIZ    *(.ThoraxSeg.ILptC12CINodeR0[1]     - LSNode_0[1]))};
  AnyFloat LTptT4L4Via11NodeR_pos     = {LSNode_0[0]+0.002,LSNode_0[1],(.ThoraxSeg.LTptT4L4NodeR0[2]      - .ThoraxSeg.LTptT4L4Z     *(.ThoraxSeg.LTptT4L4NodeR0[1]      - LSNode_0[1]))};
  AnyFloat LTptT5L5Via10NodeR_pos     = {LSNode_0[0]+0.004,LSNode_0[1],(.ThoraxSeg.LTptT5L5NodeR0[2]      - .ThoraxSeg.LTptT5L5Z     *(.ThoraxSeg.LTptT5L5NodeR0[1]      - LSNode_0[1]))};
  AnyFloat LTptT6S1Via9NodeR_pos      = {LSNode_0[0]+0.004,LSNode_0[1],(.ThoraxSeg.LTptT6S1NodeR0[2]      - .ThoraxSeg.LTptT6S1Z     *(.ThoraxSeg.LTptT6S1NodeR0[1]      - LSNode_0[1]))};
  AnyFloat LTptT7S2Via8NodeR_pos      = {LSNode_0[0]      ,LSNode_0[1],(.ThoraxSeg.LTptT7S2NodeR0[2]      - .ThoraxSeg.LTptT7S2Z     *(.ThoraxSeg.LTptT7S2NodeR0[1]      - LSNode_0[1]))};
  AnyFloat LTptT8S3Via7NodeR_pos      = {LSNode_0[0]      ,LSNode_0[1],(.ThoraxSeg.LTptT8S3NodeR0[2]      - .ThoraxSeg.LTptT8S3Z     *(.ThoraxSeg.LTptT8S3NodeR0[1]      - LSNode_0[1]))};
  AnyFloat LTptT9S4Via6NodeR_pos      = {LSNode_0[0]      ,LSNode_0[1],(.ThoraxSeg.LTptT9S4NodeR0[2]      - .ThoraxSeg.LTptT9S4Z     *(.ThoraxSeg.LTptT9S4NodeR0[1]      - LSNode_0[1]))};
  AnyFloat LTptT10SacrumVia5NodeR_pos = {LSNode_0[0]      ,LSNode_0[1],(.ThoraxSeg.LTptT10SacrumNodeR0[2] - .ThoraxSeg.LTptT10SacrumZ*(.ThoraxSeg.LTptT10SacrumNodeR0[1] - LSNode_0[1]))};
  AnyFloat LTptT11SacrumVia4NodeR_pos = {LSNode_0[0]      ,LSNode_0[1],(.ThoraxSeg.LTptT11SacrumNodeR0[2] - .ThoraxSeg.LTptT11SacrumZ*(.ThoraxSeg.LTptT11SacrumNodeR0[1] - LSNode_0[1]))};
  AnyFloat LTptT12SacrumVia3NodeR_pos = {LSNode_0[0]      ,LSNode_0[1],(.ThoraxSeg.LTptT12SacrumNodeR0[2] - .ThoraxSeg.LTptT12SacrumZ*(.ThoraxSeg.LTptT12SacrumNodeR0[1] - LSNode_0[1]))};

  AnyFloat LTptT3L3NodeL_pos          = LTptT3L3NodeR_pos          * .ZReflection;
  AnyFloat ILplL1CIViaNodeL_pos       = ILplL1CIViaNodeR_pos       * .ZReflection;
  AnyFloat ILplL2CIViaNodeL_pos       = ILplL2CIViaNodeR_pos       * .ZReflection;
  AnyFloat LTplL1SIPSViaNodeL_pos     = LTplL1SIPSViaNodeR_pos     * .ZReflection;
  AnyFloat LTplL2SIPSViaNodeL_pos     = LTplL2SIPSViaNodeR_pos     * .ZReflection;
  AnyFloat ILptC5SIPSVia9NodeL_pos    = ILptC5SIPSVia9NodeR_pos    * .ZReflection;
  AnyFloat ILptC6SIPSVia8NodeL_pos    = ILptC6SIPSVia8NodeR_pos    * .ZReflection;
  AnyFloat ILptC7CIVia7NodeL_pos      = ILptC7CIVia7NodeR_pos      * .ZReflection;
  AnyFloat ILptC8CIVia6NodeL_pos      = ILptC8CIVia6NodeR_pos      * .ZReflection;
  AnyFloat ILptC9CIVia5NodeL_pos      = ILptC9CIVia5NodeR_pos      * .ZReflection;
  AnyFloat ILptC10CIVia4NodeL_pos     = ILptC10CIVia4NodeR_pos     * .ZReflection;
  AnyFloat ILptC11CIVia3NodeL_pos     = ILptC11CIVia3NodeR_pos     * .ZReflection;
  AnyFloat ILptC12CIVia3NodeL_pos     = ILptC12CIVia3NodeR_pos     * .ZReflection;
  AnyFloat LTptT4L4Via11NodeL_pos     = LTptT4L4Via11NodeR_pos     * .ZReflection;
  AnyFloat LTptT5L5Via10NodeL_pos     = LTptT5L5Via10NodeR_pos     * .ZReflection;
  AnyFloat LTptT6S1Via9NodeL_pos      = LTptT6S1Via9NodeR_pos      * .ZReflection;
  AnyFloat LTptT7S2Via8NodeL_pos      = LTptT7S2Via8NodeR_pos      * .ZReflection;
  AnyFloat LTptT8S3Via7NodeL_pos      = LTptT8S3Via7NodeR_pos      * .ZReflection;
  AnyFloat LTptT9S4Via6NodeL_pos      = LTptT9S4Via6NodeR_pos      * .ZReflection;
  AnyFloat LTptT10SacrumVia5NodeL_pos = LTptT10SacrumVia5NodeR_pos * .ZReflection;
  AnyFloat LTptT11SacrumVia4NodeL_pos = LTptT11SacrumVia4NodeR_pos * .ZReflection;
  AnyFloat LTptT12SacrumVia3NodeL_pos = LTptT12SacrumVia3NodeR_pos * .ZReflection;

  // End of Erector Spinae Nodes

  // Psoas Major Nodes
  AnyVar     PML3I_Translation=0.015;
  AnyVec3 PML3I_TMNodeR0 = {PML3I_Translation+0.051,0.061,0.022};
  AnyVec3 PML3T_TMNodeR0 = {0.030,0.079,0.028};
  AnyVar PML1I_TMZ = (.L1Seg.PML1I_TMNodeR0[2]-.PelvisSeg.IliopubicEminenceViaNodeR0[2])/(.L1Seg.PML1I_TMNodeR0[1]-.PelvisSeg.IliopubicEminenceViaNodeR0[1]);
  AnyVar PML2I_TMZ = (.L2Seg.PML2I_TMNodeR0[2]-.PelvisSeg.IliopubicEminenceViaNodeR0[2])/(.L2Seg.PML2I_TMNodeR0[1]-.PelvisSeg.IliopubicEminenceViaNodeR0[1]);
  AnyVar PML3I_TMZ = (.L3Seg.PML3I_TMNodeR0[2]-.PelvisSeg.IliopubicEminenceViaNodeR0[2])/(.L3Seg.PML3I_TMNodeR0[1]-.PelvisSeg.IliopubicEminenceViaNodeR0[1]);
  AnyVar PML4I_TMZ = (.L4Seg.PML4I_TMNodeR0[2]-.PelvisSeg.IliopubicEminenceViaNodeR0[2])/(.L4Seg.PML4I_TMNodeR0[1]-.PelvisSeg.IliopubicEminenceViaNodeR0[1]);
  AnyVar PML5_TMZ = (.L5Seg.PML5_TMNodeR0[2]-.PelvisSeg.IliopubicEminenceViaNodeR0[2])/(.L5Seg.PML5_TMNodeR0[1]-.PelvisSeg.IliopubicEminenceViaNodeR0[1]);

  AnyFloat PML3I_TMNodeR_pos = PML3I_TMNodeR0;
  AnyFloat PML3T_TMNodeR_pos = PML3T_TMNodeR0;
  AnyFloat PMT12I_TMVia2NodeR_pos = {0.061,0.079,(.ThoraxSeg.PMT12I_TMNodeR0[2] - .ThoraxSeg.PMT12I_TMZ*(.ThoraxSeg.PMT12I_TMNodeR0[1] - 0.079))};
  AnyFloat PML1I_TMVia1NodeR_pos  = {0.061,0.079,(.L1Seg.PML1I_TMNodeR0[2] -        PML1I_TMZ          *(.L1Seg.PML1I_TMNodeR0[1]      - 0.079))};//STC
  AnyFloat PML1T_TMVia2NodeR_pos  = {0.040,0.079,(.L1Seg.PML1T_TMNodeR0[2] - .L2Seg.PML1T_TMZ          *(.L1Seg.PML1T_TMNodeR0[1]      - 0.079))};
  AnyFloat PML2T_TMVia1NodeR_pos  = {0.037,0.079,(.L2Seg.PML2T_TMNodeR0[2] - .L2Seg.PML2T_TMZ          *(.L2Seg.PML2T_TMNodeR0[1]      - 0.079))};

  AnyFloat PML3I_TMNodeL_pos = PML3I_TMNodeR_pos*.ZReflection;
  AnyFloat PML3T_TMNodeL_pos = PML3T_TMNodeR_pos*.ZReflection;
  AnyFloat PMT12I_TMVia2NodeL_pos = PMT12I_TMVia2NodeR_pos *.ZReflection;
  AnyFloat PML1I_TMVia1NodeL_pos  = PML1I_TMVia1NodeR_pos  *.ZReflection;
  AnyFloat PML1T_TMVia2NodeL_pos  = PML1T_TMVia2NodeR_pos  *.ZReflection;
  AnyFloat PML2T_TMVia1NodeL_pos  = PML2T_TMVia1NodeR_pos  *.ZReflection;
  // End of Psoas Major Nodes


  AnyFloat ILplL3CINodeR_pos = {0.01900000, 0.07800000, 0.03500000};
  AnyFloat ILplL3CINodeL_pos = {0.01900000, 0.07800000, -0.03500000};
  AnyFloat LTplL3SIPSNodeR_pos = {0.02200000, 0.07900000, 0.02800000};
  AnyFloat LTplL3SIPSNodeL_pos = {0.02200000, 0.07900000, -0.02800000};
  AnyFloat QLL3_CINodeR_pos = {0.02600000, 0.07900000, 0.03300000};
  AnyFloat QLL3_CINodeL_pos = {0.02600000, 0.07900000, -0.03300000};
  AnyFloat OEC8_RSNodeR_pos = {0.1580000, 0.06800000, 0.01500000};
  AnyFloat OEC8_RSNodeL_pos = {0.1580000, 0.06800000, -0.01500000};
  AnyFloat OICI_RS2NodeR_pos = {0.1580000, 0.06800000, 0.01500000};
  AnyFloat OICI_RS2NodeL_pos = {0.1580000, 0.06800000, -0.01500000};
  AnyFloat MidPoint_pos = {0.04700000, 0.07750000, 0.0000000};
  AnyFloat SupportNode_pos = {-0.003000000, 0.04750000, 0.0000000};
  AnyFloat BuckleContactNode_pos = {0.06700000, 0.08250000, 0.0000000};
  AnyFloat L3RContactNode_pos = {-0.01000000, 0.05000000, 0.05000000};
  AnyFloat L3LContactNode_pos = {-0.01000000, 0.05000000, -0.05000000};
  AnyFloat MFL3T10NodeR_pos = {0.02000000, 0.07900000, 0.02400000};
  AnyFloat MFL3T10NodeL_pos = {0.02000000, 0.07900000, -0.02400000};
  AnyFloat MFL3T11NodeR_pos = {0.02000000, 0.07900000, 0.02400000};
  AnyFloat MFL3T11NodeL_pos = {0.02000000, 0.07900000, -0.02400000};
  AnyFloat MFL3T12NodeR_pos = {0.02000000, 0.07900000, 0.02400000};
  AnyFloat MFL3T12NodeL_pos = {0.02000000, 0.07900000, -0.02400000};
  AnyFloat SEL3T11NodeR_pos = {0.01800000, 0.08860000, 0.01970000};
  AnyFloat SEL3T11NodeL_pos = {0.01800000, 0.08860000, -0.01970000};
  AnyFloat SEL3T12NodeR_pos = {0.02150000, 0.09020000, 0.01800000};
  AnyFloat SEL3T12NodeL_pos = {0.02150000, 0.09020000, -0.01800000};
  AnyFloat Right_O_latissimus_dorsi_4_pos = {0.01700000, 0.07750000, 0.0000000};
  AnyFloat Left_O_latissimus_dorsi_4_pos = {0.01700000, 0.07750000, 0.0000000};
};
AnyFolder L2Seg = {
  AnyFloat sCoM_pos={0.043, 0.110, 0.000000};
  AnyFloat ScalingNode_pos = {0.0000000, 0.0000000, 0.0000000};
  AnyFloat L2L3JntNode_pos = {0.04400000, 0.09400000, 0.0000000};
  AnyFloat L1L2JntNode_pos = {0.03400000, 0.1230000, 0.0000000};
  AnyFloat Right_pos = {0.0000000, 0.0000000, 0.0000000};
  AnyFloat Left_pos = {0.0000000, 0.0000000, 0.0000000};
  AnyFloat LSNode2_pos = {-0.004000000, 0.07400000, -0.001000000};
  AnyFloat LINodeInferior_pos = {0.006000000, 0.06900000, 0.0000000};
  AnyFloat LINodeSuperior_pos = {0.009000000, 0.1000000, 0.0000000};
  AnyFloat MFdL2L4NodeR_pos = {0.01100000, 0.07900000, 0.005000000};
  AnyFloat MFdL2L4NodeL_pos = {0.01100000, 0.07900000, -0.005000000};
  AnyFloat MFmL2L5NodeR_pos = {0.007000000, 0.07500000, 0.005000000};
  AnyFloat MFmL2L5NodeL_pos = {0.007000000, 0.07500000, -0.005000000};
  AnyFloat MFtsL2L5NodeR_pos = {0.004000000, 0.06800000, 0.0000000};
  AnyFloat MFtsL2L5NodeL_pos = {0.004000000, 0.06800000, 0.0000000};
  AnyFloat MFtsL2S1NodeR_pos = {0.004000000, 0.06800000, 0.0000000};
  AnyFloat MFtsL2S1NodeL_pos = {0.004000000, 0.06800000, 0.0000000};
  AnyFloat MFtstL2SIPSNodeR_pos = {0.004000000, 0.06800000, 0.0000000};
  AnyFloat MFtstL2SIPSNodeL_pos = {0.004000000, 0.06800000, 0.0000000};

  // Ligament Nodes
  AnyVec3 LSNode_0 = {-0.004,0.074,0};
  AnyFloat LSNode_pos  = LSNode_0;
  // End of ligament Nodes

  // Erector Spinae Nodes
  AnyVec3 ILplL2CINodeR0 = {0.013,0.104,0.034};
  AnyVec3 LTplL2SIPSNodeR0 = {0.015,0.105,0.027};
  AnyVec3 LTptT2L2NodeR0 = {-0.005,0.082,0.0};
  AnyVar ILplL1CIZ = (.L1Seg.ILplL1CINodeR0[2]-.PelvisSeg.ILplL1CINodeR0[2])/(.L1Seg.ILplL1CINodeR0[1]-.PelvisSeg.ILplL1CINodeR0[1]);
  AnyVar LTplL1SIPSZ = (.L1Seg.LTplL1SIPSNodeR0[2]-.PelvisSeg.LTplL1SIPSNodeR0[2])/(.L1Seg.LTplL1SIPSNodeR0[1]-.PelvisSeg.LTplL1SIPSNodeR0[1]);

  AnyFloat ILplL2CINodeR_pos          = ILplL2CINodeR0;
  AnyFloat LTplL2SIPSNodeR_pos        = LTplL2SIPSNodeR0;
  AnyFloat LTptT2L2NodeR_pos          = LTptT2L2NodeR0;
  AnyFloat ILplL1CIViaNodeR_pos       = {LSNode_0[0]+0.005,LSNode_0[1],(.L1Seg.ILplL1CINodeR0[2]          - ILplL1CIZ                *(.L1Seg.ILplL1CINodeR0[1]          - LSNode_0[1]))};
  AnyFloat LTplL1SIPSViaNodeR_pos     = {LSNode_0[0]+0.005,LSNode_0[1],(.L1Seg.LTplL1SIPSNodeR0[2]        - LTplL1SIPSZ              *(.L1Seg.LTplL1SIPSNodeR0[1]        - LSNode_0[1]))};
  AnyFloat ILptC5SIPSVia8NodeR_pos    = {LSNode_0[0]-0.005,LSNode_0[1],(.ThoraxSeg.ILptC5SIPSNodeR0[2]    - .ThoraxSeg.ILptC5SIPSZ   *(.ThoraxSeg.ILptC5SIPSNodeR0[1]    - LSNode_0[1]))};
  AnyFloat ILptC6SIPSVia7NodeR_pos    = {LSNode_0[0]-0.005,LSNode_0[1],(.ThoraxSeg.ILptC6SIPSNodeR0[2]    - .ThoraxSeg.ILptC6SIPSZ   *(.ThoraxSeg.ILptC6SIPSNodeR0[1]    - LSNode_0[1]))};
  AnyFloat ILptC7CIVia6NodeR_pos      = {LSNode_0[0]-0.005,LSNode_0[1],(.ThoraxSeg.ILptC7CINodeR0[2]      - .ThoraxSeg.ILptC7CIZ     *(.ThoraxSeg.ILptC7CINodeR0[1]      - LSNode_0[1]))};
  AnyFloat ILptC8CIVia5NodeR_pos      = {LSNode_0[0]-0.005,LSNode_0[1],(.ThoraxSeg.ILptC8CINodeR0[2]      - .ThoraxSeg.ILptC8CIZ     *(.ThoraxSeg.ILptC8CINodeR0[1]      - LSNode_0[1]))};
  AnyFloat ILptC9CIVia4NodeR_pos      = {LSNode_0[0]-0.005,LSNode_0[1],(.ThoraxSeg.ILptC9CINodeR0[2]      - .ThoraxSeg.ILptC9CIZ     *(.ThoraxSeg.ILptC9CINodeR0[1]      - LSNode_0[1]))};
  AnyFloat ILptC10CIVia3NodeR_pos     = {LSNode_0[0]-0.005,LSNode_0[1],(.ThoraxSeg.ILptC10CINodeR0[2]     - .ThoraxSeg.ILptC10CIZ    *(.ThoraxSeg.ILptC10CINodeR0[1]     - LSNode_0[1]))};
  AnyFloat ILptC11CIVia2NodeR_pos     = {LSNode_0[0]-0.005,LSNode_0[1],(.ThoraxSeg.ILptC11CINodeR0[2]     - .ThoraxSeg.ILptC11CIZ    *(.ThoraxSeg.ILptC11CINodeR0[1]     - LSNode_0[1]))};
  AnyFloat ILptC12CIVia2NodeR_pos     = {LSNode_0[0]+0.001,LSNode_0[1],(.ThoraxSeg.ILptC12CINodeR0[2]     - .ThoraxSeg.ILptC12CIZ    *(.ThoraxSeg.ILptC12CINodeR0[1]     - LSNode_0[1]))};
  AnyFloat LTptT3L3Via11NodeR_pos     = {LSNode_0[0]+0.005,LSNode_0[1],(.ThoraxSeg.LTptT3L3NodeR0[2]      - .ThoraxSeg.LTptT3L3Z     *(.ThoraxSeg.LTptT3L3NodeR0[1]      - LSNode_0[1]))};
  AnyFloat LTptT4L4Via10NodeR_pos     = {LSNode_0[0]+0.002,LSNode_0[1],(.ThoraxSeg.LTptT4L4NodeR0[2]      - .ThoraxSeg.LTptT4L4Z     *(.ThoraxSeg.LTptT4L4NodeR0[1]      - LSNode_0[1]))};
  AnyFloat LTptT5L5Via9NodeR_pos      = {LSNode_0[0]+0.004,LSNode_0[1],(.ThoraxSeg.LTptT5L5NodeR0[2]      - .ThoraxSeg.LTptT5L5Z     *(.ThoraxSeg.LTptT5L5NodeR0[1]      - LSNode_0[1]))};
  AnyFloat LTptT6S1Via8NodeR_pos      = {LSNode_0[0]+0.002,LSNode_0[1],(.ThoraxSeg.LTptT6S1NodeR0[2]      - .ThoraxSeg.LTptT6S1Z     *(.ThoraxSeg.LTptT6S1NodeR0[1]      - LSNode_0[1]))};
  AnyFloat LTptT7S2Via7NodeR_pos      = {LSNode_0[0]      ,LSNode_0[1],(.ThoraxSeg.LTptT7S2NodeR0[2]      - .ThoraxSeg.LTptT7S2Z     *(.ThoraxSeg.LTptT7S2NodeR0[1]      - LSNode_0[1]))};
  AnyFloat LTptT8S3Via6NodeR_pos      = {LSNode_0[0]      ,LSNode_0[1],(.ThoraxSeg.LTptT8S3NodeR0[2]      - .ThoraxSeg.LTptT8S3Z     *(.ThoraxSeg.LTptT8S3NodeR0[1]      - LSNode_0[1]))};
  AnyFloat LTptT9S4Via5NodeR_pos      = {LSNode_0[0]      ,LSNode_0[1],(.ThoraxSeg.LTptT9S4NodeR0[2]      - .ThoraxSeg.LTptT9S4Z     *(.ThoraxSeg.LTptT9S4NodeR0[1]      - LSNode_0[1]))};
  AnyFloat LTptT10SacrumVia4NodeR_pos = {LSNode_0[0]      ,LSNode_0[1],(.ThoraxSeg.LTptT10SacrumNodeR0[2] - .ThoraxSeg.LTptT10SacrumZ*(.ThoraxSeg.LTptT10SacrumNodeR0[1] - LSNode_0[1]))};
  AnyFloat LTptT11SacrumVia3NodeR_pos = {LSNode_0[0]      ,LSNode_0[1],(.ThoraxSeg.LTptT11SacrumNodeR0[2] - .ThoraxSeg.LTptT11SacrumZ*(.ThoraxSeg.LTptT11SacrumNodeR0[1] - LSNode_0[1]))};
  AnyFloat LTptT12SacrumVia2NodeR_pos = {LSNode_0[0]      ,LSNode_0[1],(.ThoraxSeg.LTptT12SacrumNodeR0[2] - .ThoraxSeg.LTptT12SacrumZ*(.ThoraxSeg.LTptT12SacrumNodeR0[1] - LSNode_0[1]))};

  AnyFloat ILplL2CINodeL_pos          = ILplL2CINodeR_pos          *.ZReflection;
  AnyFloat LTplL2SIPSNodeL_pos        = LTplL2SIPSNodeR_pos        *.ZReflection;
  AnyFloat LTptT2L2NodeL_pos          = LTptT2L2NodeR_pos          *.ZReflection;
  AnyFloat ILplL1CIViaNodeL_pos       = ILplL1CIViaNodeR_pos       *.ZReflection;
  AnyFloat LTplL1SIPSViaNodeL_pos     = LTplL1SIPSViaNodeR_pos     *.ZReflection;
  AnyFloat ILptC5SIPSVia8NodeL_pos    = ILptC5SIPSVia8NodeR_pos    *.ZReflection;
  AnyFloat ILptC6SIPSVia7NodeL_pos    = ILptC6SIPSVia7NodeR_pos    *.ZReflection;
  AnyFloat ILptC7CIVia6NodeL_pos      = ILptC7CIVia6NodeR_pos      *.ZReflection;
  AnyFloat ILptC8CIVia5NodeL_pos      = ILptC8CIVia5NodeR_pos      *.ZReflection;
  AnyFloat ILptC9CIVia4NodeL_pos      = ILptC9CIVia4NodeR_pos      *.ZReflection;
  AnyFloat ILptC10CIVia3NodeL_pos     = ILptC10CIVia3NodeR_pos     *.ZReflection;
  AnyFloat ILptC11CIVia2NodeL_pos     = ILptC11CIVia2NodeR_pos     *.ZReflection;
  AnyFloat ILptC12CIVia2NodeL_pos     = ILptC12CIVia2NodeR_pos     *.ZReflection;
  AnyFloat LTptT3L3Via11NodeL_pos     = LTptT3L3Via11NodeR_pos     *.ZReflection;
  AnyFloat LTptT4L4Via10NodeL_pos     = LTptT4L4Via10NodeR_pos     *.ZReflection;
  AnyFloat LTptT5L5Via9NodeL_pos      = LTptT5L5Via9NodeR_pos      *.ZReflection;
  AnyFloat LTptT6S1Via8NodeL_pos      = LTptT6S1Via8NodeR_pos      *.ZReflection;
  AnyFloat LTptT7S2Via7NodeL_pos      = LTptT7S2Via7NodeR_pos      *.ZReflection;
  AnyFloat LTptT8S3Via6NodeL_pos      = LTptT8S3Via6NodeR_pos      *.ZReflection;
  AnyFloat LTptT9S4Via5NodeL_pos      = LTptT9S4Via5NodeR_pos      *.ZReflection;
  AnyFloat LTptT10SacrumVia4NodeL_pos = LTptT10SacrumVia4NodeR_pos *.ZReflection;
  AnyFloat LTptT11SacrumVia3NodeL_pos = LTptT11SacrumVia3NodeR_pos *.ZReflection;
  AnyFloat LTptT12SacrumVia2NodeL_pos = LTptT12SacrumVia2NodeR_pos *.ZReflection;
  // End of Erector Spinae Nodes

  // Psoas Major Nodes
  AnyVar PML2I_Translation=0.015;
  AnyVec3 PML2I_TMNodeR0 = {0.045,0.094,0.022}+{PML2I_Translation,0,0};
  AnyVec3 PML2T_TMNodeR0 = {0.023,0.106,0.025};
  AnyVar PML1T_TMZ = (.L1Seg.PML1T_TMNodeR0[2]-.PelvisSeg.IliopubicEminenceViaNodeR0[2])/(.L1Seg.PML1T_TMNodeR0[1]-.PelvisSeg.IliopubicEminenceViaNodeR0[1]);
  AnyVar PML2T_TMZ = (.L2Seg.PML2T_TMNodeR0[2]-.PelvisSeg.IliopubicEminenceViaNodeR0[2])/(.L2Seg.PML2T_TMNodeR0[1]-.PelvisSeg.IliopubicEminenceViaNodeR0[1]);
  AnyVar PML3T_TMZ = (.L3Seg.PML3T_TMNodeR0[2]-.PelvisSeg.IliopubicEminenceViaNodeR0[2])/(.L3Seg.PML3T_TMNodeR0[1]-.PelvisSeg.IliopubicEminenceViaNodeR0[1]);
  AnyVar PML4T_TMZ = (.L4Seg.PML4T_TMNodeR0[2]-.PelvisSeg.IliopubicEminenceViaNodeR0[2])/(.L4Seg.PML4T_TMNodeR0[1]-.PelvisSeg.IliopubicEminenceViaNodeR0[1]);
  AnyVar PML5T_TMZ = (.L5Seg.PML5T_TMNodeR0[2]-.PelvisSeg.IliopubicEminenceViaNodeR0[2])/(.L5Seg.PML5T_TMNodeR0[1]-.PelvisSeg.IliopubicEminenceViaNodeR0[1]);


  AnyFloat PML2I_TMNodeR_pos = PML2I_TMNodeR0;
  AnyFloat PML2T_TMNodeR_pos = PML2T_TMNodeR0;

  AnyFloat PMT12I_TMVia1NodeR_pos = {0.053,0.110,(.ThoraxSeg.PMT12I_TMNodeR0[2] - .ThoraxSeg.PMT12I_TMZ*(.ThoraxSeg.PMT12I_TMNodeR0[1] - 0.110))};
  AnyFloat PML1T_TMVia1NodeR_pos  = {0.031,0.105,(.L1Seg.PML1T_TMNodeR0[2]      - .L2Seg.PML1T_TMZ     *(.L1Seg.PML1T_TMNodeR0[1]      - 0.105))};

  AnyFloat PML2I_TMNodeL_pos = PML2I_TMNodeR_pos * .ZReflection;
  AnyFloat PML2T_TMNodeL_pos = PML2T_TMNodeR_pos * .ZReflection;
  AnyFloat PMT12I_TMVia1NodeL_pos = PMT12I_TMVia1NodeR_pos*.ZReflection;
  AnyFloat PML1T_TMVia1NodeL_pos  = PML1T_TMVia1NodeR_pos *.ZReflection;
  // End of Psoas Major Nodes

  AnyFloat QLL2_CINodeR_pos = {0.01900000, 0.1050000, 0.03200000};
  AnyFloat QLL2_CINodeL_pos = {0.01900000, 0.1050000, -0.03200000};
  AnyFloat OEC7_RSNodeR_pos = {0.1580000, 0.09800000, 0.01500000};
  AnyFloat OEC7_RSNodeL_pos = {0.1580000, 0.09800000, -0.01500000};
  AnyFloat OICI_RS1NodeR_pos = {0.1580000, 0.09800000, 0.01500000};
  AnyFloat OICI_RS1NodeL_pos = {0.1580000, 0.09800000, -0.01500000};
  AnyFloat MidPoint_pos = {0.03900000, 0.1085000, 0.0000000};
  AnyFloat SupportNode_pos = {-0.01100000, 0.07350000, 0.0000000};
  AnyFloat BuckleContactNode_pos = {0.05900000, 0.1160000, 0.0000000};
  AnyFloat L2RContactNode_pos = {-0.01000000, 0.07000000, 0.0000000};
  AnyFloat L2LContactNode_pos = {-0.01000000, 0.07000000, 0.0000000};
  AnyFloat MFL2T9NodeR_pos = {0.01300000, 0.1050000, 0.02300000};
  AnyFloat MFL2T9NodeL_pos = {0.01300000, 0.1050000, -0.02300000};
  AnyFloat MFL2T10NodeR_pos = {0.01300000, 0.1050000, 0.02300000};
  AnyFloat MFL2T10NodeL_pos = {0.01300000, 0.1050000, -0.02300000};
  AnyFloat MFL2T11NodeR_pos = {0.01300000, 0.1050000, 0.02300000};
  AnyFloat MFL2T11NodeL_pos = {0.01300000, 0.1050000, -0.02300000};
  AnyFloat SEL2T9NodeR_pos = {0.01100000, 0.1137000, 0.01900000};
  AnyFloat SEL2T9NodeL_pos = {0.01100000, 0.1137000, -0.01900000};
  AnyFloat SEL2T10NodeR_pos = {0.01290000, 0.1163000, 0.01700000};
  AnyFloat SEL2T10NodeL_pos = {0.01290000, 0.1163000, -0.01700000};
  AnyFloat SEL2T11NodeR_pos = {0.01500000, 0.1166000, 0.01300000};
  AnyFloat SEL2T11NodeL_pos = {0.01500000, 0.1166000, -0.01300000};
  AnyFloat SEL2T12NodeR_pos = {0.01550000, 0.1155000, 0.01000000};
  AnyFloat SEL2T12NodeL_pos = {0.01550000, 0.1155000, -0.01000000};
};
AnyFolder L1Seg = {
  AnyFloat sCoM_pos={0.031, 0.139, 0.000000};
  AnyFloat ScalingNode_pos = {0.0000000, 0.0000000, 0.0000000};
  AnyFloat L1L2JntNode_pos = {0.03400000, 0.1230000, 0.0000000};
  AnyFloat T12L1JntNode_pos = {0.02200000, 0.1540000, 0.0000000};
  AnyFloat Right_pos = {0.0000000, 0.0000000, 0.0000000};
  AnyFloat Left_pos = {0.0000000, 0.0000000, 0.0000000};
  AnyFloat LSNode_pos = {-0.01700000, 0.1060000, 0.0000000};
  AnyFloat LINodeInferior_pos = {-0.006000000, 0.1000000, 0.0000000};
  AnyFloat LINodeSuperior_pos = {-0.003000000, 0.1310000, 0.0000000};
  AnyFloat MFdL1L3NodeR_pos = {-0.001000000, 0.1100000, 0.005000000};
  AnyFloat MFdL1L3NodeL_pos = {-0.001000000, 0.1100000, -0.005000000};
  AnyFloat MFmL1L4NodeR_pos = {-0.005000000, 0.1060000, 0.005000000};
  AnyFloat MFmL1L4NodeL_pos = {-0.005000000, 0.1060000, -0.005000000};
  AnyFloat MFtsL1L5NodeR_pos = {-0.009000000, 0.1000000, 0.0000000};
  AnyFloat MFtsL1L5NodeL_pos = {-0.009000000, 0.1000000, 0.0000000};
  AnyFloat MFtsL1S1NodeR_pos = {-0.009000000, 0.1000000, 0.0000000};
  AnyFloat MFtsL1S1NodeL_pos = {-0.009000000, 0.1000000, 0.0000000};
  AnyFloat MFtstL1SIPSNodeR_pos = {-0.009000000, 0.1000000, 0.0000000};
  AnyFloat MFtstL1SIPSNodeL_pos = {-0.009000000, 0.1000000, 0.0000000};

  // Ligament Nodes
  AnyVec3 LSNode_0 = {-0.017,0.106,0};
  AnyFloat LSNode = LSNode_0;
  // End of ligament Nodes

  // Erector Spinae Nodes
  AnyVec3 ILplL1CINodeR0 = {0.002,0.136,0.034};
  AnyVec3 LTplL1SIPSNodeR0 = {0.003,0.136,0.027};
  AnyVec3 LTptT1L1NodeR0 = {-0.017,0.114,0.0};

  AnyFloat ILplL1CINodeR_pos          = ILplL1CINodeR0;
  AnyFloat LTplL1SIPSNodeR_pos        = LTplL1SIPSNodeR0;
  AnyFloat LTptT1L1NodeR_pos          = LTptT1L1NodeR0;
  AnyFloat ILptC5SIPSVia7NodeR_pos    = {LSNode_0[0]      ,LSNode_0[1],(.ThoraxSeg.ILptC5SIPSNodeR0[2]    - .ThoraxSeg.ILptC5SIPSZ   *(.ThoraxSeg.ILptC5SIPSNodeR0[1]    - LSNode_0[1]))};
  AnyFloat ILptC6SIPSVia6NodeR_pos    = {LSNode_0[0]      ,LSNode_0[1],(.ThoraxSeg.ILptC6SIPSNodeR0[2]    - .ThoraxSeg.ILptC6SIPSZ   *(.ThoraxSeg.ILptC6SIPSNodeR0[1]    - LSNode_0[1]))};
  AnyFloat ILptC7CIVia5NodeR_pos      = {LSNode_0[0]      ,LSNode_0[1],(.ThoraxSeg.ILptC7CINodeR0[2]      - .ThoraxSeg.ILptC7CIZ     *(.ThoraxSeg.ILptC7CINodeR0[1]      - LSNode_0[1]))};
  AnyFloat ILptC8CIVia4NodeR_pos      = {LSNode_0[0]      ,LSNode_0[1],(.ThoraxSeg.ILptC8CINodeR0[2]      - .ThoraxSeg.ILptC8CIZ     *(.ThoraxSeg.ILptC8CINodeR0[1]      - LSNode_0[1]))};
  AnyFloat ILptC9CIVia3NodeR_pos      = {LSNode_0[0]      ,LSNode_0[1],(.ThoraxSeg.ILptC9CINodeR0[2]      - .ThoraxSeg.ILptC9CIZ     *(.ThoraxSeg.ILptC9CINodeR0[1]      - LSNode_0[1]))};
  AnyFloat ILptC10CIVia2NodeR_pos     = {LSNode_0[0]      ,LSNode_0[1],(.ThoraxSeg.ILptC10CINodeR0[2]     - .ThoraxSeg.ILptC10CIZ    *(.ThoraxSeg.ILptC10CINodeR0[1]     - LSNode_0[1]))};
  AnyFloat ILptC11CIVia1NodeR_pos     = {LSNode_0[0]      ,LSNode_0[1],(.ThoraxSeg.ILptC11CINodeR0[2]     - .ThoraxSeg.ILptC11CIZ    *(.ThoraxSeg.ILptC11CINodeR0[1]     - LSNode_0[1]))};
  AnyFloat ILptC12CIVia1NodeR_pos     = {LSNode_0[0]+0.01 ,LSNode_0[1],(.ThoraxSeg.ILptC12CINodeR0[2]     - .ThoraxSeg.ILptC12CIZ    *(.ThoraxSeg.ILptC12CINodeR0[1]     - LSNode_0[1]))};
  AnyFloat LTptT2L2Via11NodeR_pos     = {LSNode_0[0]+0.01 ,LSNode_0[1],(.ThoraxSeg.LTptT2L2NodeR0[2]      - .ThoraxSeg.LTptT2L2Z     *(.ThoraxSeg.LTptT2L2NodeR0[1]      - LSNode_0[1]))};
  AnyFloat LTptT3L3Via10NodeR_pos     = {LSNode_0[0]+0.012,LSNode_0[1],(.ThoraxSeg.LTptT3L3NodeR0[2]      - .ThoraxSeg.LTptT3L3Z     *(.ThoraxSeg.LTptT3L3NodeR0[1]      - LSNode_0[1]))};
  AnyFloat LTptT4L4Via9NodeR_pos      = {LSNode_0[0]+0.012,LSNode_0[1],(.ThoraxSeg.LTptT4L4NodeR0[2]      - .ThoraxSeg.LTptT4L4Z     *(.ThoraxSeg.LTptT4L4NodeR0[1]      - LSNode_0[1]))};
  AnyFloat LTptT5L5Via8NodeR_pos      = {LSNode_0[0]+0.010,LSNode_0[1],(.ThoraxSeg.LTptT5L5NodeR0[2]      - .ThoraxSeg.LTptT5L5Z     *(.ThoraxSeg.LTptT5L5NodeR0[1]      - LSNode_0[1]))};
  AnyFloat LTptT6S1Via7NodeR_pos      = {LSNode_0[0]+0.008,LSNode_0[1],(.ThoraxSeg.LTptT6S1NodeR0[2]      - .ThoraxSeg.LTptT6S1Z     *(.ThoraxSeg.LTptT6S1NodeR0[1]      - LSNode_0[1]))};
  AnyFloat LTptT7S2Via6NodeR_pos      = {LSNode_0[0]+0.008,LSNode_0[1],(.ThoraxSeg.LTptT7S2NodeR0[2]      - .ThoraxSeg.LTptT7S2Z     *(.ThoraxSeg.LTptT7S2NodeR0[1]      - LSNode_0[1]))};
  AnyFloat LTptT8S3Via5NodeR_pos      = {LSNode_0[0]+0.008,LSNode_0[1],(.ThoraxSeg.LTptT8S3NodeR0[2]      - .ThoraxSeg.LTptT8S3Z     *(.ThoraxSeg.LTptT8S3NodeR0[1]      - LSNode_0[1]))};
  AnyFloat LTptT9S4Via4NodeR_pos      = {LSNode_0[0]+0.008,LSNode_0[1],(.ThoraxSeg.LTptT9S4NodeR0[2]      - .ThoraxSeg.LTptT9S4Z     *(.ThoraxSeg.LTptT9S4NodeR0[1]      - LSNode_0[1]))};
  AnyFloat LTptT10SacrumVia3NodeR_pos = {LSNode_0[0]+0.008,LSNode_0[1],(.ThoraxSeg.LTptT10SacrumNodeR0[2] - .ThoraxSeg.LTptT10SacrumZ*(.ThoraxSeg.LTptT10SacrumNodeR0[1] - LSNode_0[1]))};
  AnyFloat LTptT11SacrumVia2NodeR_pos = {LSNode_0[0]+0.008,LSNode_0[1],(.ThoraxSeg.LTptT11SacrumNodeR0[2] - .ThoraxSeg.LTptT11SacrumZ*(.ThoraxSeg.LTptT11SacrumNodeR0[1] - LSNode_0[1]))};
  AnyFloat LTptT12SacrumVia1NodeR_pos = {LSNode_0[0]+0.010,LSNode_0[1],(.ThoraxSeg.LTptT12SacrumNodeR0[2] - .ThoraxSeg.LTptT12SacrumZ*(.ThoraxSeg.LTptT12SacrumNodeR0[1] - LSNode_0[1]))};

  AnyFloat ILplL1CINodeL_pos          = ILplL1CINodeR_pos         *.ZReflection;
  AnyFloat LTplL1SIPSNodeL_pos        = LTplL1SIPSNodeR_pos       *.ZReflection;
  AnyFloat LTptT1L1NodeL_pos          = LTptT1L1NodeR_pos         *.ZReflection;
  AnyFloat ILptC5SIPSVia7NodeL_pos    = ILptC5SIPSVia7NodeR_pos   *.ZReflection;
  AnyFloat ILptC6SIPSVia6NodeL_pos    = ILptC6SIPSVia6NodeR_pos   *.ZReflection;
  AnyFloat ILptC7CIVia5NodeL_pos      = ILptC7CIVia5NodeR_pos     *.ZReflection;
  AnyFloat ILptC8CIVia4NodeL_pos      = ILptC8CIVia4NodeR_pos     *.ZReflection;
  AnyFloat ILptC9CIVia3NodeL_pos      = ILptC9CIVia3NodeR_pos     *.ZReflection;
  AnyFloat ILptC10CIVia2NodeL_pos     = ILptC10CIVia2NodeR_pos    *.ZReflection;
  AnyFloat ILptC11CIVia1NodeL_pos     = ILptC11CIVia1NodeR_pos    *.ZReflection;
  AnyFloat ILptC12CIVia1NodeL_pos     = ILptC12CIVia1NodeR_pos    *.ZReflection;
  AnyFloat LTptT2L2Via11NodeL_pos     = LTptT2L2Via11NodeR_pos    *.ZReflection;
  AnyFloat LTptT3L3Via10NodeL_pos     = LTptT3L3Via10NodeR_pos    *.ZReflection;
  AnyFloat LTptT4L4Via9NodeL_pos      = LTptT4L4Via9NodeR_pos     *.ZReflection;
  AnyFloat LTptT5L5Via8NodeL_pos      = LTptT5L5Via8NodeR_pos     *.ZReflection;
  AnyFloat LTptT6S1Via7NodeL_pos      = LTptT6S1Via7NodeR_pos     *.ZReflection;
  AnyFloat LTptT7S2Via6NodeL_pos      = LTptT7S2Via6NodeR_pos     *.ZReflection;
  AnyFloat LTptT8S3Via5NodeL_pos      = LTptT8S3Via5NodeR_pos     *.ZReflection;
  AnyFloat LTptT9S4Via4NodeL_pos      = LTptT9S4Via4NodeR_pos     *.ZReflection;
  AnyFloat LTptT10SacrumVia3NodeL_pos = LTptT10SacrumVia3NodeR_pos*.ZReflection;
  AnyFloat LTptT11SacrumVia2NodeL_pos = LTptT11SacrumVia2NodeR_pos*.ZReflection;
  AnyFloat LTptT12SacrumVia1NodeL_pos = LTptT12SacrumVia1NodeR_pos*.ZReflection;


  // End of Erector Spinae Nodes

  // Psoas Major Nodes
  AnyVec3 PML1I_TMNodeR0 = {0.054,0.124,0.022}; //STC
  AnyVec3 PML1T_TMNodeR0 = {0.012,0.137,0.025};

  AnyFloat PML1I_TMNodeR_pos = PML1I_TMNodeR0;
  AnyFloat PML1T_TMNodeR_pos = PML1T_TMNodeR0;
  AnyFloat PML1I_TMNodeL_pos = PML1I_TMNodeR_pos*.ZReflection;
  AnyFloat PML1T_TMNodeL_pos = PML1T_TMNodeR_pos*.ZReflection;
  // End of Psoas Major Nodes

  AnyFloat QLL1_CINodeR_pos = {0.008000000, 0.1370000, 0.03200000};
  AnyFloat QLL1_CINodeL_pos = {0.008000000, 0.1370000, -0.03200000};
  AnyFloat MidPoint_pos = {0.02800000, 0.1385000, 0.0000000};
  AnyFloat SupportNode_pos = {-0.01700000, 0.1085000, 0.0000000};
  AnyFloat BuckleContactNode_pos = {0.04800000, 0.1460000, 0.0000000};
  AnyFloat L1RContactNode_pos = {-0.02000000, 0.1000000, 0.05000000};
  AnyFloat L1LContactNode_pos = {-0.02000000, 0.1000000, -0.05000000};
  AnyFloat MFL1T8NodeR_pos = {0.002000000, 0.1360000, 0.02300000};
  AnyFloat MFL1T8NodeL_pos = {0.002000000, 0.1360000, -0.02300000};
  AnyFloat MFL1T9NodeR_pos = {0.002000000, 0.1360000, 0.02300000};
  AnyFloat MFL1T9NodeL_pos = {0.002000000, 0.1360000, -0.02300000};
  AnyFloat MFL1T10NodeR_pos = {0.002000000, 0.1360000, 0.02300000};
  AnyFloat MFL1T10NodeL_pos = {0.002000000, 0.1360000, -0.02300000};
  AnyFloat SPL1T3Node_pos = {-0.01750000, 0.1144000, 0.0000000};
  AnyFloat SPL1T4Node_pos = {-0.01770000, 0.1134000, 0.0000000};
  AnyFloat SPL1T5Node_pos = {-0.01780000, 0.1124000, 0.0000000};
  AnyFloat SEL1T8NodeR_pos = {0.004000000, 0.1472000, 0.01530000};
  AnyFloat SEL1T8NodeL_pos = {0.004000000, 0.1472000, -0.01530000};
  AnyFloat SEL1T10NodeR_pos = {0.001700000, 0.1477000, 0.01700000};
  AnyFloat SEL1T10NodeL_pos = {0.001700000, 0.1477000, -0.01700000};
  AnyFloat SEL1T11NodeR_pos = {0.005000000, 0.1466000, 0.009500000};
  AnyFloat SEL1T11NodeL_pos = {0.005000000, 0.1466000, -0.009500000};
  AnyFloat Right_O_latissimus_dorsi_3_pos = {-0.02000000, 0.1385000, 0.0000000};
  AnyFloat Left_O_latissimus_dorsi_3_pos = {-0.02000000, 0.1385000, 0.0000000};
};

// Definition of lumbar ligament attachment points
L1Seg = {
  // anterior longitudinal
  AnyFloat ALLNodeInferior_pos = {0.051,0.133,0};
  AnyFloat ALLNodeSuperior_pos = {0.042,0.159,0};
  // posterior longitudinal
  AnyFloat PLLViaNode_pos = {0.037,0.015,0};
  AnyFloat PLLNodeSuperior_pos = {0.01209411, 0.147806, 0};
  AnyFloat PLLNodeInferior_pos = {0.021,0.119,0};
  // inter/supraspinous
  AnyFloat InterspinousInferior_pos = {-0.0005,0.1065,0};
  AnyFloat InterspinousSuperior_pos = {-0.0075,0.118,0};
  AnyFloat SupraspinousInferior_pos = {-0.012,0.1,0};
  AnyFloat SupraspinousSuperior_pos = {-0.016,0.115,0};
  // ligamenta flavia (right/left)
  AnyFloat FlavumInferiorR_pos = {0.012,0.1175,0.0065};
  AnyFloat FlavumInferiorL_pos = {0.012,0.1175,-0.0065};
  AnyFloat FlavumSuperiorR_pos = {0.005,0.135,0.005};
  AnyFloat FlavumSuperiorL_pos = {0.005,0.135,-0.005};

  AnyFloat InterTransverseR_pos = {0.001681264, 0.1354231, 0.0342857};
  AnyFloat InterTransverseL_pos = {0.001681264, 0.1354231, -0.0342857};

  AnyFloat InterTransverseRmid_pos = {0.006658831, 0.1334801, 0.02453004};
  AnyFloat InterTransverseLmid_pos = {0.006658831, 0.1334801, -0.02453004};
};
L2Seg = {
  // anterior longitudinal
  AnyFloat ALLNodeInferior_pos = {0.062,0.105,0};
  AnyFloat ALLNodeSuperior_pos = {0.053,0.129,0};
  // posterior longitudinal
  AnyFloat PLLNodeInferior_pos = {0.032,0.092,0};
  AnyFloat PLLViaNode_pos = {0.027,0.104,0};
  AnyFloat PLLNodeSuperior_pos = {0.023,0.117,0};
  // inter/supraspinous ligaments
  AnyFloat InterspinousInferior_pos = {0.0095,0.0725,0};
  AnyFloat InterspinousSuperior_pos = {0.003,0.089,0};
  AnyFloat SupraspinousInferior_pos = {-0.0005,0.0695,0};
  AnyFloat SupraspinousSuperior_pos = {-0.00395,0.0825,0};
  // ligamenta flavia (right/left)
  AnyFloat FlavumInferiorR_pos = {0.0225,0.0825,0.007};
  AnyFloat FlavumInferiorL_pos = {0.0225,0.0825,-0.007};
  AnyFloat FlavumSuperiorR_pos = {0.0175,0.105,0.0055};
  AnyFloat FlavumSuperiorL_pos = {0.0175,0.105,-0.0055};

  AnyFloat InterTransverseR_pos = {0.01175492, 0.1053886, 0.0342857};
  AnyFloat InterTransverseL_pos = {0.01175492, 0.1053886, -0.0342857};

  AnyFloat InterTransverseRmid_pos = {0.02042832, 0.1038095, 0.02836499};
  AnyFloat InterTransverseLmid_pos = {0.02042832, 0.1038095, -0.02836499};

};
L3Seg = {
  // anterior longitudional
  AnyFloat ALLNodeInferior_pos = {0.069,0.071,0};
  AnyFloat ALLNodeSuperior_pos = {0.064,0.097,0};
  // posterior longitudional
  AnyFloat PLLNodeInferior_pos = {0.037,0.062,0};
  AnyFloat PLLViaNode_pos = {0.033,0.076,0};
  AnyFloat PLLNodeSuperior_pos = {0.031,0.089,0};
  // inter/supraspinous
  AnyFloat InterspinousInferior_pos = {0.0125,0.0475,0};
  AnyFloat InterspinousSuperior_pos = {0.006,0.064,0};
  AnyFloat SupraspinousInferior_pos = {0.0005,0.0445,0};
  AnyFloat SupraspinousSuperior_pos = {-0.003,0.0585,0};
  // ligamenta flavia (right/left)
  AnyFloat FlavumInferiorR_pos = {0.0275,0.055,0.0095};
  AnyFloat FlavumInferiorL_pos = {0.0275,0.055,-0.0095};
  AnyFloat FlavumSuperiorR_pos = {0.025,0.075,0.006};
  AnyFloat FlavumSuperiorL_pos = {0.025,0.075,-0.006};

  AnyFloat InterTransverseR_pos = {0.0246511, 0.07434323, 0.03382862};
  AnyFloat InterTransverseL_pos = {0.0246511, 0.07434323, -0.03382862};


  AnyFloat InterTransverseRmid_pos = {0.02859373, 0.07502131, 0.02394057};
  AnyFloat InterTransverseLmid_pos = {0.02859373, 0.07502131, -0.02394057};
};
L4Seg = {
  // anterior longitudinal
  AnyFloat ALLNodeInferior_pos = {0.072,0.031,0};
  AnyFloat ALLNodeSuperior_pos = {0.071,0.059,0};
  // posterior longitudinal
  AnyFloat PLLNodeInferior_pos = {0.039,0.031,0};
  AnyFloat PLLViaNode_pos = {0.038,0.046,0};
  AnyFloat PLLNodeSuperior_pos = {0.037,0.059,0};
  // inter/supraspinous
  AnyFloat InterspinousInferior_pos = {0.015,0.0235,0};
  AnyFloat InterspinousSuperior_pos = {0.0125,0.0425,0};
  AnyFloat SupraspinousInferior_pos = {0.0015,0.022,0};
  AnyFloat SupraspinousSuperior_pos = {-0.000,0.037,0};
  // ligamenta flavia (right/left
  AnyFloat FlavumInferiorR_pos = {0.0275,0.025,0.0115};
  AnyFloat FlavumInferiorL_pos = {0.0275,0.025,-0.0115};
  AnyFloat FlavumSuperiorR_pos = {0.0295,0.05,0.006};
  AnyFloat FlavumSuperiorL_pos = {0.0295,0.05,-0.006};

  AnyFloat InterTransverseR_pos = {0.0275, 0.05000021, 0.03258219};
  AnyFloat InterTransverseL_pos = {0.0275, 0.05000021, -0.03258219};

  AnyFloat InterTransverseRmid_pos = {0.03295033, 0.04644059, 0.02559336};
  AnyFloat InterTransverseLmid_pos = {0.03295033, 0.04644059, -0.02559336};
};
L5Seg = {
  // anterior longitudinal
  AnyFloat ALLNodeInferior_pos = {0.063,-0.007,0};
  AnyFloat ALLNodeSuperior_pos = {0.071,0.020,0};
  // posterior longitudinal
  AnyFloat PLLViaNode_pos = {0.037,0.015,0};
  AnyFloat PLLNodeSuperior_pos = {0.038,0.027,0};
  AnyFloat PLLNodeInferior_pos = {0.03590498, 0.001, 0.0};
  // ligamenta flavia (right/left
  AnyFloat FlavumInferiorR_pos = {0.02904793, 0.01086995, 0.007435671};
  AnyFloat FlavumInferiorL_pos = {0.02904793, 0.01086995, -0.007435671};

  AnyFloat FlavumSuperiorR_pos = {0.0295,0.02,0.006};
  AnyFloat FlavumSuperiorL_pos = {0.0295,0.02,-0.006};
  // inter/supraspinous
  AnyFloat InterspinousInferior_pos = {0.0125,0.005,0};
  AnyFloat InterspinousSuperior_pos = {0.0125,0.02,0};
  AnyFloat SupraspinousInferior_pos = {0.0015,0.007,0};
  AnyFloat SupraspinousSuperior_pos = {-0.000,0.016,0};

  AnyFloat InterTransverseR_pos = {0.02618421, 0.02240737, 0.03258219};
  AnyFloat InterTransverseL_pos = {0.02618421, 0.02240737, -0.03258219};

  AnyFloat InterTransverseRmid_pos = {0.03475866, 0.01717806, 0.02636746};
  AnyFloat InterTransverseLmid_pos = {0.03475866, 0.01717806, -0.02636746};
};
SacrumSeg = {  // only superior nodes
  AnyFloat ALLNodeSuperior_pos = {0.055,-0.020,0};
  AnyFloat PLLNodeSuperior_pos = {0.03426434, -0.003116785, 0};
  // ligamenta flavia (right/left)
  AnyFloat FlavumSuperiorR_pos = {0.02378489, 0.003368557, 0.01158991};
  AnyFloat FlavumSuperiorL_pos = {0.02378489, 0.003368557, -0.01158991};
  // inter/supraspinous
  AnyFloat SupraspinousSuperior_pos = {0.001834338, 0.002112139, 0};
  AnyFloat InterspinousSuperior_pos = {0.011456154, 0.003246047, 0};

  AnyFloat InterTransverseR_pos = {0.03145664, 0.008208302, 0.0432449};
  AnyFloat InterTransverseL_pos = {0.03145664, 0.008208302, -0.0432449};

  AnyFloat InterTransverseRmid_pos = {0.02804244, 0.007081035, 0.03249829};
  AnyFloat InterTransverseLmid_pos = {0.02804244, 0.007081035, -0.03249829};
  // SacroSpinale
  AnyFloat SacrospinaleNodeR_pos  = {-0.045, -0.07, 0.03};
  AnyFloat SacrospinaleNodeL_pos  = {-0.045, -0.07, -0.03};
  // SacroTuberale
  AnyFloat SacrotuberaleNodeR_pos  = {-0.045, -0.09, 0.025};
  AnyFloat SacrotuberaleNodeL_pos  = {-0.045, -0.09, -0.025};
  // Anterior sacroilliac
  AnyFloat ASIL_1R_pos = {0.04, 0.0, 0.045};
  AnyFloat ASIL_1L_pos = {0.04, 0.0, -0.045};
  AnyFloat ASIL_2R_pos = {0.04, -0.01, 0.045};
  AnyFloat ASIL_2L_pos = {0.04, -0.01, -0.045};
  AnyFloat ASIL_3R_pos = {0.045, -0.02, 0.045};
  AnyFloat ASIL_3L_pos = {0.045, -0.02, -0.045};
  // Posterior sacroilliac
  AnyFloat PSIL_1R_pos = {-0.02, -0.01, 0.025};
  AnyFloat PSIL_1L_pos = {-0.02, -0.01, -0.025};
  AnyFloat PSIL_2R_pos = {-0.025, -0.02, 0.025};
  AnyFloat PSIL_2L_pos = {-0.025, -0.02, -0.025};
  // sacral interosseous ligament
  AnyFloat SIL_1R_pos = {0.01, 0.01, 0.03};
  AnyFloat SIL_1L_pos = {0.01, 0.01, -0.03};
  AnyFloat SIL_2R_pos = {0.005, 0.01, 0.02};
  AnyFloat SIL_2L_pos = {0.005, 0.01, -0.02};
  AnyFloat SIL_3R_pos = {-0.00, 0.006, 0.02};
  AnyFloat SIL_3L_pos = {-0.00, 0.006, -0.02};
  AnyFloat SIL_4R_pos = {-0.009, 0.004, 0.025};
  AnyFloat SIL_4L_pos = {-0.009, 0.004, -0.025};
};
PelvisSeg = {
  // Used by sacrospinale
  AnyFloat SpinaIschiadicaR_pos = {0.0025, -0.085, 0.045};
  AnyFloat SpinaIschiadicaL_pos = {0.0025, -0.085, -0.045};
  // Used by Sacrotuberal
  AnyFloat TuberIschiadicumR_pos = {-0.007, -0.14, 0.055};
  AnyFloat TuberIschiadicumL_pos = {-0.007, -0.14, -0.055};
  // Illiolumbar superior
  AnyFloat IlioLumbarSupR_pos = {0.045, 0.037, 0.065};
  AnyFloat IlioLumbarSupL_pos = {0.045, 0.037, -0.065};
  // Illiolumbar inferior
  AnyFloat IlioLumbarInfR_pos = {0.045, 0.03, 0.06};
  AnyFloat IlioLumbarInfL_pos = {0.045, 0.03, -0.06};
  // Anterior sacroilliac
  AnyFloat ASIL_1R_pos = {0.045, 0.01, 0.06};
  AnyFloat ASIL_1L_pos = {0.045, 0.01, -0.06};
  AnyFloat ASIL_2R_pos = {0.045, -0.0, 0.06};
  AnyFloat ASIL_2L_pos = {0.045, -0.0, -0.06};
  AnyFloat ASIL_3R_pos = {0.045, -0.01, 0.06};
  AnyFloat ASIL_3L_pos = {0.045, -0.01, -0.06};
  // Posterior sacroilliac
  AnyFloat PSIL_1R_pos = {-0.015, 0.00, 0.04};
  AnyFloat PSIL_1L_pos = {-0.015, 0.00, -0.04};
  AnyFloat PSIL_2R_pos = {-0.02, -0.025, 0.045};
  AnyFloat PSIL_2L_pos = {-0.02, -0.025, -0.045};
  // sacral interosseous ligament
  AnyFloat SIL_1R_pos = {0.015, 0.006, 0.04};
  AnyFloat SIL_1L_pos = {0.015, 0.006, -0.04};
  AnyFloat SIL_2R_pos = {0.005, 0.01, 0.04};
  AnyFloat SIL_2L_pos = {0.005, 0.01, -0.04};
  AnyFloat SIL_3R_pos = {0.0, 0.005, 0.04};
  AnyFloat SIL_3L_pos = {0.0, 0.005, -0.04};
  AnyFloat SIL_4R_pos = {-0.013, 0.006, 0.04};
  AnyFloat SIL_4L_pos = {-0.013, 0.006, -0.04};
};
