AnyFileVar FilenameC1Seg                   ="C1Seg";
AnyFileVar FilenameC2Seg                   ="C2Seg";
AnyFileVar FilenameC3Seg                   ="C3Seg";
AnyFileVar FilenameC4Seg                   ="C4Seg";
AnyFileVar FilenameC5Seg                   ="C5Seg";
AnyFileVar FilenameC6Seg                   ="C6Seg";
AnyFileVar FilenameC7Seg                   ="C7Seg";
AnyFileVar FilenameL1Seg                   ="L1Seg";
AnyFileVar FilenameL2Seg                   ="L2Seg";
AnyFileVar FilenameL3Seg                   ="L3Seg";
AnyFileVar FilenameL4Seg                   ="L4Seg";
AnyFileVar FilenameL5Seg                   ="L5Seg";
AnyFileVar FilenamePelvisSeg               ="PelvisSeg";
AnyFileVar FilenamePelvisWOS               ="PelvisWOS";
AnyFileVar FilenameSacrumSeg               ="SacrumSymmSeg";
AnyFileVar FilenameSkull                   ="Skull";
AnyFileVar FilenameThoraxSeg               ="ThoraxSeg";
AnyFileVar FilenameThoraxSegWithoutNeck    ="ThoraxSegWithoutNeck";
