AnyFolder Skull = {
  AnyFloat Jii                                     = {181.0,173.0,236.0}/10000;
  AnyFloat sCoM_pos                                = {0.0,0.0,0.0};
  AnyFloat AnatomicalFrame_pos                     = {0.0000000, 0.0000000, 0.0000000};
  AnyFloat C1C0JntNode_pos                         = {0.0000000, 0.0000000, 0.0000000};
  AnyFloat NeckNode_pos                            = {0.0000000, 0.0000000, 0.0000000};
  AnyFloat drworientation_pos                      = {0.0000000, 0.0000000, 0.0000000};
  AnyFloat TopOfHead_pos                           = {0.0000000, 0.1400000, 0.0000000};
  AnyFloat Right_pos                               = {0.0000000, 0.0000000, 0.0000000};
  AnyFloat Left_pos                                = {0.0000000, 0.0000000, 0.0000000};
  AnyFloat SkullContactNode_pos                    = {-0.1100000, 0.03000000, 0.0000000};

  AnyFolder Right = {
    AnyFloat LumpedHyoidT1C0Node_pos                = {0.02400000, -0.001000000, 0.01800000};
    AnyFloat LongusColliT1C0Node_pos                = {0.02000000, -0.01000000, 0.008000000};
    AnyFloat LongusCapitisC0Node_pos                = {0.03000000, -0.01000000, 0.008000000};
    AnyFloat SpleniusCapitisNode_pos                = {-0.01100000, -0.03200000, 0.06400000};
    AnyFloat SemispinalisCapitisNode_pos            = {-0.08800000, 0.001000000, 0.02800000};
    AnyFloat LongissimusCapitisNode_pos             = {-0.009000000, -0.02500000, 0.06200000};
    AnyFloat O_trapezius_clavicular_part_6_pos = {-0.06000000, -0.02000000, 0.02000000};
    AnyFloat SternocleidomastoidNode_pos       = {-0.006000000, -0.02000000, 0.07400000};
  };

  AnyFolder Left = {
    AnyInt MirrorSign = -1;
    AnyFloat MirrorTransform = {{1,0,0},{0,1,0},{0,0, MirrorSign}};

    AnyFloat LumpedHyoidT1C0Node_pos            =     .Right.LumpedHyoidT1C0Node_pos * MirrorTransform;
    AnyFloat LongusColliT1C0Node_pos            =     .Right.LongusColliT1C0Node_pos * MirrorTransform;
    AnyFloat LongusCapitisC0Node_pos            =     .Right.LongusCapitisC0Node_pos * MirrorTransform;
    AnyFloat SpleniusCapitisNode_pos            =     .Right.SpleniusCapitisNode_pos * MirrorTransform;
    AnyFloat SemispinalisCapitisNode_pos        =     .Right.SemispinalisCapitisNode_pos * MirrorTransform;
    AnyFloat LongissimusCapitisNode_pos         =     .Right.LongissimusCapitisNode_pos * MirrorTransform;
    AnyFloat O_trapezius_clavicular_part_6_pos  = .Right.O_trapezius_clavicular_part_6_pos * MirrorTransform;
    AnyFloat SternocleidomastoidNode_pos        =.Right.SternocleidomastoidNode_pos * MirrorTransform;
  };
};

//AnyFolder &Sternum = Thorax;
//AnyFolder &T12 = Thorax;
//AnyFolder &T11 = Thorax;
//AnyFolder &T10 = Thorax;
//AnyFolder &T9 = Thorax;
//AnyFolder &T8 = Thorax;
//AnyFolder &T7 = Thorax;
//AnyFolder &T6 = Thorax;
//AnyFolder &T5 = Thorax;
//AnyFolder &T4 = Thorax;
//AnyFolder &T3 = Thorax;
//AnyFolder &T2 = Thorax;
//AnyFolder &T1 = Thorax;
//
//AnyFolder &R12 = Thorax;
//AnyFolder &R11 = Thorax;
//AnyFolder &R10 = Thorax;
//AnyFolder &R9 = Thorax;
//AnyFolder &R8 = Thorax;
//AnyFolder &R7 = Thorax;
//AnyFolder &R6 = Thorax;
//AnyFolder &R5 = Thorax;
//AnyFolder &R4 = Thorax;
//AnyFolder &R3 = Thorax;
//AnyFolder &R2 = Thorax;
//AnyFolder &R1 = Thorax;

AnyFloat MirrorTransform = {{1,0,0},{0,1,0},{0,0, -1}};

AnyFolder Sternum = {
  AnyFloat RACP_CO6Node_pos            = {0.141 , 0.26599976, 0};

  AnyFolder Right = {
    // ----------------------------------------------CS Nodes-----------------------------------------------
    AnyFloat CS1Node_pos                 ={ 0.063500003, 0.41249976, 0.02};
    AnyFloat CS2Node_pos                 ={ 0.090100003, 0.37379976, 0.0176};
    AnyFloat CS3Node_pos                 ={ 0.1015, 0.34879976, 0.0183};
    AnyFloat CS4Node_pos                 ={ 0.1145, 0.31849976, 0.019};
    AnyFloat CS5Node_pos                 ={ 0.1235, 0.29179976, 0.0197};
    AnyFloat CS6Node_pos                 ={ 0.1315, 0.26929976, 0.019};
    AnyFloat CS7Node_pos                 ={ 0.1345, 0.25749976, 0.016};
    AnyFloat CS8Node_pos                 ={ 0.1365, 0.25049976, 0.014};
    AnyFloat CS9Node_pos                 ={ 0.1375, 0.24349976, 0.012};
    AnyFloat CS10Node_pos                ={ 0.138, 0.23749976, 0.01};

    //----------------------------------------------CC Node_poss------------------------------------------------
    AnyFloat R1Node_pos                 ={ 0.052109003, 0.41701107, 0.041864661};
    AnyFloat R2Node_pos                 ={ 0.085136813 , 0.37784236, 0.04556327};
    AnyFloat R3Node_pos                 ={ 0.103694640, 0.34876168, 0.05730716};
    AnyFloat R4Node_pos                 ={ 0.115409530, 0.32065415, 0.07320982};
    AnyFloat R5Node_pos                 ={ 0.124428180, 0.29380424, 0.08968678};
    AnyFloat R6Node_pos                 ={ 0.133921720, 0.25731787, 0.10078811};
    AnyFloat R7Node_pos                 ={ 0.144580320, 0.21814601, 0.10757296};
    AnyFloat R8Node_pos                 ={ 0.147215690, 0.18408399, 0.12073676};
    AnyFloat R9Node_pos                 ={ 0.139388370, 0.14565845, 0.12146134};
    AnyFloat R10Node_pos                ={ 0.126802860, 0.11873311, 0.12013349};

    AnyFloat LumpedHyoidStC0Ins_pos = {0.060000003, 0.41999976,  0.018};
    AnyFloat TrThR2SNode_pos         = {0.12692172, 0.26931780,   0.005};
    AnyFloat TrThR3SNode_pos         = {0.12925102, 0.25923181,   0.005};
    AnyFloat TrThR4SNode_pos         = {0.13158032, 0.24914581,   0.005};
    AnyFloat TrThR5SNode_pos         = {0.13589801, 0.24411453,   0.005};
    AnyFloat TrThR6SNode_pos         = {0.14021569, 0.23908326,   0.005};
    AnyFloat TrThNode_pos            = {0.14021569, 0.23908326,   0.005};
    AnyFloat OICI_C9Node_pos         = {0.14556067,0.14319959, 0.1200842};
    AnyFloat OICI_C8Node_pos         = {0.16391572,0.1695137, 0.078600362};
  };

  AnyFolder Left = {
    // ----------------------------------------------CS Nodes-----------------------------------------------
    AnyFloat CS1Node_pos                 = .Right.CS1Node_pos * ..MirrorTransform;
    AnyFloat CS2Node_pos                 = .Right.CS2Node_pos * ..MirrorTransform;
    AnyFloat CS3Node_pos                 = .Right.CS3Node_pos * ..MirrorTransform;
    AnyFloat CS4Node_pos                 = .Right.CS4Node_pos * ..MirrorTransform;
    AnyFloat CS5Node_pos                 = .Right.CS5Node_pos * ..MirrorTransform;
    AnyFloat CS6Node_pos                 = .Right.CS6Node_pos * ..MirrorTransform;
    AnyFloat CS7Node_pos                 = .Right.CS7Node_pos * ..MirrorTransform;
    AnyFloat CS8Node_pos                 = .Right.CS8Node_pos * ..MirrorTransform;
    AnyFloat CS9Node_pos                 = .Right.CS9Node_pos * ..MirrorTransform;
    AnyFloat CS10Node_pos                = .Right.CS10Node_pos * ..MirrorTransform;

    //----------------------------------------------CC Node_poss------------------------------------------------
    AnyFloat R1Node_pos                 = .Right.R1Node_pos * ..MirrorTransform;
    AnyFloat R2Node_pos                 = .Right.R2Node_pos * ..MirrorTransform;
    AnyFloat R3Node_pos                 = .Right.R3Node_pos * ..MirrorTransform;
    AnyFloat R4Node_pos                 = .Right.R4Node_pos * ..MirrorTransform;
    AnyFloat R5Node_pos                 = .Right.R5Node_pos * ..MirrorTransform;
    AnyFloat R6Node_pos                 = .Right.R6Node_pos * ..MirrorTransform;
    AnyFloat R7Node_pos                 = .Right.R7Node_pos * ..MirrorTransform;
    AnyFloat R8Node_pos                 = .Right.R8Node_pos * ..MirrorTransform;
    AnyFloat R9Node_pos                 = .Right.R9Node_pos * ..MirrorTransform;
    AnyFloat R10Node_pos                = .Right.R10Node_pos * ..MirrorTransform;

    AnyFloat LumpedHyoidStC0Ins_pos = .Right.LumpedHyoidStC0Ins_pos * ..MirrorTransform;
    AnyFloat TrThR2SNode_pos = .Right.TrThR2SNode_pos * ..MirrorTransform;
    AnyFloat TrThR3SNode_pos = .Right.TrThR3SNode_pos * ..MirrorTransform;
    AnyFloat TrThR4SNode_pos = .Right.TrThR4SNode_pos * ..MirrorTransform;
    AnyFloat TrThR5SNode_pos = .Right.TrThR5SNode_pos * ..MirrorTransform;
    AnyFloat TrThR6SNode_pos = .Right.TrThR6SNode_pos * ..MirrorTransform;
    AnyFloat TrThNode_pos = .Right.TrThNode_pos * ..MirrorTransform;
    AnyFloat OICI_C9Node_pos = .Right.OICI_C9Node_pos * ..MirrorTransform;
    AnyFloat OICI_C8Node_pos = .Right.OICI_C8Node_pos * ..MirrorTransform;
  };
};

AnyFolder T12 = {
  AnyFloat  MidPoint_pos ={-0.035,0.20,0};
  AnyFloat SPT12T5NodeOrg_pos =  {-0.03+0.01,0.13,0};
  AnyFloat SPT12T4NodeOrg_pos =  {-0.031+0.01,0.129,0};
  AnyFloat SPL1T3Via1Node_pos =  {-0.030+0.01,0.126,0};
  AnyFloat SPL1T2Via1Node_pos =  {-0.031+0.01,0.126,0};
  AnyFloat SPL2T1Via2Node_pos =  {-0.032+0.01,0.124,0};

  AnyFolder Right = {
    AnyFloat MFT12T7NodeOrg_pos =  {-0.012,0.165,0.020};
    AnyFloat MFT12T8NodeOrg_pos =  {-0.012,0.165,0.020};
    AnyFloat MFT12T9NodeOrg_pos =  {-0.012,0.165,0.020};
    AnyFloat SET12T8NodeOrg_pos  =  {-0.017,0.175,0.019};
    AnyFloat SET12T9NodeOrg_pos  =  {-0.013,0.176,0.016};
    AnyFloat SET12T10NodeOrg_pos =  {-0.010,0.176,0.013};
    AnyFloat ITR6R12Node_pos = {-0.01, 0.17, 0.033};
  };

  AnyFolder Left = {
    AnyFloat ITR6R12Node_pos = .Right.ITR6R12Node_pos * ..MirrorTransform;
    AnyFloat MFT12T7NodeOrg_pos = .Right.MFT12T7NodeOrg_pos * ..MirrorTransform;
    AnyFloat MFT12T8NodeOrg_pos = .Right.MFT12T8NodeOrg_pos * ..MirrorTransform;
    AnyFloat MFT12T9NodeOrg_pos = .Right.MFT12T9NodeOrg_pos * ..MirrorTransform;
    AnyFloat SET12T8NodeOrg_pos = .Right.SET12T8NodeOrg_pos * ..MirrorTransform;
    AnyFloat SET12T9NodeOrg_pos = .Right.SET12T9NodeOrg_pos * ..MirrorTransform;
    AnyFloat SET12T10NodeOrg_pos = .Right.SET12T10NodeOrg_pos * ..MirrorTransform;
  };
};

AnyFolder T11 = {
  AnyFloat SPT11T6NodeOrg_pos =  {-0.04+0.01,0.166,0};
  AnyFloat SPT12T5Via1Node_pos =  {-0.04+0.01,0.16,0};
  AnyFloat SPT12T4Via1Node_pos =  {-0.041+0.01,0.159,0};
  AnyFloat SPL1T3Via2Node_pos =  {-0.042+0.01,0.158,0};
  AnyFloat SPL1T2Via2Node_pos =  {-0.043+0.01,0.157,0};
  AnyFloat SPL2T1Via3Node_pos =  {-0.044+0.01,0.156,0};

  AnyFolder Right = {
    AnyFloat MFT11T6NodeOrg_pos =  {-0.022,0.195,0.020};
    AnyFloat MFT11T7NodeOrg_pos =  {-0.022,0.195,0.020};
    AnyFloat MFT11T8NodeOrg_pos =  {-0.022,0.195,0.020};
    AnyFloat SET11T7NodeOrg_pos =  {-0.025,0.207,0.019};
    AnyFloat SET11T8NodeOrg_pos =  {-0.021,0.207,0.016};
    AnyFloat SET11T9NodeOrg_pos =  {-0.018,0.207,0.013};
    AnyFloat IC_R11_AntIns_pos = { 0.020758200, 0.139809, 0.1197700};
    AnyFloat IC_R11_IntIns_pos = {-0.015823900, 0.162020, 0.1027650};
    AnyFloat IC_R11_PosIns_pos = {-0.032458100, 0.180197, 0.0773241};
    AnyFloat ITR5R11Node_pos     = {-0.035,0.201, 0.036};
    AnyFloat ITR6R12Via5Node_pos = {-0.035,0.195, 0.038};
  };

  AnyFolder Left = {
    AnyFloat IC_R11_AntIns_pos = .Right.IC_R11_AntIns_pos * ..MirrorTransform;
    AnyFloat IC_R11_IntIns_pos = .Right.IC_R11_IntIns_pos * ..MirrorTransform;
    AnyFloat IC_R11_PosIns_pos = .Right.IC_R11_PosIns_pos * ..MirrorTransform;
    AnyFloat ITR5R11Node_pos     = .Right.ITR5R11Node_pos * ..MirrorTransform;
    AnyFloat ITR6R12Via5Node_pos = .Right.ITR6R12Via5Node_pos * ..MirrorTransform;
    AnyFloat MFT11T6NodeOrg_pos = .Right.MFT11T6NodeOrg_pos * ..MirrorTransform;
    AnyFloat MFT11T7NodeOrg_pos = .Right.MFT11T7NodeOrg_pos * ..MirrorTransform;
    AnyFloat MFT11T8NodeOrg_pos = .Right.MFT11T8NodeOrg_pos * ..MirrorTransform;
    AnyFloat SET11T7NodeOrg_pos = .Right.SET11T7NodeOrg_pos * ..MirrorTransform;
    AnyFloat SET11T8NodeOrg_pos = .Right.SET11T8NodeOrg_pos * ..MirrorTransform;
    AnyFloat SET11T9NodeOrg_pos = .Right.SET11T9NodeOrg_pos * ..MirrorTransform;
  };
};

AnyFolder T10 = {
  AnyFolder Right = {
    AnyFloat CVT10_pos          = {-0.02078, 0.009870,  0.022090};
    AnyFloat CTT10_pos          = {-0.03040, 0.015500,  0.022300};
    AnyFloat CTCVJntNodeT10_pos = {-0.02559, 0.012685,  0.022195};
  };

  AnyFolder Left = {
    AnyFloat CVT10_pos          = .Right.CVT10_pos * ..MirrorTransform;
    AnyFloat CTT10_pos          = .Right.CTT10_pos * ..MirrorTransform;
    AnyFloat CTCVJntNodeT10_pos = .Right.CTCVJntNodeT10_pos * ..MirrorTransform;
  };
};

AnyFolder T9 = {
  AnyFloat SPT11T6Via2Node_pos =  {-0.059+0.01,0.23,0};
  AnyFloat SPT12T5Via3Node_pos =  {-0.060+0.01,0.228,0};
  AnyFloat SPT12T4Via3Node_pos =  {-0.061+0.01,0.227,0};
  AnyFloat SPL1T3Via4Node_pos =  {-0.062+0.01,0.226,0};
  AnyFloat SPL1T2Via4Node_pos =  {-0.063+0.01,0.225,0};
  AnyFloat SPL2T1Via5Node_pos =  {-0.064+0.01,0.224,0};

  AnyFolder Right = {
    AnyFloat MFT9T4NodeOrg_pos =  {-0.048,0.262,0.020};
    AnyFloat MFT9T5NodeOrg_pos =  {-0.048,0.262,0.020};
    AnyFloat MFT9T6NodeOrg_pos =  {-0.048,0.262,0.020};
    AnyFloat MFT12T9NodeIns_pos =  {-0.051,0.232,0.005};
    AnyFloat SET9T5NodeOrg_pos =  {-0.041,0.271,0.021};
    AnyFloat SET9T6NodeOrg_pos =  {-0.036,0.271,0.018};
    AnyFloat SET9T7NodeOrg_pos =  {-0.032,0.271,0.015};
    AnyFloat SET12T9NodeIns_pos =  {-0.047,0.242,0.005};
    AnyFloat SET11T9NodeIns_pos =  {-0.047,0.242,0.005};
    AnyFloat LCBrT9R10_pos = {-0.04842323, 0.2659475, 0.026};
    AnyFloat CVT9_pos          = {-0.02000000,  0.00645500,  0.024050};
    AnyFloat CTT9_pos          = {-0.03200000,  0.01350000,  0.030000};
    AnyFloat CTCVJntNodeT9_pos = {-0.02600000,  0.00997750,  0.027025};
    AnyFloat CVIT9_pos         = {-0.02030403, -0.02129442,  0.022090};
  };

  AnyFolder Left = {
    AnyFloat LCBrT9R10_pos = .Right.LCBrT9R10_pos * ..MirrorTransform;
    AnyFloat MFT9T4NodeOrg_pos = .Right.MFT9T4NodeOrg_pos * ..MirrorTransform;
    AnyFloat MFT9T5NodeOrg_pos = .Right.MFT9T5NodeOrg_pos * ..MirrorTransform;
    AnyFloat MFT9T6NodeOrg_pos = .Right.MFT9T6NodeOrg_pos * ..MirrorTransform;
    AnyFloat MFT12T9NodeIns_pos = .Right.MFT12T9NodeIns_pos * ..MirrorTransform;
    AnyFloat SET9T5NodeOrg_pos = .Right.SET9T5NodeOrg_pos * ..MirrorTransform;
    AnyFloat SET9T6NodeOrg_pos = .Right.SET9T6NodeOrg_pos * ..MirrorTransform;
    AnyFloat SET9T7NodeOrg_pos = .Right.SET9T7NodeOrg_pos * ..MirrorTransform;
    AnyFloat SET12T9NodeIns_pos = .Right.SET12T9NodeIns_pos * ..MirrorTransform;
    AnyFloat SET11T9NodeIns_pos = .Right.SET11T9NodeIns_pos * ..MirrorTransform;
    AnyFloat CVT9_pos = .Right.CVT9_pos * ..MirrorTransform;
    AnyFloat CTT9_pos = .Right.CTT9_pos * ..MirrorTransform;
    AnyFloat CTCVJntNodeT9_pos = .Right.CTCVJntNodeT9_pos * ..MirrorTransform;
    AnyFloat CVIT9_pos = .Right.CVIT9_pos * ..MirrorTransform;
  };
};

AnyFolder T8 = {
  AnyFloat SPL1T3ViaNode_pos =  {-0.0398+0.01,0.280,0.0};
  AnyFloat SPT11T6Via3Node_pos =  {-0.065+0.01,0.252,0};
  AnyFloat SPT12T5Via4Node_pos =  {-0.066+0.01,0.251,0};
  AnyFloat SPT12T4Via4Node_pos =  {-0.067+0.01,0.25,0};
  AnyFloat SPL1T3Via5Node_pos =  {-0.068+0.01,0.249,0};
  AnyFloat SPL1T2Via5Node_pos =  {-0.069+0.01,0.248,0};
  AnyFloat SPL2T1Via6Node_pos =  {-0.070+0.01,0.247,0};

  AnyFolder Right = {
    AnyFloat MFT8T3NodeOrg_pos =  {-0.050,0.287,0.020};
    AnyFloat MFT8T4NodeOrg_pos =  {-0.050,0.287,0.020};
    AnyFloat MFT8T5NodeOrg_pos =  {-0.050,0.287,0.020};
    AnyFloat MFT12T8NodeIns_pos =  {-0.056,0.253,0.005};
    AnyFloat MFT11T8NodeIns_pos =  {-0.056,0.253,0.005};
    AnyFloat SET8T4NodeOrg_pos =  {-0.041,0.293,0.020};
    AnyFloat SET8T5NodeOrg_pos =  {-0.036,0.293,0.017};
    AnyFloat SET8T6NodeOrg_pos =  {-0.032,0.293,0.014};
    AnyFloat SET12T8NodeIns_pos =  {-0.050,0.265,0.005};
    AnyFloat SET11T8NodeIns_pos =  {-0.050,0.265,0.005};
    AnyFloat SET10T8NodeIns_pos =  {-0.050,0.265,0.005};
    AnyFloat LCBrT8R9_pos = {    -0.05468091, 0.2881025, 0.0312};
    AnyFloat LCLgT8R10_pos = {    -0.05468091, 0.2881025, 0.0262};
    AnyFloat CVT8_pos          = {-0.01922000,  0.00484500,  0.0249250};
    AnyFloat CTT8_pos          = {-0.03360000,  0.00700000,  0.0342000};
    AnyFloat CTCVJntNodeT8_pos = {-0.02641000,  0.00592250,  0.0295625};
    AnyFloat CVIT8_pos         = {-0.01945747, -0.02170748,  0.0240500};
  };

  AnyFolder Left = {
    AnyFloat LCBrT8R9_pos = .Right.LCBrT8R9_pos * ..MirrorTransform;
    AnyFloat LCLgT8R10_pos = .Right.LCLgT8R10_pos * ..MirrorTransform;
    AnyFloat MFT8T3NodeOrg_pos = .Right.MFT8T3NodeOrg_pos * ..MirrorTransform;
    AnyFloat MFT8T4NodeOrg_pos = .Right.MFT8T4NodeOrg_pos * ..MirrorTransform;
    AnyFloat MFT8T5NodeOrg_pos = .Right.MFT8T5NodeOrg_pos * ..MirrorTransform;
    AnyFloat MFT12T8NodeIns_pos = .Right.MFT12T8NodeIns_pos * ..MirrorTransform;
    AnyFloat MFT11T8NodeIns_pos = .Right.MFT11T8NodeIns_pos * ..MirrorTransform;
    AnyFloat SET8T4NodeOrg_pos = .Right.SET8T4NodeOrg_pos * ..MirrorTransform;
    AnyFloat SET8T5NodeOrg_pos = .Right.SET8T5NodeOrg_pos * ..MirrorTransform;
    AnyFloat SET8T6NodeOrg_pos = .Right.SET8T6NodeOrg_pos * ..MirrorTransform;
    AnyFloat SET12T8NodeIns_pos = .Right.SET12T8NodeIns_pos * ..MirrorTransform;
    AnyFloat SET11T8NodeIns_pos = .Right.SET11T8NodeIns_pos * ..MirrorTransform;
    AnyFloat SET10T8NodeIns_pos = .Right.SET10T8NodeIns_pos * ..MirrorTransform;
    AnyFloat CVT8_pos = .Right.CVT8_pos * ..MirrorTransform;
    AnyFloat CTT8_pos = .Right.CTT8_pos * ..MirrorTransform;
    AnyFloat CTCVJntNodeT8_pos = .Right.CTCVJntNodeT8_pos * ..MirrorTransform;
    AnyFloat CVIT8_pos   = .Right.CVIT8_pos * ..MirrorTransform;
  };
};

AnyFolder T7 = {
  AnyFloat SPT11T6Via4Node_pos =  {-0.07+0.01,0.277,0};
  AnyFloat SPT12T5Via5Node_pos =  {-0.071+0.01,0.277,0};
  AnyFloat SPT12T4Via5Node_pos =  {-0.072+0.01,0.275,0};
  AnyFloat SPL1T3Via6Node_pos =  {-0.073+0.01,0.275,0};
  AnyFloat SPL1T2Via6Node_pos =  {-0.074+0.01,0.275,0};
  AnyFloat SPL2T1Via7Node_pos =  {-0.075+0.01,0.274,0};

  AnyFolder Right = {
    AnyFloat MFT7T2NodeOrg_pos =  {-0.052,0.315,0.020};
    AnyFloat MFT7T3NodeOrg_pos =  {-0.052,0.315,0.020};
    AnyFloat MFT7T4NodeOrg_pos =  {-0.052,0.315,0.020};
    AnyFloat MFT12T7NodeIns_pos =  {-0.063,0.277,0.005};
    AnyFloat MFT11T7NodeIns_pos =  {-0.063,0.277,0.005};
    AnyFloat MFT10T7NodeIns_pos =  {-0.063,0.277,0.005};
    AnyFloat SET7T3NodeOrg_pos =  {-0.041,0.321,0.020};
    AnyFloat SET7T4NodeOrg_pos =  {-0.036,0.321,0.017};
    AnyFloat SET7T5NodeOrg_pos =  {-0.032,0.321,0.014};
    AnyFloat SET11T7NodeIns_pos =  {-0.058,0.288,0.005};
    AnyFloat SET10T7NodeIns_pos =  {-0.058,0.288,0.005};
    AnyFloat SET9T7NodeIns_pos  =  {-0.058,0.288,0.005};
    AnyFloat LCBrT7R8_pos = {    -0.05678678, 0.317918, 0.03};
    AnyFloat LCLgT7R9_pos = {    -0.05678678, 0.317918, 0.025};
    AnyFloat CVT7_pos          = {-0.01235000,  0.00517000,  0.0227350};
    AnyFloat CTT7_pos          = {-0.02800000,  0.00800000,  0.0330000};
    AnyFloat CTCVJntNodeT7_pos = {-0.02017500,  0.00658500,  0.0278675};
    AnyFloat CVIT7_pos         = {-0.01853459, -0.02269443,  0.0249250};
  };

  AnyFolder Left = {
    AnyFloat LCBrT7R8_pos = .Right.LCBrT7R8_pos * ..MirrorTransform;
    AnyFloat LCLgT7R9_pos = .Right.LCLgT7R9_pos * ..MirrorTransform;
    AnyFloat MFT7T2NodeOrg_pos = .Right.MFT7T2NodeOrg_pos * ..MirrorTransform;
    AnyFloat MFT7T3NodeOrg_pos = .Right.MFT7T3NodeOrg_pos * ..MirrorTransform;
    AnyFloat MFT7T4NodeOrg_pos = .Right.MFT7T4NodeOrg_pos * ..MirrorTransform;
    AnyFloat MFT12T7NodeIns_pos = .Right.MFT12T7NodeIns_pos * ..MirrorTransform;
    AnyFloat MFT11T7NodeIns_pos = .Right.MFT11T7NodeIns_pos * ..MirrorTransform;
    AnyFloat MFT10T7NodeIns_pos = .Right.MFT10T7NodeIns_pos * ..MirrorTransform;
    AnyFloat SET7T3NodeOrg_pos = .Right.SET7T3NodeOrg_pos * ..MirrorTransform;
    AnyFloat SET7T4NodeOrg_pos = .Right.SET7T4NodeOrg_pos * ..MirrorTransform;
    AnyFloat SET7T5NodeOrg_pos = .Right.SET7T5NodeOrg_pos * ..MirrorTransform;
    AnyFloat SET11T7NodeIns_pos = .Right.SET11T7NodeIns_pos * ..MirrorTransform;
    AnyFloat SET10T7NodeIns_pos = .Right.SET10T7NodeIns_pos * ..MirrorTransform;
    AnyFloat SET9T7NodeIns_pos  = .Right.SET9T7NodeIns_pos * ..MirrorTransform;
    AnyFloat CVT7_pos = .Right.CVT7_pos * ..MirrorTransform;
    AnyFloat CTT7_pos = .Right.CTT7_pos * ..MirrorTransform;
    AnyFloat CTCVJntNodeT7_pos = .Right.CTCVJntNodeT7_pos * ..MirrorTransform;
    AnyFloat CVIT7_pos = .Right.CVIT7_pos * ..MirrorTransform;
  };
};

AnyFolder T6 = {
  AnyFloat SPT11T6NodeIns_pos =  {-0.073+0.01,0.307,0};
  AnyFloat SPT12T5Via6Node_pos =  {-0.074+0.01,0.309,0};
  AnyFloat SPT12T4Via6Node_pos=  {-0.075+0.01,0.309,0};
  AnyFloat SPL1T3Via7Node_pos =  {-0.076+0.01,0.309,0};
  AnyFloat SPL1T2Via7Node_pos =  {-0.077+0.01,0.309,0};
  AnyFloat SPL2T1Via8Node_pos =  {-0.078+0.01,0.309,0};
  AnyFloat SternumNode_pos = {0.1115,0.3055,0};

  AnyFolder Right = {
    AnyFloat MFT6T1NodeOrg_pos =  {-0.052,0.345,0.020};
    AnyFloat MFT6T2NodeOrg_pos =  {-0.052,0.345,0.020};
    AnyFloat MFT6T3NodeOrg_pos =  {-0.052,0.345,0.020};
    AnyFloat MFT11T6NodeIns_pos =  {-0.067,0.307,0.005};
    AnyFloat MFT10T6NodeIns_pos =  {-0.067,0.307,0.005};
    AnyFloat MFT9T6NodeIns_pos  =  {-0.067,0.307,0.005};
    AnyFloat SET6T2NodeOrg_pos =  {-0.041,0.350,0.020};
    AnyFloat SET6T3NodeOrg_pos =  {-0.036,0.350,0.017};
    AnyFloat SET6T4NodeOrg_pos =  {-0.032,0.350,0.014};
    AnyFloat SET10T6NodeIns_pos =  {-0.058,0.322,0.005};
    AnyFloat SET9T6NodeIns_pos  =  {-0.058,0.322,0.005};
    AnyFloat SET8T6NodeIns_pos  =  {-0.058,0.322,0.005};
    AnyFloat LCBrT6R7_pos = {    -0.05491288, 0.3467098, 0.0313};
    AnyFloat LCLgT6R8_pos = {    -0.05491288, 0.3467098, 0.0263};
    AnyFloat CVT6_pos          = {-0.01360000, 0.0036900,  0.023970};
    AnyFloat CTT6_pos          = {-0.02660000, 0.0041500,  0.031300};
    AnyFloat CTCVJntNodeT6_pos = {-0.02010000, 0.0039200,  0.027635};
    AnyFloat CVIT6_pos         = {-0.03103957, 0.3146915,  0.022735};
  };

  AnyFolder Left = {
    AnyFloat LCBrT6R7_pos = .Right.LCBrT6R7_pos * ..MirrorTransform;
    AnyFloat LCLgT6R8_pos =.Right.LCLgT6R8_pos * ..MirrorTransform;
    AnyFloat MFT6T1NodeOrg_pos = .Right.MFT6T1NodeOrg_pos * ..MirrorTransform;
    AnyFloat MFT6T2NodeOrg_pos = .Right.MFT6T2NodeOrg_pos * ..MirrorTransform;
    AnyFloat MFT6T3NodeOrg_pos = .Right.MFT6T3NodeOrg_pos * ..MirrorTransform;
    AnyFloat MFT11T6NodeIns_pos = .Right.MFT11T6NodeIns_pos * ..MirrorTransform;
    AnyFloat MFT10T6NodeIns_pos = .Right.MFT10T6NodeIns_pos * ..MirrorTransform;
    AnyFloat MFT9T6NodeIns_pos  = .Right.MFT9T6NodeIns_pos * ..MirrorTransform;
    AnyFloat SET6T2NodeOrg_pos = .Right.SET6T2NodeOrg_pos * ..MirrorTransform;
    AnyFloat SET6T3NodeOrg_pos = .Right.SET6T3NodeOrg_pos * ..MirrorTransform;
    AnyFloat SET6T4NodeOrg_pos = .Right.SET6T4NodeOrg_pos * ..MirrorTransform;
    AnyFloat SET10T6NodeIns_pos = .Right.SET10T6NodeIns_pos * ..MirrorTransform;
    AnyFloat SET9T6NodeIns_pos  = .Right.SET9T6NodeIns_pos * ..MirrorTransform;
    AnyFloat SET8T6NodeIns_pos  = .Right.SET8T6NodeIns_pos * ..MirrorTransform;
    AnyFloat CVT6_pos = .Right.CVT6_pos * ..MirrorTransform;
    AnyFloat CTT6_pos = .Right.CTT6_pos * ..MirrorTransform;
    AnyFloat CTCVJntNodeT6_pos = .Right.CTCVJntNodeT6_pos * ..MirrorTransform;
    AnyFloat CVIT6_pos = .Right.CVIT6_pos * ..MirrorTransform;
  };
};

AnyFolder T5 = {
  AnyFloat SPT12T5NodeIns_pos =  {-0.069+0.006,0.338,0};
  AnyFloat SPT12T4Via7Node_pos =  {-0.070+0.006,0.337,0};
  AnyFloat SPL1T3Via8Node_pos =  {-0.071+0.006,0.336,0};
  AnyFloat SPL1T2Via8Node_pos =  {-0.072+0.006,0.335,0};
  AnyFloat SPL2T1Via9Node_pos =  {-0.073+0.006,0.334,0};

  AnyFolder Right = {
    AnyFloat MFT5T1NodeOrg_pos =  {-0.045,0.375,0.020};
    AnyFloat MFT5T2NodeOrg_pos =  {-0.045,0.375,0.020};
    AnyFloat MFT10T5NodeIns_pos =  {-0.063,0.338,0.005};
    AnyFloat MFT9T5NodeIns_pos  =  {-0.063,0.338,0.005};
    AnyFloat MFT8T5NodeIns_pos  =  {-0.063,0.338,0.005};
    AnyFloat SET5T1Node_pos =  {-0.041,0.377,0.022};
    AnyFloat SET5T2Node_pos =  {-0.036,0.377,0.019};
    AnyFloat SET5T3Node_pos =  {-0.032,0.377,0.016};
    AnyFloat SET9T5NodeIns_pos =  {-0.055,0.350,0.005};
    AnyFloat SET8T5NodeIns_pos =  {-0.055,0.350,0.005};
    AnyFloat SET7T5NodeIns_pos =  {-0.055,0.350,0.005};
    AnyFloat LCBrT5R6_pos = {    -0.04803573, 0.3752539, 0.031};
    AnyFloat LCLgT5R7_pos = {    -0.04803573, 0.3752539, 0.026};
    AnyFloat CVT5_pos          = {-0.01494000,  0.00247000,  0.024950};
    AnyFloat CTT5_pos          = {-0.02330000,  0.00615000,  0.031000};
    AnyFloat CTCVJntNodeT5_pos = {-0.01912000,  0.00431000,  0.027975};
    AnyFloat CVIT5_pos         = {-0.01246007, -0.02302716,  0.023970};
  };

  AnyFolder Left = {
    AnyFloat LCBrT5R6_pos = .Right.LCBrT5R6_pos * ..MirrorTransform;
    AnyFloat LCLgT5R7_pos = .Right.LCLgT5R7_pos * ..MirrorTransform;
    AnyFloat MFT5T1NodeOrg_pos = .Right.MFT5T1NodeOrg_pos * ..MirrorTransform;
    AnyFloat MFT5T2NodeOrg_pos = .Right.MFT5T2NodeOrg_pos * ..MirrorTransform;
    AnyFloat MFT10T5NodeIns_pos = .Right.MFT10T5NodeIns_pos * ..MirrorTransform;
    AnyFloat MFT9T5NodeIns_pos  = .Right.MFT9T5NodeIns_pos * ..MirrorTransform;
    AnyFloat MFT8T5NodeIns_pos  = .Right.MFT8T5NodeIns_pos * ..MirrorTransform;
    AnyFloat SET5T1Node_pos = .Right.SET5T1Node_pos * ..MirrorTransform;
    AnyFloat SET5T2Node_pos = .Right.SET5T2Node_pos * ..MirrorTransform;
    AnyFloat SET5T3Node_pos = .Right.SET5T3Node_pos * ..MirrorTransform;
    AnyFloat SET9T5NodeIns_pos = .Right.SET9T5NodeIns_pos * ..MirrorTransform;
    AnyFloat SET8T5NodeIns_pos = .Right.SET8T5NodeIns_pos * ..MirrorTransform;
    AnyFloat SET7T5NodeIns_pos = .Right.SET7T5NodeIns_pos * ..MirrorTransform;
    AnyFloat CVT5_pos = .Right.CVT5_pos * ..MirrorTransform;
    AnyFloat CTT5_pos = .Right.CTT5_pos * ..MirrorTransform;
    AnyFloat CTCVJntNodeT5_pos = .Right.CTCVJntNodeT5_pos * ..MirrorTransform;
    AnyFloat CVIT5_pos = .Right.CVIT5_pos * ..MirrorTransform;
  };
};

AnyFolder T4 = {
  AnyFloat SPT12T4NodeIns_pos =  {-0.064+0.004,0.361,0};
  AnyFloat SPL1T3Via9Node_pos =  {-0.065+0.004,0.360,0};
  AnyFloat SPL1T2Via9Node_pos =  {-0.066+0.004,0.359,0};
  AnyFloat SPL2T1Via10Node_pos=  {-0.067+0.004,0.359,0};

  AnyFolder Right = {
    AnyFloat MFT4T1NodeOrg_pos =  {-0.040,0.400,0.020};
    AnyFloat MFT9T4NodeIns_pos =  {-0.059,0.361,0.005};
    AnyFloat MFT8T4NodeIns_pos =  {-0.059,0.361,0.005};
    AnyFloat MFT7T4NodeIns_pos =  {-0.059,0.361,0.005};
    AnyFloat SET4T1NodeOrg_pos =  {-0.034,0.403,0.022};
    AnyFloat SET4T2NodeOrg_pos =  {-0.029,0.403,0.019};
    AnyFloat SET8T4NodeIns_pos =  {-0.052,0.374,0.005};
    AnyFloat SET7T4NodeIns_pos =  {-0.052,0.374,0.005};
    AnyFloat SET6T4NodeIns_pos =  {-0.052,0.374,0.005};
    AnyFloat LCBrT4R5_pos = {    -0.04471707, 0.4016499, 0.0311};
    AnyFloat CVT4_pos          = {-0.01675000,  0.00247000,  0.02310};
    AnyFloat CTT4_pos          = {-0.03000000,  0.00565000,  0.03110};
    AnyFloat CTCVJntNodeT4_pos = {-0.02337500,  0.00406000,  0.02710};
    AnyFloat CVIT4_pos         = {-0.01444762, -0.02313355,  0.02495};
  };

  AnyFolder Left = {
    AnyFloat LCBrT4R5_pos =  .Right.LCBrT4R5_pos * ..MirrorTransform;
    AnyFloat MFT4T1NodeOrg_pos =  .Right.MFT4T1NodeOrg_pos * ..MirrorTransform;
    AnyFloat MFT9T4NodeIns_pos =  .Right.MFT9T4NodeIns_pos * ..MirrorTransform;
    AnyFloat MFT8T4NodeIns_pos =  .Right.MFT8T4NodeIns_pos * ..MirrorTransform;
    AnyFloat MFT7T4NodeIns_pos =  .Right.MFT7T4NodeIns_pos * ..MirrorTransform;
    AnyFloat SET4T1NodeOrg_pos =  .Right.SET4T1NodeOrg_pos * ..MirrorTransform;
    AnyFloat SET4T2NodeOrg_pos =  .Right.SET4T2NodeOrg_pos * ..MirrorTransform;
    AnyFloat SET8T4NodeIns_pos =  .Right.SET8T4NodeIns_pos * ..MirrorTransform;
    AnyFloat SET7T4NodeIns_pos =  .Right.SET7T4NodeIns_pos * ..MirrorTransform;
    AnyFloat SET6T4NodeIns_pos =  .Right.SET6T4NodeIns_pos * ..MirrorTransform;
    AnyFloat CVT4_pos = .Right.CVT4_pos * ..MirrorTransform;
    AnyFloat CTT4_pos = .Right.CTT4_pos * ..MirrorTransform;
    AnyFloat CTCVJntNodeT4_pos = .Right.CTCVJntNodeT4_pos * ..MirrorTransform;
    AnyFloat CVIT4_pos = .Right.CVIT4_pos * ..MirrorTransform;
  };
};

AnyFolder T3 = {
  AnyFloat SPL1T2Via10Node_pos =  {-0.056+0.003,0.39,0};
  AnyFloat SPL2T1Via11Node_pos =  {-0.058+0.003,0.39,0};

  AnyFolder Right = {
    AnyFloat MFT8T3NodeIns_pos =  {-0.050,0.390,0.005};
    AnyFloat MFT7T3NodeIns_pos =  {-0.050,0.390,0.005};
    AnyFloat MFT6T3NodeIns_pos =  {-0.050,0.390,0.005};
    AnyFloat SET3T1NodeOrg_pos =  {-0.022,0.427,0.018};
    AnyFloat SET7T3NodeIns_pos =  {-0.045,0.399,0.005};
    AnyFloat SET6T3NodeIns_pos =  {-0.045,0.399,0.005};
    AnyFloat SET5T3NodeIns_pos =  {-0.045,0.399,0.005};
    AnyFloat LCBrT3R4_pos = {    -0.03450346, 0.4267904, 0.032};
    AnyFloat CVT3_pos          = {-0.01519000,  0.00279500,  0.0230150};
    AnyFloat CTT3_pos          = {-0.02900000,  0.00617000,  0.0320000};
    AnyFloat CTCVJntNodeT3_pos = {-0.02209500,  0.00448250,  0.0275075};
    AnyFloat CVIT3_pos         = {-0.01624215, -0.02249397,  0.0231000};
  };

  AnyFolder Left = {
    AnyFloat LCBrT3R4_pos = .Right.LCBrT3R4_pos * ..MirrorTransform;
    AnyFloat MFT8T3NodeIns_pos =  .Right.MFT8T3NodeIns_pos * ..MirrorTransform;
    AnyFloat MFT7T3NodeIns_pos =  .Right.MFT7T3NodeIns_pos * ..MirrorTransform;
    AnyFloat MFT6T3NodeIns_pos =  .Right.MFT6T3NodeIns_pos * ..MirrorTransform;
    AnyFloat SET3T1NodeOrg_pos =  .Right.SET3T1NodeOrg_pos * ..MirrorTransform;
    AnyFloat SET7T3NodeIns_pos =  .Right.SET7T3NodeIns_pos * ..MirrorTransform;
    AnyFloat SET6T3NodeIns_pos =  .Right.SET6T3NodeIns_pos * ..MirrorTransform;
    AnyFloat SET5T3NodeIns_pos =  .Right.SET5T3NodeIns_pos * ..MirrorTransform;
    AnyFloat CVT3_pos = .Right.CVT3_pos * ..MirrorTransform;
    AnyFloat CTT3_pos = .Right.CTT3_pos * ..MirrorTransform;
    AnyFloat CTCVJntNodeT3_pos = .Right.CTCVJntNodeT3_pos * ..MirrorTransform;
    AnyFloat CVIT3_pos = .Right.CVIT3_pos * ..MirrorTransform;
  };
};

AnyFolder T2 = {
  AnyFloat SPL1T2NodeIns_pos =   {-0.047+0.002,0.415,0};
  AnyFloat SPL2T1Via12Node_pos = {-0.048+0.002,0.418,0};

  AnyFolder Right = {
    AnyFloat MFT7T2NodeIns_pos =  {-0.040,0.415,0.005};
    AnyFloat MFT6T2NodeIns_pos =  {-0.040,0.415,0.005};
    AnyFloat MFT5T2NodeIns_pos =  {-0.040,0.415,0.005};
    AnyFloat SET6T2NodeIns_pos =  {-0.036,0.424,0.005};
    AnyFloat SET5T2NodeIns_pos =  {-0.036,0.424,0.005};
    AnyFloat SET4T2NodeIns_pos =  {-0.036,0.424,0.005};
    AnyFloat LCBrT2R3_pos = {    -0.02408159, 0.4497715, 0.0301};
    AnyFloat CVT2_pos          = {-0.01811000,  0.00083500,  0.023630};
    AnyFloat CVIT2_pos         = {-0.01468841, -0.02142329,  0.023015};
    AnyFloat CTT2_pos          = {-0.02760000,  0.00567000,  0.032100};
    AnyFloat CTCVJntNodeT2_pos = {-0.02285500,  0.00325250,  0.027865};
  };

  AnyFolder Left = {
    AnyFloat LCBrT2R3_pos =  .Right.LCBrT2R3_pos * ..MirrorTransform;
    AnyFloat MFT7T2NodeIns_pos =  .Right.MFT7T2NodeIns_pos * ..MirrorTransform;
    AnyFloat MFT6T2NodeIns_pos =  .Right.MFT6T2NodeIns_pos * ..MirrorTransform;
    AnyFloat MFT5T2NodeIns_pos =  .Right.MFT5T2NodeIns_pos * ..MirrorTransform;
    AnyFloat SET6T2NodeIns_pos =  .Right.SET6T2NodeIns_pos * ..MirrorTransform;
    AnyFloat SET5T2NodeIns_pos =  .Right.SET5T2NodeIns_pos * ..MirrorTransform;
    AnyFloat SET4T2NodeIns_pos =  .Right.SET4T2NodeIns_pos * ..MirrorTransform;
    AnyFloat CVT2_pos = .Right.CVT2_pos * ..MirrorTransform;
    AnyFloat CVIT2_pos = .Right.CVIT2_pos * ..MirrorTransform;
    AnyFloat CTT2_pos = .Right.CTT2_pos * ..MirrorTransform;
    AnyFloat CTCVJntNodeT2_pos = .Right.CTCVJntNodeT2_pos * ..MirrorTransform;
  };
};

AnyFolder T1 = {
  AnyFloat SPL2T1NodeIns_pos =   {-0.039,0.438,0};

  AnyFolder Right = {
    AnyFloat MFT6T1NodeIns_pos =  {-0.032,0.438,0.005};
    AnyFloat MFT5T1NodeIns_pos =  {-0.032,0.438,0.005};
    AnyFloat MFT4T1NodeIns_pos =  {-0.032,0.438,0.005};
    AnyFloat SET5T1NodeIns_pos =  {-0.028,0.445,0.005};
    AnyFloat SET4T1NodeIns_pos =  {-0.028,0.445,0.005};
    AnyFloat SET3T1NodeIns_pos =  {-0.028,0.445,0.005};
    AnyFloat ITC7R7Node_pos = {-0.019, 0.477,  0.04};
    AnyFloat ScalenusAnteriorR1C4Node_pos   = { 0.0220,    0.5260,    0.0260};
    AnyFloat ScalenusPosteriorR2C5Node_pos  = { 0.0200,    0.5100,    0.0280};
    AnyFloat ScalenusMediusR1C3Node_pos     = { 0.0240,    0.5400,    0.0240};
    AnyFloat LumpedHyoidStC0Org_pos        = {   0.0500,    0.5990,    0.0180};
    AnyFloat LCBrC7R1_pos                   =  {-0.01237784, 0.4945558, 0.029};
    AnyFloat LCBrT1R2_pos                   =  {-0.02237784, 0.4745558, 0.034};
    AnyFloat CVIT1_pos         = {-0.01779613, -0.02181709,  0.023630};
    AnyFloat CVT1_pos          = {-0.01811000,  0.00083500,  0.023630};
    AnyFloat CTT1_pos          = {-0.03400000,  0.00670000,  0.039000};
    AnyFloat CTCVJntNodeT1_pos = {-0.02605500,  0.00376750,  0.031315};
  };

  AnyFolder Left = {
    AnyFloat ITC7R7Node_pos = .Right.ITC7R7Node_pos * ..MirrorTransform;
    AnyFloat ScalenusAnteriorR1C4Node_pos = .Right.ScalenusAnteriorR1C4Node_pos * ..MirrorTransform;
    AnyFloat ScalenusPosteriorR2C5Node_pos = .Right.ScalenusPosteriorR2C5Node_pos * ..MirrorTransform;
    AnyFloat ScalenusMediusR1C3Node_pos = .Right.ScalenusMediusR1C3Node_pos * ..MirrorTransform;
    AnyFloat LumpedHyoidStC0Org_pos = .Right.LumpedHyoidStC0Org_pos * ..MirrorTransform;
    AnyFloat LCBrC7R1_pos = .Right.LCBrC7R1_pos * ..MirrorTransform;
    AnyFloat LCBrT1R2_pos = .Right.LCBrT1R2_pos * ..MirrorTransform;
    AnyFloat MFT6T1NodeIns_pos =  .Right.MFT6T1NodeIns_pos * ..MirrorTransform;
    AnyFloat MFT5T1NodeIns_pos =  .Right.MFT5T1NodeIns_pos * ..MirrorTransform;
    AnyFloat MFT4T1NodeIns_pos =  .Right.MFT4T1NodeIns_pos * ..MirrorTransform;
    AnyFloat SET5T1NodeIns_pos =  .Right.SET5T1NodeIns_pos * ..MirrorTransform;
    AnyFloat SET4T1NodeIns_pos =  .Right.SET4T1NodeIns_pos * ..MirrorTransform;
    AnyFloat SET3T1NodeIns_pos =  .Right.SET3T1NodeIns_pos * ..MirrorTransform;
    AnyFloat CVIT1_pos = .Right.CVIT1_pos * ..MirrorTransform;
    AnyFloat CVT1_pos = .Right.CVT1_pos * ..MirrorTransform;
    AnyFloat CTT1_pos = .Right.CTT1_pos * ..MirrorTransform;
    AnyFloat CTCVJntNodeT1_pos = .Right.CTCVJntNodeT1_pos * ..MirrorTransform;
  };
};

AnyFolder R1 = {
  AnyFolder Right = {
    AnyFloat IC_R1_AntOrg_pos = { 0.037187800, 0.436038, 0.0726051};
    AnyFloat IC_R1_IntOrg_pos = { 0.013554100, 0.451152, 0.0734627};
    AnyFloat IC_R1_PosOrg_pos = {-0.009099020, 0.463094, 0.0620440};
    AnyFloat ITC7R7Via1Node_pos = {-0.023977837, 0.46505576, 0.041};
    AnyFloat ITR1R7Node_pos  = {-0.023977837, 0.46505576, 0.046};
    AnyFloat CTR1_pos         = {-0.022377837, 0.46955576, 0.039};
    AnyFloat CSR1_pos         = {0.063500003, 0.41249976, 0.02};
    AnyFloat CCR1_pos         = {0.052109003, 0.41701107, 0.041864661};
    AnyFloat CVR1_pos         = {-0.0093174324, 0.45877077, 0.02363};
    AnyFloat R1R2IC_pos     = { 0.00842, 0.43605, 0.08809};
    AnyFloat R1CTCVJntNode_pos= {-0.015847634, 0.46416327, 0.031315};
    AnyFloat ScalenusAnteriorR1C4NodeIns_pos =  { 0.0400221630, 0.43195576, 0.045};
    AnyFloat ScalenusMediusR1C3NodeIns_pos   =  { 0.0320221630, 0.44195576, 0.053};
    AnyFloat LCBrC7R1Ins_pos               =  {-0.0203778370, 0.46755576, 0.041};
    AnyFloat SCR1R3Org_pos                 =  {-0.0073778366, 0.45855576, 0.054};
    AnyFloat SCR1R4Org_pos                 =  {-0.0073778366, 0.45755576, 0.06 };
  };

  AnyFolder Left = {
    AnyFloat IC_R1_AntOrg_pos = .Right.IC_R1_AntOrg_pos * ..MirrorTransform;
    AnyFloat IC_R1_IntOrg_pos = .Right.IC_R1_IntOrg_pos * ..MirrorTransform;
    AnyFloat IC_R1_PosOrg_pos = .Right.IC_R1_PosOrg_pos * ..MirrorTransform;
    AnyFloat ITC7R7Via1Node_pos = .Right.ITC7R7Via1Node_pos * ..MirrorTransform;
    AnyFloat ITR1R7Node_pos = .Right.ITR1R7Node_pos * ..MirrorTransform;
    AnyFloat CTR1_pos = .Right.CTR1_pos * ..MirrorTransform;
    AnyFloat CSR1_pos = .Right.CSR1_pos * ..MirrorTransform;
    AnyFloat CCR1_pos = .Right.CCR1_pos * ..MirrorTransform;
    AnyFloat CVR1_pos = .Right.CVR1_pos * ..MirrorTransform;
    AnyFloat R1R2IC_pos = .Right.R1R2IC_pos * ..MirrorTransform;
    AnyFloat R1CTCVJntNode_pos = .Right.R1CTCVJntNode_pos * ..MirrorTransform;
    AnyFloat ScalenusAnteriorR1C4NodeIns_pos = .Right.ScalenusAnteriorR1C4NodeIns_pos * ..MirrorTransform;
    AnyFloat ScalenusMediusR1C3NodeIns_pos = .Right.ScalenusMediusR1C3NodeIns_pos * ..MirrorTransform;
    AnyFloat LCBrC7R1Ins_pos = .Right.LCBrC7R1Ins_pos * ..MirrorTransform;
    AnyFloat SCR1R3Org_pos  = .Right.SCR1R3Org_pos * ..MirrorTransform;
    AnyFloat SCR1R4Org_pos = .Right.SCR1R4Org_pos * ..MirrorTransform;
  };
};

AnyFolder R2 = {
  AnyFolder Right = {
    AnyFloat IC_R2_AntOrg_pos = { 0.031600600, 0.399953, 0.1061490};
    AnyFloat IC_R2_IntOrg_pos = { 0.003284510, 0.420953, 0.1027140};
    AnyFloat IC_R2_PosOrg_pos = {-0.018965800, 0.441990, 0.0781505};
    AnyFloat IC_R2_AntIns_pos = { 0.044871400, 0.403569, 0.0923958};
    AnyFloat IC_R2_IntIns_pos = { 0.020125200, 0.417693, 0.0948200};
    AnyFloat IC_R2_PosIns_pos = {-0.008483940, 0.439397, 0.0757768};
    AnyFloat ITC7R7Via2Node_pos = {-0.029081587, 0.44477151, 0.0421};
    AnyFloat ITR1R7Via1Node_pos = {-0.029081587, 0.44677151, 0.0471};
    AnyFloat ITR2R8Node_pos  = {-0.029081587, 0.45077151, 0.0521};
    AnyFloat CTR2_pos         = {-0.024081587, 0.44477151, 0.0321    };
    AnyFloat CCR2_pos         = {0.085136813 , 0.37784236, 0.04556327};
    AnyFloat R2CTCVJntNode_pos= {-0.020292949, 0.44102911, 0.027865  };
    AnyFloat CVR2_pos         = {-0.016504311, 0.43728671, 0.02363   };
    AnyFloat CSR2_pos         = {0.090100003 , 0.37379976, 0.0176    };
    AnyFloat R2R3IC_pos     = { 0.00132, 0.40375, 0.11184};
    AnyFloat ScalenusPosteriorR2C5NodeIns_pos=  { 0.022018413, 0.41697151, 0.09800000};
    AnyFloat TrThR2SNodeOrg_pos              =  { 0.085136813, 0.37784236, 0.04556327};
    AnyFloat TrThR2R4NodeOrg_pos             =  { 0.085136813, 0.37784236, 0.04556327};
    AnyFloat LCBrT1R2Ins_pos               =  {-0.022081587, 0.44577151, 0.04410000};
    AnyFloat SCR2R4Org_pos                 =  {-0.014081587, 0.44577151, 0.06210000};
    AnyFloat SCR2R5Org_pos                 =  {-0.014081587, 0.44377151, 0.06810000};
  };

  AnyFolder Left = {
    AnyFloat IC_R2_AntOrg_pos = .Right.IC_R2_AntOrg_pos * ..MirrorTransform;
    AnyFloat IC_R2_IntOrg_pos = .Right.IC_R2_IntOrg_pos * ..MirrorTransform;
    AnyFloat IC_R2_PosOrg_pos = .Right.IC_R2_PosOrg_pos * ..MirrorTransform;
    AnyFloat IC_R2_AntIns_pos = .Right.IC_R2_AntIns_pos * ..MirrorTransform;
    AnyFloat IC_R2_IntIns_pos = .Right.IC_R2_IntIns_pos * ..MirrorTransform;
    AnyFloat IC_R2_PosIns_pos = .Right.IC_R2_PosIns_pos * ..MirrorTransform;
    AnyFloat ITC7R7Via2Node_pos = .Right.ITC7R7Via2Node_pos * ..MirrorTransform;
    AnyFloat ITR1R7Via1Node_pos = .Right.ITR1R7Via1Node_pos * ..MirrorTransform;
    AnyFloat ITR2R8Node_pos = .Right.ITR2R8Node_pos * ..MirrorTransform;
    AnyFloat CTR2_pos = .Right.CTR2_pos * ..MirrorTransform;
    AnyFloat CCR2_pos = .Right.CCR2_pos * ..MirrorTransform;
    AnyFloat R2CTCVJntNode_pos = .Right.R2CTCVJntNode_pos * ..MirrorTransform;
    AnyFloat CVR2_pos = .Right.CVR2_pos * ..MirrorTransform;
    AnyFloat CSR2_pos = .Right.CSR2_pos * ..MirrorTransform;
    AnyFloat R2R3IC_pos = .Right.R2R3IC_pos * ..MirrorTransform;
    AnyFloat ScalenusPosteriorR2C5NodeIns_pos = .Right.ScalenusPosteriorR2C5NodeIns_pos * ..MirrorTransform;
    AnyFloat TrThR2SNodeOrg_pos = .Right.TrThR2SNodeOrg_pos * ..MirrorTransform;
    AnyFloat TrThR2R4NodeOrg_pos = .Right.TrThR2R4NodeOrg_pos * ..MirrorTransform;
    AnyFloat LCBrT1R2Ins_pos = .Right.LCBrT1R2Ins_pos * ..MirrorTransform;
    AnyFloat SCR2R4Org_pos = .Right.SCR2R4Org_pos * ..MirrorTransform;
    AnyFloat SCR2R5Org_pos = .Right.SCR2R5Org_pos * ..MirrorTransform;
  };
};

AnyFolder R3 = {
  AnyFolder Right = {
    AnyFloat IC_R3_AntOrg_pos = { 0.038992300, 0.370961, 0.1273500};
    AnyFloat IC_R3_IntOrg_pos = {-0.000642151, 0.386542, 0.1209610};
    AnyFloat IC_R3_PosOrg_pos = {-0.031323400, 0.405624, 0.0962605};
    AnyFloat IC_R3_AntIns_pos = { 0.038365800, 0.383181, 0.1204950};
    AnyFloat IC_R3_IntIns_pos = { 0.002377290, 0.395896, 0.1143640};
    AnyFloat IC_R3_PosIns_pos = {-0.025392400, 0.413848, 0.0906537};
    AnyFloat ITC7R7Via3Node_pos= {-0.036503458, 0.42179043, 0.044};
    AnyFloat ITR1R7Via2Node_pos= {-0.037503458, 0.42379043, 0.048};
    AnyFloat ITR2R8Via1Node_pos= {-0.040503458, 0.42379043, 0.052};
    AnyFloat ITR3R9Node_pos = {-0.042503458, 0.42379043, 0.057};
    AnyFloat CTR3_pos         = {-0.032503458, 0.42179043, 0.03200000};
    AnyFloat CCR3_pos         = { 0.103694640, 0.34876168, 0.05730716};
    AnyFloat R3CTCVJntNode_pos= {-0.026248022, 0.41841461, 0.02750750};
    AnyFloat CVR3_pos         = {-0.019992587, 0.41503878, 0.02301500};
    AnyFloat CSR3_pos         = { 0.101500000, 0.34879976, 0.01830000};
    AnyFloat R3R4IC_pos = { 0.00019, 0.37049, 0.12732};
    AnyFloat TrThR3SNodeOrg_pos              =  {0.10369464  , 0.34876168, 0.05730716};
    AnyFloat TrThR3R5NodeOrg_pos             =  {0.10369464  , 0.34876168, 0.05730716};
    AnyFloat LCBrT2R3Ins_pos               =  {-0.034503458, 0.42579043, 0.04      };
    AnyFloat SCR1R3Ins_pos                 =  {-0.024503458, 0.42279043, 0.042     };
    AnyFloat SCR3R5Org_pos                 =  {-0.030503458, 0.41979043, 0.064     };
    AnyFloat SCR3R6Org_pos                 =  {-0.030503458, 0.41779043, 0.068     };
  };

  AnyFolder Left = {
    AnyFloat IC_R3_AntOrg_pos = .Right.IC_R3_AntOrg_pos * ..MirrorTransform;
    AnyFloat IC_R3_IntOrg_pos = .Right.IC_R3_IntOrg_pos * ..MirrorTransform;
    AnyFloat IC_R3_PosOrg_pos = .Right.IC_R3_PosOrg_pos * ..MirrorTransform;
    AnyFloat IC_R3_AntIns_pos = .Right.IC_R3_AntIns_pos * ..MirrorTransform;
    AnyFloat IC_R3_IntIns_pos = .Right.IC_R3_IntIns_pos * ..MirrorTransform;
    AnyFloat IC_R3_PosIns_pos = .Right.IC_R3_PosIns_pos * ..MirrorTransform;
    AnyFloat ITC7R7Via3Node_pos = .Right.ITC7R7Via3Node_pos * ..MirrorTransform;
    AnyFloat ITR1R7Via2Node_pos = .Right.ITR1R7Via2Node_pos * ..MirrorTransform;
    AnyFloat ITR2R8Via1Node_pos = .Right.ITR2R8Via1Node_pos * ..MirrorTransform;
    AnyFloat ITR3R9Node_pos = .Right.ITR3R9Node_pos * ..MirrorTransform;
    AnyFloat CTR3_pos = .Right.CTR3_pos * ..MirrorTransform;
    AnyFloat CCR3_pos = .Right.CCR3_pos * ..MirrorTransform;
    AnyFloat R3CTCVJntNode_pos = .Right.R3CTCVJntNode_pos * ..MirrorTransform;
    AnyFloat CVR3_pos = .Right.CVR3_pos * ..MirrorTransform;
    AnyFloat CSR3_pos = .Right.CSR3_pos * ..MirrorTransform;
    AnyFloat R3R4IC_pos = .Right.R3R4IC_pos * ..MirrorTransform;
    AnyFloat TrThR3SNodeOrg_pos = .Right.TrThR3SNodeOrg_pos * ..MirrorTransform;
    AnyFloat TrThR3R5NodeOrg_pos = .Right.TrThR3R5NodeOrg_pos * ..MirrorTransform;
    AnyFloat LCBrT2R3Ins_pos = .Right.LCBrT2R3Ins_pos * ..MirrorTransform;
    AnyFloat SCR1R3Ins_pos = .Right.SCR1R3Ins_pos * ..MirrorTransform;
    AnyFloat SCR3R5Org_pos = .Right.SCR3R5Org_pos * ..MirrorTransform;
    AnyFloat SCR3R6Org_pos = .Right.SCR3R6Org_pos * ..MirrorTransform;
  };
};

AnyFolder R4 = {
  AnyFolder Right = {
    AnyFloat IC_R4_AntOrg_pos = { 0.032898900, 0.343827, 0.1400890};
    AnyFloat IC_R4_IntOrg_pos = { 0.001017200, 0.354434, 0.1336700};
    AnyFloat IC_R4_PosOrg_pos = {-0.032843700, 0.370793, 0.1118960};
    AnyFloat IC_R4_AntIns_pos = { 0.039476300, 0.353161, 0.1361260};
    AnyFloat IC_R4_IntIns_pos = { 2.0903e-050, 0.364951, 0.1292980};
    AnyFloat IC_R4_PosIns_pos = {-0.032391500, 0.379542, 0.1082290};
    AnyFloat ITC7R7Via4Node_pos  = {-0.043717071, 0.39464987, 0.044100000};
    AnyFloat ITR1R7Via3Node_pos  = {-0.044717071, 0.39464987, 0.048100000};
    AnyFloat ITR2R8Via2Node_pos  = {-0.047717071, 0.39614987, 0.051100000};
    AnyFloat ITR3R9Via1Node_pos  = {-0.049717071, 0.39514987, 0.055100000};
    AnyFloat ITR4R10Node_pos = {-0.050717071, 0.39364987, 0.058100000};
    AnyFloat CTR4_pos         = {-0.039717071, 0.39664987, 0.03110000};
    AnyFloat CCR4_pos         = { 0.115409530, 0.32065415, 0.07320982};
    AnyFloat R4CTCVJntNode_pos= {-0.033555613, 0.39374209, 0.02710000};
    AnyFloat CVR4_pos         = {-0.027394155, 0.39083432, 0.02310000};
    AnyFloat CSR4_pos         = { 0.114500000, 0.31849976, 0.01900000};
    AnyFloat R4R5IC_pos = {-0.00062, 0.34343, 0.13403};
    AnyFloat TrThR4SNodeOrg_pos              =  { 0.115409530, 0.32065415, 0.073209820};
    AnyFloat TrThR4R6NodeOrg_pos             =  { 0.115409530, 0.32065415, 0.073209820};
    AnyFloat TrThR2R4NodeIns_pos             =  { 0.109931830, 0.31825951, 0.022388114};
    AnyFloat LCBrT3R4Ins_pos               =  {-0.042717071, 0.39964987, 0.043100000};
    AnyFloat SCR1R4Ins_pos                 =  {-0.032717071, 0.39764987, 0.040100000};
    AnyFloat SCR2R4Ins_pos                 =  {-0.032717071, 0.39764987, 0.045100000};
    AnyFloat SCR4R6Org_pos                 =  {-0.045717071, 0.39064987, 0.061100000};
    AnyFloat SCR4R7Org_pos                 =  {-0.045717071, 0.38864987, 0.067100000};
  };

  AnyFolder Left = {
    AnyFloat IC_R4_AntOrg_pos = .Right.IC_R4_AntOrg_pos * ..MirrorTransform;
    AnyFloat IC_R4_IntOrg_pos = .Right.IC_R4_IntOrg_pos * ..MirrorTransform;
    AnyFloat IC_R4_PosOrg_pos = .Right.IC_R4_PosOrg_pos * ..MirrorTransform;
    AnyFloat IC_R4_AntIns_pos = .Right.IC_R4_AntIns_pos * ..MirrorTransform;
    AnyFloat IC_R4_IntIns_pos = .Right.IC_R4_IntIns_pos * ..MirrorTransform;
    AnyFloat IC_R4_PosIns_pos = .Right.IC_R4_PosIns_pos * ..MirrorTransform;
    AnyFloat ITC7R7Via4Node_pos = .Right.ITC7R7Via4Node_pos * ..MirrorTransform;
    AnyFloat ITR1R7Via3Node_pos = .Right.ITR1R7Via3Node_pos * ..MirrorTransform;
    AnyFloat ITR2R8Via2Node_pos = .Right.ITR2R8Via2Node_pos * ..MirrorTransform;
    AnyFloat ITR3R9Via1Node_pos = .Right.ITR3R9Via1Node_pos * ..MirrorTransform;
    AnyFloat ITR4R10Node_pos = .Right.ITR4R10Node_pos * ..MirrorTransform;
    AnyFloat CTR4_pos = .Right.CTR4_pos * ..MirrorTransform;
    AnyFloat CCR4_pos = .Right.CCR4_pos * ..MirrorTransform;
    AnyFloat R4CTCVJntNode_pos = .Right.R4CTCVJntNode_pos * ..MirrorTransform;
    AnyFloat CVR4_pos = .Right.CVR4_pos * ..MirrorTransform;
    AnyFloat CSR4_pos = .Right.CSR4_pos * ..MirrorTransform;
    AnyFloat R4R5IC_pos = .Right.R4R5IC_pos * ..MirrorTransform;
    AnyFloat TrThR4SNodeOrg_pos = .Right.TrThR4SNodeOrg_pos * ..MirrorTransform;
    AnyFloat TrThR4R6NodeOrg_pos = .Right.TrThR4R6NodeOrg_pos * ..MirrorTransform;
    AnyFloat TrThR2R4NodeIns_pos = .Right.TrThR2R4NodeIns_pos * ..MirrorTransform;
    AnyFloat LCBrT3R4Ins_pos = .Right.LCBrT3R4Ins_pos * ..MirrorTransform;
    AnyFloat SCR1R4Ins_pos = .Right.SCR1R4Ins_pos * ..MirrorTransform;
    AnyFloat SCR2R4Ins_pos = .Right.SCR2R4Ins_pos * ..MirrorTransform;
    AnyFloat SCR4R6Org_pos = .Right.SCR4R6Org_pos * ..MirrorTransform;
    AnyFloat SCR4R7Org_pos = .Right.SCR4R7Org_pos * ..MirrorTransform;
  };
};

AnyFolder R5 = {
  AnyFolder Right = {
    AnyFloat IC_R5_AntOrg_pos = { 0.035202300, 0.320829, 0.1459040};
    AnyFloat IC_R5_IntOrg_pos = {-0.002251790, 0.332425, 0.1343930};
    AnyFloat IC_R5_PosOrg_pos = {-0.034246700, 0.342125, 0.1108570};
    AnyFloat IC_R5_AntIns_pos = { 0.032579700, 0.332561, 0.1432270};
    AnyFloat IC_R5_IntIns_pos = {-0.001578890, 0.342143, 0.1336680};
    AnyFloat IC_R5_PosIns_pos = {-0.033688600, 0.353000, 0.1091400};
    AnyFloat ITC7R7Via5Node_pos  = {-0.045035725, 0.36625394, 0.043000000};
    AnyFloat ITR1R7Via4Node_pos  = {-0.045035725, 0.36625394, 0.046000000};
    AnyFloat ITR2R8Via3Node_pos  = {-0.047035725, 0.36325394, 0.049000000};
    AnyFloat ITR3R9Via2Node_pos  = {-0.050035725, 0.36225394, 0.053000000};
    AnyFloat ITR4R10Via1Node_pos = {-0.051035725, 0.36125394, 0.056000000};
    AnyFloat R5ITR5R11Node_pos = {-0.051035725, 0.36025394, 0.061000000};
    AnyFloat CTR5_pos          = {-0.038035725, 0.37025394, 0.03100000};
    AnyFloat CCR5_pos        = { 0.124428180, 0.29380424, 0.08968678};
    AnyFloat R5CTCVJntNode_pos = {-0.034198926, 0.36777665, 0.02797500};
    AnyFloat CVR5_pos          = {-0.030362126, 0.36529936, 0.02495000};
    AnyFloat CSR5_pos          = { 0.123500000, 0.29179976, 0.01970000};
    AnyFloat R5R6IC_pos = {-0.00251, 0.31687, 0.13730};
    AnyFloat TrThR5SNodeOrg_pos              =  { 0.124428180, 0.29380424, 0.089686780};
    AnyFloat TrThR3R5NodeIns_pos             =  { 0.119307980, 0.29155021, 0.024074174};
    AnyFloat TrThR5R7NodeOrg_pos             =  { 0.124428180, 0.29380424, 0.089686780};
    AnyFloat LCBrT4R5Ins_pos               =  {-0.043035725, 0.36825394, 0.046000000};
    AnyFloat SCR2R5Ins_pos                 =  {-0.034035725, 0.36625394, 0.041000000};
    AnyFloat SCR3R5Ins_pos                 =  {-0.035035725, 0.36625394, 0.046000000};
    AnyFloat SCR5R7Org_pos                 =  {-0.041035725, 0.35725394, 0.059000000};
    AnyFloat SCR5R8Org_pos                 =  {-0.041035725, 0.35525394, 0.065000000};
  };

  AnyFolder Left = {
    AnyFloat IC_R5_AntOrg_pos = .Right.IC_R5_AntOrg_pos * ..MirrorTransform;
    AnyFloat IC_R5_IntOrg_pos = .Right.IC_R5_IntOrg_pos * ..MirrorTransform;
    AnyFloat IC_R5_PosOrg_pos = .Right.IC_R5_PosOrg_pos * ..MirrorTransform;
    AnyFloat IC_R5_AntIns_pos = .Right.IC_R5_AntIns_pos * ..MirrorTransform;
    AnyFloat IC_R5_IntIns_pos = .Right.IC_R5_IntIns_pos * ..MirrorTransform;
    AnyFloat IC_R5_PosIns_pos = .Right.IC_R5_PosIns_pos * ..MirrorTransform;
    AnyFloat ITC7R7Via5Node_pos = .Right.ITC7R7Via5Node_pos * ..MirrorTransform;
    AnyFloat ITR1R7Via4Node_pos = .Right.ITR1R7Via4Node_pos * ..MirrorTransform;
    AnyFloat ITR2R8Via3Node_pos = .Right.ITR2R8Via3Node_pos * ..MirrorTransform;
    AnyFloat ITR3R9Via2Node_pos = .Right.ITR3R9Via2Node_pos * ..MirrorTransform;
    AnyFloat ITR4R10Via1Node_pos = .Right.ITR4R10Via1Node_pos * ..MirrorTransform;
    AnyFloat R5ITR5R11Node_pos = .Right.R5ITR5R11Node_pos * ..MirrorTransform;
    AnyFloat CTR5_pos = .Right.CTR5_pos * ..MirrorTransform;
    AnyFloat CCR5_pos = .Right.CCR5_pos * ..MirrorTransform;
    AnyFloat R5CTCVJntNode_pos = .Right.R5CTCVJntNode_pos * ..MirrorTransform;
    AnyFloat CVR5_pos = .Right.CVR5_pos * ..MirrorTransform;
    AnyFloat CSR5_pos = .Right.CSR5_pos * ..MirrorTransform;
    AnyFloat R5R6IC_pos = .Right.R5R6IC_pos * ..MirrorTransform;
    AnyFloat TrThR5SNodeOrg_pos = .Right.TrThR5SNodeOrg_pos * ..MirrorTransform;
    AnyFloat TrThR3R5NodeIns_pos = .Right.TrThR3R5NodeIns_pos * ..MirrorTransform;
    AnyFloat TrThR5R7NodeOrg_pos = .Right.TrThR5R7NodeOrg_pos * ..MirrorTransform;
    AnyFloat LCBrT4R5Ins_pos = .Right.LCBrT4R5Ins_pos * ..MirrorTransform;
    AnyFloat SCR2R5Ins_pos = .Right.SCR2R5Ins_pos * ..MirrorTransform;
    AnyFloat SCR3R5Ins_pos = .Right.SCR3R5Ins_pos * ..MirrorTransform;
    AnyFloat SCR5R7Org_pos = .Right.SCR5R7Org_pos * ..MirrorTransform;
    AnyFloat SCR5R8Org_pos = .Right.SCR5R8Org_pos * ..MirrorTransform;
   };
};

AnyFolder R6 = {
  AnyFolder Right = {
    AnyFloat IC_R6_AntOrg_pos = { 0.042684200, 0.284805, 0.1527720};
    AnyFloat IC_R6_IntOrg_pos = {-0.002763810, 0.301308, 0.1402160};
    AnyFloat IC_R6_PosOrg_pos = {-0.036189100, 0.312311, 0.1155790};
    AnyFloat IC_R6_AntIns_pos = { 0.042897000, 0.296402, 0.1485760};
    AnyFloat IC_R6_IntIns_pos = {-0.002256340, 0.314294, 0.1356760};
    AnyFloat IC_R6_PosIns_pos = {-0.034178300, 0.324545, 0.1127490};
    AnyFloat ITC7R7Via6Node_pos     = {-0.044912878, 0.34070983, 0.042300000};
    AnyFloat ITR1R7Via5Node_pos     = {-0.045912878, 0.34070983, 0.045300000};
    AnyFloat ITR2R8Via4Node_pos     = {-0.047912878, 0.33970983, 0.048300000};
    AnyFloat ITR3R9Via3Node_pos     = {-0.049912878, 0.33870983, 0.051300000};
    AnyFloat ITR4R10Via2Node_pos    = {-0.050912878, 0.33670983, 0.054300000};
    AnyFloat ITR5R11Via1Node_pos    = {-0.050912878, 0.33470983, 0.056300000};
    AnyFloat R6ITR6R12Node_pos        = {-0.050912878, 0.33370983, 0.058300000};
    AnyFloat CTR6_pos         = {-0.044912878, 0.34070983, 0.03130000};
    AnyFloat CCR6_pos       = { 0.133921720, 0.25731787, 0.10078811};
    AnyFloat R6CTCVJntNode_pos= {-0.038427265, 0.34022023, 0.02763500};
    AnyFloat CVR6_pos         = {-0.031941651, 0.33973062, 0.02397000};
    AnyFloat CSR6_pos         = { 0.131500000, 0.26929976, 0.01900000};
    AnyFloat R6R7IC_pos = {-0.00272, 0.28832, 0.14021};
    AnyFloat TrThR6SNodeOrg_pos              =  { 0.133921720, 0.25731787, 0.100788110};
    AnyFloat TrThR4R6NodeIns_pos             =  { 0.127901420, 0.26817596, 0.024111757};
    AnyFloat LCBrT5R6Ins_pos               =  {-0.044912878, 0.34170983, 0.046300000};
    AnyFloat SCR3R6Ins_pos                 =  {-0.037912878, 0.34370983, 0.042300000};
    AnyFloat SCR4R6Ins_pos                 =  {-0.038912878, 0.34370983, 0.046300000};
    AnyFloat SCR6R8Org_pos                 =  {-0.044912878, 0.33070983, 0.059300000};
    AnyFloat SCR6R9Org_pos                 =  {-0.044912878, 0.32870983, 0.063300000};
  };

  AnyFolder Left = {
    AnyFloat IC_R6_AntOrg_pos = .Right.IC_R6_AntOrg_pos * ..MirrorTransform;
    AnyFloat IC_R6_IntOrg_pos = .Right.IC_R6_IntOrg_pos * ..MirrorTransform;
    AnyFloat IC_R6_PosOrg_pos = .Right.IC_R6_PosOrg_pos * ..MirrorTransform;
    AnyFloat IC_R6_AntIns_pos = .Right.IC_R6_AntIns_pos * ..MirrorTransform;
    AnyFloat IC_R6_IntIns_pos = .Right.IC_R6_IntIns_pos * ..MirrorTransform;
    AnyFloat IC_R6_PosIns_pos = .Right.IC_R6_PosIns_pos * ..MirrorTransform;
    AnyFloat ITC7R7Via6Node_pos = .Right.ITC7R7Via6Node_pos * ..MirrorTransform;
    AnyFloat ITR1R7Via5Node_pos = .Right.ITR1R7Via5Node_pos * ..MirrorTransform;
    AnyFloat ITR2R8Via4Node_pos = .Right.ITR2R8Via4Node_pos * ..MirrorTransform;
    AnyFloat ITR3R9Via3Node_pos = .Right.ITR3R9Via3Node_pos * ..MirrorTransform;
    AnyFloat ITR4R10Via2Node_pos = .Right.ITR4R10Via2Node_pos * ..MirrorTransform;
    AnyFloat ITR5R11Via1Node_pos = .Right.ITR5R11Via1Node_pos * ..MirrorTransform;
    AnyFloat R6ITR6R12Node_pos = .Right.R6ITR6R12Node_pos * ..MirrorTransform;
    AnyFloat CTR6_pos = .Right.CTR6_pos * ..MirrorTransform;
    AnyFloat CCR6_pos = .Right.CCR6_pos * ..MirrorTransform;
    AnyFloat R6CTCVJntNode_pos = .Right.R6CTCVJntNode_pos * ..MirrorTransform;
    AnyFloat CVR6_pos = .Right.CVR6_pos * ..MirrorTransform;
    AnyFloat CSR6_pos = .Right.CSR6_pos * ..MirrorTransform;
    AnyFloat R6R7IC_pos = .Right.R6R7IC_pos * ..MirrorTransform;
    AnyFloat TrThR6SNodeOrg_pos = .Right.TrThR6SNodeOrg_pos * ..MirrorTransform;
    AnyFloat TrThR4R6NodeIns_pos = .Right.TrThR4R6NodeIns_pos * ..MirrorTransform;
    AnyFloat LCBrT5R6Ins_pos = .Right.LCBrT5R6Ins_pos * ..MirrorTransform;
    AnyFloat SCR3R6Ins_pos = .Right.SCR3R6Ins_pos * ..MirrorTransform;
    AnyFloat SCR4R6Ins_pos = .Right.SCR4R6Ins_pos * ..MirrorTransform;
    AnyFloat SCR6R8Org_pos = .Right.SCR6R8Org_pos * ..MirrorTransform;
    AnyFloat SCR6R9Org_pos = .Right.SCR6R9Org_pos * ..MirrorTransform;
  };
};

AnyFolder R7 = {
  AnyFolder Right = {
    AnyFloat IC_R7_AntOrg_pos = { 0.042060500, 0.257365, 0.1511390};
    AnyFloat IC_R7_IntOrg_pos = {-0.002676600, 0.275330, 0.1402130};
    AnyFloat IC_R7_PosOrg_pos = {-0.042438500, 0.287150, 0.1076970};
    AnyFloat IC_R7_AntIns_pos = { 0.041561700, 0.270494, 0.1515280};
    AnyFloat IC_R7_IntIns_pos = {-0.001905580, 0.288408, 0.1401100};
    AnyFloat IC_R7_PosIns_pos = {-0.034226500, 0.299455, 0.1152960};
    AnyFloat ITC7R7Node_posIns      = {-0.044786778, 0.32191796, 0.041000000};
    AnyFloat ITR1R7Node_posIns      = {-0.046786778, 0.32191796, 0.044000000};
    AnyFloat ITR2R8Via5Node_pos     = {-0.049786778, 0.31791796, 0.046000000};
    AnyFloat ITR3R9Via4Node_pos     = {-0.050786778, 0.31791796, 0.049000000};
    AnyFloat ITR4R10Via3Node_pos    = {-0.051786778, 0.31691796, 0.052000000};
    AnyFloat ITR5R11Via2Node_pos    = {-0.051786778, 0.31691796, 0.054000000};
    AnyFloat ITR6R12Via1Node_pos    = {-0.051786778, 0.31691796, 0.056000000};
    AnyFloat CTR7_pos         = {-0.046786778, 0.31691796, 0.03300000};
    AnyFloat CCR7_pos       = { 0.144580320, 0.21814601, 0.10757296};
    AnyFloat R7CTCVJntNode_pos= {-0.038913176, 0.31580475, 0.02786750};
    AnyFloat CVR7_pos         = {-0.031039575, 0.31469153, 0.02273500};
    AnyFloat CSR7_pos         = { 0.134500000, 0.25749976, 0.01600000};
    AnyFloat R7R8IC_pos = { 0.00029, 0.25891, 0.14176};
    AnyFloat TrThR5R7NodeIns_pos             =  { 0.13513002,  0.24704034, 0.02172331};
    AnyFloat TrThR7SNodeOrg_pos              =  { 0.14458032,  0.21814601, 0.10757296};
    AnyFloat LCBrT6R7Ins_pos               =  {-0.048786778, 0.31991796, 0.04600000};
    AnyFloat LCLgT5R7Ins_pos               =  {-0.048786778, 0.31991796, 0.05100000};
    AnyFloat SCR4R7Ins_pos                 =  {-0.040786778, 0.32191796, 0.04200000};
    AnyFloat SCR5R7Ins_pos                 =  {-0.040786778, 0.32191796, 0.04600000};
    AnyFloat SCR7R9Org_pos                 =  {-0.046786778, 0.30891796, 0.06000000};
    AnyFloat SCR7R10Org_pos                =  {-0.046786778, 0.30691796, 0.06600000};
  };

  AnyFolder Left = {
    AnyFloat IC_R7_AntOrg_pos = .Right.IC_R7_AntOrg_pos * ..MirrorTransform;
    AnyFloat IC_R7_IntOrg_pos = .Right.IC_R7_IntOrg_pos * ..MirrorTransform;
    AnyFloat IC_R7_PosOrg_pos = .Right.IC_R7_PosOrg_pos * ..MirrorTransform;
    AnyFloat IC_R7_AntIns_pos = .Right.IC_R7_AntIns_pos * ..MirrorTransform;
    AnyFloat IC_R7_IntIns_pos = .Right.IC_R7_IntIns_pos * ..MirrorTransform;
    AnyFloat IC_R7_PosIns_pos = .Right.IC_R7_PosIns_pos * ..MirrorTransform;
    AnyFloat ITC7R7Node_posIns = .Right.ITC7R7Node_posIns * ..MirrorTransform;
    AnyFloat ITR1R7Node_posIns = .Right.ITR1R7Node_posIns * ..MirrorTransform;
    AnyFloat ITR2R8Via5Node_pos = .Right.ITR2R8Via5Node_pos * ..MirrorTransform;
    AnyFloat ITR3R9Via4Node_pos = .Right.ITR3R9Via4Node_pos * ..MirrorTransform;
    AnyFloat ITR4R10Via3Node_pos = .Right.ITR4R10Via3Node_pos * ..MirrorTransform;
    AnyFloat ITR5R11Via2Node_pos = .Right.ITR5R11Via2Node_pos * ..MirrorTransform;
    AnyFloat ITR6R12Via1Node_pos = .Right.ITR6R12Via1Node_pos * ..MirrorTransform;
    AnyFloat CTR7_pos = .Right.CTR7_pos * ..MirrorTransform;
    AnyFloat CCR7_pos = .Right.CCR7_pos * ..MirrorTransform;
    AnyFloat R7CTCVJntNode_pos = .Right.R7CTCVJntNode_pos * ..MirrorTransform;
    AnyFloat CVR7_pos = .Right.CVR7_pos * ..MirrorTransform;
    AnyFloat CSR7_pos = .Right.CSR7_pos * ..MirrorTransform;
    AnyFloat R7R8IC_pos = .Right.R7R8IC_pos * ..MirrorTransform;
    AnyFloat TrThR5R7NodeIns_pos = .Right.TrThR5R7NodeIns_pos * ..MirrorTransform;
    AnyFloat TrThR7SNodeOrg_pos = .Right.TrThR7SNodeOrg_pos * ..MirrorTransform;
    AnyFloat LCBrT6R7Ins_pos = .Right.LCBrT6R7Ins_pos * ..MirrorTransform;
    AnyFloat LCLgT5R7Ins_pos = .Right.LCLgT5R7Ins_pos * ..MirrorTransform;
    AnyFloat SCR4R7Ins_pos = .Right.SCR4R7Ins_pos * ..MirrorTransform;
    AnyFloat SCR5R7Ins_pos = .Right.SCR5R7Ins_pos * ..MirrorTransform;
    AnyFloat SCR7R9Org_pos = .Right.SCR7R9Org_pos * ..MirrorTransform;
    AnyFloat SCR7R10Org_pos = .Right.SCR7R10Org_pos * ..MirrorTransform;
  };
};

AnyFolder R8 = {
  AnyFolder Right = {
    AnyFloat IC_R8_AntOrg_pos = { 0.049364200, 0.224240, 0.1518520};
    AnyFloat IC_R8_IntOrg_pos = { 0.003256530, 0.242499, 0.1433080};
    AnyFloat IC_R8_PosOrg_pos = {-0.039431900, 0.255184, 0.1122650};
    AnyFloat IC_R8_AntIns_pos = { 0.046645900, 0.240634, 0.1504530};
    AnyFloat IC_R8_IntIns_pos = { 0.006385530, 0.256899, 0.1421430};
    AnyFloat IC_R8_PosIns_pos = {-0.041410600, 0.268861, 0.1098950};
    AnyFloat ITR2R8Node_posIns      = {-0.050680909, 0.29010249, 0.041200000};
    AnyFloat ITR3R9Via5Node_pos     = {-0.052680909, 0.28710249, 0.044200000};
    AnyFloat ITR4R10Via4Node_pos    = {-0.053680909, 0.28710249, 0.047200000};
    AnyFloat ITR5R11Via3Node_pos    = {-0.053680909, 0.28310249, 0.048700000};
    AnyFloat ITR6R12Via2Node_pos    = {-0.053680909, 0.28210249, 0.050700000};
    AnyFloat CTR8_pos         = {-0.050680909, 0.28710249, 0.03420000};
    AnyFloat CCR8_pos       = { 0.147215690, 0.18408399, 0.12073676};
    AnyFloat R8CTCVJntNode_pos= {-0.043414791, 0.28685624, 0.02956250};
    AnyFloat CVR8_pos         = {-0.036148674, 0.28660999, 0.02492500};
    AnyFloat CSR8_pos         = { 0.136500000, 0.25049976, 0.01400000};
    AnyFloat R8R9IC_pos = { 0.00340, 0.22125, 0.13591};
    AnyFloat TrThR8SNodeOrg_pos              =  { 0.147215690, 0.18408399, 0.12073676};
    AnyFloat LCBrT7R8Ins_pos               =  {-0.052680909, 0.28610249, 0.04720000};
    AnyFloat LCLgT6R8Ins_pos               =  {-0.052680909, 0.28610249, 0.05220000};
    AnyFloat SCR5R8Ins_pos                 =  {-0.044680909, 0.28910249, 0.03820000};
    AnyFloat SCR6R8Ins_pos                 =  {-0.044680909, 0.28810249, 0.04220000};
    AnyFloat SCR8R10Org_pos                =  {-0.044680909, 0.27510249, 0.05720000};
  };

  AnyFolder Left = {
    AnyFloat IC_R8_AntOrg_pos = .Right.IC_R8_AntOrg_pos * ..MirrorTransform;
    AnyFloat IC_R8_IntOrg_pos = .Right.IC_R8_IntOrg_pos * ..MirrorTransform;
    AnyFloat IC_R8_PosOrg_pos = .Right.IC_R8_PosOrg_pos * ..MirrorTransform;
    AnyFloat IC_R8_AntIns_pos = .Right.IC_R8_AntIns_pos * ..MirrorTransform;
    AnyFloat IC_R8_IntIns_pos = .Right.IC_R8_IntIns_pos * ..MirrorTransform;
    AnyFloat IC_R8_PosIns_pos = .Right.IC_R8_PosIns_pos * ..MirrorTransform;
    AnyFloat ITR2R8Node_posIns = .Right.ITR2R8Node_posIns * ..MirrorTransform;
    AnyFloat ITR3R9Via5Node_pos = .Right.ITR3R9Via5Node_pos * ..MirrorTransform;
    AnyFloat ITR4R10Via4Node_pos = .Right.ITR4R10Via4Node_pos * ..MirrorTransform;
    AnyFloat ITR5R11Via3Node_pos = .Right.ITR5R11Via3Node_pos * ..MirrorTransform;
    AnyFloat ITR6R12Via2Node_pos = .Right.ITR6R12Via2Node_pos * ..MirrorTransform;
    AnyFloat CTR8_pos = .Right.CTR8_pos * ..MirrorTransform;
    AnyFloat CCR8_pos = .Right.CCR8_pos * ..MirrorTransform;
    AnyFloat R8CTCVJntNode_pos = .Right.R8CTCVJntNode_pos * ..MirrorTransform;
    AnyFloat CVR8_pos = .Right.CVR8_pos * ..MirrorTransform;
    AnyFloat CSR8_pos = .Right.CSR8_pos * ..MirrorTransform;
    AnyFloat R8R9IC_pos = .Right.R8R9IC_pos * ..MirrorTransform;
    AnyFloat TrThR8SNodeOrg_pos = .Right.TrThR8SNodeOrg_pos * ..MirrorTransform;
    AnyFloat LCBrT7R8Ins_pos = .Right.LCBrT7R8Ins_pos * ..MirrorTransform;
    AnyFloat LCLgT6R8Ins_pos = .Right.LCLgT6R8Ins_pos * ..MirrorTransform;
    AnyFloat SCR5R8Ins_pos = .Right.SCR5R8Ins_pos * ..MirrorTransform;
    AnyFloat SCR6R8Ins_pos = .Right.SCR6R8Ins_pos * ..MirrorTransform;
    AnyFloat SCR8R10Org_pos = .Right.SCR8R10Org_pos * ..MirrorTransform;
  };
};

AnyFolder R9 = {
  AnyFolder Right = {
    AnyFloat IC_R9_AntOrg_pos = { 0.044872700, 0.182649, 0.1417750};
    AnyFloat IC_R9_IntOrg_pos = { 0.003535190, 0.199995, 0.1285090};
    AnyFloat IC_R9_PosOrg_pos = {-0.033070400, 0.214498, 0.1011620};
    AnyFloat IC_R9_AntIns_pos = { 0.045473800, 0.197272, 0.1442670};
    AnyFloat IC_R9_IntIns_pos = { 0.005366520, 0.214691, 0.1323000};
    AnyFloat IC_R9_PosIns_pos = {-0.028143800, 0.224738, 0.1101000};
    AnyFloat ITR3R9Node_posIns      = {-0.049423229, 0.25994745, 0.040000000};
    AnyFloat ITR4R10Via5Node_pos    = {-0.051423229, 0.25994745, 0.043000000};
    AnyFloat ITR5R11Via4Node_pos    = {-0.051423229, 0.25594745, 0.044000000};
    AnyFloat ITR6R12Via3Node_pos    = {-0.052423229, 0.25394745, 0.046000000};
    AnyFloat CTR9_pos         = {-0.046423229, 0.26494745, 0.03000000};
    AnyFloat CCR9_pos       = { 0.139388370, 0.14565845, 0.12146134};
    AnyFloat R9CTCVJntNode_pos= {-0.039882128, 0.26257638, 0.02702500};
    AnyFloat CVR9_pos         = {-0.033341026, 0.26020530, 0.02405000};
    AnyFloat CSR9_pos         = { 0.137500000, 0.24349976, 0.01200000};
    AnyFloat R9R10IC_pos ={-0.00549, 0.18675, 0.11931};
    AnyFloat TrThR9SNodeOrg_pos              =  { 0.139388370, 0.14565845, 0.12146134};
    AnyFloat LCBrT8R9Ins_pos               =  {-0.051423229, 0.25294745, 0.04800000};
    AnyFloat LCLgT7R9Ins_pos               =  {-0.051423229, 0.25294745, 0.05300000};
    AnyFloat SCR6R9Ins_pos                 =  {-0.043423229, 0.25794745, 0.03400000};
    AnyFloat SCR7R9Ins_pos                 =  {-0.043423229, 0.25594745, 0.03800000};
  };

  AnyFolder Left = {
    AnyFloat IC_R9_AntOrg_pos = .Right.IC_R9_AntOrg_pos * ..MirrorTransform;
    AnyFloat IC_R9_IntOrg_pos = .Right.IC_R9_IntOrg_pos * ..MirrorTransform;
    AnyFloat IC_R9_PosOrg_pos = .Right.IC_R9_PosOrg_pos * ..MirrorTransform;
    AnyFloat IC_R9_AntIns_pos = .Right.IC_R9_AntIns_pos * ..MirrorTransform;
    AnyFloat IC_R9_IntIns_pos = .Right.IC_R9_IntIns_pos * ..MirrorTransform;
    AnyFloat IC_R9_PosIns_pos = .Right.IC_R9_PosIns_pos * ..MirrorTransform;
    AnyFloat ITR3R9Node_posIns = .Right.ITR3R9Node_posIns * ..MirrorTransform;
    AnyFloat ITR4R10Via5Node_pos = .Right.ITR4R10Via5Node_pos * ..MirrorTransform;
    AnyFloat ITR5R11Via4Node_pos = .Right.ITR5R11Via4Node_pos * ..MirrorTransform;
    AnyFloat ITR6R12Via3Node_pos = .Right.ITR6R12Via3Node_pos * ..MirrorTransform;
    AnyFloat CTR9_pos = .Right.CTR9_pos * ..MirrorTransform;
    AnyFloat CCR9_pos = .Right.CCR9_pos * ..MirrorTransform;
    AnyFloat R9CTCVJntNode_pos = .Right.R9CTCVJntNode_pos * ..MirrorTransform;
    AnyFloat CVR9_pos = .Right.CVR9_pos * ..MirrorTransform;
    AnyFloat CSR9_pos = .Right.CSR9_pos * ..MirrorTransform;
    AnyFloat R9R10IC_pos = .Right.R9R10IC_pos * ..MirrorTransform;
    AnyFloat TrThR9SNodeOrg_pos = .Right.TrThR9SNodeOrg_pos * ..MirrorTransform;
    AnyFloat LCBrT8R9Ins_pos = .Right.LCBrT8R9Ins_pos * ..MirrorTransform;
    AnyFloat LCLgT7R9Ins_pos = .Right.LCLgT7R9Ins_pos * ..MirrorTransform;
    AnyFloat SCR6R9Ins_pos = .Right.SCR6R9Ins_pos * ..MirrorTransform;
    AnyFloat SCR7R9Ins_pos = .Right.SCR7R9Ins_pos * ..MirrorTransform;
  };
};

AnyFolder R10 = {
  AnyFolder Right = {
    AnyFloat IC_R10_AntOrg_pos = { 0.023087000, 0.154203, 0.1252420};
    AnyFloat IC_R10_IntOrg_pos = {-0.014516400, 0.173507, 0.1101070};
    AnyFloat IC_R10_PosOrg_pos = {-0.040190900, 0.190095, 0.0843473};
    AnyFloat IC_R10_AntIns_pos = { 0.044752900, 0.155904, 0.1349230};
    AnyFloat IC_R10_IntIns_pos = {-0.002799090, 0.179031, 0.1217530};
    AnyFloat IC_R10_PosIns_pos = {-0.037438100, 0.199413, 0.0959760};
    AnyFloat OEC10a_CINode_pos       = {0.086559363,0.12617856, 0.12822376};
    AnyFloat ITR4R10Node_posIns     = {-0.04930874, 0.22891201, 0.039300000};
    AnyFloat ITR5R11Via5Node_pos    = {-0.05230874, 0.22691201, 0.041300000};
    AnyFloat ITR6R12Via4Node_pos    = {-0.05230874, 0.22591201, 0.043300000};
    AnyFloat CTR10_pos         = {-0.039308740, 0.23591201, 0.02230000};
    AnyFloat CCR10_pos       = { 0.126802860, 0.11873311, 0.12013349};
    AnyFloat R10CTCVJntNode_pos= {-0.033947920, 0.23438822, 0.02219500};
    AnyFloat CVR10_pos         = {-0.028587099, 0.23286443, 0.02209000};
    AnyFloat CSR10_pos         = { 0.138000000, 0.23749976, 0.01000000};
    AnyFloat TrThR10SNodeOrg_pos             =  { 0.12680286, 0.11873311, 0.12013349};
    AnyFloat LCBrT9R10Ins_pos              =  {-0.04930874, 0.22791201, 0.04230000};
    AnyFloat LCLgT8R10Ins_pos              =  {-0.04930874, 0.22791201, 0.04730000};
    AnyFloat SCR7R10Ins_pos                =  {-0.03930874, 0.23291201, 0.03130000};
    AnyFloat SCR8R10Ins_pos                =  {-0.03930874, 0.23091201, 0.03430000};
  };

  AnyFolder Left = {
    AnyFloat IC_R10_AntOrg_pos = .Right.IC_R10_AntOrg_pos * ..MirrorTransform;
    AnyFloat IC_R10_IntOrg_pos = .Right.IC_R10_IntOrg_pos * ..MirrorTransform;
    AnyFloat IC_R10_PosOrg_pos = .Right.IC_R10_PosOrg_pos * ..MirrorTransform;
    AnyFloat IC_R10_AntIns_pos = .Right.IC_R10_AntIns_pos * ..MirrorTransform;
    AnyFloat IC_R10_IntIns_pos = .Right.IC_R10_IntIns_pos * ..MirrorTransform;
    AnyFloat IC_R10_PosIns_pos = .Right.IC_R10_PosIns_pos * ..MirrorTransform;
    AnyFloat OEC10a_CINode_pos = .Right.OEC10a_CINode_pos * ..MirrorTransform;
    AnyFloat ITR4R10Node_posIns = .Right.ITR4R10Node_posIns * ..MirrorTransform;
    AnyFloat ITR5R11Via5Node_pos = .Right.ITR5R11Via5Node_pos * ..MirrorTransform;
    AnyFloat ITR6R12Via4Node_pos = .Right.ITR6R12Via4Node_pos * ..MirrorTransform;
    AnyFloat CTR10_pos = .Right.CTR10_pos * ..MirrorTransform;
    AnyFloat CCR10_pos = .Right.CCR10_pos * ..MirrorTransform;
    AnyFloat R10CTCVJntNode_pos = .Right.R10CTCVJntNode_pos * ..MirrorTransform;
    AnyFloat CVR10_pos = .Right.CVR10_pos * ..MirrorTransform;
    AnyFloat CSR10_pos = .Right.CSR10_pos * ..MirrorTransform;
    AnyFloat TrThR10SNodeOrg_pos = .Right.TrThR10SNodeOrg_pos * ..MirrorTransform;
    AnyFloat LCBrT9R10Ins_pos = .Right.LCBrT9R10Ins_pos * ..MirrorTransform;
    AnyFloat LCLgT8R10Ins_pos = .Right.LCLgT8R10Ins_pos * ..MirrorTransform;
    AnyFloat SCR7R10Ins_pos = .Right.SCR7R10Ins_pos * ..MirrorTransform;
    AnyFloat SCR8R10Ins_pos = .Right.SCR8R10Ins_pos * ..MirrorTransform;
  };
};
AnyFolder Thorax = {
  AnyVec3 C1HatNode = {0.026,0.6,0};
  AnyVar UBHeight =  0.50; //Upperbody height

  AnyFloat sCoM_pos                                        = {0.060,0.303,0};
  AnyFloat AnatomicalFrame_pos                             = {0.0000000, 0.0000000, 0.0000000};
  AnyFloat ij_pos                                          = {0.08500000, 0.4200000, 0.0000000};
  AnyFloat iji_pos                                         = {0.08500000, 0.4200000, 0.0000000};
  AnyFloat C1HatNode_pos                                   = {0.02600000, 0.6000000, 0.0000000};

  //AnyFloat T1T2JntNode_pos                               = {0.01100000, 0.4620000, 0.0000000};
  AnyFloat T1T2JntNode_pos                               = {0.00400000, 0.4420000, 0.0000000};
  AnyFloat T2T3JntNode_pos                               ={-0.00300000, 0.4200000, 0.0000000};
  AnyFloat T3T4JntNode_pos                               ={-0.00900000, 0.3970000, 0.0000000};
  AnyFloat T4T5JntNode_pos                               ={-0.01400000, 0.3730000, 0.0000000};
  AnyFloat T5T6JntNode_pos                               ={-0.01800000, 0.3480000, 0.0000000};
  AnyFloat T6T7JntNode_pos                               ={-0.01900000, 0.3230000, 0.0000000};
  AnyFloat T7T8JntNode_pos                               ={-0.01800000, 0.2970000, 0.0000000};
  AnyFloat T8T9JntNode_pos                               ={-0.01500000, 0.2710000, 0.0000000};
  AnyFloat T9T10JntNode_pos                               ={-0.01000000, 0.2440000, 0.0000000};
  AnyFloat T10T11JntNode_pos                               ={-0.00200000, 0.2130000, 0.0000000};
  AnyFloat T11T12JntNode_pos                               = {0.01000000, 0.1830000, 0.0000000};
  AnyFloat T12L1JntNode_pos                                = {0.02200000, 0.1540000, 0.0000000};
  AnyFloat T1C7JntNode_pos                                 = {0.01100000, 0.4610000, 0.0000000};

  AnyFloat ForceVectorNode_pos                             = {-0.01700000, 0.5270000, 0.0000000};
  AnyFloat ALLNodeInferior_pos                             = {0.03800000, 0.1660000, 0.0000000};
  AnyFloat PLLNodeInferior_pos                             = {0.009000000, 0.1500000, 0.0000000};
  AnyFloat PLLViaNode_pos                                  = {0.004000000, 0.1640000, 0.0000000};
  AnyFloat PLLNodeInferiorT11_pos                          = {-0.003000000, 0.1800000, 0.0000000};
  AnyFloat LSNodeT11_pos                                   = {-0.04200000, 0.1600000, 0.0000000};
  AnyFloat LINodeInferior_pos                              = {-0.02000000, 0.1260000, 0.0000000};
  AnyFloat PressureNode_pos                                = {0.1000000, 0.1500000, 0.0000000};
  AnyFloat BuckleNodeTopCenter_pos                         = {0.1500000, 0.1500000, 0.0000000};
  AnyFloat ij_scj_pos                                      = {0.02070000, 0.009100000, 0.02330000};
  AnyFloat ij_costoclavicular_pos                          = {0.05760000, 0.007600000, 0.02320000};
  AnyFloat ij_P1_pos                                       = {0.02000000, -0.1300000, 0.1600000};
  AnyFloat ij_P2_pos                                       = {0.1500000, -0.1300000, 0.1100000};
  AnyFloat ij_NormalControlPoint_pos                       = {0.08000000, -0.06000000, 0.1550000};
  AnyFloat ij_P3_pos                                       = {0.08000000, 1.387779e-017, 0.1400000};
  AnyFloat ij_P4_pos                                       = {0.08500000, -0.1300000, 0.1350000};
  AnyFloat ij_ScapulaEllipsoidOrigin_pos                   = {0.03367450, -0.1115386, 0.001553705};
  AnyFloat ij_O_latissimus_dorsi_1_pos                     = {0.03272000, -0.1225700, 0.1552800};
  AnyFloat ij_O_latissimus_dorsi_2_pos                     = {0.03690000, -0.1797000, 0.1564400};
  AnyFloat ij_O_latissimus_dorsi_3_pos                     = {0.05387000, -0.2608700, 0.1435900};
  AnyFloat ij_O_latissimus_dorsi_4_pos                     = {0.08529000, -0.3345400, 0.1108700};
  AnyFloat ij_O_latissimus_dorsi_5_pos                     = {0.1177600, -0.3818000, 0.07369000};
  AnyFloat ij_O_trapezius_clavicular_part_1_pos            = {0.006930000, 0.08622000, 0.1129900};
  AnyFloat ij_O_trapezius_clavicular_part_2_pos            = {0.006650000, 0.08862000, 0.1123200};
  AnyFloat ij_O_trapezius_clavicular_part_3_pos            = {0.006240000, 0.09201000, 0.1114600};
  AnyFloat ij_O_trapezius_clavicular_part_4_pos            = {0.005650000, 0.09685000, 0.1104600};
  AnyFloat ij_O_trapezius_clavicular_part_5_pos            = {0.004830000, 0.1036100, 0.1095600};
  AnyFloat ij_O_trapezius_clavicular_part_6_pos            = {0.003690000, 0.1128100, 0.1093800};
  AnyFloat ij_O_trapezius_scapular_part_1_pos              = {0.02254000, -0.2221800, 0.1559700};
  AnyFloat ij_O_trapezius_scapular_part_2_pos              = {0.01879000, -0.1405500, 0.1642700};
  AnyFloat ij_O_trapezius_scapular_part_3_pos              = {0.01695000, -0.04506000, 0.1660700};
  AnyFloat ij_O_trapezius_scapular_part_4_pos              = {0.01296000, 0.02694000, 0.1397100};
  AnyFloat ij_O_trapezius_scapular_part_5_pos              = {0.009150000, 0.06679000, 0.1202400};
  AnyFloat ij_O_trapezius_scapular_part_6_pos              = {0.007470000, 0.08165000, 0.1144400};
  AnyFloat ij_O_rhomboideus_1_pos                          = {0.01645000, -0.02558000, 0.1668100};
  AnyFloat ij_O_rhomboideus_2_pos                          = {0.01445000, 0.02242000, 0.1457900};
  AnyFloat ij_O_rhomboideus_3_pos                          = {0.01245000, 0.07042000, 0.1247700};
  AnyFloat ij_O_levator_scapulae_1_pos                     = {0.02823000, 0.08941000, 0.06291000};
  AnyFloat ij_O_levator_scapulae_2_pos                     = {0.02567000, 0.1127600, 0.06042000};
  AnyFloat ij_O_levator_scapulae_3_pos                     = {0.02310000, 0.1361000, 0.05792000};
  AnyFloat ij_O_pectoralis_major_thoracic_part_1_pos       = {0.07997000, -0.1413900, -0.03620000};
  AnyFloat ij_O_pectoralis_major_thoracic_part_2_pos       = {0.01294000, -0.1301300, -0.04710000};
  AnyFloat ij_O_pectoralis_major_thoracic_part_3_pos       = {-0.002550000, -0.06715000, -0.03034000};
  AnyFloat ij_O_pectoralis_major_thoracic_part_4_pos       = {0.01272000, -0.01540000, -0.009390000};
  AnyFloat ij_O_pectoralis_major_thoracic_part_5_pos       = {0.03604000, 0.01199000, 0.005220000};
  AnyFloat ij_O_pectoralis_minor_1_pos                     = {0.05552000, -0.03114000, -0.003110000};
  AnyFloat ij_O_pectoralis_minor_2_pos                     = {0.06841000, -0.06122000, -0.01008000};
  AnyFloat ij_O_pectoralis_minor_3_pos                     = {0.08741000, -0.08447000, -0.005300000};
  AnyFloat ij_O_pectoralis_minor_4_pos                     = {0.1125200, -0.1009000, 0.01125000};
  AnyFloat ij_O_serratus_anterior_1_pos                    = {0.1508100, -0.2248500, -0.04373000};
  AnyFloat ij_O_serratus_anterior_2_pos                    = {0.1088500, -0.1606500, -0.01139000};
  AnyFloat ij_O_serratus_anterior_3_pos                    = {0.1048000, -0.09381000, 0.007660000};
  AnyFloat ij_O_serratus_anterior_4_pos                    = {0.1122700, -0.04389000, 0.04105000};
  AnyFloat ij_O_serratus_anterior_5_pos                    = {0.1065200, -0.01530000, 0.05639000};
  AnyFloat ij_O_serratus_anterior_6_pos                    = {0.09919000, -0.005190000, 0.05872000};
  AnyFloat ij_SternocleidomastoidNode_pos                  = {0.01800000, 0.002000000, 0.02500000};
  AnyFloat ij_EllipsoidOrigin_pos                          = {0.0000000, -0.2960000, 0.07780000};
  AnyFloat ij_EllipsoidPectoralisOrigin_pos                = {0.0000000, -0.1200000, 0.07000000};
  AnyFloat ij_EllipsoidSerratusAnteriorOrigin_pos          = {0.0000000, -0.2960000, 0.03700000};
  AnyFloat ij_EllipsoidLatissimusOrigin_pos                = {0.01500000, -0.1500000, 0.05000000};
  AnyFloat ij_RotNode_pos                                  = {0.0000000, 0.0000000, 0.0000000};
  AnyFloat ij_scj_RotNode_pos                              = {0.0000000, 0.0000000, 0.0000000};
  AnyFloat ij_ScapulaEllipsoidOrigin_RotNode_pos           = {0.0000000, 0.0000000, 0.0000000};
  AnyFloat iji_scj_pos                                     = {-0.02070000, 0.009100000, 0.02330000};
  AnyFloat iji_costoclavicular_pos                         = {-0.05760000, 0.007600000, 0.02320000};
  AnyFloat iji_P1_pos                                      = {-0.02000000, -0.1300000, 0.1600000};
  AnyFloat iji_P2_pos                                      = {-0.1500000, -0.1300000, 0.1100000};
  AnyFloat iji_NormalControlPoint_pos                      = {-0.08000000, -0.06000000, 0.1550000};
  AnyFloat iji_P3_pos                                      = {-0.08000000, 1.387779e-017, 0.1400000};
  AnyFloat iji_P4_pos                                      = {-0.08500000, -0.1300000, 0.1350000};
  AnyFloat iji_ScapulaEllipsoidOrigin_pos                  = {-0.03367450, -0.1115386, 0.001553705};
  AnyFloat iji_O_latissimus_dorsi_1_pos                    = {-0.03272000, -0.1225700, 0.1552800};
  AnyFloat iji_O_latissimus_dorsi_2_pos                    = {-0.03690000, -0.1797000, 0.1564400};
  AnyFloat iji_O_latissimus_dorsi_3_pos                    = {-0.05387000, -0.2608700, 0.1435900};
  AnyFloat iji_O_latissimus_dorsi_4_pos                    = {-0.08529000, -0.3345400, 0.1108700};
  AnyFloat iji_O_latissimus_dorsi_5_pos                    = {-0.1177600, -0.3818000, 0.07369000};
  AnyFloat iji_O_trapezius_clavicular_part_1_pos           = {-0.006930000, 0.08622000, 0.1129900};
  AnyFloat iji_O_trapezius_clavicular_part_2_pos           = {-0.006650000, 0.08862000, 0.1123200};
  AnyFloat iji_O_trapezius_clavicular_part_3_pos           = {-0.006240000, 0.09201000, 0.1114600};
  AnyFloat iji_O_trapezius_clavicular_part_4_pos           = {-0.005650000, 0.09685000, 0.1104600};
  AnyFloat iji_O_trapezius_clavicular_part_5_pos           = {-0.004830000, 0.1036100, 0.1095600};
  AnyFloat iji_O_trapezius_clavicular_part_6_pos           = {-0.003690000, 0.1128100, 0.1093800};
  AnyFloat iji_O_trapezius_scapular_part_1_pos             = {-0.02254000, -0.2221800, 0.1559700};
  AnyFloat iji_O_trapezius_scapular_part_2_pos             = {-0.01879000, -0.1405500, 0.1642700};
  AnyFloat iji_O_trapezius_scapular_part_3_pos             = {-0.01695000, -0.04506000, 0.1660700};
  AnyFloat iji_O_trapezius_scapular_part_4_pos             = {-0.01296000, 0.02694000, 0.1397100};
  AnyFloat iji_O_trapezius_scapular_part_5_pos             = {-0.009150000, 0.06679000, 0.1202400};
  AnyFloat iji_O_trapezius_scapular_part_6_pos             = {-0.007470000, 0.08165000, 0.1144400};
  AnyFloat iji_O_rhomboideus_1_pos                         = {-0.01645000, -0.02558000, 0.1668100};
  AnyFloat iji_O_rhomboideus_2_pos                         = {-0.01445000, 0.02242000, 0.1457900};
  AnyFloat iji_O_rhomboideus_3_pos                         = {-0.01245000, 0.07042000, 0.1247700};
  AnyFloat iji_O_levator_scapulae_1_pos                    = {-0.02823000, 0.08941000, 0.06291000};
  AnyFloat iji_O_levator_scapulae_2_pos                    = {-0.02567000, 0.1127600, 0.06042000};
  AnyFloat iji_O_levator_scapulae_3_pos                    = {-0.02310000, 0.1361000, 0.05792000};
  AnyFloat iji_O_pectoralis_major_thoracic_part_1_pos      = {-0.07997000, -0.1413900, -0.03620000};
  AnyFloat iji_O_pectoralis_major_thoracic_part_2_pos      = {-0.01294000, -0.1301300, -0.04710000};
  AnyFloat iji_O_pectoralis_major_thoracic_part_3_pos      = {0.002550000, -0.06715000, -0.03034000};
  AnyFloat iji_O_pectoralis_major_thoracic_part_4_pos      = {-0.01272000, -0.01540000, -0.009390000};
  AnyFloat iji_O_pectoralis_major_thoracic_part_5_pos      = {-0.03604000, 0.01199000, 0.005220000};
  AnyFloat iji_O_pectoralis_minor_1_pos                    = {-0.05552000, -0.03114000, -0.003110000};
  AnyFloat iji_O_pectoralis_minor_2_pos                    = {-0.06841000, -0.06122000, -0.01008000};
  AnyFloat iji_O_pectoralis_minor_3_pos                    = {-0.08741000, -0.08447000, -0.005300000};
  AnyFloat iji_O_pectoralis_minor_4_pos                    = {-0.1125200, -0.1009000, 0.01125000};
  AnyFloat iji_O_serratus_anterior_1_pos                   = {-0.1508100, -0.2248500, -0.04373000};
  AnyFloat iji_O_serratus_anterior_2_pos                   = {-0.1088500, -0.1606500, -0.01139000};
  AnyFloat iji_O_serratus_anterior_3_pos                   = {-0.1048000, -0.09381000, 0.007660000};
  AnyFloat iji_O_serratus_anterior_4_pos                   = {-0.1122700, -0.04389000, 0.04105000};
  AnyFloat iji_O_serratus_anterior_5_pos                   = {-0.1065200, -0.01530000, 0.05639000};
  AnyFloat iji_O_serratus_anterior_6_pos                   = {-0.09919000, -0.005190000, 0.05872000};
  AnyFloat iji_SternocleidomastoidNode_pos                 = {-0.01800000, 0.002000000, 0.02500000};
  AnyFloat iji_EllipsoidOrigin_pos                         = {0.0000000, -0.2960000, 0.07780000};
  AnyFloat iji_EllipsoidPectoralisOrigin_pos               = {0.0000000, -0.1200000, 0.07000000};
  AnyFloat iji_EllipsoidSerratusAnteriorOrigin_pos         = {0.0000000, -0.2960000, 0.03700000};
  AnyFloat iji_EllipsoidLatissimusOrigin_pos               = {-0.01500000, -0.1500000, 0.05000000};
  AnyFloat iji_RotNode_pos                                 = {0.0000000, 0.0000000, 0.0000000};
  AnyFloat iji_scj_RotNode_pos                             = {0.0000000, 0.0000000, 0.0000000};
  AnyFloat iji_ScapulaEllipsoidOrigin_RotNode_pos          = {0.0000000, 0.0000000, 0.0000000};
   // Ligament Nodes
  AnyVec3 LSNodeT12_pos = {-0.030,0.128,0};
  AnyFloat T1C5Jnt_pos                                     = {0.01300000, 0.4620000, 0.0000000};
  AnyFloat SPL1T5Node_pos                                  = {-0.06970000, 0.3403000, 0.0000000};
  AnyFloat SPL1T4Node_pos                                  = {-0.06250000, 0.3602000, 0};
  AnyFloat SPL1T3Node_pos                                  = {-0.05440000, 0.3882000, 0};
  AnyFloat SPT11T6Via1Node_pos                            = {-0.048+0.01,0.19,0};
  AnyFloat SPT12T5Via2Node_pos                            = {-0.049+0.01,0.188,0};
  AnyFloat SPT12T4Via2Node_pos                            = {-0.050+0.01,0.187,0};
  AnyFloat SPL1T3Via3Node_pos                             = {-0.051+0.01,0.186,0};
  AnyFloat SPL1T2Via3Node_pos                             = {-0.052+0.01,0.185,0};
  AnyFloat SPL2T1Via4Node_pos                             = {-0.053+0.01,0.184,0};

  AnyVar ILptC5SIPSZ    = (Right.ILptC5SIPSNode_pos[2]   -.Pelvis.Right.ILptC5SIPSNode_pos[2])   /(Right.ILptC5SIPSNode_pos[1]   -.Pelvis.Right.ILptC5SIPSNode_pos[1]);
  AnyVar ILptC6SIPSZ    = (Right.ILptC6SIPSNode_pos[2]   -.Pelvis.Right.ILptC6SIPSNode_pos[2])   /(Right.ILptC6SIPSNode_pos[1]   -.Pelvis.Right.ILptC6SIPSNode_pos[1]);
  AnyVar ILptC7CIZ      = (Right.ILptC7CINode_pos[2]     -.Pelvis.Right.ILptC7CINode_pos[2])     /(Right.ILptC7CINode_pos[1]     -.Pelvis.Right.ILptC7CINode_pos[1]);
  AnyVar ILptC8CIZ      = (Right.ILptC8CINode_pos[2]     -.Pelvis.Right.ILptC8CINode_pos[2])     /(Right.ILptC8CINode_pos[1]     -.Pelvis.Right.ILptC8CINode_pos[1]);
  AnyVar ILptC9CIZ      = (Right.ILptC9CINode_pos[2]     -.Pelvis.Right.ILptC9CINode_pos[2])     /(Right.ILptC9CINode_pos[1]     -.Pelvis.Right.ILptC9CINode_pos[1]);
  AnyVar ILptC10CIZ     = (Right.ILptC10CINode_pos[2]    -.Pelvis.Right.ILptC10CINode_pos[2])    /(Right.ILptC10CINode_pos[1]    -.Pelvis.Right.ILptC10CINode_pos[1]);
  AnyVar ILptC11CIZ     = (Right.ILptC11CINode_pos[2]    -.Pelvis.Right.ILptC11CINode_pos[2])    /(Right.ILptC11CINode_pos[1]    -.Pelvis.Right.ILptC11CINode_pos[1]);
  AnyVar ILptC12CIZ     = (Right.ILptC12CINode_pos[2]    -.Pelvis.Right.ILptC12CINode_pos[2])    /(Right.ILptC12CINode_pos[1]    -.Pelvis.Right.ILptC12CINode_pos[1]);
  AnyVar LTptT1L1Z      = (Right.LTptT1L1Node_pos[2]     -.L1.Right.LTptT1L1Node_pos[2])         /(Right.LTptT1L1Node_pos[1]     -.L1.Right.LTptT1L1Node_pos[1]);
  AnyVar LTptT2L2Z      = (Right.LTptT2L2Node_pos[2]     -.L2.Right.LTptT2L2Node_pos[2])         /(Right.LTptT2L2Node_pos[1]     -.L2.Right.LTptT2L2Node_pos[1]);
  AnyVar LTptT3L3Z      = (Right.LTptT3L3Node_pos[2]     -.L3.Right.LTptT3L3Node_pos[2])         /(Right.LTptT3L3Node_pos[1]     -.L3.Right.LTptT3L3Node_pos[1]);
  AnyVar LTptT4L4Z      = (Right.LTptT4L4Node_pos[2]     -.L4.Right.LTptT4L4Node_pos[2])         /(Right.LTptT4L4Node_pos[1]     -.L4.Right.LTptT4L4Node_pos[1]);
  AnyVar LTptT5L5Z      = (Right.LTptT5L5Node_pos[2]     -.L5.Right.LTptT5L5Node_pos[2])         /(Right.LTptT5L5Node_pos[1]     -.L5.Right.LTptT5L5Node_pos[1]);
  AnyVar LTptT6S1Z      = (Right.LTptT6S1Node_pos[2]     -.Pelvis.Right.LTptT6S1Node_pos[2])     /(Right.LTptT6S1Node_pos[1]     -.Pelvis.Right.LTptT6S1Node_pos[1]);
  AnyVar LTptT7S2Z      = (Right.LTptT7S2Node_pos[2]     -.Pelvis.Right.LTptT7S2Node_pos[2])     /(Right.LTptT7S2Node_pos[1]     -.Pelvis.Right.LTptT7S2Node_pos[1]);
  AnyVar LTptT8S3Z      = (Right.LTptT8S3Node_pos[2]     -.Pelvis.Right.LTptT8S3Node_pos[2])     /(Right.LTptT8S3Node_pos[1]     -.Pelvis.Right.LTptT8S3Node_pos[1]);
  AnyVar LTptT9S4Z      = (Right.LTptT9S4Node_pos[2]     -.Pelvis.Right.LTptT9S4Node_pos[2])     /(Right.LTptT9S4Node_pos[1]     -.Pelvis.Right.LTptT9S4Node_pos[1]);
  AnyVar LTptT10SacrumZ = (Right.LTptT10SacrumNode_pos[2]-.Pelvis.Right.LTptT10SacrumNode_pos[2])/(Right.LTptT10SacrumNode_pos[1]-.Pelvis.Right.LTptT10SacrumNode_pos[1]);
  AnyVar LTptT11SacrumZ = (Right.LTptT11SacrumNode_pos[2]-.Pelvis.Right.LTptT11SacrumNode_pos[2])/(Right.LTptT11SacrumNode_pos[1]-.Pelvis.Right.LTptT11SacrumNode_pos[1]);
  AnyVar LTptT12SacrumZ = (Right.LTptT12SacrumNode_pos[2]-.Pelvis.Right.LTptT12SacrumNode_pos[2])/(Right.LTptT12SacrumNode_pos[1]-.Pelvis.Right.LTptT12SacrumNode_pos[1]);
  AnyVar PMT12I_TMZ = (Right.PMT12I_TMNode_pos[2]-.Pelvis.Right.IliopubicEminenceViaNode_pos[2])/(Right.PMT12I_TMNode_pos[1]-.Pelvis.Right.IliopubicEminenceViaNode_pos[1]);


  AnyFolder Right = {
    AnyFloat LumpedHyoidT1C0Node_pos                        = {0.06000000, 0.4200000, 0.01800000};
    AnyFloat LongusColliT1Node_pos                          = {0.02200000, 0.4480000, 0.008000000};
    AnyFloat ScalenusAnteriorT1C4Node_pos                   = {0.04000000, 0.4320000, 0.04500000};
    AnyFloat ScalenusMediusT1C3Node_pos                     = {0.03200000, 0.4420000, 0.05300000};
    AnyFloat ScalenusPosteriorT1C5Node_pos                  = {0.02200000, 0.4170000, 0.09800000};
    AnyFloat SpleniusCapitisT2C0Node_pos                    = {-0.03800000, 0.4400000, 0.0000000};
    AnyFloat SpleniusCervicisNode_pos                       = {-0.05500000, 0.3920000, 0.0000000};
    AnyFloat SemispinalisCapitisT3C0Node_pos                = {-0.03400000, 0.4270000, 0.03300000};
    AnyFloat SemispinalisCervicisT1C2Node_pos               = {-0.02100000, 0.4740000, 0.03500000};
    AnyFloat SemispinalisCervicisT2C3Node_pos               = {-0.02400000, 0.4510000, 0.03100000};
    AnyFloat SemispinalisCervicisT3C4Node_pos               = {-0.03400000, 0.4270000, 0.03300000};
    AnyFloat SemispinalisCervicisT4C5Node_pos               = {-0.04300000, 0.4030000, 0.03300000};
    AnyFloat SemispinalisCervicisT5C6Node_pos               = {-0.04700000, 0.3770000, 0.03300000};
    AnyFloat SemispinalisCervicisT6C7Node_pos               = {-0.05400000, 0.3480000, 0.03300000};
    AnyFloat LongissimusCapitisT2C0Node_pos                 = {-0.02400000, 0.4510000, 0.03100000};
    AnyFloat LongissimusCervicisT2Node_pos                  = {-0.02400000, 0.4510000, 0.03100000};
    AnyFloat MultifidusCervicisT1C4Node_pos                 = {-0.02100000, 0.4740000, 0.03500000};
    AnyFloat MultifidusCervicisT1C5Node_pos                 = {-0.02100000, 0.4740000, 0.03500000};
    AnyFloat MultifidusCervicisT2C5Node_pos                 = {-0.02400000, 0.4510000, 0.03100000};
    AnyFloat MultifidusCervicisT2C6Node_pos                 = {-0.02400000, 0.4510000, 0.03100000};
    AnyFloat MultifidusCervicisT3C6Node_pos                 = {-0.03400000, 0.4270000, 0.03300000};
    AnyFloat MultifidusCervicisT3C7Node_pos                 = {-0.03400000, 0.4270000, 0.03300000};
    AnyFloat MultifidusCervicisT4C7Node_pos                 = {-0.04300000, 0.4030000, 0.03300000};

    AnyFloat BuckleNode_pos                             = {0.1500000, 0.1800000, 0.1200000};

    AnyVec3 PMT12I_TMNode_pos= {0.040,0.153,0.019}+..PMT12OriginI_TMNodeTranslation;

    AnyFloat ILptC5SIPSVia1Node_pos    = {-0.050,0.336,(ILptC5SIPSNode_pos[2] - .ILptC5SIPSZ*(ILptC5SIPSNode_pos[1] - 0.336))};
    AnyFloat ILptC5SIPSVia2Node_pos    = {-0.052,0.317,(ILptC5SIPSNode_pos[2] - .ILptC5SIPSZ*(ILptC5SIPSNode_pos[1] - 0.317))};
    AnyFloat ILptC5SIPSVia3Node_pos    = {-0.053,0.283,(ILptC5SIPSNode_pos[2] - .ILptC5SIPSZ*(ILptC5SIPSNode_pos[1] - 0.283))};
    AnyFloat ILptC5SIPSVia4Node_pos    = {-0.053,0.252,(ILptC5SIPSNode_pos[2] - .ILptC5SIPSZ*(ILptC5SIPSNode_pos[1] - 0.252))};
    AnyFloat ILptC5SIPSVia5Node_pos    = {-0.051,0.223,(ILptC5SIPSNode_pos[2] - .ILptC5SIPSZ*(ILptC5SIPSNode_pos[1] - 0.223))};
    AnyFloat ILptC5SIPSVia6Node_pos    = {.LSNodeT12_pos[0]+0.005,.LSNodeT12_pos[1],(ILptC5SIPSNode_pos[2] - .ILptC5SIPSZ*(ILptC5SIPSNode_pos[1] - .LSNodeT12_pos[1]))};
    AnyFloat ILptC6SIPSVia1Node_pos    = {-0.052,0.315,(ILptC6SIPSNode_pos[2] - .ILptC6SIPSZ*(ILptC6SIPSNode_pos[1] - 0.315))};
    AnyFloat ILptC6SIPSVia2Node_pos    = {-0.054,0.283,(ILptC6SIPSNode_pos[2] - .ILptC6SIPSZ*(ILptC6SIPSNode_pos[1] - 0.283))};
    AnyFloat ILptC6SIPSVia3Node_pos    = {-0.053,0.250,(ILptC6SIPSNode_pos[2] - .ILptC6SIPSZ*(ILptC6SIPSNode_pos[1] - 0.250))};
    AnyFloat ILptC6SIPSVia4Node_pos    = {-0.051,0.222,(ILptC6SIPSNode_pos[2] - .ILptC6SIPSZ*(ILptC6SIPSNode_pos[1] - 0.222))};
    AnyFloat ILptC6SIPSVia5Node_pos    = {.LSNodeT12_pos[0]+0.005,.LSNodeT12_pos[1],(ILptC6SIPSNode_pos[2] - .ILptC6SIPSZ*(ILptC6SIPSNode_pos[1] - .LSNodeT12_pos[1]))};
    AnyFloat ILptC7CIVia1Node_pos      = {-0.054,0.282,(ILptC7CINode_pos[2] - .ILptC7CIZ*(ILptC7CINode_pos[1] - 0.282))};
    AnyFloat ILptC7CIVia2Node_pos      = {-0.053,0.249,(ILptC7CINode_pos[2] - .ILptC7CIZ*(ILptC7CINode_pos[1] - 0.249))};
    AnyFloat ILptC7CIVia3Node_pos      = {-0.051,0.220,(ILptC7CINode_pos[2] - .ILptC7CIZ*(ILptC7CINode_pos[1] - 0.220))};
    AnyFloat ILptC7CIVia4Node_pos      = {.LSNodeT12_pos[0]+0.005,.LSNodeT12_pos[1],(ILptC7CINode_pos[2] - .ILptC7CIZ*(ILptC7CINode_pos[1] - .LSNodeT12_pos[1]))};
    AnyFloat ILptC8CIVia1Node_pos      = {-0.053,0.245,(ILptC8CINode_pos[2] - .ILptC8CIZ*(ILptC8CINode_pos[1] - 0.245))};
    AnyFloat ILptC8CIVia2Node_pos      = {-0.051,0.218,(ILptC8CINode_pos[2] - .ILptC8CIZ*(ILptC8CINode_pos[1] - 0.218))};
    AnyFloat ILptC8CIVia3Node_pos      = {.LSNodeT12_pos[0]+0.005,.LSNodeT12_pos[1],(ILptC8CINode_pos[2] - .ILptC8CIZ*(ILptC8CINode_pos[1] - .LSNodeT12_pos[1]))};
    AnyFloat ILptC9CIVia1Node_pos      = {-0.050,0.216,(ILptC9CINode_pos[2] - .ILptC9CIZ*(ILptC9CINode_pos[1] - 0.216))};
    AnyFloat ILptC9CIVia2Node_pos      = {.LSNodeT12_pos[0]+0.005,.LSNodeT12_pos[1],(ILptC9CINode_pos[2] - .ILptC9CIZ*(ILptC9CINode_pos[1] - .LSNodeT12_pos[1]))};
    AnyFloat ILptC10CIVia1Node_pos     = {.LSNodeT12_pos[0]+0.005,.LSNodeT12_pos[1],(ILptC10CINode_pos[2] - .ILptC10CIZ*(ILptC10CINode_pos[1] - .LSNodeT12_pos[1]))};
    AnyFloat LTptT1L1Via1Node_pos      = {-0.022,0.442,(LTptT1L1Node_pos[2] - .LTptT1L1Z*(LTptT1L1Node_pos[1] - 0.442))};
    AnyFloat LTptT1L1Via2Node_pos      = {-0.032,0.420,(LTptT1L1Node_pos[2] - .LTptT1L1Z*(LTptT1L1Node_pos[1] - 0.420))};
    AnyFloat LTptT1L1Via3Node_pos      = {-0.045,0.402,(LTptT1L1Node_pos[2] - .LTptT1L1Z*(LTptT1L1Node_pos[1] - 0.402))};
    AnyFloat LTptT1L1Via4Node_pos      = {-0.050,0.376,(LTptT1L1Node_pos[2] - .LTptT1L1Z*(LTptT1L1Node_pos[1] - 0.376))};
    AnyFloat LTptT1L1Via5Node_pos      = {-0.057,0.347,(LTptT1L1Node_pos[2] - .LTptT1L1Z*(LTptT1L1Node_pos[1] - 0.347))};
    AnyFloat LTptT1L1Via6Node_pos      = {-0.054,0.317,(LTptT1L1Node_pos[2] - .LTptT1L1Z*(LTptT1L1Node_pos[1] - 0.317))};
    AnyFloat LTptT1L1Via7Node_pos      = {-0.051,0.288,(LTptT1L1Node_pos[2] - .LTptT1L1Z*(LTptT1L1Node_pos[1] - 0.288))};
    AnyFloat LTptT1L1Via8Node_pos      = {-0.045,0.263,(LTptT1L1Node_pos[2] - .LTptT1L1Z*(LTptT1L1Node_pos[1] - 0.263))};
    AnyFloat LTptT1L1Via9Node_pos      = {-0.035,0.223,(LTptT1L1Node_pos[2] - .LTptT1L1Z*(LTptT1L1Node_pos[1] - 0.223))};
    AnyFloat LTptT1L1Via10Node_pos     = {-0.028,0.186,(LTptT1L1Node_pos[2] - .LTptT1L1Z*(LTptT1L1Node_pos[1] - 0.186))};
    AnyFloat LTptT1L1Via11Node_pos     = {-0.020,0.158,(LTptT1L1Node_pos[2] - .LTptT1L1Z*(LTptT1L1Node_pos[1] - 0.158))};
    AnyFloat LTptT2L2Via1Node_pos      = {-0.035,0.421,(LTptT2L2Node_pos[2] - .LTptT2L2Z*(LTptT2L2Node_pos[1] - 0.421))};
    AnyFloat LTptT2L2Via2Node_pos      = {-0.044,0.393,(LTptT2L2Node_pos[2] - .LTptT2L2Z*(LTptT2L2Node_pos[1] - 0.393))};
    AnyFloat LTptT2L2Via3Node_pos      = {-0.050,0.376,(LTptT2L2Node_pos[2] - .LTptT2L2Z*(LTptT2L2Node_pos[1] - 0.376))};
    AnyFloat LTptT2L2Via4Node_pos      = {-0.058,0.345,(LTptT2L2Node_pos[2] - .LTptT2L2Z*(LTptT2L2Node_pos[1] - 0.345))};
    AnyFloat LTptT2L2Via5Node_pos      = {-0.057,0.318,(LTptT2L2Node_pos[2] - .LTptT2L2Z*(LTptT2L2Node_pos[1] - 0.318))};
    AnyFloat LTptT2L2Via6Node_pos      = {-0.053,0.288,(LTptT2L2Node_pos[2] - .LTptT2L2Z*(LTptT2L2Node_pos[1] - 0.288))};
    AnyFloat LTptT2L2Via7Node_pos      = {-0.047,0.264,(LTptT2L2Node_pos[2] - .LTptT2L2Z*(LTptT2L2Node_pos[1] - 0.264))};
    AnyFloat LTptT2L2Via8Node_pos      = {-0.042,0.228,(LTptT2L2Node_pos[2] - .LTptT2L2Z*(LTptT2L2Node_pos[1] - 0.228))};
    AnyFloat LTptT2L2Via9Node_pos      = {-0.026,0.190,(LTptT2L2Node_pos[2] - .LTptT2L2Z*(LTptT2L2Node_pos[1] - 0.190))};
    AnyFloat LTptT2L2Via10Node_pos     = {-0.017,0.155,(LTptT2L2Node_pos[2] - .LTptT2L2Z*(LTptT2L2Node_pos[1] - 0.155))};
    AnyFloat LTptT3L3Via1Node_pos      = {-0.041,0.394,(LTptT3L3Node_pos[2] - .LTptT3L3Z*(LTptT3L3Node_pos[1] - 0.394))};
    AnyFloat LTptT3L3Via2Node_pos      = {-0.049,0.372,(LTptT3L3Node_pos[2] - .LTptT3L3Z*(LTptT3L3Node_pos[1] - 0.372))};
    AnyFloat LTptT3L3Via3Node_pos      = {-0.057,0.346,(LTptT3L3Node_pos[2] - .LTptT3L3Z*(LTptT3L3Node_pos[1] - 0.346))};
    AnyFloat LTptT3L3Via4Node_pos      = {-0.057,0.318,(LTptT3L3Node_pos[2] - .LTptT3L3Z*(LTptT3L3Node_pos[1] - 0.318))};
    AnyFloat LTptT3L3Via5Node_pos      = {-0.056,0.289,(LTptT3L3Node_pos[2] - .LTptT3L3Z*(LTptT3L3Node_pos[1] - 0.289))};
    AnyFloat LTptT3L3Via6Node_pos      = {-0.050,0.263,(LTptT3L3Node_pos[2] - .LTptT3L3Z*(LTptT3L3Node_pos[1] - 0.263))};
    AnyFloat LTptT3L3Via7Node_pos      = {-0.042,0.233,(LTptT3L3Node_pos[2] - .LTptT3L3Z*(LTptT3L3Node_pos[1] - 0.233))};
    AnyFloat LTptT3L3Via8Node_pos      = {-0.027,0.189,(LTptT3L3Node_pos[2] - .LTptT3L3Z*(LTptT3L3Node_pos[1] - 0.189))};
    AnyFloat LTptT3L3Via9Node_pos      = {-0.016,0.150,(LTptT3L3Node_pos[2] - .LTptT3L3Z*(LTptT3L3Node_pos[1] - 0.150))};
    AnyFloat LTptT4L4Via1Node_pos      = {-0.045,0.366,(LTptT4L4Node_pos[2] - .LTptT4L4Z*(LTptT4L4Node_pos[1] - 0.366))};
    AnyFloat LTptT4L4Via2Node_pos      = {-0.051,0.347,(LTptT4L4Node_pos[2] - .LTptT4L4Z*(LTptT4L4Node_pos[1] - 0.347))};
    AnyFloat LTptT4L4Via3Node_pos      = {-0.057,0.318,(LTptT4L4Node_pos[2] - .LTptT4L4Z*(LTptT4L4Node_pos[1] - 0.318))};
    AnyFloat LTptT4L4Via4Node_pos      = {-0.058,0.289,(LTptT4L4Node_pos[2] - .LTptT4L4Z*(LTptT4L4Node_pos[1] - 0.289))};
    AnyFloat LTptT4L4Via5Node_pos      = {-0.053,0.267,(LTptT4L4Node_pos[2] - .LTptT4L4Z*(LTptT4L4Node_pos[1] - 0.267))};
    AnyFloat LTptT4L4Via6Node_pos      = {-0.044,0.234,(LTptT4L4Node_pos[2] - .LTptT4L4Z*(LTptT4L4Node_pos[1] - 0.234))};
    AnyFloat LTptT4L4Via7Node_pos      = {-0.033,0.197,(LTptT4L4Node_pos[2] - .LTptT4L4Z*(LTptT4L4Node_pos[1] - 0.197))};
    AnyFloat LTptT4L4Via8Node_pos      = {-0.017,0.156,(LTptT4L4Node_pos[2] - .LTptT4L4Z*(LTptT4L4Node_pos[1] - 0.156))};
    AnyFloat LTptT5L5Via1Node_pos      = {-0.047,0.343,(LTptT5L5Node_pos[2] - .LTptT5L5Z*(LTptT5L5Node_pos[1] - 0.343))};
    AnyFloat LTptT5L5Via2Node_pos      = {-0.054,0.317,(LTptT5L5Node_pos[2] - .LTptT5L5Z*(LTptT5L5Node_pos[1] - 0.317))};
    AnyFloat LTptT5L5Via3Node_pos      = {-0.057,0.289,(LTptT5L5Node_pos[2] - .LTptT5L5Z*(LTptT5L5Node_pos[1] - 0.289))};
    AnyFloat LTptT5L5Via4Node_pos      = {-0.049,0.261,(LTptT5L5Node_pos[2] - .LTptT5L5Z*(LTptT5L5Node_pos[1] - 0.261))};
    AnyFloat LTptT5L5Via5Node_pos      = {-0.042,0.234,(LTptT5L5Node_pos[2] - .LTptT5L5Z*(LTptT5L5Node_pos[1] - 0.234))};
    AnyFloat LTptT5L5Via6Node_pos      = {-0.032,0.196,(LTptT5L5Node_pos[2] - .LTptT5L5Z*(LTptT5L5Node_pos[1] - 0.196))};
    AnyFloat LTptT5L5Via7Node_pos      = {-0.022,0.156,(LTptT5L5Node_pos[2] - .LTptT5L5Z*(LTptT5L5Node_pos[1] - 0.156))};
    AnyFloat LTptT6S1Via1Node_pos      = {-0.047,0.312,(LTptT6S1Node_pos[2] - .LTptT6S1Z*(LTptT6S1Node_pos[1] - 0.312))};
    AnyFloat LTptT6S1Via2Node_pos      = {-0.052,0.288,(LTptT6S1Node_pos[2] - .LTptT6S1Z*(LTptT6S1Node_pos[1] - 0.288))};
    AnyFloat LTptT6S1Via3Node_pos      = {-0.048,0.260,(LTptT6S1Node_pos[2] - .LTptT6S1Z*(LTptT6S1Node_pos[1] - 0.260))};
    AnyFloat LTptT6S1Via4Node_pos      = {-0.046,0.234,(LTptT6S1Node_pos[2] - .LTptT6S1Z*(LTptT6S1Node_pos[1] - 0.234))};
    AnyFloat LTptT6S1Via5Node_pos      = {-0.031,0.196,(LTptT6S1Node_pos[2] - .LTptT6S1Z*(LTptT6S1Node_pos[1] - 0.196))};
    AnyFloat LTptT6S1Via6Node_pos      = {-0.022,0.158,(LTptT6S1Node_pos[2] - .LTptT6S1Z*(LTptT6S1Node_pos[1] - 0.158))};
    AnyFloat LTptT7S2Via1Node_pos      = {-0.052,0.288,(LTptT7S2Node_pos[2] - .LTptT7S2Z*(LTptT7S2Node_pos[1] - 0.288))};
    AnyFloat LTptT7S2Via2Node_pos      = {-0.049,0.260,(LTptT7S2Node_pos[2] - .LTptT7S2Z*(LTptT7S2Node_pos[1] - 0.260))};
    AnyFloat LTptT7S2Via3Node_pos      = {-0.048,0.233,(LTptT7S2Node_pos[2] - .LTptT7S2Z*(LTptT7S2Node_pos[1] - 0.233))};
    AnyFloat LTptT7S2Via4Node_pos      = {-0.033,0.202,(LTptT7S2Node_pos[2] - .LTptT7S2Z*(LTptT7S2Node_pos[1] - 0.202))};
    AnyFloat LTptT7S2Via5Node_pos      = {-0.021,0.165,(LTptT7S2Node_pos[2] - .LTptT7S2Z*(LTptT7S2Node_pos[1] - 0.165))};
    AnyFloat LTptT8S3Via1Node_pos      = {-0.050,0.256,(LTptT8S3Node_pos[2] - .LTptT8S3Z*(LTptT8S3Node_pos[1] - 0.256))};
    AnyFloat LTptT8S3Via2Node_pos      = {-0.048,0.229,(LTptT8S3Node_pos[2] - .LTptT8S3Z*(LTptT8S3Node_pos[1] - 0.229))};
    AnyFloat LTptT8S3Via3Node_pos      = {-0.034,0.201,(LTptT8S3Node_pos[2] - .LTptT8S3Z*(LTptT8S3Node_pos[1] - 0.201))};
    AnyFloat LTptT8S3Via4Node_pos      = {-0.023,0.159,(LTptT8S3Node_pos[2] - .LTptT8S3Z*(LTptT8S3Node_pos[1] - 0.159))};
    AnyFloat LTptT9S4Via1Node_pos      = {-0.051,0.228,(LTptT9S4Node_pos[2] - .LTptT9S4Z*(LTptT9S4Node_pos[1] - 0.228))};
    AnyFloat LTptT9S4Via2Node_pos      = {-0.037,0.200,(LTptT9S4Node_pos[2] - .LTptT9S4Z*(LTptT9S4Node_pos[1] - 0.200))};
    AnyFloat LTptT9S4Via3Node_pos      = {-0.023,0.152,(LTptT9S4Node_pos[2] - .LTptT9S4Z*(LTptT9S4Node_pos[1] - 0.152))};
    AnyFloat LTptT10SacrumVia1Node_pos = {-0.037,0.197,(LTptT10SacrumNode_pos[2] - .LTptT10SacrumZ*(LTptT10SacrumNode_pos[1] - 0.197))};
    AnyFloat LTptT10SacrumVia2Node_pos = {-0.023,0.147,(LTptT10SacrumNode_pos[2] - .LTptT10SacrumZ*(LTptT10SacrumNode_pos[1] - 0.147))};
    AnyFloat LTptT11SacrumVia1Node_pos = {-0.023,0.149,(LTptT11SacrumNode_pos[2] - .LTptT11SacrumZ*(LTptT11SacrumNode_pos[1] - 0.149))};
    AnyFloat QLC12_CINode_pos                               = {-0.01000000, 0.1470000, 0.05700000};
    AnyFloat RACP_CO7Node_1__pos                            = {0.1450000, 0.2360000, 0.010000};
    AnyFloat RACP_CO6Node_2__pos                            = {0.1410000, 0.2660000, 0.0200000};
    AnyFloat RACP_CO5Node_3__pos                            = {0.1350000, 0.290000, 0.0400000};
    AnyFloat RACP_CO5Node_4__pos                            = {0.1350000, 0.290000, 0.0600000};
    AnyFloat RACP_Via_2__pos                                = {0.1510000, 0.2160000, 0.0200000};
    AnyFloat RACP_Via_3__pos                                = {0.1550000, 0.190000, 0.0400000};
    AnyFloat RACP_Via_4__pos                                = {0.1580000, 0.180000, 0.0600000};
    AnyFloat OEC6_RSNode_pos                                = {0.12831205,0.25798428, 0.11569053};
    AnyFloat OEC7_RSNode_pos                                = {0.13488244,0.22149785, 0.12089419};
    AnyFloat OEC8_RSNode_pos                                = {0.14111029,0.18604259, 0.12809466};
    AnyFloat OEC9_RSNode_pos                                = {0.13291441,0.14830206, 0.12934342};
    AnyFloat OEC10_RSNode_pos                              = {0.11703116,0.120634, 0.12460914};
    AnyFloat OEC10a_RSNode_pos                               = {0.086559363,0.12617856, 0.12822376};
    AnyFloat OEC11_CINode_pos                               = {0.050685782,0.11664285, 0.11891787};
    AnyFloat OEC12_CINode_pos                               = {0.0067108595,0.13162032, 0.079510987};
    AnyFloat OICI_C10aNode_pos                              = {0.086559363,0.12617856, 0.12822376};
    AnyFloat OICI_C10Node_pos                              = {0.12267275,0.11959027, 0.12383152};
    AnyFloat OICI_C11Node_pos                               = {0.039111104,0.12144548, 0.11866689};
    AnyFloat OICI_C12Node_pos                               = {0.003000000, 0.1300000, 0.07500000};
    AnyFloat MFL1T8Node_pos                                 = {-0.05600000, 0.2530000, 0.005000000};
    AnyFloat MFL1T9Node_pos                                 = {-0.05100000, 0.2320000, 0.005000000};
    AnyFloat MFL1T10Node_pos                                = {-0.03700000, 0.2100000, 0.007000000};
    AnyFloat MFL2T9Node_pos                                 = {-0.05100000, 0.2320000, 0.005000000};
    AnyFloat MFL2T10Node_pos                                = {-0.04300000, 0.2050000, 0.006000000};
    AnyFloat MFL2T11Node_pos                                = {-0.02700000, 0.1790000, 0.005000000};
    AnyFloat MFL3T10Node_pos                                = {-0.04300000, 0.2050000, 0.006000000};
    AnyFloat MFL3T11Node_pos                                = {-0.02900000, 0.1750000, 0.005000000};
    AnyFloat MFL3T12Node_pos                                = {-0.02000000, 0.1470000, 0.005000000};
    AnyFloat MFL4T11Node_pos                                = {-0.02900000, 0.1750000, 0.005000000};
    AnyFloat MFL4T12Node_pos                                = {-0.02400000, 0.1400000, 0.005000000};
    AnyFloat MFL5T12Node_pos                                = {-0.02400000, 0.1400000, 0.005000000};
    AnyFloat MFT10T5Node_pos                              = {-0.033,0.228,0.020};
    AnyFloat MFT10T6Node_pos                              = {-0.033,0.228,0.020};
    AnyFloat MFT10T7Node_pos                              = {-0.033,0.228,0.020};
    AnyFloat SET10T6Node_pos                              = {-0.036,0.240,0.019};
    AnyFloat SET10T7Node_pos                              = {-0.031,0.240,0.016};
    AnyFloat SET10T8Node_pos                              = {-0.027,0.240,0.013};
    AnyFloat SET12T10Node_pos                             = {-0.040,0.205,0.005};
    AnyFloat SEL1T8Node_pos                                 = {-0.05700000, 0.2620000, 0.005000000};
    AnyFloat SEL1T10Node_pos                                = {-0.03900000, 0.1980000, 0.005000000};
    AnyFloat SEL1T11Node_pos                                = {-0.03100000, 0.1730000, 0.005000000};
    AnyFloat SEL2T9Node_pos                                 = {-0.05300000, 0.2290000, 0.005000000};
    AnyFloat SEL2T10Node_pos                                = {-0.04600000, 0.1910000, 0.005000000};
    AnyFloat SEL2T11Node_pos                                = {-0.03400000, 0.1680000, 0.005000000};
    AnyFloat SEL2T12Node_pos                                = {-0.01900000, 0.1430000, 0.005000000};
    AnyFloat SEL3T11Node_pos                                = {-0.03400000, 0.1640000, 0.005000000};
    AnyFloat SEL3T12Node_pos                                = {-0.02400000, 0.1310000, 0.005000000};

    // Define static AnyVecs for the the coordinates of the upper attachment points of the ES
    // The lower attachment points are defined in Pelvis.any
    AnyVec3 ILptC5SIPSNode_pos = {-0.049,0.357,0.060};
    AnyVec3 ILptC6SIPSNode_pos = {-0.050,0.332,0.060};
    AnyVec3 ILptC7CINode_pos = {-0.052,0.310,0.060};
    AnyVec3 ILptC8CINode_pos = {-0.054,0.276,0.060};
    AnyVec3 ILptC9CINode_pos = {-0.053,0.238,0.060};
    AnyVec3 ILptC10CINode_pos = {-0.050,0.207,0.060};
    AnyVec3 ILptC11CINode_pos = {-0.035,0.177,0.060};
    AnyVec3 ILptC12CINode_pos = {-0.009,0.146,0.060};
    AnyVec3 LTptT1L1Node_pos = {-0.024,0.465,0.040};
    AnyVec3 LTptT2L2Node_pos = {-0.022,0.442,0.040};
    AnyVec3 LTptT3L3Node_pos = {-0.035,0.418,0.040};
    AnyVec3 LTptT4L4Node_pos = {-0.041,0.390,0.040};
    AnyVec3 LTptT5L5Node_pos = {-0.044,0.360,0.040};
    AnyVec3 LTptT6S1Node_pos = {-0.041,0.335,0.040};
    AnyVec3 LTptT7S2Node_pos = {-0.047,0.314,0.040};
    AnyVec3 LTptT8S3Node_pos = {-0.050,0.280,0.040};
    AnyVec3 LTptT9S4Node_pos = {-0.050,0.251,0.040};
    AnyVec3 LTptT10SacrumNode_pos = {-0.050,0.222,0.040};
    AnyVec3 LTptT11SacrumNode_pos = {-0.033,0.189,0.040};
    AnyVec3 LTptT12SacrumNode_pos = {-0.011,0.161,0.040};

  };

  AnyFolder Left = {
    AnyInt MirrorSign = -1;
    AnyFloat MirrorTransform = {{1,0,0},{0,1,0},{0,0, MirrorSign}};

    AnyFloat LumpedHyoidT1C0Node_pos         = .Right.LumpedHyoidT1C0Node_pos * MirrorTransform;
    AnyFloat LongusColliT1Node_pos            = .Right.LongusColliT1Node_pos * MirrorTransform;
    AnyFloat ScalenusAnteriorT1C4Node_pos    = .Right.ScalenusAnteriorT1C4Node_pos * MirrorTransform;
    AnyFloat ScalenusMediusT1C3Node_pos      = .Right.ScalenusMediusT1C3Node_pos * MirrorTransform;
    AnyFloat ScalenusPosteriorT1C5Node_pos   = .Right.ScalenusPosteriorT1C5Node_pos * MirrorTransform;
    AnyFloat SpleniusCapitisT2C0Node_pos    = .Right.SpleniusCapitisT2C0Node_pos * MirrorTransform;
    AnyFloat SpleniusCervicisNode_pos       = .Right.SpleniusCervicisNode_pos * MirrorTransform;
    AnyFloat SemispinalisCapitisT3C0Node_pos  = .Right.SemispinalisCapitisT3C0Node_pos * MirrorTransform;
    AnyFloat SemispinalisCervicisT1C2Node_pos = .Right.SemispinalisCervicisT1C2Node_pos * MirrorTransform;
    AnyFloat SemispinalisCervicisT2C3Node_pos = .Right.SemispinalisCervicisT2C3Node_pos * MirrorTransform;
    AnyFloat SemispinalisCervicisT3C4Node_pos = .Right.SemispinalisCervicisT3C4Node_pos * MirrorTransform;
    AnyFloat SemispinalisCervicisT4C5Node_pos = .Right.SemispinalisCervicisT4C5Node_pos * MirrorTransform;
    AnyFloat SemispinalisCervicisT5C6Node_pos = .Right.SemispinalisCervicisT5C6Node_pos * MirrorTransform;
    AnyFloat SemispinalisCervicisT6C7Node_pos = .Right.SemispinalisCervicisT6C7Node_pos * MirrorTransform;
    AnyFloat LongissimusCapitisT2C0Node_pos   = .Right.LongissimusCapitisT2C0Node_pos * MirrorTransform;
    AnyFloat LongissimusCervicisT2Node_pos    = .Right.LongissimusCervicisT2Node_pos * MirrorTransform;
    AnyFloat MultifidusCervicisT1C4Node_pos   = .Right.MultifidusCervicisT1C4Node_pos * MirrorTransform;
    AnyFloat MultifidusCervicisT1C5Node_pos   = .Right.MultifidusCervicisT1C5Node_pos * MirrorTransform;
    AnyFloat MultifidusCervicisT2C5Node_pos   = .Right.MultifidusCervicisT2C5Node_pos * MirrorTransform;
    AnyFloat MultifidusCervicisT2C6Node_pos   = .Right.MultifidusCervicisT2C6Node_pos * MirrorTransform;
    AnyFloat MultifidusCervicisT3C6Node_pos   = .Right.MultifidusCervicisT3C6Node_pos * MirrorTransform;
    AnyFloat MultifidusCervicisT3C7Node_pos   = .Right.MultifidusCervicisT3C7Node_pos * MirrorTransform;
    AnyFloat MultifidusCervicisT4C7Node_pos   = .Right.MultifidusCervicisT4C7Node_pos * MirrorTransform;
    AnyFloat BuckleNode_pos = .Right.BuckleNode_pos * MirrorTransform;
    AnyFloat PMT12I_TMNode_pos = .Right.PMT12I_TMNode_pos * MirrorTransform;

    AnyFloat ILptC5SIPSNode_pos        = .Right.ILptC5SIPSNode_pos         * MirrorTransform;
    AnyFloat ILptC6SIPSNode_pos        = .Right.ILptC6SIPSNode_pos         * MirrorTransform;
    AnyFloat ILptC7CINode_pos          = .Right.ILptC7CINode_pos           * MirrorTransform;
    AnyFloat ILptC8CINode_pos          = .Right.ILptC8CINode_pos           * MirrorTransform;
    AnyFloat ILptC9CINode_pos          = .Right.ILptC9CINode_pos           * MirrorTransform;
    AnyFloat ILptC10CINode_pos         = .Right.ILptC10CINode_pos          * MirrorTransform;
    AnyFloat ILptC11CINode_pos         = .Right.ILptC11CINode_pos          * MirrorTransform;
    AnyFloat ILptC12CINode_pos         = .Right.ILptC12CINode_pos          * MirrorTransform;
    AnyFloat LTptT1L1Node_pos          = .Right.LTptT1L1Node_pos           * MirrorTransform;
    AnyFloat LTptT2L2Node_pos          = .Right.LTptT2L2Node_pos           * MirrorTransform;
    AnyFloat LTptT3L3Node_pos          = .Right.LTptT3L3Node_pos           * MirrorTransform;
    AnyFloat LTptT4L4Node_pos          = .Right.LTptT4L4Node_pos           * MirrorTransform;
    AnyFloat LTptT5L5Node_pos          = .Right.LTptT5L5Node_pos           * MirrorTransform;
    AnyFloat LTptT6S1Node_pos          = .Right.LTptT6S1Node_pos           * MirrorTransform;
    AnyFloat LTptT7S2Node_pos          = .Right.LTptT7S2Node_pos           * MirrorTransform;
    AnyFloat LTptT8S3Node_pos          = .Right.LTptT8S3Node_pos           * MirrorTransform;
    AnyFloat LTptT9S4Node_pos          = .Right.LTptT9S4Node_pos           * MirrorTransform;
    AnyFloat LTptT10SacrumNode_pos     = .Right.LTptT10SacrumNode_pos      * MirrorTransform;
    AnyFloat LTptT11SacrumNode_pos     = .Right.LTptT11SacrumNode_pos      * MirrorTransform;
    AnyFloat LTptT12SacrumNode_pos     = .Right.LTptT12SacrumNode_pos      * MirrorTransform;
    AnyFloat ILptC5SIPSVia1Node_pos    = .Right.ILptC5SIPSVia1Node_pos     * MirrorTransform;
    AnyFloat ILptC5SIPSVia2Node_pos    = .Right.ILptC5SIPSVia2Node_pos     * MirrorTransform;
    AnyFloat ILptC5SIPSVia3Node_pos    = .Right.ILptC5SIPSVia3Node_pos     * MirrorTransform;
    AnyFloat ILptC5SIPSVia4Node_pos    = .Right.ILptC5SIPSVia4Node_pos     * MirrorTransform;
    AnyFloat ILptC5SIPSVia5Node_pos    = .Right.ILptC5SIPSVia5Node_pos     * MirrorTransform;
    AnyFloat ILptC5SIPSVia6Node_pos    = .Right.ILptC5SIPSVia6Node_pos     * MirrorTransform;
    AnyFloat ILptC6SIPSVia1Node_pos    = .Right.ILptC6SIPSVia1Node_pos     * MirrorTransform;
    AnyFloat ILptC6SIPSVia2Node_pos    = .Right.ILptC6SIPSVia2Node_pos     * MirrorTransform;
    AnyFloat ILptC6SIPSVia3Node_pos    = .Right.ILptC6SIPSVia3Node_pos     * MirrorTransform;
    AnyFloat ILptC6SIPSVia4Node_pos    = .Right.ILptC6SIPSVia4Node_pos     * MirrorTransform;
    AnyFloat ILptC6SIPSVia5Node_pos    = .Right.ILptC6SIPSVia5Node_pos     * MirrorTransform;
    AnyFloat ILptC7CIVia1Node_pos      = .Right.ILptC7CIVia1Node_pos       * MirrorTransform;
    AnyFloat ILptC7CIVia2Node_pos      = .Right.ILptC7CIVia2Node_pos       * MirrorTransform;
    AnyFloat ILptC7CIVia3Node_pos      = .Right.ILptC7CIVia3Node_pos       * MirrorTransform;
    AnyFloat ILptC7CIVia4Node_pos      = .Right.ILptC7CIVia4Node_pos       * MirrorTransform;
    AnyFloat ILptC8CIVia1Node_pos      = .Right.ILptC8CIVia1Node_pos       * MirrorTransform;
    AnyFloat ILptC8CIVia2Node_pos      = .Right.ILptC8CIVia2Node_pos       * MirrorTransform;
    AnyFloat ILptC8CIVia3Node_pos      = .Right.ILptC8CIVia3Node_pos       * MirrorTransform;
    AnyFloat ILptC9CIVia1Node_pos      = .Right.ILptC9CIVia1Node_pos       * MirrorTransform;
    AnyFloat ILptC9CIVia2Node_pos      = .Right.ILptC9CIVia2Node_pos       * MirrorTransform;
    AnyFloat ILptC10CIVia1Node_pos     = .Right.ILptC10CIVia1Node_pos      * MirrorTransform;
    AnyFloat LTptT1L1Via1Node_pos      = .Right.LTptT1L1Via1Node_pos       * MirrorTransform;
    AnyFloat LTptT1L1Via2Node_pos      = .Right.LTptT1L1Via2Node_pos       * MirrorTransform;
    AnyFloat LTptT1L1Via3Node_pos      = .Right.LTptT1L1Via3Node_pos       * MirrorTransform;
    AnyFloat LTptT1L1Via4Node_pos      = .Right.LTptT1L1Via4Node_pos       * MirrorTransform;
    AnyFloat LTptT1L1Via5Node_pos      = .Right.LTptT1L1Via5Node_pos       * MirrorTransform;
    AnyFloat LTptT1L1Via6Node_pos      = .Right.LTptT1L1Via6Node_pos       * MirrorTransform;
    AnyFloat LTptT1L1Via7Node_pos      = .Right.LTptT1L1Via7Node_pos       * MirrorTransform;
    AnyFloat LTptT1L1Via8Node_pos      = .Right.LTptT1L1Via8Node_pos       * MirrorTransform;
    AnyFloat LTptT1L1Via9Node_pos      = .Right.LTptT1L1Via9Node_pos       * MirrorTransform;
    AnyFloat LTptT1L1Via10Node_pos     = .Right.LTptT1L1Via10Node_pos      * MirrorTransform;
    AnyFloat LTptT1L1Via11Node_pos     = .Right.LTptT1L1Via11Node_pos      * MirrorTransform;
    AnyFloat LTptT2L2Via1Node_pos      = .Right.LTptT2L2Via1Node_pos       * MirrorTransform;
    AnyFloat LTptT2L2Via2Node_pos      = .Right.LTptT2L2Via2Node_pos       * MirrorTransform;
    AnyFloat LTptT2L2Via3Node_pos      = .Right.LTptT2L2Via3Node_pos       * MirrorTransform;
    AnyFloat LTptT2L2Via4Node_pos      = .Right.LTptT2L2Via4Node_pos       * MirrorTransform;
    AnyFloat LTptT2L2Via5Node_pos      = .Right.LTptT2L2Via5Node_pos       * MirrorTransform;
    AnyFloat LTptT2L2Via6Node_pos      = .Right.LTptT2L2Via6Node_pos       * MirrorTransform;
    AnyFloat LTptT2L2Via7Node_pos      = .Right.LTptT2L2Via7Node_pos       * MirrorTransform;
    AnyFloat LTptT2L2Via8Node_pos      = .Right.LTptT2L2Via8Node_pos       * MirrorTransform;
    AnyFloat LTptT2L2Via9Node_pos      = .Right.LTptT2L2Via9Node_pos       * MirrorTransform;
    AnyFloat LTptT2L2Via10Node_pos     = .Right.LTptT2L2Via10Node_pos      * MirrorTransform;
    AnyFloat LTptT3L3Via1Node_pos      = .Right.LTptT3L3Via1Node_pos       * MirrorTransform;
    AnyFloat LTptT3L3Via2Node_pos      = .Right.LTptT3L3Via2Node_pos       * MirrorTransform;
    AnyFloat LTptT3L3Via3Node_pos      = .Right.LTptT3L3Via3Node_pos       * MirrorTransform;
    AnyFloat LTptT3L3Via4Node_pos      = .Right.LTptT3L3Via4Node_pos       * MirrorTransform;
    AnyFloat LTptT3L3Via5Node_pos      = .Right.LTptT3L3Via5Node_pos       * MirrorTransform;
    AnyFloat LTptT3L3Via6Node_pos      = .Right.LTptT3L3Via6Node_pos       * MirrorTransform;
    AnyFloat LTptT3L3Via7Node_pos      = .Right.LTptT3L3Via7Node_pos       * MirrorTransform;
    AnyFloat LTptT3L3Via8Node_pos      = .Right.LTptT3L3Via8Node_pos       * MirrorTransform;
    AnyFloat LTptT3L3Via9Node_pos      = .Right.LTptT3L3Via9Node_pos       * MirrorTransform;
    AnyFloat LTptT4L4Via1Node_pos      = .Right.LTptT4L4Via1Node_pos       * MirrorTransform;
    AnyFloat LTptT4L4Via2Node_pos      = .Right.LTptT4L4Via2Node_pos       * MirrorTransform;
    AnyFloat LTptT4L4Via3Node_pos      = .Right.LTptT4L4Via3Node_pos       * MirrorTransform;
    AnyFloat LTptT4L4Via4Node_pos      = .Right.LTptT4L4Via4Node_pos       * MirrorTransform;
    AnyFloat LTptT4L4Via5Node_pos      = .Right.LTptT4L4Via5Node_pos       * MirrorTransform;
    AnyFloat LTptT4L4Via6Node_pos      = .Right.LTptT4L4Via6Node_pos       * MirrorTransform;
    AnyFloat LTptT4L4Via7Node_pos      = .Right.LTptT4L4Via7Node_pos       * MirrorTransform;
    AnyFloat LTptT4L4Via8Node_pos      = .Right.LTptT4L4Via8Node_pos       * MirrorTransform;
    AnyFloat LTptT5L5Via1Node_pos      = .Right.LTptT5L5Via1Node_pos       * MirrorTransform;
    AnyFloat LTptT5L5Via2Node_pos      = .Right.LTptT5L5Via2Node_pos       * MirrorTransform;
    AnyFloat LTptT5L5Via3Node_pos      = .Right.LTptT5L5Via3Node_pos       * MirrorTransform;
    AnyFloat LTptT5L5Via4Node_pos      = .Right.LTptT5L5Via4Node_pos       * MirrorTransform;
    AnyFloat LTptT5L5Via5Node_pos      = .Right.LTptT5L5Via5Node_pos       * MirrorTransform;
    AnyFloat LTptT5L5Via6Node_pos      = .Right.LTptT5L5Via6Node_pos       * MirrorTransform;
    AnyFloat LTptT5L5Via7Node_pos      = .Right.LTptT5L5Via7Node_pos       * MirrorTransform;
    AnyFloat LTptT6S1Via1Node_pos      = .Right.LTptT6S1Via1Node_pos       * MirrorTransform;
    AnyFloat LTptT6S1Via2Node_pos      = .Right.LTptT6S1Via2Node_pos       * MirrorTransform;
    AnyFloat LTptT6S1Via3Node_pos      = .Right.LTptT6S1Via3Node_pos       * MirrorTransform;
    AnyFloat LTptT6S1Via4Node_pos      = .Right.LTptT6S1Via4Node_pos       * MirrorTransform;
    AnyFloat LTptT6S1Via5Node_pos      = .Right.LTptT6S1Via5Node_pos       * MirrorTransform;
    AnyFloat LTptT6S1Via6Node_pos      = .Right.LTptT6S1Via6Node_pos       * MirrorTransform;
    AnyFloat LTptT7S2Via1Node_pos      = .Right.LTptT7S2Via1Node_pos       * MirrorTransform;
    AnyFloat LTptT7S2Via2Node_pos      = .Right.LTptT7S2Via2Node_pos       * MirrorTransform;
    AnyFloat LTptT7S2Via3Node_pos      = .Right.LTptT7S2Via3Node_pos       * MirrorTransform;
    AnyFloat LTptT7S2Via4Node_pos      = .Right.LTptT7S2Via4Node_pos       * MirrorTransform;
    AnyFloat LTptT7S2Via5Node_pos      = .Right.LTptT7S2Via5Node_pos       * MirrorTransform;
    AnyFloat LTptT8S3Via1Node_pos      = .Right.LTptT8S3Via1Node_pos       * MirrorTransform;
    AnyFloat LTptT8S3Via2Node_pos      = .Right.LTptT8S3Via2Node_pos       * MirrorTransform;
    AnyFloat LTptT8S3Via3Node_pos      = .Right.LTptT8S3Via3Node_pos       * MirrorTransform;
    AnyFloat LTptT8S3Via4Node_pos      = .Right.LTptT8S3Via4Node_pos       * MirrorTransform;
    AnyFloat LTptT9S4Via1Node_pos      = .Right.LTptT9S4Via1Node_pos       * MirrorTransform;
    AnyFloat LTptT9S4Via2Node_pos      = .Right.LTptT9S4Via2Node_pos       * MirrorTransform;
    AnyFloat LTptT9S4Via3Node_pos      = .Right.LTptT9S4Via3Node_pos       * MirrorTransform;
    AnyFloat LTptT10SacrumVia1Node_pos = .Right.LTptT10SacrumVia1Node_pos  * MirrorTransform;
    AnyFloat LTptT10SacrumVia2Node_pos = .Right.LTptT10SacrumVia2Node_pos  * MirrorTransform;
    AnyFloat LTptT11SacrumVia1Node_pos = .Right.LTptT11SacrumVia1Node_pos  * MirrorTransform;
    AnyFloat QLC12_CINode_pos        = .Right.QLC12_CINode_pos * MirrorTransform;
    AnyFloat RACP_CO7Node_1__pos  = .Right.RACP_CO7Node_1__pos * MirrorTransform;
    AnyFloat RACP_CO6Node_2__pos  = .Right.RACP_CO6Node_2__pos * MirrorTransform;
    AnyFloat RACP_CO5Node_3__pos = .Right.RACP_CO5Node_3__pos * MirrorTransform;
    AnyFloat RACP_CO5Node_4__pos = .Right.RACP_CO5Node_4__pos * MirrorTransform;
    AnyFloat RACP_Via_2__pos      = .Right.RACP_Via_2__pos * MirrorTransform;
    AnyFloat RACP_Via_3__pos     = .Right.RACP_Via_3__pos * MirrorTransform;
    AnyFloat RACP_Via_4__pos     = .Right.RACP_Via_4__pos * MirrorTransform;
    AnyFloat OEC6_RSNode_pos          = .Right.OEC6_RSNode_pos * MirrorTransform;
    AnyFloat OEC7_RSNode_pos        = .Right.OEC7_RSNode_pos * MirrorTransform;
    AnyFloat OEC8_RSNode_pos        = .Right.OEC8_RSNode_pos * MirrorTransform;
    AnyFloat OEC9_RSNode_pos        = .Right.OEC9_RSNode_pos * MirrorTransform;
    AnyFloat OEC10_RSNode_pos    = .Right.OEC10_RSNode_pos * MirrorTransform;
    AnyFloat OEC10a_RSNode_pos        = .Right.OEC10a_RSNode_pos * MirrorTransform;
    AnyFloat OEC11_CINode_pos        = .Right.OEC11_CINode_pos * MirrorTransform;
    AnyFloat OEC12_CINode_pos          = .Right.OEC12_CINode_pos * MirrorTransform;
    AnyFloat OICI_C10aNode_pos        = .Right.OICI_C10aNode_pos * MirrorTransform;
    AnyFloat OICI_C10Node_pos       = .Right.OICI_C10Node_pos * MirrorTransform;
    AnyFloat OICI_C11Node_pos         = .Right.OICI_C11Node_pos * MirrorTransform;
    AnyFloat OICI_C12Node_pos         = .Right.OICI_C12Node_pos * MirrorTransform;
    AnyFloat MFL1T8Node_pos           = .Right.MFL1T8Node_pos * MirrorTransform;
    AnyFloat MFL1T9Node_pos           = .Right.MFL1T9Node_pos * MirrorTransform;
    AnyFloat MFL1T10Node_pos          = .Right.MFL1T10Node_pos * MirrorTransform;
    AnyFloat MFL2T9Node_pos           = .Right.MFL2T9Node_pos * MirrorTransform;
    AnyFloat MFL2T10Node_pos          = .Right.MFL2T10Node_pos * MirrorTransform;
    AnyFloat MFL2T11Node_pos          = .Right.MFL2T11Node_pos * MirrorTransform;
    AnyFloat MFL3T10Node_pos          = .Right.MFL3T10Node_pos * MirrorTransform;
    AnyFloat MFL3T11Node_pos          = .Right.MFL3T11Node_pos * MirrorTransform;
    AnyFloat MFL3T12Node_pos          = .Right.MFL3T12Node_pos * MirrorTransform;
    AnyFloat MFL4T11Node_pos          = .Right.MFL4T11Node_pos * MirrorTransform;
    AnyFloat MFL4T12Node_pos          = .Right.MFL4T12Node_pos * MirrorTransform;
    AnyFloat MFT10T5Node_pos          = .Right.MFT10T5Node_pos * MirrorTransform;
    AnyFloat MFT10T6Node_pos          = .Right.MFT10T6Node_pos * MirrorTransform;
    AnyFloat MFT10T7Node_pos          = .Right.MFT10T7Node_pos * MirrorTransform;
    AnyFloat MFL5T12Node_pos          = .Right.MFL5T12Node_pos * MirrorTransform;
    AnyFloat SET10T6Node_pos          = .Right.SET10T6Node_pos * MirrorTransform;
    AnyFloat SET10T7Node_pos          = .Right.SET10T7Node_pos * MirrorTransform;
    AnyFloat SET10T8Node_pos          = .Right.SET10T8Node_pos * MirrorTransform;
    AnyFloat SET12T10Node_pos          = .Right.SET12T10Node_pos * MirrorTransform;
    AnyFloat SEL1T8Node_pos           = .Right.SEL1T8Node_pos * MirrorTransform;
    AnyFloat SEL1T10Node_pos          = .Right.SEL1T10Node_pos * MirrorTransform;
    AnyFloat SEL1T11Node_pos          = .Right.SEL1T11Node_pos * MirrorTransform;
    AnyFloat SEL2T9Node_pos           = .Right.SEL2T9Node_pos * MirrorTransform;
    AnyFloat SEL2T10Node_pos          = .Right.SEL2T10Node_pos * MirrorTransform;
    AnyFloat SEL2T11Node_pos          = .Right.SEL2T11Node_pos * MirrorTransform;
    AnyFloat SEL2T12Node_pos          = .Right.SEL2T12Node_pos * MirrorTransform;
    AnyFloat SEL3T11Node_pos          = .Right.SEL3T11Node_pos * MirrorTransform;
    AnyFloat SEL3T12Node_pos          = .Right.SEL3T12Node_pos * MirrorTransform;
  };
};

// Definition of lumbar ligament attachment points
Thorax = {
  // Defined previously
  //AnyFloat ALLNodeInferior_pos = {0.038,0.166,0};
  //AnyFloat PLLNodeInferior_pos = {0.009,0.15,0}; //on T12
  //AnyFloat PLLViaNode_pos = {0.004,0.164,0}; //on T12
  //AnyFloat PLLNodeSuperior_pos = {-0.003,0.18,0}; //on T11
  // inter/supraspinous
  AnyFloat InterspinousInferior_pos = {-0.018,0.136,0};
  AnyFloat SupraspinousInferior_pos = {-0.028,0.126,0};

  Right = {
    AnyFloat FlavumInferior_pos = {-0.00001198, 0.1404274, 0.00745881};
    AnyFloat InterTransverse_pos = {-0.01243741, 0.1655881, 0.02496396};
    AnyFloat InterTransversemid_pos = {0.0005667311, 0.1610546, 0.02087555};

  };

  Left = {
    AnyFloat FlavumInferior_pos = .Right.FlavumInferior_pos * MirrorTransform;
    AnyFloat InterTransverse_pos = .Right.InterTransverse_pos * MirrorTransform;
    AnyFloat InterTransversemid_pos = .Right.InterTransversemid_pos * MirrorTransform;
  };
};
