AnyMuscleModel3E Coracobrachialis =
{
  F0 = 608;
  Lfbar = 0.035;
  Gammabar = 0.61;
  Epsilonbar = 0.05;
  Lt0 = 0.0;
  //Fcfast = 0;
  //Jt = 0;
  //Jpe = 0;
  K1 = 2;
  //K2 = 8;
  //PEFactor = 0;
};

AnyMuscleModel3E Supraspinatus1 =
{
  F0 = 3248;
  Lfbar = 0.09;
  Gammabar = 0.52;
  Epsilonbar = 0.05;
  Lt0 = 0.42;
  //Fcfast = 0;
  //Jt = 0;
  //Jpe = 0;
  K1 = 2;
  //K2 = 8;
  //PEFactor = 0;
};

AnyMuscleModel3E Supraspinatus2 =
{
  F0 = 3248;
  Lfbar = 0.09;
  Gammabar = 0.52;
  Epsilonbar = 0.05;
  Lt0 = 0.36;
  //Fcfast = 0;
  //Jt = 0;
  //Jpe = 0;
  K1 = 2;
  //K2 = 8;
  //PEFactor = 0;

};

AnyMuscleModel3E Subscapularis =
{
  F0 = 9391;
  Lfbar = 0.03;
  Gammabar = 0.35;
  Epsilonbar = 0.05;
  Lt0 = 0.4;
  //Fcfast = 0;
  //Jt = 0;
  //Jpe = 0;
  K1 = 2;
  //K2 = 8;
  //PEFactor = 0;
};

AnyMuscleModel3E Infraspinatus =
{
  F0 = 8677;
  Lfbar = 0.04;
  Gammabar = 0.47;
  Epsilonbar = 0.05;
  Lt0 = 0.475;
  //Fcfast = 0;
  //Jt = 0;
  //Jpe = 0;
  K1 = 2;
  //K2 = 8;
  //PEFactor = 0;
};

AnyMuscleModel3E BicepsBrachii =
{
  F0 = 2093;
  Lfbar = 0.04;
  Gammabar = 0.66;
  Epsilonbar = 0.05;
  Lt0 = 0.27;
  //Fcfast = 0;
  //Jt = 0;
  //Jpe = 0;
  K1 = 2;
  //K2 = 8;
  //PEFactor = 0;
};

AnyMuscleModel3E TricepsBrachii =
{
  F0 = 100;
  Lfbar = 0;
  Gammabar = 0;
  Epsilonbar = 0.05;
  Lt0 = 0;
  //Fcfast = 0;
  //Jt = 0;
  //Jpe = 0;
  K1 = 2;
  //K2 = 8;
  //PEFactor = 0;
};

AnyMuscleModel3E Brachialis =
{
  F0 = 400;
  Lfbar = 0.18;
  Gammabar = 0.17;
  Epsilonbar = 0.05;
  Lt0 = 0.28;
  //Fcfast = 0;
  //Jt = 0;
  //Jpe = 0;
  K1 = 2;
  //K2 = 8;
  //PEFactor = 0;
};

AnyMuscleModel3E Anconeus =
{
  F0 = 177;
  Lfbar = 0.12;
  Gammabar = 0;
  Epsilonbar = 0.05;
  Lt0 = 0.18;
  //Fcfast = 0;
  //Jt = 0;
  //Jpe = 0;
  K1 = 2;
  //K2 = 8;
  //PEFactor = 0;
};

AnyMuscleModel3E TricepsBrachiiMed =
{
  F0 = 0;
  Lfbar = 0;
  Gammabar = 0;
  Epsilonbar = 0.05;
  Lt0 = 0;
  //Fcfast = 0;
  //Jt = 0;
  //Jpe = 0;
  K1 = 2;
  //K2 = 8;
  //PEFactor = 0;
};

AnyMuscleModel3E TricepsBrachiiLat =
{
  F0 = 0;
  Lfbar = 0;
  Gammabar = 0;
  Epsilonbar = 0.05;
  Lt0 = 0;
  //Fcfast = 0;
  //Jt = 0;
  //Jpe = 0;
  K1 = 2;
  //K2 = 8;
  //PEFactor = 0;
};

AnyMuscleModel3E TricepsBrachiiCau =
{
  F0 = 0;
  Lfbar = 0;
  Gammabar = 0;
  Epsilonbar = 0.05;
  Lt0 = 0;
  //Fcfast = 0;
  //Jt = 0;
  //Jpe = 0;
  K1 = 2;
  //K2 = 8;
  //PEFactor = 0;
};

AnyMuscleModel3E FlexorCarpiRadialis =
{
  F0 = 0;
  Lfbar = 0;
  Gammabar = 0;
  Epsilonbar = 0.05;
  Lt0 = 0;
  //Fcfast = 0;
  //Jt = 0;
  //Jpe = 0;
  K1 = 2;
  //K2 = 8;
  //PEFactor = 0;
};

AnyMuscleModel3E FlexorCarpiUlnaris1 =
{
  F0 = 0;
  Lfbar = 0;
  Gammabar = 0;
  Epsilonbar = 0.05;
  Lt0 = 0;
  //Fcfast = 0;
  //Jt = 0;
  //Jpe = 0;
  K1 = 2;
  //K2 = 8;
  //PEFactor = 0;
};

AnyMuscleModel3E FlexorCarpiUlnaris2 =
{
  F0 = 0;
  Lfbar = 0;
  Gammabar = 0;
  Epsilonbar = 0.05;
  Lt0 = 0;
  //Fcfast = 0;
  //Jt = 0;
  //Jpe = 0;
  K1 = 2;
  //K2 = 8;
  //PEFactor = 0;
};

AnyMuscleModel3E ExtensorCarpiRadialis =
{
  F0 = 0;
  Lfbar = 0;
  Gammabar = 0;
  Epsilonbar = 0.05;
  Lt0 = 0;
  //Fcfast = 0;
  //Jt = 0;
  //Jpe = 0;
  K1 = 2;
  //K2 = 8;
  //PEFactor = 0;
};

AnyMuscleModel3E ExtensorCarpiUlnaris =
{
  F0 = 0;
  Lfbar = 0;
  Gammabar = 0;
  Epsilonbar = 0.05;
  Lt0 = 0;
  //Fcfast = 0;
  //Jt = 0;
  //Jpe = 0;
  K1 = 2;
  //K2 = 8;
  //PEFactor = 0;
};

AnyMuscleModel3E FlexorDigiSuperficialis =
{
  F0 = 0;
  Lfbar = 0;
  Gammabar = 0;
  Epsilonbar = 0.05;
  Lt0 = 0;
  //Fcfast = 0;
  //Jt = 0;
  //Jpe = 0;
  K1 = 2;
  //K2 = 8;
  //PEFactor = 0;
};

AnyMuscleModel3E ExtensorDigitorumCommunisMed =
{
  F0 = 0;
  Lfbar = 0;
  Gammabar = 0;
  Epsilonbar = 0.05;
  Lt0 = 0;
  //Fcfast = 0;
  //Jt = 0;
  //Jpe = 0;
  K1 = 2;
  //K2 = 8;
  //PEFactor = 0;
};

AnyMuscleModel3E ExtensorDigitorumCommunisLat =
{
  F0 = 0;
  Lfbar = 0;
  Gammabar = 0;
  Epsilonbar = 0.05;
  Lt0 = 0;
  //Fcfast = 0;
  //Jt = 0;
  //Jpe = 0;
  K1 = 2;
  //K2 = 8;
  //PEFactor = 0;
};

AnyMuscleModel3E ExtensorDigitorumLateralis =
{
  F0 = 0;
  Lfbar = 0;
  Gammabar = 0;
  Epsilonbar = 0.05;
  Lt0 = 0;
  //Fcfast = 0;
  //Jt = 0;
  //Jpe = 0;
  K1 = 2;
  //K2 = 8;
  //PEFactor = 0;
};

AnyMuscleModel3E ExtensorDigitorumCommunis =
{
  F0 = 0;
  Lfbar = 0;
  Gammabar = 0;
  Epsilonbar = 0.05;
  Lt0 = 0;
  //Fcfast = 0;
  //Jt = 0;
  //Jpe = 0;
  K1 = 2;
  //K2 = 8;
  //PEFactor = 0;
};
