#path ANYBODY_PATH_OUTPUT "."
#include "../../../../libdef.any"

#include "<ANYBODY_PATH_MODELUTILS>/Video/CameraClassTemplate.any"

#define BM_ARM_RIGHT OFF
#define BM_ARM_LEFT OFF
//#path BM_SCALING_ANTHRO_FILE "AnyManXYZ_markers.any"
#define HEAD_SCALING_XYZ
#include "<ANYBODY_PATH_AMMR>/Application/Examples/StandingModelScalingDisplay/StandingModelScalingDisplay.Main.any"

Main = {

  Main.HumanModel.BodyModel.Trunk.Segments.ThoraxSeg.DrwSurf.Visible = Off;
  Main.HumanModel.BodyModel.Trunk.Segments.C7Seg.DrwSTL.Visible = Off;
  Main.HumanModel.BodyModel.Trunk.Segments.C6Seg.DrwSTL.Visible = Off;
  Main.HumanModel.BodyModel.Trunk.Segments.C5Seg.DrwSTL.Visible = Off;
  Main.HumanModel.BodyModel.Trunk.Segments.C4Seg.DrwSTL.Visible = Off;
  Main.HumanModel.BodyModel.Trunk.Segments.C3Seg.DrwSTL.Visible = Off;
  Main.HumanModel.BodyModel.Trunk.Segments.C2Seg.DrwSTL.Visible = Off;
  Main.HumanModel.BodyModel.Trunk.Segments.C1Seg.DrwSTL.Visible = Off;


  Main.HumanModel.BodyModel.Trunk.Segments.ThoraxSeg.T1C7JntNode.DrwNode.Visible = Off;
  Main.HumanModel.BodyModel.Trunk.Segments.C7Seg.C7C6JntNode.DrwNode.Visible = Off;
  Main.HumanModel.BodyModel.Trunk.Segments.C6Seg.C6C5JntNode.DrwNode.Visible = Off;
  Main.HumanModel.BodyModel.Trunk.Segments.C5Seg.C5C4JntNode.DrwNode.Visible = Off;
  Main.HumanModel.BodyModel.Trunk.Segments.C4Seg.C4C3JntNode.DrwNode.Visible = Off;
  Main.HumanModel.BodyModel.Trunk.Segments.C3Seg.C3C2JntNode.DrwNode.Visible = Off;
  Main.HumanModel.BodyModel.Trunk.Segments.C2Seg.C2C1JntNode.DrwNode.Visible = Off;

  VideoLookAtCamera Static_image(UP_DIRECTION=y, _AUTO_OPEN_PREVIEW_=OFF) =
  {
    VideoName = "HeadMarkersFrontView";
    Analysis = {
      AnyOperation &ref = Main.Study.InitialConditions;
    };
    VideoInputScale = 5;
    VideoResolution = {300,300};
    CameraLookAtPoint = Main.HumanModel.BodyModel.Trunk.Segments.SkullSeg.r-{0.0,0.2,0.0};
    CameraFieldOfView = DesignVar(0.35);
    CameraDirection  = {1,0.0,0.0};
    BackgroundColor = DesignVar({1,1,1});

    Preview.FileName = VideoName + ".jpg";


  };

  VideoLookAtCamera Static_image2(UP_DIRECTION=y, _AUTO_OPEN_PREVIEW_=OFF) =
  {
    VideoName = "HeadMarkersLateralView";
    Analysis = {
      AnyOperation &ref = Main.Study.InitialConditions;
    };
    VideoInputScale = 5;
    VideoResolution = {300,300};
    CameraLookAtPoint = Main.HumanModel.BodyModel.Trunk.Segments.SkullSeg.r-{0.0,0.2,0.0};
    CameraFieldOfView = DesignVar(0.35);
    CameraDirection  = {0.0,0.0,1.0};
    BackgroundColor = DesignVar({1,1,1});

    Preview.FileName = VideoName + ".jpg";

  };
  AnyOperationSequence GenerateImages =
  {
     AnyOperation&  init = Main.Study.InitialConditions;
     AnyOperation& CreateBack = Main.Static_image.Preview;
     AnyOperation& CreateFront = Main.Static_image2.Preview;
  };

};
