// Default mannequin values

HumanModel.Mannequin = {

  Posture = {
    //This controls the position of the pelvi wrt. to the global reference frame
    PelvisPosX=0.046;
    PelvisPosY=1.16;
    PelvisPosZ=0;

    //This controls the rotation of the pelvis wrt. to the global reference frame
    PelvisRotX=0;
    PelvisRotY=0;
    PelvisRotZ=0;

    // These variables control the rotation of the thorax wrt the
    // pelvis
    PelvisThoraxExtension=0;
    PelvisThoraxLateralBending=-15;
    PelvisThoraxRotation=0;

    NeckExtension=15;
    NeckLateralBending=15;             // not used when neck is switched off
    NeckRotation=0;                   // not used when neck is switched off

    Right = {
      //Arm
      SternoClavicularProtraction=-23;   //This value is not used for initial position
      SternoClavicularElevation=11.5;    //This value is not used for initial position
      SternoClavicularAxialRotation=-20; //This value is not used for initial position

      GlenohumeralFlexion =-25;
      GlenohumeralAbduction = 0;
      GlenohumeralExternalRotation = -20;

      ElbowFlexion = 50;
      ElbowPronation = 0.0;

      WristFlexion =0;
      WristAbduction =0;

      //Leg
      HipFlexion = 15;
      HipAbduction = 0;
      HipExternalRotation = 90;

      KneeFlexion = 30.0;

      AnklePlantarFlexion =0.0;
      SubTalarEversion =0.0;

      //Detail Hand
      Finger1 ={
        CMCDeviation=-20;
        CMCFlexion=20;
        MCPFlexion= 20;
        MCPDeviation=0;
        DIPFlexion=20;
      };

      Finger2 ={
        MCPFlexion=20;
        PIPFlexion=20;
        DIPFlexion=20;
      };

      Finger3 ={
        MCPFlexion=20;
        PIPFlexion=20;
        DIPFlexion=20;
      };

      Finger4 ={
        MCPFlexion=20;
        PIPFlexion=20;
        DIPFlexion=20;
      };

      Finger5 ={
        MCPFlexion=20;
        PIPFlexion=20;
        DIPFlexion=20;
      };
    };

    Left = {
      //all values are set to be equal to the right side values
      //feel free to change this!

      //Arm
      SternoClavicularProtraction=.Right.SternoClavicularProtraction;
      SternoClavicularElevation=.Right.SternoClavicularElevation;
      SternoClavicularAxialRotation=.Right.SternoClavicularAxialRotation;

      GlenohumeralFlexion = 0 ;
      GlenohumeralAbduction = 75 ;
      GlenohumeralExternalRotation =-25 ;

      ElbowFlexion = 135;
      ElbowPronation = 0;

      WristFlexion =.Right.WristFlexion;
      WristAbduction =.Right.WristAbduction;

      //Leg
      HipFlexion = 0;
      HipAbduction = -5;
      HipExternalRotation = 0.0;

      KneeFlexion = 5;

      AnklePlantarFlexion = .Right.AnklePlantarFlexion ;
      SubTalarEversion =.Right.SubTalarEversion;

      //Detail Hand
      Finger1 ={
        CMCDeviation= -10;
        CMCFlexion= 10;
        MCPFlexion= -20;
        MCPDeviation= 30;
        DIPFlexion= -30;
      };

      Finger2 ={
        MCPFlexion= 80;
        PIPFlexion= 100;
        DIPFlexion= 100;
      };

      Finger3 ={
        MCPFlexion= 80;
        PIPFlexion= 100;
        DIPFlexion= 100;
      };

      Finger4 ={
        MCPFlexion= 80;
        PIPFlexion= 100;
        DIPFlexion= 100;
      };

      Finger5 ={
        MCPFlexion= 80;
        PIPFlexion= 100;
        DIPFlexion= 100;
      };
    };
  };

  PostureVel={
    //This controls the position of the pelvi wrt. to the global reference frame
    PelvisPosX=0;
    PelvisPosY=0;
    PelvisPosZ=0;

    //This controls the rotation of the pelvis wrt. to the global reference frame
    PelvisRotX=0;
    PelvisRotY=0;
    PelvisRotZ=0;

    // These variables control the rotation of the thorax wrt the
    // pelvis
    PelvisThoraxExtension=0;
    PelvisThoraxLateralBending=0;
    PelvisThoraxRotation=0;

    NeckExtension=0;
    NeckLateralBending=0;     // not used when neck is switched off
    NeckRotation=0;           // not used when neck is switched off

    Right = {
      //Arm
      SternoClavicularProtraction=0;   //This value is not used for initial position
      SternoClavicularElevation=0;    //This value is not used for initial position
      SternoClavicularAxialRotation=0; //This value is not used for initial position

      GlenohumeralFlexion =0;
      GlenohumeralAbduction = 0;
      GlenohumeralExternalRotation = 0;

      ElbowFlexion = 0.0;
      ElbowPronation = 0.0;

      WristFlexion =0;
      WristAbduction =0;

      //Leg
      HipFlexion = 0.0;
      HipAbduction = 0.0;
      HipExternalRotation = 50;

      KneeFlexion = 0.0;

      AnklePlantarFlexion =0.0;
      SubTalarEversion =0.0;

    };

    Left = {
      //all values are set to be equal to the right side values
      //feel free to change this!

      //Arm
      SternoClavicularProtraction=.Right.SternoClavicularProtraction;
      SternoClavicularElevation=.Right.SternoClavicularElevation;
      SternoClavicularAxialRotation=.Right.SternoClavicularAxialRotation;

      GlenohumeralFlexion = .Right.GlenohumeralFlexion ;
      GlenohumeralAbduction =.Right.GlenohumeralAbduction ;
      GlenohumeralExternalRotation =.Right.GlenohumeralExternalRotation ;

      ElbowFlexion = .Right.ElbowFlexion;
      ElbowPronation = .Right.ElbowPronation;

      WristFlexion =.Right.WristFlexion;
      WristAbduction =.Right.WristAbduction;

      //Leg
      HipFlexion =.Right.HipFlexion;
      HipAbduction =.Right.HipAbduction;
      HipExternalRotation = .Right.HipExternalRotation;

      KneeFlexion = .Right.KneeFlexion;

      AnklePlantarFlexion = .Right.AnklePlantarFlexion ;
      SubTalarEversion =.Right.SubTalarEversion;

    };
  };

};
