//define = [
//  {'WEIGHTING_TYPE':'MR_Constant'},
//  {'WEIGHTING_TYPE':'MR_Volume'},
//]
//ignore_errors = ['FileReader.FileName']
// Test related setup.

#include "../libdef.any"

#path MOCAP_PATH_MAINFILEDIR "<ANYMOCAP_EXAMPLES>/Plug-in-gait_Simple"
#path MOCAP_PATH_MAINFILE "<MOCAP_PATH_MAINFILEDIR>/FullBody_GRFPrediction.main.any"
#define MOCAP_NAME_MAINFILEDIR "Plug-in-gait_Simple"

#ifndef WEIGHTING_TYPE
#define WEIGHTING_TYPE MR_Volume
#endif


#path TEMP_PATH "..\..\Application\MocapExamples\Plug-in-gait_Simple\Output\"


#include "<MOCAP_PATH_MAINFILE>"

Main =
{

  Studies.InverseDynamicStudy.InverseDynamics.Criterion.WeightingType = WEIGHTING_TYPE;

  AnyOperationSequence  TestRunApplication =
  {
    AnyOperation& LoadParam =  Main.RunAnalysis.LoadParameters;
    AnyOperation& RunAnalysis = Main.RunAnalysis.InverseDynamics;
  };

  #ifndef CREATE_IMAGE
    AnyOperation& RunTest = Main.TestRunApplication;
  #else
    #include "../Cameras.any"
    AnyOperationSequence CameraInitPos =
    {
      AnyOperation& ref1 = Main.RunAnalysis.LoadParameters;
      AnyOperation& ref2 = Main.Studies.InverseDynamicStudy.InitialConditions;
    };
    LoadTimeCam.CameraLookAtPoint = {0.5,0.95,0};
    LoadTimeCam.CameraFieldOfView = DesignVar(2);
    LoadTimeCam.CameraDirection  = {-0.5,0.3,1};
  #endif


};
