//# Defintions for the python test framwork
//define = [
//  {'BM_LEG_MODEL':'_LEG_MODEL_TLEM1_'},
//  {'BM_LEG_MODEL':'_LEG_MODEL_TLEM2_'},
//]
#include "../libdef.any"

#path MOCAP_PATH_MAINFILEDIR "<ANYMOCAP_EXAMPLES>/Plug-in-gait_Simple"
#path MOCAP_PATH_MAINFILE "<MOCAP_PATH_MAINFILEDIR>/LowerExtremity.main.any"
#define MOCAP_NAME_MAINFILEDIR "Plug-in-gait_Simple"


#ifdef TEST_NAME
#define  MOCAP_TEST_FILENAME_PREFIX  TEST_NAME + "_"
#else
#define  MOCAP_TEST_FILENAME_PREFIX  "GUI_"
#define BM_LEG_MODEL _LEG_MODEL_TLEM2_
#endif


// Run Analysis with a reduced number of time steps
// to make test go faster.
#define N_STEP_PARAM_OPT 20
#define N_STEP 30


#include "<MOCAP_PATH_MAINFILE>"

Main =
{

  AnyOperationSequence  RunTest =
  {
    AnyOperation& ParameterId =  Main.RunParameterIdentification;
    AnyOperation& RunAnalysis = Main.RunAnalysis;
  };


};
