//define = [
//  {'BM_LEG_MODEL':'_LEG_MODEL_TLEM1_'},
//  {'BM_LEG_MODEL':'_LEG_MODEL_TLEM2_'},
//]
//ignore_errors = ['FileReader.FileName']


#include "../libdef.any"

#path TEMP_PATH "Output"
#path MOCAP_PATH_MAINFILEDIR "<ANYMOCAP_EXAMPLES>/Plug-in-gait-FullBody"
#path MOCAP_PATH_MAINFILE "<MOCAP_PATH_MAINFILEDIR>/Main.any"
#define MOCAP_NAME_MAINFILEDIR "Plug-in-gait-FullBody"


#ifdef TEST_NAME
#define  MOCAP_TEST_FILENAME_PREFIX  TEST_NAME + "_"
#else
#define  MOCAP_TEST_FILENAME_PREFIX  "GUI_"
#define BM_LEG_MODEL _LEG_MODEL_TLEM1_
#endif


// Run Analysis with a reduced number of time steps
// to make test go faster.
#define N_STEP_PARAM_OPT 15
#define N_STEP_KINEMATICS 197
#define N_STEP 60


#include "<MOCAP_PATH_MAINFILE>"

Main =
{
  AnyOperationSequence  RunTest =
  {
    AnyOperation& ParameterId =  Main.RunParameterIdentification;
    AnyOperation& RunAnalysis = Main.RunAnalysis;
  };


};
