//ignore_errors = [
//  "'Set Value' operation on",
//  "Close to singular position",
//]
//fatal_warnings = True
//pytest_markers=["slow"]
//save_study=[
//  "Main.Studies.MarkerTracking",
//  "Main.Studies.InverseDynamicStudy",
//]


#include "../libdef.any"

#path MOCAP_PATH_MAINFILEDIR "<ANYMOCAP_EXAMPLES>/Plug-in-gait_Simple"
#path MOCAP_PATH_MAINFILE "<MOCAP_PATH_MAINFILEDIR>/FullBody.main.any"
#define MOCAP_NAME_MAINFILEDIR "Plug-in-gait_Simple"

#path TEMP_PATH "Output/"

#ifdef TEST_NAME
#define  MOCAP_TEST_FILENAME_PREFIX  TEST_NAME + "_"
#endif


#include "<MOCAP_PATH_MAINFILE>"

Main =
{
  AnyOperationSequence  RunTest =
  {
    AnyOperationMacro LoadParam = {

       MacroStr = {"classoperation Main " + strquote("Load Values") +" --file="
       + strquote("..\..\Application\MocapExamples\Plug-in-gait_Simple\Output\FullBody_GaitNormal_1.anyset")};
    };
    Template_OperationUpdateValues UpdateValues() = {};
    AnyOperation& MarkerTracking = Main.RunAnalysis.MarkerTracking;
    AnyOperation& InverseDyn = Main.RunAnalysis.InverseDynamics;
  };

};
