//define = [
// {"MODELTYPE":1},
// {"MODELTYPE":2},
// {"MODELTYPE":3},
// ]
//expect_errors = ['Model delete']

#include "../libdef.any"

#ifndef TEST_NAME
#define MODELTYPE 2
#endif

#path C3DFILEDATA_FILENAME "../../Application/Validation/AalborgMandibleValidation/Trials/ChewingClockwisePref0001/ChewingClockwisePref0001.c3d"


#if MODELTYPE == 1
#include "../../Application/Validation/AalborgMandibleValidation/Trials/ChewingClockwisePref0001/AnalysisFDK.main.any"
#else #if MODELTYPE == 2
#include "../../Application/Validation/AalborgMandibleValidation/Trials/ChewingClockwisePref0001/AnalysisFreeMovement.any"
#else #if MODELTYPE == 3
#include "../../Application/Validation/AalborgMandibleValidation/Trials/ChewingClockwisePref0001/AnalysisPlanar.main.any"
#endif#endif#endif


Main =
{
  #if MODELTYPE == 3
  AnyOperation& RunTest = Main.AnalysisMandible;
  #endif
};
