#include "../libdef.any"

#ifndef TEST_NAME
#define CREATE_IMAGE 1

#endif


#include "../../Application/Examples/AirlinePassenger/AirlinePassenger.main.any"

Main =
{
#ifndef CREATE_IMAGE
  AnyOperation& RunTest = Main.RunApplication;
#else
  #include "../Cameras.any"
  AnyOperation& CameraInitPos = Main.Study.InitialConditions;
  LoadTimeCam.CameraLookAtPoint = {0.25,-0.59,0};
  LoadTimeCam.CameraFieldOfView = DesignVar(1.45);
  LoadTimeCam.CameraDirection  = {0,0,1};
#endif
};
