//define = [
//  {'BM_SCALING':'_SCALING_STANDARD_'},
//  {'BM_SCALING':'_SCALING_UNIFORM_'},
//  {'BM_SCALING':'_SCALING_LENGTHMASS_'},
//  {'BM_SCALING':'_SCALING_LENGTHMASSFAT_'},
//  {'BM_SCALING':'_SCALING_XYZ_'},
//]
//save_study = "Main.Study"

#include "../libdef.any"

#ifndef TEST_NAME
  #define BM_SCALING 1
  #define TEST_NAME "test_FemoralTorsion.any_0"

#endif

#include "../../Application/Examples/FemoralTorsion/StandingModel.Main.any"

Main =
{
#ifndef CREATE_IMAGE
  AnyOperation& RunTest = Main.RunApplication;
#else
  #include "../Cameras.any"
  AnyOperation& CameraInitPos = Main.Study.InverseDynamics;
  LoadTimeCam.CameraLookAtPoint = {0.1,0.87,0};
  LoadTimeCam.CameraFieldOfView = DesignVar(2);
  LoadTimeCam.CameraDirection  = {1,0.2,0.5};
#endif
};
