//define = [
//    {'BM_LEG_LEFT': 'CONST_LEG_MODEL_Leg', 'BM_LEG_RIGHT': 'CONST_LEG_MODEL_Leg'},
//    {'BM_LEG_LEFT': 'CONST_LEG_MODEL_TLEM', 'BM_LEG_RIGHT': 'CONST_LEG_MODEL_TLEM'},
//]
#include "../AnyTest_Templates.any"

#include "../../Application/Examples/FreePosture/FreePostureFullBodyStatic.Main.any"

Main =
{
  AnyOperation& RunTest = Main.RunApplication;
};
