//# Note. Since these tests include main files from other
//# applications they alter the ANYBODY_PATH_MAINFILEDIR and
//# ANYBODY_PATH_MAINFILE preprocessor flags.
//#
//# If these flags are important to the model they must be mocked by the
//# test framework. This can be done by adding the following test directives.
//# path = {'ANYBODY_PATH_MAINFILEDIR':'../../Application/Examples/MoCapModel-Runner',
//#         'ANYBODY_PATH_MAINFILE':'../../Application/Examples/MoCapModel-Runner/MoCap_Runner.main.any' }
//#
//save_study = "Main.Studies.InverseDynamicStudy"
//define = [
//  {'MotionAndParameterOptimizationModel':'1',
//   'InverseDynamicModel':'0'},
//  {'MotionAndParameterOptimizationModel':'0',
//   'InverseDynamicModel':'1'},
//]

#include "../libdef.any"

#ifndef TEST_NAME
#define MotionAndParameterOptimizationModel 0
#define InverseDynamicModel 1
#endif

#if MotionAndParameterOptimizationModel == 1
#define OutputFileNamePrefix "_TEST_Runner"
#endif

#include "../../Application/Examples/Deprecated/MoCapModel-Runner/MoCap_Runner.main.any"


Main =
{
#ifndef CREATE_IMAGE
#if MotionAndParameterOptimizationModel == 1
  AnyOperation& RunTest = Main.RunMotionAndParameterOptimizationSequence;
#endif
#else
#endif
};
