//save_study=["Main.Study"]

#include "../libdef.any"

#include "../../Application/Examples/SpineFixationWithForceDepKinematics/SpineFixationWithForceDependentKinematics.main.any"

Main =
{
  AnyOperationSequence TestRunApplication = {
    AnyOperation& t1 = Main.RunApplication.CalibrationAnal;
    AnyOperation& t2 = Main.Study.Kinematics;
  };

#ifndef TEST_NAME
#define CREATE_IMAGE
#endif


#ifndef CREATE_IMAGE
  AnyOperation& RunTest = Main.TestRunApplication;
#else
  #include "../Cameras.any"
  AnyOperation& CameraInitPos = Main.Study.InitialConditions;
  LoadTimeCam.CameraLookAtPoint = {0.05,0.3,0};
  LoadTimeCam.CameraFieldOfView = DesignVar(0.95);
  LoadTimeCam.CameraDirection  = {-1,0.3,1};
#endif


};
