#include "../../Application/Validation/WilkeSpinalDiscPressure/SpinePressureSeatingFlexedNoSupport/SpinePressureSeatingFlexedNoSupport.main.any"

Main =
{
  AnyOperation& RunTest = Main.RunApplication;
};
