#include "../libdef.any"

#include "../../Application/Validation/WilkeSpinalDiscPressure/SpinePressureStandingLiftStretchedArms/SpinePressureStandingLiftStretchedArms.main.any"

#include "../test_tools.any"

Main =
{

  Main.Study =
  {
    EXPECT_RANGE(L5Sacrum, Main.Study.L5SacrumReac, 2014, 2226, Main.TestTrigger, "L5Sacrum outside validation");
  };

  AnyInt TestTrigger = DesignVar(0);

  OPERATION_TEST_TRIGGER(Main.Study.InverseDynamics.PreOperation, Main.TestTrigger);

#ifndef CREATE_IMAGE
  AnyOperation& RunTest = Main.RunApplication;
#else
  #include "../Cameras.any"
  AnyOperation& CameraInitPos = Main.Study.InitialConditions;
  LoadTimeCam.CameraLookAtPoint = {0.1,0.9,0};
  LoadTimeCam.CameraFieldOfView = DesignVar(2);
  LoadTimeCam.CameraDirection  = {0,0,1};
#endif
};
