//define = (
//  [
//    {'BM_LEG_MODEL':'OFF'},
//    {'BM_LEG_MODEL':'_LEG_MODEL_Leg_'},
//    {'BM_LEG_MODEL':'_LEG_MODEL_TLEM_'},
//    {'BM_LEG_MODEL':'_LEG_MODEL_TLEM2_'},
//  ],
//  [
//    {'BM_ARM_RIGHT': 'OFF'},
//    {'BM_ARM_RIGHT': 'ON'},
//  ],
//  [
//    {'BM_HAND_MODEL': '_HAND_MODEL_OFF_'},
//    {'BM_HAND_MODEL': '_HAND_MODEL_ANYBODY_'},
//  ],
//  [
//    {'BM_SCALING': '_SCALING_STANDARD_'},
//    {'BM_SCALING': '_SCALING_XYZ_'},
//  ],
//)
//ignore_errors = ['BodyModel.UnhallowedCombination','Model loading skipped']
//
#include "libdef.any"

#ifdef BM_ARM_RIGHT
#define BM_ARM_LEFT BM_ARM_RIGHT
#endif


Main =
{
  // #path HTML_DOC "<AMMR_PATH_DOC>/bm_config/index.html"
  #include "<ANYBODY_PATH_BODY>\HumanModel.any"

  AnyOperationDummy RunApplication = {};
};
