//define = (
//  [
//    {'BM_LEG_RIGHT':'_LEG_MODEL_OFF_'},
//    {'BM_LEG_RIGHT':'_LEG_MODEL_Leg_'},
//    {'BM_LEG_RIGHT':'_LEG_MODEL_TLEM_'},
//  ],
//  [ {'BM_TRUNK_NECK': 'OFF'},
//    {'BM_TRUNK_NECK': 'ON'},
//  ],
//  [
//    {'BM_ARM_RIGHT': 'OFF'},
//    {'BM_ARM_RIGHT': 'ON'},
//  ],
//  [
//    {'BM_ARM_DETAIL_HAND_RIGHT': '_HAND_SIMPLE_'},
//    {'BM_ARM_DETAIL_HAND_RIGHT': '_HAND_DETAILED_'},
//  ],
//)
//ignore_errors = ['BodyModel.UnhallowedCombination','Model loading skipped']
//
#path ANYBODY_PATH_OUTPUT "."
#include "libdef.any"

// MIRROR THE INPUTS TO THE LEFT SIDE
#ifdef BM_LEG_RIGHT
#define BM_LEG_LEFT BM_LEG_RIGHT
#endif

#ifdef BM_ARM_RIGHT
#define BM_ARM_LEFT BM_ARM_RIGHT
#endif

#ifdef BM_ARM_DETAIL_HAND_RIGHT
#define BM_ARM_DETAIL_HAND_LEFT BM_ARM_DETAIL_HAND_RIGHT
#endif

Main =
{
  // #include "<ANYBODY_PATH_BODY>\Documentation\BodyModel.parameters.any"
  #include "<ANYBODY_PATH_BODY>\HumanModel.any"

  AnyOperationDummy RunApplication = {};
};
