//define = (
//  [
//    {'BM_LEG_RIGHT':'CONST_LEG_MODEL_OFF'},
//    {'BM_LEG_RIGHT':'CONST_LEG_MODEL_Leg'},
//    {'BM_LEG_RIGHT':'CONST_LEG_MODEL_TLEM','TLEM_VERSION':'"2.0"'},
//    {'BM_LEG_RIGHT':'CONST_LEG_MODEL_TLEM','TLEM_VERSION':'"1.1"'},
//  ],
//  [
//    {'BM_LEG_LEFT':'CONST_LEG_MODEL_OFF'},
//    {'BM_LEG_LEFT':'CONST_LEG_MODEL_Leg'},
//    {'BM_LEG_LEFT':'CONST_LEG_MODEL_TLEM', 'TLEM_VERSION':'"2.0"'},
//    {'BM_LEG_LEFT':'CONST_LEG_MODEL_TLEM', 'TLEM_VERSION':'"1.1"'},
//  ],
//  [
//    {'BM_TRUNK_NECK': 'OFF'},
//    {'BM_TRUNK_NECK': 'ON'},
//  ],
//)
//ignore_errors = ['BodyModel.UnhallowedCombination','Model loading skipped']
//
#path ANYBODY_PATH_OUTPUT "."
#include "libdef.any"


Main =
{
  // #include "<ANYBODY_PATH_BODY>\Documentation\BodyModel.parameters.any"
  #include "<ANYBODY_PATH_BODY>\HumanModel.any"

  AnyOperationDummy RunApplication = {};
};
