//define = (
//  [
//    {'BM_ARM_LEFT': 'ON'},
//    {'BM_ARM_LEFT': 'OFF'},
//  ],
//  [
//    {'BM_ARM_RIGHT': 'ON'},
//    {'BM_ARM_RIGHT': 'OFF'},
//  ],
//  [
//    {'BM_ARM_DETAIL_HAND_RIGHT': '_HAND_SIMPLE_'},
//    {'BM_ARM_DETAIL_HAND_RIGHT': '_HAND_DETAILED_'},
//  ],
//  [
//    {'BM_ARM_DETAIL_HAND_LEFT': '_HAND_SIMPLE_'},
//    {'BM_ARM_DETAIL_HAND_LEFT': '_HAND_DETAILED_'},
//  ],
//  [
//    {'BM_TRUNK_NECK': 'OFF'},
//    {'BM_TRUNK_NECK': 'ON'},
//  ],
//  [
//    {'BM_ARM_SHOULDER_RHYTHM_RIGHT': 'OFF'},
//    {'BM_ARM_SHOULDER_RHYTHM_RIGHT': 'ON'},
//  ],
//  [
//    {'BM_ARM_SHOULDER_RHYTHM_LEFT': 'OFF'},
//    {'BM_ARM_SHOULDER_RHYTHM_LEFT': 'ON'},
//  ],
//)
//ignore_errors = ['BodyModel.UnhallowedCombination','Model loading skipped']
//
#path ANYBODY_PATH_OUTPUT "."
#include "libdef.any"


Main =
{
  // #include "<ANYBODY_PATH_BODY>\Documentation\BodyModel.parameters.any"
  #include "<ANYBODY_PATH_BODY>\HumanModel.any"

  AnyOperationDummy RunApplication = {};
};
