//define = (
//  [
//    {'BM_LEG_LEFT': 'CONST_LEG_MODEL_TLEM',
//     'BM_LEG_RIGHT': 'CONST_LEG_MODEL_TLEM',
//     'TLEM_VERSION':'"2.0"'},
//    {'BM_LEG_LEFT': 'CONST_LEG_MODEL_TLEM',
//     'BM_LEG_RIGHT': 'CONST_LEG_MODEL_TLEM',
//     'TLEM_VERSION':'"1.1"'},
//    {'BM_LEG_LEFT': 'CONST_LEG_MODEL_Leg',
//     'BM_LEG_RIGHT': 'CONST_LEG_MODEL_Leg'},
//  ],
//  [
//    {'BM_LEG_MUSCLES_LEFT': 'CONST_MUSCLES_NONE'},
//    {'BM_LEG_MUSCLES_LEFT': 'CONST_MUSCLES_SIMPLE'},
//    {'BM_LEG_MUSCLES_LEFT': 'CONST_MUSCLES_3E_HILL'},
//  ],
//  [
//    {'BM_LEG_MUSCLES_RIGHT': 'CONST_MUSCLES_NONE'},
//    {'BM_LEG_MUSCLES_RIGHT': 'CONST_MUSCLES_SIMPLE'},
//    {'BM_LEG_MUSCLES_RIGHT': 'CONST_MUSCLES_3E_HILL'},
//  ],
//  [
//    {'BM_TRUNK_MUSCLES': 'CONST_MUSCLES_NONE'},
//    {'BM_TRUNK_MUSCLES': 'CONST_MUSCLES_SIMPLE'},
//  ],
//)
//ignore_errors = ['BodyModel.UnhallowedCombination','Model loading skipped']
//

#path ANYBODY_PATH_OUTPUT "."
#include "libdef.any"

Main =
{
  // #include "<ANYBODY_PATH_BODY>\Documentation\BodyModel.parameters.any"
  #include "<ANYBODY_PATH_BODY>\HumanModel.any"

  AnyOperationDummy RunApplication = {};
};
