//define = (
//  [
//    {'BM_HAND_MODEL': '_HAND_MODEL_RUHM_'},
//  ],
//  [
//    {'BM_SCALING': 'OFF'},
//    {'BM_SCALING': '_MUSCLES_SIMPLE_'},
//    {'BM_SCALING': '_MUSCLES_3E_HILL_'},
//  ],
//  [
//    {'BM_LEG_MUSCLES_RIGHT': 'OFF'},
//    {'BM_LEG_MUSCLES_RIGHT': '_MUSCLES_SIMPLE_'},
//    {'BM_LEG_MUSCLES_RIGHT': '_MUSCLES_3E_HILL_'},
//  ]
//)

#include "libdef.any"

Main = {

  #define BM_TRUNK_MUSCLES OFF
  #define BM_ARM_LEFT ON
  #define BM_ARM_RIGHT ON

#ifndef TEST_NAME

  #define BM_SCALING _SCALING_XYZ_
  #define BM_LEG_MODEL OFF
  #define BM_HAND_MODEL _HAND_MODEL_RUHM_
#endif


  #include "<ANYBODY_PATH_BODY>/HumanModel.any"


  AnyKinStudy Study = {
    AnyFolder& Model = Main.HumanModel.BodyModelWithDefaultDrivers;
    nStep = 1;
    Gravity = {0,0,0};


  };


};
