//define = [
//    {'BM_ARM_THORAX_SCAPULA_CONTACT': '_MULTIPLE_POINT_CONTACT_'},
//    {'BM_ARM_THORAX_SCAPULA_CONTACT': '_ELLIPSOID_CONTACT_'},
//]
//warnings_to_include = [
//    "Penetration of surface",
//    "Number of allowed iterations for contact solution has been exceeded",
//]
//fatal_warnings = True

#define ANYBODY_PATH_OUTPUT "."


#include "libdef.any"

// ----------------------------------------------------------
// Model configuration:
// For more info on body model configuration options please load the model and double click on:
// #path HTML_DOC "<AMMR_PATH_DOC>/bm_config/index.html"
// ----------------------------------------------------------

//#define USE_OFFSET_NORM

#define BM_ARM_THORAXPOINTS_FOR_SCAPULA_CONTACT
#define BM_ARM_THORAX_SCAPULA_MULTIPLE_POINT_CONTACT
#define BM_LEG_RIGHT OFF
#define BM_LEG_LEFT OFF

#define BM_ARM_DELTOID_WRAPPING ON


#define BM_SCALING _SCALING_LENGTHMASSFAT_

#ifndef TEST_NAME
  #define BM_ARM_THORAX_SCAPULA_CONTACT _ELLIPSOID_CONTACT_
#endif

// Use interpolation drivers to define motion
#define DriverSelection "FreePostureMove"

// actual model
#include "DynamicTest/FreePostureFullBodyStatic.Main.any"
Main = {

  Main.HumanModel.Anthropometrics.SegmentDimensions.Right.UpperArmLength = 0.35;
  Main.HumanModel.Anthropometrics.SegmentDimensions.Right.LowerArmLength = 0.35;
  Main.HumanModel.Anthropometrics.SegmentDimensions.Right.HandLength = 0.15;
//  Main.HumanModel.Anthropometrics.SegmentDimensions.Right.HandBreadth = 0.15;

  Main.HumanModel.Anthropometrics.SegmentDimensions.Left.UpperArmLength = 0.35;
  Main.HumanModel.Anthropometrics.SegmentDimensions.Left.LowerArmLength = 0.35;
  Main.HumanModel.Anthropometrics.SegmentDimensions.Left.HandLength = 0.15;
//  Main.HumanModel.Anthropometrics.SegmentDimensions.Left.HandBreadth = 0.15;


  Main.Study ={

    AnyInt test1= assert(ltfun(Main.Study.SymmetryCheck.Arm.Muscle.Comparison.MaxFtDif,0.75),
    "Arm model symmetry");

  };


  AnyOperation& RunTest = Main.RunApplication;
};
