#ifndef TESTS_TEST_TOOLS_ANY
#define TESTS_TEST_TOOLS_ANY


#define EXPECT_RANGE(NAME, VAR, MIN, MAX, TRIGGER, MESSAGE) AnyInt Expect_Range_##NAME = expect( orfun( not(TRIGGER),  andfun(ltfun(VAR, MAX)  ,gtfun(VAR, MIN)  )  ), MESSAGE )
#define EXPECT_NOT_IN_RANGE(NAME, VAR, MIN, MAX, TRIGGER, MESSAGE) AnyInt Expect_Range_##NAME = expect( orfun( not(TRIGGER),  orfun(gtfun(VAR, MAX)  ,ltfun(VAR, MIN)  )  ), MESSAGE )

#define OPERATION_TEST_TRIGGER(OPR, TRIGGER) Main = { \
  OPR = \
  {\
    AnyOperationSequence TriggerTestEvaluation = {\
      AnyOperationSetValue SetTestTrigger = \
      {\
        AnyInt dummyOne = 1;\
        Source = {&dummyOne};\
        Target = {&TRIGGER};\
      };\
      AnyOperationMacro UpdateValues = {\
        MacroStr = {\
          "classoperation Main" + strquote("Update Values")\
        };\
      };\
    }; \
  };\
}

#endif
