AnyFolder JointsAndDrivers = {
    AnyComponentDefinition obj = {
      NameCast = "OptimizedJointDrivers";
    };

AnyKinDriver JntDriverTrunkFull = {

  #include "InterpolateJointAngleData.any"
  FileReader.FileName = TEMP_PATH + "/" + MOCAP_TEST_FILENAME_PREFIX + MOCAP_OUTPUT_FILENAME_PREFIX + Main.ModelSetup.TrialSpecificData.TrialFileName + "-euler-trunk-full.txt";

  /// The default data if no joint angles files have been generated.
  FileReader.Data0 = repmat(
    1, FileReader.Length0,
    arrcat({Main.HumanModel.Mannequin.Posture.PelvisPosX,
            Main.HumanModel.Mannequin.Posture.PelvisPosY,
            Main.HumanModel.Mannequin.Posture.PelvisPosZ,
            Main.HumanModel.Mannequin.Posture.PelvisRotX*pi/180,
            Main.HumanModel.Mannequin.Posture.PelvisRotY*pi/180,
            Main.HumanModel.Mannequin.Posture.PelvisRotZ*pi/180
           },repmat(nDim-6,0.0)
    )
  );
  AnyKinMeasure& PelvisPosX = ...BodyModel.Interface.Trunk.PelvisPosX;
  AnyKinMeasure& PelvisPosY = ...BodyModel.Interface.Trunk.PelvisPosY;
  AnyKinMeasure& PelvisPosZ = ...BodyModel.Interface.Trunk.PelvisPosZ;
  AnyKinMeasure& PelvisRotX = ...BodyModel.Interface.Trunk.PelvisRotX;
  AnyKinMeasure& PelvisRotY = ...BodyModel.Interface.Trunk.PelvisRotY;
  AnyKinMeasure& PelvisRotZ = ...BodyModel.Interface.Trunk.PelvisRotZ;

  AnyKinMeasureOrg& SacrumPelvis = ...BodyModel.Interface.Trunk.Spine.SacrumPelvis;
  AnyKinMeasureOrg& L5Sacrum =...BodyModel.Interface.Trunk.Spine.L5Sacrum;
  AnyKinMeasureOrg& L4L5 =...BodyModel.Interface.Trunk.Spine.L4L5;
  AnyKinMeasureOrg& L3L4 =...BodyModel.Interface.Trunk.Spine.L3L4;
  AnyKinMeasureOrg& L2L3 =...BodyModel.Interface.Trunk.Spine.L2L3;
  AnyKinMeasureOrg& L1L2 =...BodyModel.Interface.Trunk.Spine.L1L2;
  AnyKinMeasureOrg& T12L1 =...BodyModel.Interface.Trunk.Spine.T12L1;
  AnyKinMeasureOrg& T1C7 =...BodyModel.Interface.Trunk.Spine.T1C7;
  AnyKinMeasureOrg& C7C6 =...BodyModel.Interface.Trunk.Spine.C7C6;
  AnyKinMeasureOrg& C6C5 =...BodyModel.Interface.Trunk.Spine.C6C5;
  AnyKinMeasureOrg& C5C4 =...BodyModel.Interface.Trunk.Spine.C5C4;
  AnyKinMeasureOrg& C4C3 =...BodyModel.Interface.Trunk.Spine.C4C3;
  AnyKinMeasureOrg& C3C2 =...BodyModel.Interface.Trunk.Spine.C3C2;
  AnyKinMeasureOrg& C2C1 =...BodyModel.Interface.Trunk.Spine.C2C1;
  AnyKinMeasureOrg& C1C0 =...BodyModel.Interface.Trunk.Spine.C1C0;

  Reaction.Type = repmat(nDim, Off);
};


  #if BM_LEG_LEFT & (BM_LEG_MODEL == _LEG_MODEL_TLEM_ | BM_LEG_MODEL == _LEG_MODEL_TLEM2_)
  AnyKinDriver JntDriverLeftLegTD = {

    #include "InterpolateJointAngleData.any"
    FileReader.FileName = TEMP_PATH + "/" + MOCAP_TEST_FILENAME_PREFIX +MOCAP_OUTPUT_FILENAME_PREFIX + Main.ModelSetup.TrialSpecificData.TrialFileName + "-euler-left_leg_tlem.txt";
    FileReader.Data0 = zeros(nDim, FileReader.Length0 );

    AnyKinMeasure& HipFlexion = ...BodyModel.Interface.Left.HipFlexion;
    AnyKinMeasure& HipAbduction = ...BodyModel.Interface.Left.HipAbduction;
    AnyKinMeasure& HipExternalRotation = ...BodyModel.Interface.Left.HipExternalRotation;
    AnyKinMeasure& KneeFlexion = ...BodyModel.Interface.Left.KneeFlexion;
    AnyKinMeasure& AnklePlantarFlexion = ...BodyModel.Interface.Left.AnklePlantarFlexion;
    AnyKinMeasure& SubTalarEversion = ...BodyModel.Interface.Left.SubTalarEversion;
    Reaction.Type = repmat(nDim, Off);
  };
  #endif


  #if BM_LEG_RIGHT & (BM_LEG_MODEL == _LEG_MODEL_TLEM_ | BM_LEG_MODEL == _LEG_MODEL_TLEM2_)
  AnyKinDriver JntDriverRightLegTD = {
    #include "InterpolateJointAngleData.any"
    FileReader.FileName = TEMP_PATH + "/" + MOCAP_TEST_FILENAME_PREFIX +  MOCAP_OUTPUT_FILENAME_PREFIX + Main.ModelSetup.TrialSpecificData.TrialFileName + "-euler-right_leg_tlem.txt";
    FileReader.Data0 = zeros(nDim, FileReader.Length0 );

    AnyKinMeasure& HipFlexion = ...BodyModel.Interface.Right.HipFlexion;
    AnyKinMeasure& HipAbduction = ...BodyModel.Interface.Right.HipAbduction;
    AnyKinMeasure& HipExternalRotation = ...BodyModel.Interface.Right.HipExternalRotation;
    AnyKinMeasure& KneeFlexion = ...BodyModel.Interface.Right.KneeFlexion;
    AnyKinMeasure& AnklePlantarFlexion = ...BodyModel.Interface.Right.AnklePlantarFlexion;
    AnyKinMeasure& SubTalarEversion = ...BodyModel.Interface.Right.SubTalarEversion;
    Reaction.Type = repmat(nDim, Off);
  };
  #endif


  #if BM_LEG_LEFT & BM_LEG_MODEL == _LEG_MODEL_LEG_
  AnyKinDriver JntDriverLeftLeg = {
    #include "InterpolateJointAngleData.any"
    FileReader.FileName = TEMP_PATH + "/" + MOCAP_TEST_FILENAME_PREFIX + MOCAP_OUTPUT_FILENAME_PREFIX + Main.ModelSetup.TrialSpecificData.TrialFileName + "-euler-left_leg.txt";
    FileReader.Data0 = zeros(nDim, FileReader.Length0 );

    AnyKinMeasure& HipFlexion = ...BodyModel.Interface.Left.HipFlexion;
    AnyKinMeasure& HipAbduction = ...BodyModel.Interface.Left.HipAbduction;
    AnyKinMeasure& HipExternalRotation = ...BodyModel.Interface.Left.HipExternalRotation;
    AnyKinMeasure& KneeFlexion = ...BodyModel.Interface.Left.KneeFlexion;
    AnyKinMeasure& AnklePlantarFlexion = ...BodyModel.Interface.Left.AnklePlantarFlexion;
    AnyKinMeasure& AnkleEversion = ...BodyModel.Interface.Left.AnkleEversion;
    Reaction.Type = repmat(nDim, Off);
  };
  #endif


  #if BM_LEG_RIGHT & BM_LEG_MODEL == _LEG_MODEL_LEG_
  AnyKinDriver JntDriverRightLeg = {
    #include "InterpolateJointAngleData.any"
    FileReader.FileName = TEMP_PATH + "/" + MOCAP_TEST_FILENAME_PREFIX + MOCAP_OUTPUT_FILENAME_PREFIX + Main.ModelSetup.TrialSpecificData.TrialFileName + "-euler-right_leg.txt";
    FileReader.Data0 = zeros(nDim, FileReader.Length0 );

    AnyKinMeasure& HipFlexion = ...BodyModel.Interface.Right.HipFlexion;
    AnyKinMeasure& HipAbduction = ...BodyModel.Interface.Right.HipAbduction;
    AnyKinMeasure& HipExternalRotation = ...BodyModel.Interface.Right.HipExternalRotation;
    AnyKinMeasure& KneeFlexion = ...BodyModel.Interface.Right.KneeFlexion;
    AnyKinMeasure& AnklePlantarFlexion = ...BodyModel.Interface.Right.AnklePlantarFlexion;
    AnyKinMeasure& AnkleEversion = ...BodyModel.Interface.Right.AnkleEversion;
    Reaction.Type = repmat(nDim, Off);
  };
  #endif

  #if BM_ARM_LEFT == ON
  AnyKinDriver JntDriverLeftArm = {
    #include "InterpolateJointAngleData.any"
    FileReader.FileName = TEMP_PATH + "/" + MOCAP_TEST_FILENAME_PREFIX + MOCAP_OUTPUT_FILENAME_PREFIX + Main.ModelSetup.TrialSpecificData.TrialFileName + "-rotvec-left_arm_shoulder.txt";
    FileReader.Data0 = zeros(nDim, FileReader.Length0 );

    AnyKinMeasure& ThoraxClavicula=...BodyModel.Interface.Left.RotVectorMeasures.ThoraxClavicula;
    AnyKinMeasure& ClaviculaScapula=...BodyModel.Interface.Left.RotVectorMeasures.ClaviculaScapula;
    AnyKinMeasure& ScapulaHumerus=...BodyModel.Interface.Left.RotVectorMeasures.ScapulaHumerus;
    AnyKinMeasure& HumerusUlna=...BodyModel.Interface.Left.RotVectorMeasures.HumerusUlna;
    AnyKinMeasure& UlnaRadius=...BodyModel.Interface.Left.RotVectorMeasures.UlnaRadius;
    AnyKinMeasure& RadiusWrist=...BodyModel.Interface.Left.RotVectorMeasures.RadiusWrist;
    AnyKinMeasure& WristHand=...BodyModel.Interface.Left.RotVectorMeasures.WristHand;

    Reaction.Type = repmat(nDim, Off);
  };

  #if BM_HAND_MODEL == _HAND_MODEL_ANYBODY_ | BM_HAND_MODEL == _HAND_MODEL_RUHM_
  AnyKinDriver JntDriverLeftDetailedHand = {
    #include "InterpolateJointAngleData.any"
    FileReader.FileName = TEMP_PATH + "/" + MOCAP_TEST_FILENAME_PREFIX + MOCAP_OUTPUT_FILENAME_PREFIX + Main.ModelSetup.TrialSpecificData.TrialFileName + "-euler-left_detailed_hand.txt";
    FileReader.Data0 = zeros(nDim, FileReader.Length0 );

    AnyKinMeasure& CMC1Flexion = ...BodyModel.Interface.Left.Hand.Finger1.CMCFlexion;
    AnyKinMeasure& CMC1Abduction = ...BodyModel.Interface.Left.Hand.Finger1.CMCAbduction;
    AnyKinMeasure& MCP1Flexion = ...BodyModel.Interface.Left.Hand.Finger1.MCPFlexion;
    AnyKinMeasure& MCP1Abduction = ...BodyModel.Interface.Left.Hand.Finger1.MCPAbduction;
    AnyKinMeasure& DIP1Flexion = ...BodyModel.Interface.Left.Hand.Finger1.DIPFlexion;

    AnyKinMeasure& CMC2Flexion = ...BodyModel.Interface.Left.Hand.Finger2.CMCFlexion;
    AnyKinMeasure& CMC2Abduction = ...BodyModel.Interface.Left.Hand.Finger2.CMCAbduction;
    AnyKinMeasure& MCP2Flexion = ...BodyModel.Interface.Left.Hand.Finger2.MCPFlexion;
    AnyKinMeasure& MCP2Abduction = ...BodyModel.Interface.Left.Hand.Finger2.MCPAbduction;
    AnyKinMeasure& PIP2Flexion = ...BodyModel.Interface.Left.Hand.Finger2.PIPFlexion;
    AnyKinMeasure& DIP2Flexion = ...BodyModel.Interface.Left.Hand.Finger2.DIPFlexion;

    AnyKinMeasure& CMC3Flexion = ...BodyModel.Interface.Left.Hand.Finger3.CMCFlexion;
    AnyKinMeasure& CMC3Abduction = ...BodyModel.Interface.Left.Hand.Finger3.CMCAbduction;
    AnyKinMeasure& MCP3Flexion = ...BodyModel.Interface.Left.Hand.Finger3.MCPFlexion;
    AnyKinMeasure& MCP3Abduction = ...BodyModel.Interface.Left.Hand.Finger3.MCPAbduction;
    AnyKinMeasure& PIP3Flexion = ...BodyModel.Interface.Left.Hand.Finger3.PIPFlexion;
    AnyKinMeasure& DIP3Flexion = ...BodyModel.Interface.Left.Hand.Finger3.DIPFlexion;

    AnyKinMeasure& CMC4Flexion = ...BodyModel.Interface.Left.Hand.Finger4.CMCFlexion;
    AnyKinMeasure& CMC4Abduction = ...BodyModel.Interface.Left.Hand.Finger4.CMCAbduction;
    AnyKinMeasure& MCP4Flexion = ...BodyModel.Interface.Left.Hand.Finger4.MCPFlexion;
    AnyKinMeasure& MCP4Abduction = ...BodyModel.Interface.Left.Hand.Finger4.MCPAbduction;
    AnyKinMeasure& PIP4Flexion = ...BodyModel.Interface.Left.Hand.Finger4.PIPFlexion;
    AnyKinMeasure& DIP4Flexion = ...BodyModel.Interface.Left.Hand.Finger4.DIPFlexion;

    AnyKinMeasure& CMC5Flexion = ...BodyModel.Interface.Left.Hand.Finger5.CMCFlexion;
    AnyKinMeasure& CMC5Abduction = ...BodyModel.Interface.Left.Hand.Finger5.CMCAbduction;
    AnyKinMeasure& MCP5Flexion = ...BodyModel.Interface.Left.Hand.Finger5.MCPFlexion;
    AnyKinMeasure& MCP5Abduction = ...BodyModel.Interface.Left.Hand.Finger5.MCPAbduction;
    AnyKinMeasure& PIP5Flexion = ...BodyModel.Interface.Left.Hand.Finger5.PIPFlexion;
    AnyKinMeasure& DIP5Flexion = ...BodyModel.Interface.Left.Hand.Finger5.DIPFlexion;

    Reaction.Type = repmat(nDim, Off);
  };
  #endif


  #endif

  #if BM_ARM_RIGHT == ON
  AnyKinDriver JntDriverRightArm = {
    #include "InterpolateJointAngleData.any"
    FileReader.FileName = TEMP_PATH + "/" + MOCAP_TEST_FILENAME_PREFIX + MOCAP_OUTPUT_FILENAME_PREFIX + Main.ModelSetup.TrialSpecificData.TrialFileName + "-rotvec-right_arm_shoulder.txt";
    FileReader.Data0 = zeros(nDim, FileReader.Length0 );

    AnyKinMeasure& ThoraxClavicula=...BodyModel.Interface.Right.RotVectorMeasures.ThoraxClavicula;
    AnyKinMeasure& ClaviculaScapula=...BodyModel.Interface.Right.RotVectorMeasures.ClaviculaScapula;
    AnyKinMeasure& ScapulaHumerus=...BodyModel.Interface.Right.RotVectorMeasures.ScapulaHumerus;
    AnyKinMeasure& HumerusUlna=...BodyModel.Interface.Right.RotVectorMeasures.HumerusUlna;
    AnyKinMeasure& UlnaRadius=...BodyModel.Interface.Right.RotVectorMeasures.UlnaRadius;
    AnyKinMeasure& RadiusWrist=...BodyModel.Interface.Right.RotVectorMeasures.RadiusWrist;
    AnyKinMeasure& WristHand=...BodyModel.Interface.Right.RotVectorMeasures.WristHand;

    Reaction.Type = repmat(nDim, Off);
  };

  #if BM_HAND_MODEL == _HAND_MODEL_ANYBODY_ | BM_HAND_MODEL == _HAND_MODEL_RUHM_
  AnyKinDriver JntDriverRightDetailedHand = {
    #include "InterpolateJointAngleData.any"
    FileReader.FileName = TEMP_PATH + "/" + MOCAP_TEST_FILENAME_PREFIX + MOCAP_OUTPUT_FILENAME_PREFIX + Main.ModelSetup.TrialSpecificData.TrialFileName + "-euler-right_detailed_hand.txt";
    FileReader.Data0 = zeros(nDim, FileReader.Length0 );

    AnyKinMeasure& CMC1Flexion = ...BodyModel.Interface.Right.Hand.Finger1.CMCFlexion;
    AnyKinMeasure& CMC1Abduction = ...BodyModel.Interface.Right.Hand.Finger1.CMCAbduction;
    AnyKinMeasure& MCP1Flexion = ...BodyModel.Interface.Right.Hand.Finger1.MCPFlexion;
    AnyKinMeasure& MCP1Abduction = ...BodyModel.Interface.Right.Hand.Finger1.MCPAbduction;
    AnyKinMeasure& DIP1Flexion = ...BodyModel.Interface.Right.Hand.Finger1.DIPFlexion;

    AnyKinMeasure& CMC2Flexion = ...BodyModel.Interface.Right.Hand.Finger2.CMCFlexion;
    AnyKinMeasure& CMC2Abduction = ...BodyModel.Interface.Right.Hand.Finger2.CMCAbduction;
    AnyKinMeasure& MCP2Flexion = ...BodyModel.Interface.Right.Hand.Finger2.MCPFlexion;
    AnyKinMeasure& MCP2Abduction = ...BodyModel.Interface.Right.Hand.Finger2.MCPAbduction;
    AnyKinMeasure& PIP2Flexion = ...BodyModel.Interface.Right.Hand.Finger2.PIPFlexion;
    AnyKinMeasure& DIP2Flexion = ...BodyModel.Interface.Right.Hand.Finger2.DIPFlexion;

    AnyKinMeasure& CMC3Flexion = ...BodyModel.Interface.Right.Hand.Finger3.CMCFlexion;
    AnyKinMeasure& CMC3Abduction = ...BodyModel.Interface.Right.Hand.Finger3.CMCAbduction;
    AnyKinMeasure& MCP3Flexion = ...BodyModel.Interface.Right.Hand.Finger3.MCPFlexion;
    AnyKinMeasure& MCP3Abduction = ...BodyModel.Interface.Right.Hand.Finger3.MCPAbduction;
    AnyKinMeasure& PIP3Flexion = ...BodyModel.Interface.Right.Hand.Finger3.PIPFlexion;
    AnyKinMeasure& DIP3Flexion = ...BodyModel.Interface.Right.Hand.Finger3.DIPFlexion;

    AnyKinMeasure& CMC4Flexion = ...BodyModel.Interface.Right.Hand.Finger4.CMCFlexion;
    AnyKinMeasure& CMC4Abduction = ...BodyModel.Interface.Right.Hand.Finger4.CMCAbduction;
    AnyKinMeasure& MCP4Flexion = ...BodyModel.Interface.Right.Hand.Finger4.MCPFlexion;
    AnyKinMeasure& MCP4Abduction = ...BodyModel.Interface.Right.Hand.Finger4.MCPAbduction;
    AnyKinMeasure& PIP4Flexion = ...BodyModel.Interface.Right.Hand.Finger4.PIPFlexion;
    AnyKinMeasure& DIP4Flexion = ...BodyModel.Interface.Right.Hand.Finger4.DIPFlexion;

    AnyKinMeasure& CMC5Flexion = ...BodyModel.Interface.Right.Hand.Finger5.CMCFlexion;
    AnyKinMeasure& CMC5Abduction = ...BodyModel.Interface.Right.Hand.Finger5.CMCAbduction;
    AnyKinMeasure& MCP5Flexion = ...BodyModel.Interface.Right.Hand.Finger5.MCPFlexion;
    AnyKinMeasure& MCP5Abduction = ...BodyModel.Interface.Right.Hand.Finger5.MCPAbduction;
    AnyKinMeasure& PIP5Flexion = ...BodyModel.Interface.Right.Hand.Finger5.PIPFlexion;
    AnyKinMeasure& DIP5Flexion = ...BodyModel.Interface.Right.Hand.Finger5.DIPFlexion;

    Reaction.Type = repmat(nDim, Off);
  };
  #endif


  #endif


};
