Views = {
    AnyFolder SetViewMacros = {
       AnyOperationMacro KinematicView = {
         MacroStr = {"classoperation "+ CompleteNameOf(&Main.ModelSetup.Views.KinematicView) + strquote("Set View") };
       };
       AnyOperationMacro InverseDynamicView = {
         MacroStr = {"classoperation "+ CompleteNameOf(&Main.ModelSetup.Views.InverseDynamicView) + strquote("Set View") };
       };
    };
    AnyFolder DrawGroups = {
      AnyDrawGroup All_Markers ={
        Objects = ObjSearchRecursive("Main.ModelSetup.MocapDrivers","*", "AnyDrawObject");
      };
      AnyDrawGroup All_MarkerArrows = {
        Objects = ObjSearchRecursive("Main.HumanModel.BodyModel","Arrows.*", "AnyDrawVector");
      };
      AnyDrawGroup All_Human ={
        Objects = ObjSearchRecursive("Main.HumanModel","*", "AnyDrawObject");
      };
      AnyDrawGroup All_Environment ={
        Objects = ObjSearchRecursive("Main.EnvironmentModel","*", "AnyDrawObject");
      };

      AnyDrawGroup All_Moving_Axis_Nodes ={
        Objects = arrcat(ObjSearchRecursive("Main.HumanModel.BodyModel.Right.Leg.Seg.Thigh","*", "AnyDrawNode"),
                ObjSearchRecursive("Main.HumanModel.BodyModel.Right.Leg.Seg.InvisibleFemur_TF","*", "AnyDrawNode"),
                ObjSearchRecursive("Main.HumanModel.BodyModel.Right.Leg.Seg.Shank","*", "AnyDrawNode"),
                ObjSearchRecursive("Main.HumanModel.BodyModel.Right.Leg.Seg.InvisibleTibia","*", "AnyDrawNode"));
      };

      AnyDrawGroup All ={
        Objects = ObjSearchRecursive("Main","*", "AnyDrawObject");
      };


      AnyDrawGroup All_Muscles =
      {
        Objects = arrcat( ObjSearchRecursive("Main.HumanModel.BodyModel","*", "AnyDrawMuscle"),
                          ObjSearchRecursive("Main.HumanModel.BodyModel.Trunk.Buckle", "*", "AnyDrawParamSurf"));
      };

      AnyDrawGroup All_StickFigure =
      {
        Objects = arrcat( ObjSearchRecursive("Main.ModelSetup.BVHFileData.Model","*", "AnyDrawSeg"),
                          ObjSearchRecursive("Main.ModelSetup.BVHFileData.Model","*", "AnyDrawNode"),
                          ObjSearchRecursive("Main.ModelSetup.BVHFileData.Model","*", "AnyDrawRefFrame"));
      };

      AnyDrawGroup All_Unfiltered_Markers =
      {
        Objects = arrcat(ObjSearchRecursive("Main.ModelSetup.MocapDrivers","*.Test_Visual.UnfilteredTest", "AnyDrawSphere"));
      };

      AnyDrawGroup All_Marker_Drivers =
      {
        Objects = arrcat(ObjSearchRecursive("Main.ModelSetup.MocapDrivers","*.Driver.Draw", "AnyDrawKinMeasure"));
      };

      AnyDrawGroup GRF_Trigger_volume =
      {
        Objects = arrcat(
             ObjSearch("Main.EnvironmentModel.ForcePlates.*.DrawUpperTriggerVolume", "AnyDrawLine"),
             ObjSearch("Main.EnvironmentModel.ForcePlates.*.DrawLowerTriggerVolume", "AnyDrawLine")
             );
      };

      AnyDrawGroup ForceRelatedObjects= {
        Objects = arrcat(
            ObjSearchRecursive("Main.EnvironmentModel.ForcePlates", "CenterOfPressure.Line", "AnyDrawObject"),
            ObjSearchRecursive("Main.EnvironmentModel.ForcePlates", "ForcePlate.COP_ball", "AnyDrawObject"),
            ObjSearchRecursive("Main.EnvironmentModel.ForcePlates", "ForcePlate.PlateSurface.COP_ball", "AnyDrawObject"),
            ObjSearchRecursive("Main.EnvironmentModel.ForcePlates", "ForcePlate.PlateSurface.COP_ball", "AnyDrawObject"),
            ObjSearchRecursive("Main.HumanModel.BodyModel.Left.Leg.Seg.Foot.ConditionalContact_Nodes", "DrwSphere", "AnyDrawObject"),
            ObjSearchRecursive("Main.HumanModel.BodyModel.Right.Leg.Seg.Foot.ConditionalContact_Nodes", "DrwSphere", "AnyDrawObject")
        );
      };
    };//DrawGroups
//    AnyStandardModelViewDefinition ViewAll = {
//      ViewName = "View all";
//      DrawGroupSequence = {&.DrawGroups.All};
//      Hide = {Off};
//      Reset = {Off};
//      ShowModelDefined = {Off};
//    };
    AnyStandardModelViewDefinition KinematicView ={
      ViewName = "AnyMoCap Kinematic View";
      DrawGroupSequence = {&.DrawGroups.All, &.DrawGroups.All_Muscles, &.DrawGroups.ForceRelatedObjects, &.DrawGroups.All_StickFigure};
      Reset = {On,Off, On,Off};
      Hide = {Off, On, On,On}; //Same behavior as not defining Hide.
      ShowModelDefined = {Off,Off, Off, Off};
      ShowAutoGenerated = {Off,Off, Off, Off}; //Same behavior as {Off, On}.
    };
    AnyStandardModelViewDefinition InverseDynamicView = {
      ViewName = "AnyMoCap InverseDynamic View";
      DrawGroupSequence = {&.DrawGroups.All, &.DrawGroups.All_MarkerArrows, &.DrawGroups.All_StickFigure, &.DrawGroups.All_Unfiltered_Markers, &.DrawGroups.All_Marker_Drivers};
      Reset = {On,Off,Off,Off,Off}; //Same behavior as not defining Reset.
      Hide = {Off, On,On, On, Off}; //Same behavior as not defining Hide.
      ShowModelDefined = {Off,Off,Off,Off,Off};
      ShowAutoGenerated = {Off,Off,Off,Off,Off}; //Same behavior as {Off, On}.
    };


};
