#class_template CreateLabFolder(_MOCAP_INPUT_DATA_TYPE= "c3d") {

#var AnyVec3 Gravity = -9.81*{0,0,1};

   AnyFolder LowPassFilterSettings =
   {
     #var AnyVar MarkerFilterCutOffFrequency = 5.0;
     #var AnyIntVar MarkerFilterOrder = 2;
     #var AnyVar ForceFilterCutOffFrequency = 5.0;
     #var AnyIntVar ForceFilterOrder = 2;
   };

   #if _MOCAP_INPUT_DATA_TYPE == "bvh"
   AnyVar BVH_TranslatoinScale = 1;
   AnyVar BVH_RotationScale = pi/180;
   #endif


};

#class_template CreateTrialFolder {


/// This is the name of the trial c3d file without extension
#var AnyStringVar  TrialFileName = MOCAP_NAME_MAINFILEDIR;

/// The calibraiton filename (static/dynamic) from which to load the
/// the optimized parameters.
#var AnyString LoadParametersFrom = {TrialFileName};


/// This the C3D frame where the analysis starts
/// Defaults to the first frame of the C3D file
#var AnyInt FirstFrame = .C3DFileData.Header.FirstFrameNo ;
/// This the C3D frame where the analysis ends
/// Defaults to the last frame of the C3D file
#var AnyInt LastFrame = .C3DFileData.Header.LastFrameNo ;

/// tStart specifies the time of the analysis. Setting this overrides
/// the 'FirstFrame' value
#var AnyFloatVar tStart = FirstFrame/.C3DFileData.Header.VideoFrameRate;
/// tEnd specifies the tEnd time of the analysis. Setting this overrides
/// the 'LastFrame' value
#var AnyFloatVar tEnd = LastFrame/.C3DFileData.Header.VideoFrameRate;

/// nStep specifies the number of steps to use in the analysis.
#var AnyIntVar nStep = round(.C3DFileData.Header.VideoFrameRate*(tEnd-tStart)+1);

//AnyFloat Sam = Main.ModelSetup.C3DFileData.Points.Abscissa.Sample;
//AnyFloat idx = DesignVar(1.0*Main.Main.ModelSetup.TrialSpecificData.tStart*.C3DFileData.Header.VideoFrameRate);
//AnyIntArray myval = iffun(lteqfun(idx, Sam), 0, 1);
//AnyIntVar idx_tStart = eqfun( round(Main.ModelSetup.C3DFileData.Points.Abscissa.Sample), {round(Main.Main.ModelSetup.TrialSpecificData.tStart*.C3DFileData.Header.VideoFrameRate)});

/// Convergence tolerance used in the parameter optimization.
#var AnyVar ParameterOptimizationConvergenceTol = 1e-4;

};// Template

#class_template CreateSubjectFolder {


};
