AnyFolder Pull ={
/*  AnyKinMeasureOrg Dist={
    AnyKinLinear  Lin={
      AnyRefNode &Box =...BaseObject;
      AnyRefFrame &Hand = ...TargetObject;
    };
    MeasureOrganizer ={..AxisNormalToSurfaceOfBaseObject};

  };*/

  AnyMuscleModelUsr1 ContactMuscleModel=   {
    F0 = 0.000000;
    S = ..UserDefinedStrengthFunction;

  };


  AnyKinLinear Lin={
    AnyRefNode &Box =..BaseObject;
    AnyRefFrame &Hand = ..TargetObject;
    Ref=0;
    //AnyDrawPLine drw={Thickness=.005; RGB={0,0,1};};
  };

  AnyRecruitedActuator ContactMuscle={
    AnyKinMeasureOrg LinX={
      AnyKinLinear &ref=..Lin;
      MeasureOrganizer={...Direction};
    };
    AnyMuscleModelUsr1 &ref1=.ContactMuscleModel;
    Type = NonPositive;
    EXCLUDE_MUSCLE_METABOLISM

  };

  AnyDrawVector DrawContact =     {
    AnyRefFrame &ref=..TargetObject;

    AnyVar Strength=   iffunc(.ContactMuscleModel.S,.ContactMuscleModel.S,0.00001);
    Vec =0.005*..DirectionVector*.ContactMuscle.Ft*..BaseObject.Axes';
    AnyVar lenght=Strength*(2-(1-Strength/sqrt(Strength^2)));
    //Vec =3*0.000005*..DirectionVector*lenght*..BaseObject.Axes';

    PointAway = Off;
    DrawCoord = Off;
    Line.RGB = {0,0,1};
    Line.Thickness = 0.015;
    Line.End.Thickness = 2*0.015;
    Line.End.Length = 4*0.015;
  };

};
